Simulations: Version=210
  Memo TitlePage
    # Evaluation of simulations of multi-species pasture

    _Rogerio Cichota, Plant and Food Research, New Zealand_

    ##Preamble
    Pastoral systems in New Zealand and around the world rely on a few managed plant species. Generally the swards comprise a grass species and may contain companion plants, as well as weeds. Thus pastures are typically composed of multiple species that compete but may also complement each other.  A very common managed sward is the grass-legume mix, with ryegrass-white clover being the prototypical mixture for subtropical and temperate grasslands.  Such combination of species is very successful due to synegies between the two species, with complementary growth patterns and the N fixation capability of white-clover.  However, the traditional ryegrass-white clover mixture can be succeptible to drought, has a very seasonal growth pattern, and typically has high N content in the green biomass which can lead to high levels of urinary N excreted by animals, a major source of N losses from pastoral grazing systems.
    The limitations of the traditional binary mixed pasture have led to increased interest in the use of alternative forage species, such as forbs, and on increasing the number of species in the sward. The importance of plant species diversity for enhancing ecosystem function has been debated by ecologists for some time (refs). The benefits include increased total biomass production, greater yield stability, improved soil quality and protection, improved water and nutrient use, among others.  However, the addition of alternative species can change the pasture’s seasonal growth pattern and the pattern will change with time as some species tend to become dominant and others are less persistant.
    Quantifying the performance of these alternative species when used in mixed swards and under different management is still an issue that needs further study .  Considering the limitation in scope and environmental conditions that can covered by experimentation, modelling must be an integral part of studying alternative and diverse pastures.

    **Objective:** Assemble and test a few combination of forage plant species in multi-species swards.  This will include comparison against experimental data and sensitivity analyses using simulatiopn that include species with current available forage models.

    ## Generic background
  Folder Replacements
    Manager ExtraVariables
```csharp
using APSIM.Core;
using System;
using System.Text;
using System.Linq;
using System.Xml.Serialization;
using System.Collections.Generic;
using Newtonsoft.Json;
using APSIM.Shared.Utilities;
using Models;
using Models.PMF;
using Models.Soils;
using Models.Core;
using Models.Climate;
using Models.Interfaces;
using Models.Soils.Nutrients;
using APSIM.Numerics;

namespace Models
{
    [Serializable] 
    public class Script : Model, IStructureDependency
    {
        [Link] private Clock Clock;
        [Link] private Zone myZone;
        [Link] private Weather Met;
        [Link] private Fertiliser Fert;
        [Link] private Irrigation Irrig;
        [Link] private ISummary mySummary;
        [Link] private Models.Surface.SurfaceOrganicMatter SOM;
        [Link] private Soils.Soil Soil;
        [Link(ByName = true)] private ISolute Urea;
        [Link(ByName = true)] private ISolute NO3;
        [Link(ByName = true)] private ISolute NH4;
        [Link(ByName = true)] private Nutrient Nutrient;
        private DateTime YearStartDate;
        private double yesterdayNconc;
        
        public IStructure Structure { private get; set; }

                    
        [JsonIgnore] public bool InitialDay { get; set; }
        [JsonIgnore] public double  InitialSoilOMN { get; set; }
        [JsonIgnore] public double  InitialSurfaceOMN { get; set; }
        [JsonIgnore] public double  InitialMineralN { get; set; }
        [JsonIgnore] public double AccumHarvestedWt { get; set; }
        [JsonIgnore] public double AccumHarvestedN { get; set; }
        [JsonIgnore] public double HerbageNConc { get; set; }

        private List<Plant> PMFSpecies = new List<Plant>();
        private List<AgPasture.PastureSpecies> AgPSpecies = new List<AgPasture.PastureSpecies>();


        

        [EventSubscribe("StartOfSimulation")]
        private void OnSimulationCommencing(object sender, EventArgs e)
        {
            InitialDay = true;

            // set up the links to all plant species
            foreach (Plant species in   Structure.FindChildren<Plant>(recurse: true, relativeTo: (INodeModel)myZone).OfType<IModel>().ToList())
                PMFSpecies.Add(species);
            foreach (AgPasture.PastureSpecies species in   Structure.FindChildren<AgPasture.PastureSpecies>(recurse: true, relativeTo: (INodeModel)myZone).OfType<IModel>().ToList())
                AgPSpecies.Add(species);
        }

        [EventSubscribe("StartOfDay")]
        private void OnStartOfDay(object sender, EventArgs e)
        {
            double allDM = 0.0;
            double allN = 0.0;
            foreach (Plant species in   Structure.FindChildren<Plant>(recurse: true, relativeTo: (INodeModel)myZone).OfType<IModel>().ToList())
            {
                allDM += species.AboveGround.Wt;
                allN += species.AboveGround.N;
            }
            foreach (AgPasture.PastureSpecies species in   Structure.FindChildren<AgPasture.PastureSpecies>(recurse: true, relativeTo: (INodeModel)myZone).OfType<IModel>().ToList())
            {
                allDM += species.AboveGround.Wt*0.1;
                allN += species.AboveGround.N*0.1;
            }
            yesterdayNconc =  MathUtilities.Divide(allN, allDM, 0.0);
        }

        [EventSubscribe("DoManagement")]
        private void OnDoManagement(object sender, EventArgs e)
        {
            if (InitialDay == true)
            {
                InitialSurfaceOMN = SOM.N;
                InitialSoilOMN = MathUtilities.Sum(Nutrient.FOM.N)+MathUtilities.Sum(Nutrient.Microbial.N)+MathUtilities.Sum(Nutrient.Humic.N);
                InitialMineralN = MathUtilities.Sum(Urea.kgha)+MathUtilities.Sum(NH4.kgha)+MathUtilities.Sum(NO3.kgha);
                InitialDay = false;

                // check whether we're in the north or south hemisphere
                if (Met.Latitude >= 0.0)
                    YearStartDate = DateTime.Parse("01/01/2000");
                else
                    YearStartDate = DateTime.Parse("01/07/2000");
            }

            HerbageNConc = yesterdayNconc;
        }
        
        [EventSubscribe("DoManagementCalculations")]
        private void OnDoManagementCalculations(object sender, EventArgs e)
        {
            //!!!!!! Plant Harvest !!!!!!
            if (Clock.Today.DayOfYear == YearStartDate.DayOfYear)
            {
                    AccumHarvestedWt = (double)Structure.Get("[DefoliationManager].Script.DefoliatedWt", relativeTo: myZone);
                    AccumHarvestedN = (double)Structure.Get("[DefoliationManager].Script.DefoliatedN", relativeTo: myZone);
            }
            else
            {
                    AccumHarvestedWt += (double)Structure.Get("[DefoliationManager].Script.DefoliatedWt", relativeTo: myZone);
                    AccumHarvestedN += (double)Structure.Get("[DefoliationManager].Script.DefoliatedN", relativeTo: myZone);
            }
        }
    }
}
```
    Plant PlantainForage: PlantType=PlantainForage
      Memo GeneralDescription
        _Rogerio Cichota, AgResearch, New Zealand_

        ## Preamble

        Plantain forage (*Plantago lanceolata*), also know as English plantain, ribgrass, or ribwort, is a herbaceous perennial herb with a broad distribution in the native grasslands of Eurasia ([#SagarHarper_1964]; [#StewartPlantain_1996]).  It is now common around the world in suitable habitats with temperate and subtropical climates.  The plant consists of a rosette of basal semi-erect leaves which may have one or more flowering stalks.  The leaves are green to grey-green in colour, have a characteristic lanceolate shape with 3 to 5 parallel veins along the length and have few or no hairs.  The stems are leafless, growing some 10-15cm above the leaves and have scattered hairs toward the base of the plant.  Each stalk terminates in an ovoid inflorescence containing many small flowers each with a pointed bract.  The inflrescence is 1-4cm long and changes shape over time (from a cone to a cilinder) as the flowers mature from the based to the top, the colour also changes from the initial grey-green to light brown when mature.  The flowering period goes from late spring to early fall and varies between plants, it can last several months for a population of plants in a given locale.  Forage plantain does not need vernalisation to trigger flowering.  The flowers are wind-pollinated and are replaced by a small seed capsule containing two small seeds, with weight varying between 1.5 and 2.0 mg per seed. Seeds have an oblong shape and the colour varies from dark brown to black.  The root system consists of a relatively shallow crown of coarse fibrous roots including adventitious roots ([#SandersonElwinger_2000a]) and although technically a taprooted species it does not have the typical solid deep taproot.  Plantain forage can allocate greater proportion of roots at depth, giving a competitive advantage over shallow root grasses ([#StewartPlantain_1996]; [#NieEtAl_2008]; [#vanDenBergeEtAl_2014]).

        Selection of plantain cultivars for use as forage have focused mostly on narrow leaf varieties, which have an erect, bushy, growth habit and ability to tiller under grazing ([#StewartPlantain_1996]), more recently some emphasis has also been put on the ability to growth over cold periods.  Forage plantain can grow large leaves, up to around 40cm instead of typical 15-25cm, and these are highly palatable to grazing animals, being specifically targeted by sheep ([#SagarHarper_1964]; [#StewartPlantain_1996]; [#RumballKeog_1997]; [#QuijadaThesis_2015]). Reproductive organs are less palatable and mature stalks are avoided by grazers ([#StewartPlantain_1996]; [#MoorheadPigot_2009]; [#AyalaEtAl_2011]).  Plantain forage is highly nutritious, has good digestibility, and the mineral composition usually is higher than ryegras-clover swards ([#StewartPlantain_1996]; [#JacobsWard_2010]; [#ElgersmaEtal_2014]; [#LeeEtAlYields_2015]).  Potential medicinal effects of plantain have been suggested and few bio-active compounds that may alter rumen fermentation and N partitionin in the animal are being investigated ([#StewartPlantain_1996]; [#QuijadaThesis_2015]; [#JansmaThesis_2016]).

        **Objective:**  The model presented here has been built using the Plant Modelling Framework (PMF) of [#brown_plant_2014] to simulate the growth of a forage plantin crop.  Currently, the focus is on describing biomass accumulation and regrowth after harvest on monocultural swards. As part of APSIM's PMF, using plantain forage in mixed swards is possible, but this has not been properly tested yet.  Likewise, describing the effect of population decrease on plant growth was not attempted; for swards free of weeds and within typical population ranges, the changes in plant size (number of tillers) and LAI should compensate for loss of population, but competition with weeds and others would alter this pattern significantly.
        Simulating variations in plant N concentration (seasonal or due to changes in soil status)  is not a major focus of the current model.  Further development of PMF's supply/demand processes are needed for capturing the variations in N content typically seen in perennial species.

        ## Presentation

        This model has been built using the Plant Modelling Framework (PMF) of [#brown_plant_2014] to simulate the growth of a plantain forage crop ( _Plantago lanceolata_ ).  The model focus, thus, on describing primarily the vegetative growth, with a simplified account of the reproductive phase, without explicit considering flowers and seeds (these may be included in future releases).  To simulate the aboveground plant structure, including the photosynthesis process, the PlantainForage model uses the SimpleLeaf procedure of PMF.  The model describes a semi-perennial crop, with phenology rewinding to the vegetative stage at the end of the reproductive phase.

        ## Inclusion in APSIM simulations

        A forage plantain crop can be included in a simulation the same as any other APSIM crop.

         - The PlantainForage object can be dragged or copied from the Crop folder in the tool box into a Field in your simulation;
         - To become active and grow, plantain needs to be sown using a manager script with a sowing rule. e.g.:
        ~~~
         PlantainForage.Sow(cultivar: Tonic, population: 300, depth: 10, rowSpacing: 150);
        ~~~
        If a specified cultivar is not available, a fatal error will be thrown.

        ### Harvest and biomass removal

        Plantain forage biomass can be removed by raising one of the valid methods: Harvest, Cut, Graze, or Prune; this is done using a manager script, similarly to other crops.  The proportion of the biomass of each organ that is removed from the system and/or added to the residue pools may be specified; otherwise defaults will be used.  Note that the sum of fractions removed and added to residue should be <= 1.0.  To specify the proportions for removal in a manager script, use a RemovalFractions class as shown below:
        ~~~
        [#EventSubscribe("Commencing")]
        private void OnSimulationCommencing(object sender, EventArgs e)
        {
          RemoveFraction = new RemovalFractions(PlantainForage.Organs);
        }
        [#EventSubscribe("DoManagement")]
        private void OnDoManagement(object sender, EventArgs e)
        {
          if (Clock.Today.Date == HarvestDate)
          {
            RemoveFraction.SetFractionToRemove("Leaf", 0.80);
            RemoveFraction.SetFractionToRemove("Stem", 0.50);
            RemoveFraction.SetFractionToResidue("leaf",0.05);
            PlantainForage.Harvest(RemoveFraction);
          }
        }
        ~~~
        The RemovalFractions class can be sent with Harvest, Cut, Graze, or Prune events. All parameters are optional, defaults are used whenever any value is not specified.

        ### Crop termination
        To fully terminate a crop the EndCrop event should be raised:
        ~~~
         PlantainForage.EndCrop();
        ~~~
        Once a crop has been ended the field is open to be used by another APSIM plant model, or another plantain crop.  Note that ending plantain forage is not necessary before sowing another crop, competition for resources will take place between crops when there is more than one in the field.

        ## Acknowledgements
        This model was developed with help from Brittany Paton and Russel McAuliffe organising data and simulations. Datasets were kindly shared by Julia M. Lee and the Forages for Reduced Nitrogen Leaching (FRNL) programme.
      Phenology
        Memo Description
          The duration of each phenologic phase in plantain forage is controlled either by the accumulation of thermal time or photoperiod.
        SubDailyInterpolation ThermalTime: agregationMethod=0
          Memo Description
            The thermal time is calculated from the daily average temperature using three cardinal temperatures: minimum, maximum, and optimum.  Crop development acelerates as temperature increases from minimum to optimum and slows down after that, stopping completely when maximum temperature is reached.  There is very little information about these thresholds for plantain, the minimum temperature seem to be quite variable as one of the main traits that vary among cultivars is the growth over winter. For "chinese plantain" ( _Plantago  asiatica_ ) the minimum temperature varies between 3 and 14 oC ([#IshikawaEtAl_2007]), which gives an idea of potential variations for this parameter in plantain. Plantain forage is tolerant to high temperatures ([#StewartPlantain_1996]; [#NieEtAl_2008]) and outgrows ryegrass over summer in subtropical climate ([#MoorheadPigot_2009]). The data for chinese plantain suggest similar growth, and thus the optimum and maximum temperature for it, 30 and 38oC respectively ([#IshikawaEtAl_2007]), should give a good indication of the values for forage plantain.
          XYPairs Response: X=[9, 30, 38]; Y=[0, 25, 0]
          ThreeHourAirTemperature InterpolationMethod
        PhotoperiodFunction Photoperiod: Twilight=-6; DayLength=0
        GerminatingPhase Germinating: Start=Sowing; End=Germination; IsEmerged=false
          Memo Description
            Germination will occur one day after sowing, provided that the amount of soil extractable water is greater than zero.  Germination rates in plantain typically vary between 75 and 95% when sown close to the surface (<10mm), in moist warm soil ([#ReedEtAl_2008]; [#DouglasEtAl_2013]; [#LeeEtAlYields_2015]).  The plantain model, following convention of PMF, assumes 100% germination, and therefore the user must correct sowing rate when variations between sown and germinated plant density is considered important.
          Constant MinSoilTemperature: FixedValue=0
        EmergingPhase Emerging: Start=Germination; End=Emergence; IsEmerged=true; TTForTimeStep=0
          Memo Description
             Plantain forage has small seeds and emergence is best when seeds are sown at depth <10mm (Peri et al., 2000; Sanderson et al., 2000), deeper seed may stay dormant for years in the soil ([#Blom_1978]; [#RobertsBoddrell_1984]).  Variations in germination rate due to depth are not explicitly simulated by the PlantainForage model in the current version, however the sowing depth does affect timing of emergence.  This is controlled by the parameter ShootRate, which is the shoot elongation rate as function of thermal time (mm/oCd).
          VariableReference ThermalTime: VariableName=[Phenology].ThermalTime
          AddFunction Target
            Constant ShootLag: FixedValue=15
            MultiplyFunction DepthxRate
              VariableReference SowingDepth: VariableName=[Plant].SowingData.Depth
              Constant ShootRate: FixedValue=10
        GenericPhase Vegetative: Start=Emergence; End=Flowering; IsEmerged=true
          Memo Description
            During this phase the plant only partitions biomass to leaf and root+taproot organs.  The phase starts when plants emerge from the ground, but it is also triggered after the end of the reproductive phase (phenology reset).  It ends when the reproductive phase starts, which is triggered by the accumulation of days with long sunlight ([#SussexPlantain_1956]; [#Rowarth_Plantain_1990]; [#CaseLaceyHopkins_1996]; [#LaceyRoach_2003]; [#GonzalezParrado_2015]).  Stalk development have been recorded to start in October in NZ and in May in the USA ([#Rowarth_Plantain_1990]; [#LaceyRoach_2003]; [#SandersonEtAl_2003]), with data suggesting a minimum of 25-30 days (non consecutive) with long daylight periods ([#SussexPlantain_1956]; [#FajerEtAl_1991]; [#CaseLaceyHopkins_1996]).  The literature does not provide an indication of how long the sunlight period should be to trigger the reproductive phase, but it is clear that daylight should be grater that the period in darkness (14-16 hours been used to induce flowering in growth chambers).  The base plantain forage model uses the accumulation of days greater than 12hrs to trigger the end of the vegetative phase.
          Constant Target: FixedValue=30; Units=days
          LinearInterpolationFunction Progression
            XYPairs: X=[10, 11.5, 12, 13]; Y=[0, 0, 1, 1]
            VariableReference XValue: VariableName=[Phenology].Photoperiod
        GenericPhase Reproductive: Start=Flowering; End=Ripening; IsEmerged=true
          Memo Description
            During this phase the plant is partitioning biomass to all organs, including reproductive organs (stems, flowers, and seeds). Flower stages and seeds development are not explicitly described in the current model, only a generic organ refered to as _inflorescence_ is defined.  This was done partly due to lack of data and partly because of the variability and complex phenology of forage plantain.  There is a lot of variation among plantain plants regarding when flowering occurs and how long it lasts, plus even the same plant can have flowering stalks, stalks with young seeds, as well as stalks with ripen seed at the same time ([#Rowarth_Plantain_1990]; [#RumballKeog_1997]; [#LaceyRoach_2003]; [#GonzalezParrado_2015]).  Seed ripenning is reached some 8-10 weeks after flowering, with commercial cultivars closer to the low end of the range.  The available data suggest an accumulation of 450oCd for the flowering period, with base temperature between 5 and 9oC ([#Rowarth_Plantain_1990]; [#RumballKeog_1997]; [#GonzalezParrado_2015]).  Howerver flowering continues throughout the summer into autumn and seem to be curtailed only by frosts ([#Rowarth_Plantain_1990]) and/or short days ([#SandersonEtAl_2003]).  In the PlantainForage model the photoperiod is used to define the end of reproductive phase, following the same approach used to start it.  And correspondelly, the accumulation of days shorter than 12 hours is used as the trigger the end of the phase (this approach also ensures phenology reset even in warmer climates).  Note that the DM partition functions also use photoperiod to change priority allocation into reproductive organs, with maximum allocation only when daylight length is greater than 14hours.  This was done to limit the allocation to reproductive organs on the sason shoulders when only few plants are actively in the reproductive phase (e.g. [#SandersonEtAl_2003]).
          Constant Target: FixedValue=30; Units=days
          LinearInterpolationFunction Progression
            XYPairs: X=[10, 11, 12.5, 13]; Y=[1, 1, 0, 0]
            VariableReference XValue: VariableName=[Phenology].Photoperiod
        GotoPhase: Start=Ripening; IsEmerged=true; PhaseNameToGoto=Vegetative; RemovalType=0
          Memo Description
            At the end of reproductive phase, plantain phenology is reset to 'Vegetative'.
      OrganArbitrator Arbitrator
        BiomassTypeArbitrator DMArbitration
          Folder PotentialPartitioningMethods
            ReallocationMethod
            AllocateFixationMethod
            RetranslocationMethod
            SendPotentialDMAllocationsMethod
          Folder AllocationMethods
            NutrientConstrainedAllocationMethod
            DryMatterAllocationsMethod
          RelativeAllocation ArbitrationMethod
            Memo Description
              Controls the allocation of biomass to each of the plant's organs. Partition is based on:
        BiomassTypeArbitrator NArbitration
          Folder PotentialPartitioningMethods
            ReallocationMethod
          Folder ActualPartitioningMethods
            AllocateFixationMethod
            RetranslocationMethod
          Folder AllocationMethods
            NitrogenAllocationsMethod
          RelativeAllocation ArbitrationMethod
            Memo Description
              Controls the allocation of N to each of the plant's organs. Partition is based on:
          AllocateUptakesMethod
        WaterUptakeMethod
        NitrogenUptakeMethod
      SimpleLeaf Leaf: Albedo=0.18; Gsmax350=0.015; R50=150; LeafInitialisationStage=Emergence; Height=0; BaseHeight=0; Width=0; FRGR=0; PotentialEP=0; WaterDemand=0; KDead=0; LAIDead=0
        Memo Description
          __Note:__ this organ represents all the leaves in the plant, without distinction between ages or placement in the canopy.
        Constant StomatalConductanceCO2Modifier: FixedValue=1
        MultiplyFunction InitialWt
          Constant InitialPlantWt: FixedValue=0.001; Units=g/plant
          VariableReference Population: VariableName=[Plant].Population
        Constant MinimumNConc: FixedValue=0.015; Units=gN/gDM
        Constant MaximumNConc: FixedValue=0.055; Units=gN/gDM
        RUEModel Photosynthesis
          Memo Description
            Data for photosynthesys in forage plantain is very sparse and so some of the data used here are from studies that employed wild varieties.  Values for CO2 assimilation rates are generally consistent ([#PootDenBroek_1997]; [#LabreveuxThesis_2002]; [#vanDenBergeEtAl_2014]; [#CranstonEtAl_2015]) and follow a classic relationhip with light intensity (directly proportional) as well with N concentration in the leaves (inversely proportional).  Reported values of photosynthetic rate indicate that these are similar or slightly higher in plantain forage when compared to Chicory ([#LabreveuxThesis_2002]; [#CranstonEtAl_2015]).  No reported values for RUE were found in the literature, but they can be infered as to be just under 2.0 g DM/MJ for wild vareties ([#PootDenBroek_1997]).
            The current model assumes generic responses to enviromental factors, such as temperature and water availability.  Wild plantain is ubiquitous in meadows in subtropical climates around the world, and it is generally assumed to be tollerant to high temperatures but not to cold ([#SagarHarper_1964]; [#StewartPlantain_1996]).  Forage plantain shows large differences between cultivars, but generally can grow more over winter compared to wild varieties and still outperform temperate grasses in summer ([#StewartPlantain_1996]; [#MoorheadPigot_2009], [#DouglasEtAl_2013]), although survivability in harsh winters in the USA was found to be low ([#SandersonEtAl_2003], [#SkinnerPlantain_2005]).  Forage plantain is also often mentioned as a drought tollerant species ([#StewartPlantain_1996]; [#DouglasEtAl_2013]; [#QuijadaThesis_2015]), although less so than deep rooted species such as chicory or lucerne.  The use of reserves from the taproots seem to be mechanism used to confer drought resistance in plantain as is the case for many herbs ([#CranstonEtAl_2015]; [#QuijadaThesis_2015]).
          Constant RUE: FixedValue=2; Units=g/MJ
          RUECO2Function FCO2: PhotosyntheticPathway=C3
          LinearInterpolationFunction FN
            XYPairs: X=[0, 0.4, 0.8, 1.5]; Y=[0, 0.5, 1, 1]
            VariableReference XValue: VariableName=[Leaf].Fn
          WeightedTemperatureFunction FT: MaximumTemperatureWeighting=0.75
            XYPairs: X=[4, 10, 15, 21, 27, 35]; Y=[0, 0.075, 0.35, 1, 1, 0]
          LinearInterpolationFunction FW
            XYPairs: X=[0, 0.8, 1, 1.5]; Y=[0, 1, 1, 1]
            VariableReference XValue: VariableName=[Leaf].Fw
          LinearInterpolationFunction FVPD
            XYPairs: X=[0, 10, 50]; Y=[1, 1, 1]
            VariableReference XValue: VariableName=[Leaf].Photosynthesis.VPD
          VariableReference RadnInt: VariableName=[Leaf].RadiationIntercepted
        DivideFunction FRGR
          Memo Description
            This parameter represents the Fractional Growth Rate.  It is needed by the MicroClimate model, where it is used to compute the effect of growth rate on transpiration.
          VariableReference Photosynthesis: VariableName=[Leaf].Photosynthesis
          MultiplyFunction PotentialPhotosynthesis
            VariableReference RUE: VariableName=[Leaf].Photosynthesis.RUE
            MaximumFunction Radiation
              VariableReference RadnInt: VariableName=[Leaf].RadiationIntercepted
              Constant MinRadn: FixedValue=1e-05
        Constant DMConversionEfficiency: FixedValue=1; Units=0-1
        Constant MaintenanceRespiration: FixedValue=0; Units=0-1
        MultiplyFunction Area
          Constant SpecificLeafArea: FixedValue=0.02; Units=m^2/g
          VariableReference LiveLeafWeight: VariableName=[Leaf].Live.Wt
        MultiplyFunction LaiDead
          VariableReference SpecificLeafArea: VariableName=[Leaf].Area.SpecificLeafArea
          VariableReference DeadLeafWeight: VariableName=[Leaf].Dead.Wt
        Constant ExtinctionCoefficient: FixedValue=0.6; Units=0-1
        LinearInterpolationFunction HeightFunction
          Memo Description
            The average height of plantain forage is assumed here as a simple function of above ground biomass. Sward population and competition with other plant can have an influence on this relationship, but this is not currently accounted for by PMF.
          XYPairs: X=[10, 100, 500]; Y=[100, 200, 200]
          VariableReference XValue: VariableName=[PlantainForage].AboveGround.Wt
        MultiplyFunction SenescenceRate
          Memo Description
            The sparse availabe data suggests that plantain has a relativelly slow senescence rate compared to other medow herbs ([#CalviereDuru_1995]; [#SchippersOlff_2000]).  Generic relationships to enviromental factors, such as temperature and soil moisture, are assumed based on other plant models.
          Constant ReferenceRate: FixedValue=0.005; Units=/day
          LinearInterpolationFunction StageFactor
            XYPairs: X=[3, 4, 5]; Y=[0.5, 1, 1]
            VariableReference XValue: VariableName=[Phenology].Stage
          LinearInterpolationFunction CoverFactor
            XYPairs: X=[0, 0.5, 0.9, 0.95, 0.99, 1]; Y=[1, 1, 1, 1.1, 2, 3]
            VariableReference XValue: VariableName=[Leaf].CoverTotal
          WeightedTemperatureFunction TemperatureFactor: MaximumTemperatureWeighting=0.5
            XYPairs: X=[-15, -2, 2, 10, 20, 30]; Y=[1.5, 0.25, 0, 0, 1, 1]
          LinearInterpolationFunction SoilMoistureFactor
            XYPairs: X=[0, 0.5, 1]; Y=[2, 1, 1]
            VariableReference XValue: VariableName=[Leaf].Fw
        MultiplyFunction DetachmentRate
          Memo Description
            A generic relationship between detachment and soil moisture is assumed.  It implies that under dry conditions the detachment rate decreases due to the lower level of activity of decomposing microorganisms.
          Constant ReferenceRate: FixedValue=0.1; Units=/day
          LinearInterpolationFunction SoilMoistureFactor
            XYPairs: X=[0, 0.5, 1]; Y=[0.5, 0.5, 1]
            VariableReference XValue: VariableName=[Leaf].Fw
        Constant DMRetranslocationFactor: FixedValue=0; Units=/day
        Constant NRetranslocationFactor: FixedValue=0; Units=/day
        Constant NReallocationFactor: FixedValue=1; Units=/day
        BiomassRemoval BiomassRemovalDefaults: HarvestFractionLiveToRemove=0; HarvestFractionDeadToRemove=0; HarvestFractionLiveToResidue=0.1; HarvestFractionDeadToResidue=0.1
        Constant NitrogenDemandSwitch: FixedValue=1
        Constant DMReallocationFactor: FixedValue=0
        VariableReference CriticalNConc: VariableName=[Leaf].MinimumNConc
        Constant RemobilisationCost: FixedValue=0
        Constant CarbonConcentration: FixedValue=0.4
        NutrientDemandFunctions DMDemands
          MultiplyFunction Structural
            PartitionFractionDemandFunction DMDemandFunction
              Memo Description
                In the PlantainForage model, the DM demand function attempts to keep the shoot to root ratio and then the stem to leaf ratio close to a target value (defined by the [#TargetShootRootRatio].Value and [#TargetStemsLeafRatio].Value), which may vary according to the phenolgical stage.  This approach ensures that the plantain forage plants will recovery after being cut or grazed.  In this case, biomass will be allocated to leaves preferably, even during reproductive phase.
              PhaseLookup PartitionFraction
                PhaseLookupValue Vegetative: Start=Emergence; End=Flowering
                  DivideFunction LeafFraction
                    MultiplyFunction Numerator
                      VariableReference TargetSR1: VariableName=[TargetShootRootRatio]
                      VariableReference TargetSR2: VariableName=[TargetShootRootRatio]
                    AddFunction Denominator
                      MultiplyFunction TargetSRs
                        VariableReference TargetSR1: VariableName=[TargetShootRootRatio]
                        VariableReference TargetSR2: VariableName=[TargetShootRootRatio]
                      VariableReference CurrentSR: VariableName=[ShootRootRatio]
                PhaseLookupValue Reproductive: Start=Flowering; End=Ripening
                  DivideFunction LeafFraction
                    MultiplyFunction Numerator
                      VariableReference TargetSR1: VariableName=[TargetShootRootRatio]
                      VariableReference TargetSR2: VariableName=[TargetShootRootRatio]
                      VariableReference CurrentSL: VariableName=[StemsLeafRatio]
                    MultiplyFunction Denominator
                      AddFunction SRs: same as Replacements.PlantainForage.Leaf.DMDemands.Structural.DMDemandFunction.PartitionFraction.Vegetative.LeafFraction.Denominator
                      AddFunction SLs
                        MultiplyFunction TargetSLs
                          VariableReference TargetSL1: VariableName=[TargetStemsLeafRatio]
                          VariableReference TargetSL2: VariableName=[TargetStemsLeafRatio]
                        VariableReference CurrentSL: VariableName=[StemsLeafRatio]
            Constant StructuralFraction: FixedValue=1; Units=g/g
          Constant Metabolic: FixedValue=0
          StorageDMDemandFunction Storage
            SubtractFunction StorageFraction
              Constant One: FixedValue=1
              VariableReference StructuralFraction: VariableName=[Leaf].DMDemands.Structural.StructuralFraction
          Constant QStructuralPriority: FixedValue=1
          Constant QMetabolicPriority: FixedValue=1
          Constant QStoragePriority: FixedValue=1
        NutrientDemandFunctions NDemands
          MultiplyFunction Structural
            VariableReference MinNconc: VariableName=[Leaf].minimumNconc
            VariableReference PotentialDMAllocation: VariableName=[Leaf].potentialDMAllocation.Structural
          MultiplyFunction Metabolic
            SubtractFunction MetabolicNconc
              VariableReference CritNconc: VariableName=[Leaf].criticalNConc
              VariableReference MinNconc: VariableName=[Leaf].minimumNconc
            VariableReference PotentialDMAllocation: VariableName=[Leaf].potentialDMAllocation.Structural
          StorageNDemandFunction Storage
            VariableReference NitrogenDemandSwitch: VariableName=[Leaf].nitrogenDemandSwitch
            VariableReference MaxNconc: VariableName=[Leaf].maximumNconc
          Constant QStructuralPriority: FixedValue=1
          Constant QMetabolicPriority: FixedValue=1
          Constant QStoragePriority: FixedValue=1
      GenericOrgan Stem: IsAboveGround=true
        Memo Description
          __Note:__ this represents all the stems/stalks in the plant, without distinction between ages or placement in the canopy.
        Constant MinimumNConc: FixedValue=0.005; Units=gN/gDM
        Constant MaximumNConc: FixedValue=0.02; Units=gN/gDM
        Constant DMConversionEfficiency: FixedValue=1; Units=0-1
        Constant MaintenanceRespirationFunction: FixedValue=0; Units=0-1
        MultiplyFunction SenescenceRate
          Memo Description
            The reference senescence rate is adjusted using generic relationships to enviromental factors, such as temperature and soil moisture.  These are based on general knowledge from other plant models.
          Constant ReferenceRate: FixedValue=0.2; Units=/day
          LinearInterpolationFunction StageFactor
            XYPairs: X=[3, 3.999, 4, 4.5, 4.75, 5]; Y=[1, 1, 0.5, 0.55, 0.75, 1]
            VariableReference XValue: VariableName=[Phenology].Stage
          WeightedTemperatureFunction TemperatureFactor: MaximumTemperatureWeighting=0.5
            XYPairs: X=[-15, 0, 2, 10, 20, 30]; Y=[2, 0.2, 0, 0, 1, 1]
          LinearInterpolationFunction SoilMoistureFactor
            XYPairs: X=[0, 0.5, 1]; Y=[2, 1, 1]
            VariableReference XValue: VariableName=[Leaf].Fw
        MultiplyFunction DetachmentRateFunction
          Memo Description
            A generic relationship between detachment and soil moisture is assumed.  It implies that under dry conditions the detachment rate decreases due to the lower level of activity of decomposing microorganisms.
          Constant ReferenceRate: FixedValue=0.1; Units=/day
          LinearInterpolationFunction SoilMoistureFactor
            XYPairs: X=[0, 0.5, 0.75, 1]; Y=[0.1, 0.1, 0.25, 1]
            VariableReference XValue: VariableName=[Leaf].Fw
        Constant DMRetranslocationFactor: FixedValue=0; Units=/day
        Constant NRetranslocationFactor: FixedValue=0; Units=/day
        Constant NReallocationFactor: FixedValue=1; Units=/day
        BiomassRemoval BiomassRemovalDefaults: HarvestFractionLiveToRemove=0; HarvestFractionDeadToRemove=0; HarvestFractionLiveToResidue=0.1; HarvestFractionDeadToResidue=0.1
        Constant NitrogenDemandSwitch: FixedValue=1
        Constant DMReallocationFactor: FixedValue=0
        VariableReference CriticalNConc: VariableName=[Stem].MinimumNConc
        Constant RemobilisationCost: FixedValue=0
        Constant CarbonConcentration: FixedValue=0.4
        NutrientDemandFunctions DMDemands
          MultiplyFunction Structural
            PartitionFractionDemandFunction DMDemandFunction
              Memo Description
                A simple approach is used in the PlantainForage model to define the allocation of biomass to various organs.  The proportion of the above ground biomass allocated to stems is determined based on the current state and two target ratios, the [#TargetStemsLeafRatio].Value and [#FlowerStemRatio].Value).  Allocation of biomass to stems can only occur during the reproductive phase.
              PhaseLookup PartitionFraction
                PhaseLookupValue Reproductive: Start=Flowering; End=Ripening
                  DivideFunction StemFraction
                    MultiplyFunction Numerator
                      VariableReference TargetSR1: VariableName=[TargetShootRootRatio]
                      VariableReference TargetSR2: VariableName=[TargetShootRootRatio]
                      VariableReference TargetSL1: VariableName=[TargetStemsLeafRatio]
                      VariableReference TargetSL2: VariableName=[TargetStemsLeafRatio]
                      VariableReference CurrentFS: VariableName=[FlowerStemRatio]
                    MultiplyFunction Denominator
                      AddFunction SRs: same as Replacements.PlantainForage.Leaf.DMDemands.Structural.DMDemandFunction.PartitionFraction.Vegetative.LeafFraction.Denominator
                      AddFunction SLs: same as Replacements.PlantainForage.Leaf.DMDemands.Structural.DMDemandFunction.PartitionFraction.Reproductive.LeafFraction.Denominator.SLs
                      AddFunction FSs
                        MultiplyFunction TargetFSs
                          VariableReference TargetFS1: VariableName=[TargetFlowerStemRatio]
                          VariableReference TargetFS2: VariableName=[TargetFlowerStemRatio]
                        VariableReference CurrentFS: VariableName=[FlowerStemRatio]
            Constant StructuralFraction: FixedValue=1; Units=g/g
          Constant Metabolic: FixedValue=0
          StorageDMDemandFunction Storage
            SubtractFunction StorageFraction
              Constant One: FixedValue=1
              VariableReference StructuralFraction: VariableName=[Stem].DMDemands.Structural.StructuralFraction
          Constant QStructuralPriority: FixedValue=1
          Constant QMetabolicPriority: FixedValue=1
          Constant QStoragePriority: FixedValue=1
        NutrientDemandFunctions NDemands
          MultiplyFunction Structural
            VariableReference MinNconc: VariableName=[Stem].minimumNconc
            VariableReference PotentialDMAllocation: VariableName=[Stem].potentialDMAllocation.Structural
          MultiplyFunction Metabolic
            SubtractFunction MetabolicNconc
              VariableReference CritNconc: VariableName=[Stem].criticalNConc
              VariableReference MinNconc: VariableName=[Stem].minimumNconc
            VariableReference PotentialDMAllocation: VariableName=[Stem].potentialDMAllocation.Structural
          StorageNDemandFunction Storage
            VariableReference NitrogenDemandSwitch: VariableName=[Stem].nitrogenDemandSwitch
            VariableReference MaxNconc: VariableName=[Stem].maximumNconc
          Constant QStructuralPriority: FixedValue=1
          Constant QMetabolicPriority: FixedValue=1
          Constant QStoragePriority: FixedValue=1
        RetranslocateNonStructural RetranslocateNitrogen
        NutrientPoolFunctions InitialWt
          Constant Structural: FixedValue=1e-06; Units=g/plant
          Constant Metabolic: FixedValue=0
          Constant Storage: FixedValue=0
        Constant Photosynthesis: FixedValue=0
        VariableReference initialNConcFunction: VariableName=[Stem].MinimumNConc
      GenericOrgan Inflorescence: IsAboveGround=true
        Memo Description
          __Note:__ this represents all the reproductive parts of the plant, flowers, pods, seed, etc. No distinction is made between ages or placement in the canopy.
        Constant MinimumNConc: FixedValue=0.02; Units=gN/gDM
        Constant MaximumNConc: FixedValue=0.06; Units=gN/gDM
        Constant DMConversionEfficiency: FixedValue=1; Units=0-1
        Constant MaintenanceRespirationFunction: FixedValue=0; Units=0-1
        MultiplyFunction SenescenceRate
          Memo Description
            The sparse availabe data suggests that plantain has a relativelly slow senescence rate compared to other medow herbs ([#CalviereDuru_1995]; [#SchippersOlff_2000]).  Generic relationships to enviromental factors, such as temperature and soil moisture, are assumed based on other plant models.
          Constant ReferenceRate: FixedValue=0.25; Units=/day
          LinearInterpolationFunction StageFactor
            XYPairs: X=[3, 3.99, 4, 4.5, 5]; Y=[1, 1, 0.5, 0.65, 1]
            VariableReference XValue: VariableName=[Phenology].Stage
          WeightedTemperatureFunction TemperatureFactor: MaximumTemperatureWeighting=0.5
            XYPairs: X=[0, 5, 20, 30]; Y=[0, 0, 1, 1]
          LinearInterpolationFunction SoilMoistureFactor
            XYPairs: X=[0, 0.5, 1]; Y=[2, 1, 1]
            VariableReference XValue: VariableName=[Leaf].Fw
        MultiplyFunction DetachmentRateFunction
          Memo Description
            A generic relationship between detachment and soil moisture is assumed.  It implies that under dry conditions the detachment rate decreases due to the lower level of activity of decomposing microorganisms.
          Constant ReferenceRate: FixedValue=0.25; Units=/day
          LinearInterpolationFunction SoilMoistureFactor
            XYPairs: X=[0, 0.5, 1]; Y=[0, 0.5, 1]
            VariableReference XValue: VariableName=[Leaf].Fw
        Constant DMRetranslocationFactor: FixedValue=0; Units=/day
        Constant NRetranslocationFactor: FixedValue=0; Units=/day
        Constant NReallocationFactor: FixedValue=1; Units=/day
        BiomassRemoval BiomassRemovalDefaults: HarvestFractionLiveToRemove=0.8; HarvestFractionDeadToRemove=0.8; HarvestFractionLiveToResidue=0.1; HarvestFractionDeadToResidue=0.1
        Constant NitrogenDemandSwitch: FixedValue=1
        Constant DMReallocationFactor: FixedValue=0
        VariableReference CriticalNConc: VariableName=[Inflorescence].MinimumNConc
        Constant RemobilisationCost: FixedValue=0
        Constant CarbonConcentration: FixedValue=0.4
        NutrientDemandFunctions DMDemands
          MultiplyFunction Structural
            PartitionFractionDemandFunction DMDemandFunction
              Memo Description
                The PlantainForage model uses a  simple approach to define the allocation of biomass to various organs.  The fraction of the above ground biomass allocated to inflorescence is determined based on the current proprotion and two target ratios, the [#TargetStemsLeafRatio].Value and [#FlowerStemRatio].Value).  Allocation to inflorescence can only occur during the reproductive phase.
              PhaseLookup PartitionFraction
                PhaseLookupValue Reproductive: Start=Flowering; End=Ripening
                  DivideFunction FlowerFraction
                    MultiplyFunction Numerator
                      VariableReference TargetSR1: VariableName=[TargetShootRootRatio]
                      VariableReference TargetSR2: VariableName=[TargetShootRootRatio]
                      VariableReference TargetSL1: VariableName=[TargetStemsLeafRatio]
                      VariableReference TargetSL2: VariableName=[TargetStemsLeafRatio]
                      VariableReference TargetFS1: VariableName=[TargetFlowerStemRatio]
                      VariableReference TargetFS2: VariableName=[TargetFlowerStemRatio]
                    MultiplyFunction Denominator: same as Replacements.PlantainForage.Stem.DMDemands.Structural.DMDemandFunction.PartitionFraction.Reproductive.StemFraction.Denominator
            Constant StructuralFraction: FixedValue=1; Units=g/g
          Constant Metabolic: FixedValue=0
          StorageDMDemandFunction Storage
            SubtractFunction StorageFraction
              Constant One: FixedValue=1
              VariableReference StructuralFraction: VariableName=[Inflorescence].DMDemands.Structural.StructuralFraction
          Constant QStructuralPriority: FixedValue=1
          Constant QMetabolicPriority: FixedValue=1
          Constant QStoragePriority: FixedValue=1
        NutrientDemandFunctions NDemands
          MultiplyFunction Structural
            VariableReference MinNconc: VariableName=[Inflorescence].minimumNconc
            VariableReference PotentialDMAllocation: VariableName=[Inflorescence].potentialDMAllocation.Structural
          MultiplyFunction Metabolic
            SubtractFunction MetabolicNconc
              VariableReference CritNconc: VariableName=[Inflorescence].criticalNConc
              VariableReference MinNconc: VariableName=[Inflorescence].minimumNconc
            VariableReference PotentialDMAllocation: VariableName=[Inflorescence].potentialDMAllocation.Structural
          StorageNDemandFunction Storage
            VariableReference NitrogenDemandSwitch: VariableName=[Inflorescence].nitrogenDemandSwitch
            VariableReference MaxNconc: VariableName=[Inflorescence].maximumNconc
          Constant QStructuralPriority: FixedValue=1
          Constant QMetabolicPriority: FixedValue=1
          Constant QStoragePriority: FixedValue=1
        RetranslocateNonStructural RetranslocateNitrogen
        NutrientPoolFunctions InitialWt
          Constant Structural: FixedValue=0; Units=g/m^2
          Constant Metabolic: FixedValue=0
          Constant Storage: FixedValue=0
        Constant Photosynthesis: FixedValue=0
        VariableReference initialNConcFunction: VariableName=[Inflorescence].MinimumNConc
      GenericOrgan Taproot: IsAboveGround=false
        Memo Description
          __Note:__ this represents all the taproots of the plant.
          Taproots are the primary reserve organs and will supply sugars and N to burst growth especially early in spring and following defoliation.  To accomplish this, the taproots' biomass is partioned into structural and non-structural fractions, the later is available to be used in new growth (via biomass retranslocation).  There is very few data on how much reserves are kept in plantain taproots, results from [#QuijadaThesis_2015] suggest that sugars plus fructan made up 4-11% of taproots biomass compared to 15-35% in chicory, which is consistent with plantain forage having much smaller taproots.  Based on these values, and some trial and error, the parameters related to retranslocation (StructuralFraction, DMRetranslocationFactor, and NRetranslocationFactor) were estimated.  These should be upgraded when more data is made available.
        Constant MinimumNConc: FixedValue=0.007; Units=gN/gDM
        Constant MaximumNConc: FixedValue=0.02; Units=gN/gDM
        Constant DMConversionEfficiency: FixedValue=1; Units=0-1
        Constant MaintenanceRespirationFunction: FixedValue=0; Units=0-1
        MultiplyFunction SenescenceRate
          Memo Description
            The reference senescence rate is adjusted according to enviromental factors, temperature and soil moisture.  Currently only sensitivity to temperature is considered, based on general knowledge from other plant models. The sensitivity of forage plantain roots to low moisture or water logging is not clear , so this will have to be upgrade in the future when more data is available.  According to [#SagarHarper_1964], *P. major*, a similar species, is more tolerant to water logging than *P. lanceolata*, which rarely occurs in water logged sites ([#vanTiederen_1992]).
          Constant ReferenceRate: FixedValue=0.001; Units=/day
          WeightedTemperatureFunction TemperatureFactor: MaximumTemperatureWeighting=0.5
            XYPairs: X=[0, 5, 22, 30]; Y=[0, 0, 1, 1]
          LinearInterpolationFunction SoilMoistureFactor
            XYPairs: X=[0, 0.5, 1]; Y=[1, 1, 1]
            VariableReference XValue: VariableName=[Leaf].FW
          Constant SoilAerationFactor: FixedValue=1; Units=0-1
        Constant DetachmentRateFunction: FixedValue=1; Units=/day
        Constant DMRetranslocationFactor: FixedValue=0.15; Units=/day
        Constant NRetranslocationFactor: FixedValue=0.2; Units=/day
        Constant NReallocationFactor: FixedValue=1; Units=/day
        BiomassRemoval BiomassRemovalDefaults: HarvestFractionLiveToRemove=0; HarvestFractionDeadToRemove=0; HarvestFractionLiveToResidue=0.1; HarvestFractionDeadToResidue=0
        Constant NitrogenDemandSwitch: FixedValue=1
        Constant DMReallocationFactor: FixedValue=0
        VariableReference CriticalNConc: VariableName=[Taproot].MinimumNConc
        Constant RemobilisationCost: FixedValue=0
        Constant CarbonConcentration: FixedValue=0.4
        NutrientDemandFunctions DMDemands
          MultiplyFunction Structural
            PartitionFractionDemandFunction DMDemandFunction
              Memo Description
                The PlantainForage model computes the allocation of biomass to taproots assuming that there is a target ratio the biomass of root and taproot (defined by [#TaprootRootRatio].Value).  The existing literature does not provide values for this parameter, and based on other herbs, such as chicory, a simple value which is further modified by plant specific biomass is assumed in the model. This should be update when more data becomes available.
              PhaseLookup PartitionFraction
                PhaseLookupValue AllPhases: Start=Emergence; End=Ripening
                  DivideFunction TaprootFraction
                    MultiplyFunction Numerator
                      VariableReference CurrentSR: VariableName=[ShootRootRatio]
                      VariableReference TargetTR1: VariableName=[TargetTaprootRootRatio]
                      VariableReference TargetTR2: VariableName=[TargetTaprootRootRatio]
                    MultiplyFunction Denominator
                      AddFunction SRs: same as Replacements.PlantainForage.Leaf.DMDemands.Structural.DMDemandFunction.PartitionFraction.Vegetative.LeafFraction.Denominator
                      AddFunction TRs
                        MultiplyFunction TargetTRs
                          VariableReference TargetTR1: VariableName=[TargetTaprootRootRatio]
                          VariableReference TargetTR2: VariableName=[TargetTaprootRootRatio]
                        VariableReference CurrentTR: VariableName=[TaprootRootRatio]
            Constant StructuralFraction: FixedValue=0.1; Units=g/g
          Constant Metabolic: FixedValue=0
          StorageDMDemandFunction Storage
            SubtractFunction StorageFraction
              Constant One: FixedValue=1
              VariableReference StructuralFraction: VariableName=[Taproot].DMDemands.Structural.StructuralFraction
          Constant QStructuralPriority: FixedValue=1
          Constant QMetabolicPriority: FixedValue=1
          Constant QStoragePriority: FixedValue=1
        NutrientDemandFunctions NDemands
          MultiplyFunction Structural
            VariableReference MinNconc: VariableName=[Taproot].minimumNconc
            VariableReference PotentialDMAllocation: VariableName=[Taproot].potentialDMAllocation.Structural
          MultiplyFunction Metabolic
            SubtractFunction MetabolicNconc
              VariableReference CritNconc: VariableName=[Taproot].criticalNConc
              VariableReference MinNconc: VariableName=[Taproot].minimumNconc
            VariableReference PotentialDMAllocation: VariableName=[Taproot].potentialDMAllocation.Structural
          StorageNDemandFunction Storage
            VariableReference NitrogenDemandSwitch: VariableName=[Taproot].nitrogenDemandSwitch
            VariableReference MaxNconc: VariableName=[Taproot].maximumNconc
          Constant QStructuralPriority: FixedValue=1
          Constant QMetabolicPriority: FixedValue=1
          Constant QStoragePriority: FixedValue=1
        RetranslocateNonStructural RetranslocateNitrogen
        NutrientPoolFunctions InitialWt: same as Replacements.PlantainForage.Inflorescence.InitialWt
        Constant Photosynthesis: FixedValue=0
        VariableReference initialNConcFunction: VariableName=[Taproot].MinimumNConc
      Root: GrowthRespiration=0; MaintenanceRespiration=0
        RootShapeCylinder RootShape
        Memo Description
          __Note:__ this represents all the fine roots of the plant.  The root organ demands and is partitioned N and DM and its depth increases through time to provide a water uptake supply
          Memo Description
            This represents all the fine roots of the plant.  The root organ demands and is partitioned N and DM and its depth increases through time to provide a water uptake supply
        Constant MinimumNConc: FixedValue=0.005; Units=gN/gDM
        Constant MaximumNConc: FixedValue=0.015; Units=gN/gDM
        PhaseLookupValue NitrogenDemandSwitch: Start=Germination; End=Ripening
          Constant: FixedValue=1
        Constant MaximumRootDepth: FixedValue=1000; Units=mm
        PhaseLookup RootFrontVelocity
          PhaseLookupValue PreEmergence: Start=Germination; End=Emergence
            Constant ReferenceVelocity: FixedValue=5; Units=mm/day
          PhaseLookupValue Vegetative: Start=Emergence; End=Flowering
            Constant ReferenceVelocity: FixedValue=10; Units=mm/day
          PhaseLookupValue Reproductive: Start=Flowering; End=Ripening
            Constant ReferenceVelocity: FixedValue=7.5; Units=mm/day
        Constant TemperatureEffect: FixedValue=1
          Memo
            No effect of temperature on root growth is currently captured in the model.
        Constant SoilWaterEffect: FixedValue=1
          Memo
            No effect of soil water content on root growth is currently captured in the model.
        Constant SpecificRootLength: FixedValue=100; Units=m/g
        MultiplyFunction SenescenceRate
          Memo Description
            The reference senescence rate is adjusted according to enviromental factors, temperature and soil moisture.  Currently only sensitivity to temperature is considered, based on general knowledge from other plant models. The sensitivity of plantain roots to low moisture or water logging is not clear (according to [#SagarHarper_1964], *P. major* is more tolerant to water logging than *P. lanceolata*) , so this will have to be upgrade in the future when more data is available.
          Constant ReferenceRate: FixedValue=0.005; Units=/day
          WeightedTemperatureFunction TemperatureFactor: MaximumTemperatureWeighting=0.5
            XYPairs: X=[0, 5, 20, 30]; Y=[0, 0, 1, 1]
          LinearInterpolationFunction SoilMoistureFactor
            XYPairs: X=[0, 0.5, 1]; Y=[1, 1, 1]
            VariableReference XValue: VariableName=[Leaf].FW
          Constant SoilAerationFactor: FixedValue=1
        Constant DMRetranslocationFactor: FixedValue=0; Units=/day
        Constant NRetranslocationFactor: FixedValue=0; Units=/day
        Constant NReallocationFactor: FixedValue=0; Units=/day
        LinearInterpolationFunction KLModifier
          Memo
            No adjustment of KL are considered for plantain at this stage.  More analyses, preferebly with support from data specific to this issue, are needed to improve the description of this relationship.
            Memo Description
              This represents all the fine roots of the plant.  The root organ demands and is partitioned N and DM and its depth increases through time to provide a water uptake supply
          XYPairs: X=[0, 1]; Y=[1, 1]
          VariableReference XValue: VariableName=[Root].LengthDensity
        LinearInterpolationFunction KNH4
          XYPairs: X=[0, 0.003]; Y=[0.01, 0.02]
          VariableReference XValue: VariableName=[Root].LengthDensity
        LinearInterpolationFunction KNO3
          XYPairs: X=[0, 0.003]; Y=[0.01, 0.02]
          VariableReference XValue: VariableName=[Root].LengthDensity
        Constant MaxDailyNUptake: FixedValue=10; Units=kgN/ha
        LinearInterpolationFunction NUptakeSWFactor
          XYPairs: X=[0, 0.5, 1]; Y=[0, 1, 1]
          VariableReference XValue: VariableName=[Root].RWC
        BiomassRemoval BiomassRemovalDefaults: HarvestFractionLiveToRemove=0; HarvestFractionDeadToRemove=0; HarvestFractionLiveToResidue=0.05; HarvestFractionDeadToResidue=0
        Constant DMConversionEfficiency: FixedValue=1
        Constant MaintenanceRespirationFunction: FixedValue=1
        Constant RemobilisationCost: FixedValue=0
        Constant CarbonConcentration: FixedValue=0.4
        NutrientDemandFunctions DMDemands
          MultiplyFunction Structural
            PartitionFractionDemandFunction DMDemandFunction
              PhaseLookup PartitionFraction
                Memo Description
                  The allocation of biomass below ground follows a simple approach in the PlantainForage model.  The amount allocated to roots is computed based on current proportion and two target ratios (the [#TargetShootRootRatio].Value and [#TaprootRootRatio].Value).  There is little information in the literature about these parameters and they should vary with cultivar. Currently the model will attempt to keep a given proportion in ach organ, ho these porportions vary should be update when more data becomes available.
                PhaseLookupValue AllPhases: Start=Emergence; End=Ripening
                  DivideFunction RootFraction
                    MultiplyFunction Numerator
                      VariableReference CurrentSR: VariableName=[ShootRootRatio]
                      VariableReference CurrentTR: VariableName=[TaprootRootRatio]
                    MultiplyFunction Denominator: same as Replacements.PlantainForage.Taproot.DMDemands.Structural.DMDemandFunction.PartitionFraction.AllPhases.TaprootFraction.Denominator
            Constant StructuralFraction: FixedValue=1; Units=g/g
          Constant Metabolic: FixedValue=0
          StorageDMDemandFunction Storage
            SubtractFunction StorageFraction
              Constant One: FixedValue=1
              VariableReference StructuralFraction: VariableName=[Root].DMDemands.Structural.StructuralFraction
          Constant QStructuralPriority: FixedValue=1
          Constant QMetabolicPriority: FixedValue=1
          Constant QStoragePriority: FixedValue=1
        NutrientDemandFunctions NDemands
          MultiplyFunction Structural
            VariableReference MinNconc: VariableName=[Root].minimumNconc
            VariableReference PotentialDMAllocation: VariableName=[Root].potentialDMAllocation.Structural
          MultiplyFunction Metabolic
            SubtractFunction MetabolicNconc
              VariableReference CritNconc: VariableName=[Root].criticalNConc
              VariableReference MinNconc: VariableName=[Root].minimumNconc
            VariableReference PotentialDMAllocation: VariableName=[Root].potentialDMAllocation.Structural
          StorageNDemandFunction Storage
            VariableReference NitrogenDemandSwitch: VariableName=[Root].nitrogenDemandSwitch
            VariableReference MaxNconc: VariableName=[Root].maximumNconc
          Constant QStructuralPriority: FixedValue=1
          Constant QMetabolicPriority: FixedValue=1
          Constant QStoragePriority: FixedValue=1
        VariableReference CriticalNConc: VariableName=[Root].MinimumNConc
        NutrientPoolFunctions InitialWt
          Constant Structural: FixedValue=0.002
          Constant Metabolic: FixedValue=0
          Constant Storage: FixedValue=0
      CompositeBiomass AboveGround: OrganNames=[Leaf, Stem, Inflorescence]; IncludeLive=true; IncludeDead=true
      CompositeBiomass AboveGroundLive: OrganNames=[Leaf, Stem, Inflorescence]; IncludeLive=true; IncludeDead=false
      CompositeBiomass BelowGround: OrganNames=[Root, Taproot]; IncludeLive=true; IncludeDead=true
      CompositeBiomass BelowGroundLive: OrganNames=[Root, Taproot]; IncludeLive=true; IncludeDead=false
      CompositeBiomass Total: OrganNames=[Leaf, Stem, Inflorescence, Root, Taproot]; IncludeLive=true; IncludeDead=true
      DivideFunction PerPlantBelowGroundWt
        Memo Description
          This represents the live biomass dry weight below ground for a specific plant (in g/plant)
        VariableReference BelowGroundWt: VariableName=[BelowGroundLive].Wt
        VariableReference Population: VariableName=[PlantainForage].Population
      PhaseLookup ShootRootRatio
        PhaseLookupValue AllPhases: Start=Emergence; End=Ripening
          DivideFunction CurrentSR
            VariableReference AbogeGroundDM: VariableName=[AboveGroundLive].Wt
            VariableReference BelowGroundDM: VariableName=[BelowGroundLive].Wt
      PhaseLookup TargetShootRootRatio
        Memo Description
          To ensure prompt regrowth of forage plantain after a defoliation, the model will adjust the allocation of new growth following any defoliation event. This is a simplified approach to biomass allocation plasticity (e.g. [#Wilson_1988]; [#LevangBrilz_2002]), it assumes that the plant switches allocation of towards leaves whenever the current shoot:root ratio differs from the target value.
          Published data for the shoot:root ratio in plantain is highly variable, with values as low as 1.0 for wild varieties and as high as 6.0 for seedlings of commercial cultivars with no water of nutrient limitations ([#SchippersOlff_2000]; [#LabreveuxThesis_2002]; [#CranstonEtAl_2015]; [#PankokeEtAl_2015]).  The data suggests mean values to be around 1.75-2.0 for adult plants.  This value is likely to be affected by environmental conditions, with water or nutrient deficit favouring root growth, while low light conditions leading to higher allocation above ground. However, these relationships can vary considerably in different plants and there is little data for plantain forage, so the model current ignores the influence of environmental factors on the shoot:root partition, this should be upgraded when data becomes available.
        PhaseLookupValue Vegetative: Start=Emergence; End=Flowering
          Constant TargetSR: FixedValue=1.75; Units=g/g
        PhaseLookupValue Reproductive: Start=Flowering; End=Ripening
          AddFunction TargetSR
            VariableReference MinTargetSR: VariableName=[TargetShootRootRatio].Vegetative.TargetSR
            MultiplyFunction PlusTarget
              SubtractFunction DeltaTarget
                Constant MaxTargetSR: FixedValue=2; Units=g/g
                VariableReference MinTargetSR: VariableName=[TargetShootRootRatio].Vegetative.TargetSR
              LinearInterpolationFunction PhotoperiodEffect
                XYPairs: X=[11, 12, 13, 13.75, 14, 15]; Y=[0, 0, 0.25, 0.85, 1, 1]
                VariableReference XValue: VariableName=[Phenology].Photoperiod
      PhaseLookup StemsLeafRatio
        PhaseLookupValue Reproductive: Start=Flowering; End=Ripening
          DivideFunction CurrentSL
            AddFunction StemFlowerDM
              VariableReference StemDM: VariableName=[Stem].Live.Wt
              VariableReference InflorescenceDM: VariableName=[Inflorescence].Live.Wt
            VariableReference LeafDM: VariableName=[Leaf].Live.Wt
      PhaseLookup TargetStemsLeafRatio
        Memo Description
          The  PlantainForage model defines allocation of biomass above ground following a simple approach, it attempts to keep a given proportion among the various organs.  The allocation of biomass to leaves is defined primarily by the target shoo:root ratio, but during the reproductive phase, the partition is further modified based on the ratio of stems+inflorescence to leaves. This ratio may be affected by defoliation ([#AyalaEtAl_2011]; [#QuijadaThesis_2015]) and is probably affected by enviromental factors too. There is not enough data to describe these interactions.
          Published results suggest that reproductive parts represent a relatively small proportion of the biomass, about 10-25% in grazed swards, and about 40% if not grazed ([#SchippersOlff_2000]; [#LabreveuxThesis_2002]; [#MoorheadPigot_2009]; [#AyalaEtAl_2011]).
        PhaseLookupValue Reproductive: Start=Flowering; End=Ripening
          MultiplyFunction TargetSL
            Constant MaximumSL: FixedValue=0.25; Units=g/g
            LinearInterpolationFunction PhotoperiodEffect
              XYPairs: X=[11, 12.5, 13.25, 13.75, 14, 15]; Y=[0, 0, 0.2, 0.8, 1, 1]
              VariableReference XValue: VariableName=[Phenology].Photoperiod
      PhaseLookup FlowerStemRatio
        PhaseLookupValue Reproductive: Start=Flowering; End=Ripening
          DivideFunction CurrentFS
            VariableReference InflorescenceDM: VariableName=[Inflorescence].Live.Wt
            VariableReference StemDM: VariableName=[Stem].Live.Wt
      PhaseLookup TargetFlowerStemRatio
        Memo Description
          The allocation of biomass follows a simple approach in the PlantainForage model.  Allocation during the reproductive phase will attempt to keep a ratio between stem and inflorescence biomass.  This ratio is probably affected by enviromental factors, but there is not data to determine how these would interact.  Because of the short period between stem elongation, flowering and seed maturity, and a relatively long reproductive phase, forage plantain plants will have ripe seeds as well as young stalks at the same time.  This makes quite difficult to define variation in biomass allocation to inflorescence.  Inference from published values suggest that the ratio of flower biomass to stems varies from around 0.1 to nearly 0.4 ([#SchippersOlff_2000]).
        PhaseLookupValue Reproductive: Start=Flowering; End=Ripening
          MultiplyFunction TargetFS
            Constant MaximumFS: FixedValue=0.25; Units=g/g
            LinearInterpolationFunction PhotoperiodEffect
              XYPairs: X=[11, 12.75, 13.25, 13.75, 14, 15]; Y=[0, 0, 0.1, 0.75, 1, 1]
              VariableReference XValue: VariableName=[Phenology].Photoperiod
      PhaseLookup TaprootRootRatio
        PhaseLookupValue AllPhases: Start=Emergence; End=Ripening
          DivideFunction CurrentTR
            VariableReference TaprootDM: VariableName=[Taproot].Live.Wt
            VariableReference RootsDM: VariableName=[Root].Live.Wt
      PhaseLookup TargetTaprootRootRatio
        Memo Description
          The PlantainForage model assumes that biomass is allocated so to mantain a given proportion of among the various organs (varying with phenological phase and other factors).  The ratio between taproot and root biomass is assumed to vary, increasing with the biomass below ground per plant, approaching a maximum target.  This is a simple approach and can describe the general behaviour of plantain forage plants, it may be upgraded if deemed necessary when more data becomes available.
        PhaseLookupValue AllPhases: Start=Emergence; End=Ripening
          MultiplyFunction TargetTR
            Constant MaximumTR: FixedValue=1; Units=g/g
            LinearInterpolationFunction BiomassFactor
              XYPairs: X=[0, 0.025, 0.1, 0.25, 0.5, 1, 1.5]; Y=[1e-05, 1e-05, 0.4, 0.75, 0.95, 1, 1]
              VariableReference XValue: VariableName=[PerPlantBelowGroundWt]
      Folder Cultivars
        Cultivar Tonic
          Memo Description
            *Tonic* is the basic forage plantain cultivar. It was develop later than *Lancelot* and was developed from a northern Portugal germplasm. It has very erect and large leaves, produce less tillers than *Lancelot* and perhaps less seed heads.  *Tonic* cultivar is heat tolerante and also witnter active, typically with higher yields when compared to *Lancelot*.
        Cultivar Lancelot
          Command:
            [Leaf].Photosynthesis.FT.XYPairs.X = 5, 10, 15, 21, 27, 35
            [Leaf].Photosynthesis.FT.XYPairs.Y = 0.0, 0.04, 0.3, 1.0, 1.0, 0.0
            [Leaf].HeightFunction.XYPairs.X = 10, 100, 500
            [Leaf].HeightFunction.XYPairs.Y = 100, 300, 400
          Memo Description
            *Lancelot* is the first forage plantain cultivar released, it was selected from New Zealand pastures. It has a semi-erect growth habit, medium to large leaves, and produce many tillers.  This cultivar has good heat tolerance but growth is low over winter.  *Lancelot*  has been used for many years as grazing forage, in monoculture or in mixed swards, in several countries worldwide.  However, currently the most common cultivar is *Tonic*.
      Constant MortalityRate: FixedValue=0
      Constant SeedMortalityRate: FixedValue=0
  DataStore
    ExcelInput Observed: FileNames=[Observed.xlsx]; SheetNames=[Observed]
    ExcelInput ObservedMeans: FileNames=[Observed.xlsx]; SheetNames=[ObservedMeans]
    PredictedObserved: PredictedTableName=Report; ObservedTableName=Observed; FieldNameUsedForMatch=SimulationName; FieldName2UsedForMatch=Date; AllColumns=false
    PredictedObserved PredictedObservedMeans: PredictedTableName=Report; ObservedTableName=ObservedMeans; FieldNameUsedForMatch=SimulationName; FieldName2UsedForMatch=Date; AllColumns=false
  Folder Evaluation
    Memo Note
      Evaluating the performance of Apsim to simulate multi-species pasture swards against experiments conducted in New Zealand and Denmark.
    Folder NewZealand
      Experiment FRNLRuakuraMix1
        DisabledSimNames=[FRNLRuakuraNRate50, FRNLRuakuraNRate100, FRNLRuakuraNRate200, FRNLRuakuraNRate350]
        Memo
          ###FRNL Ruakura###

          This simulation setup was based on field trials performed at DairyNZ's Scott Farm, in Ruakura, New Zealand, between 2014 and 2016.  The experiment was part of the FRNL (Forages for Reduced Nitrogen Leaching) program and the data is basically unpublished (references will be added when they come about).  Here only plots with the "standard" mixed pasture species are used, this includes ryegrass and white clover (weeds also occured, but are not included in the simulation - the fraction of biomass was fairly small).
          The experiment consisted of six fertiliser treatments (nominally at N rates of 0, 50, 100, 200, 350 and 500 kg/ha/yr) in three replicates; actual amounts varied as fertiliser applications followed pasture harvests.  Measurements comprised yield, for each species, and quality indicators (here N content is used), for whole sward.
          Observed data supplied by Grant Edwards, Lincoln University.

          The soil at the experimental site was a Horotiu silt loam (an Orthic Allophanic soil; USDA: Typic Udivitrand), the parameters required were inferred using data from the New Zealand National Soils Database (Landcare Research).
          Weather data was obtained from nearby Ruakura weather station (NIWA).
          Simulation of ryegrass and lucerne are done using the AgPasture model as the PMF versions are still under development.
        Factors
          Factor NRate: Specification=[NRate]
            Operations 0
            Operations 50
              2014-12-22  [Fertiliser].Apply(amount: 5, type: "UreaN", depth: 10)
              2015-01-22  [Fertiliser].Apply(amount: 5, type: "UreaN", depth: 10)
              2015-03-10  [Fertiliser].Apply(amount: 5, type: "UreaN", depth: 10)
              2015-04-16  [Fertiliser].Apply(amount: 5, type: "UreaN", depth: 10)
              2015-05-21  [Fertiliser].Apply(amount: 5, type: "UreaN", depth: 10)
              2015-07-31  [Fertiliser].Apply(amount: 5, type: "UreaN", depth: 10)
              2015-09-16  [Fertiliser].Apply(amount: 5, type: "UreaN", depth: 10)
              2015-11-19  [Fertiliser].Apply(amount: 5, type: "UreaN", depth: 10)
              2015-12-17  [Fertiliser].Apply(amount: 5, type: "UreaN", depth: 10)
              2016-01-26  [Fertiliser].Apply(amount: 5, type: "UreaN", depth: 10)
              2016-03-09  [Fertiliser].Apply(amount: 5, type: "UreaN", depth: 10)
              2016-04-20  [Fertiliser].Apply(amount: 5, type: "UreaN", depth: 10)
              2016-06-13  [Fertiliser].Apply(amount: 5, type: "UreaN", depth: 10)
              2016-08-24  [Fertiliser].Apply(amount: 5, type: "UreaN", depth: 10)
              2016-09-30  [Fertiliser].Apply(amount: 5, type: "UreaN", depth: 10)
              2016-11-03  [Fertiliser].Apply(amount: 5, type: "UreaN", depth: 10)
            Operations 100
              2014-12-22  [Fertiliser].Apply(amount: 10, type: "UreaN", depth: 10)
              2015-01-22  [Fertiliser].Apply(amount: 10, type: "UreaN", depth: 10)
              2015-03-10  [Fertiliser].Apply(amount: 10, type: "UreaN", depth: 10)
              2015-04-16  [Fertiliser].Apply(amount: 10, type: "UreaN", depth: 10)
              2015-05-21  [Fertiliser].Apply(amount: 10, type: "UreaN", depth: 10)
              2015-07-31  [Fertiliser].Apply(amount: 10, type: "UreaN", depth: 10)
              2015-09-16  [Fertiliser].Apply(amount: 10, type: "UreaN", depth: 10)
              2015-11-19  [Fertiliser].Apply(amount: 10, type: "UreaN", depth: 10)
              2015-12-17  [Fertiliser].Apply(amount: 10, type: "UreaN", depth: 10)
              2016-01-26  [Fertiliser].Apply(amount: 10, type: "UreaN", depth: 10)
              2016-03-09  [Fertiliser].Apply(amount: 10, type: "UreaN", depth: 10)
              2016-04-20  [Fertiliser].Apply(amount: 10, type: "UreaN", depth: 10)
              2016-06-13  [Fertiliser].Apply(amount: 10, type: "UreaN", depth: 10)
              2016-08-24  [Fertiliser].Apply(amount: 10, type: "UreaN", depth: 10)
              2016-09-30  [Fertiliser].Apply(amount: 10, type: "UreaN", depth: 10)
              2016-11-03  [Fertiliser].Apply(amount: 10, type: "UreaN", depth: 10)
            Operations 200
              2014-12-22  [Fertiliser].Apply(amount: 20, type: "UreaN", depth: 10)
              2015-01-22  [Fertiliser].Apply(amount: 20, type: "UreaN", depth: 10)
              2015-03-10  [Fertiliser].Apply(amount: 20, type: "UreaN", depth: 10)
              2015-04-16  [Fertiliser].Apply(amount: 20, type: "UreaN", depth: 10)
              2015-05-21  [Fertiliser].Apply(amount: 20, type: "UreaN", depth: 10)
              2015-07-31  [Fertiliser].Apply(amount: 20, type: "UreaN", depth: 10)
              2015-09-16  [Fertiliser].Apply(amount: 20, type: "UreaN", depth: 10)
              2015-11-19  [Fertiliser].Apply(amount: 20, type: "UreaN", depth: 10)
              2015-12-17  [Fertiliser].Apply(amount: 20, type: "UreaN", depth: 10)
              2016-01-26  [Fertiliser].Apply(amount: 20, type: "UreaN", depth: 10)
              2016-03-09  [Fertiliser].Apply(amount: 20, type: "UreaN", depth: 10)
              2016-04-20  [Fertiliser].Apply(amount: 20, type: "UreaN", depth: 10)
              2016-06-13  [Fertiliser].Apply(amount: 20, type: "UreaN", depth: 10)
              2016-08-24  [Fertiliser].Apply(amount: 20, type: "UreaN", depth: 10)
              2016-09-30  [Fertiliser].Apply(amount: 20, type: "UreaN", depth: 10)
              2016-11-03  [Fertiliser].Apply(amount: 20, type: "UreaN", depth: 10)
            Operations 350
              2014-12-22  [Fertiliser].Apply(amount: 35, type: "UreaN", depth: 10)
              2015-01-22  [Fertiliser].Apply(amount: 35, type: "UreaN", depth: 10)
              2015-03-10  [Fertiliser].Apply(amount: 35, type: "UreaN", depth: 10)
              2015-04-16  [Fertiliser].Apply(amount: 35, type: "UreaN", depth: 10)
              2015-05-21  [Fertiliser].Apply(amount: 35, type: "UreaN", depth: 10)
              2015-07-31  [Fertiliser].Apply(amount: 35, type: "UreaN", depth: 10)
              2015-09-16  [Fertiliser].Apply(amount: 35, type: "UreaN", depth: 10)
              2015-11-19  [Fertiliser].Apply(amount: 35, type: "UreaN", depth: 10)
              2015-12-17  [Fertiliser].Apply(amount: 35, type: "UreaN", depth: 10)
              2016-01-26  [Fertiliser].Apply(amount: 35, type: "UreaN", depth: 10)
              2016-03-09  [Fertiliser].Apply(amount: 35, type: "UreaN", depth: 10)
              2016-04-20  [Fertiliser].Apply(amount: 35, type: "UreaN", depth: 10)
              2016-06-13  [Fertiliser].Apply(amount: 35, type: "UreaN", depth: 10)
              2016-08-24  [Fertiliser].Apply(amount: 35, type: "UreaN", depth: 10)
              2016-09-30  [Fertiliser].Apply(amount: 35, type: "UreaN", depth: 10)
              2016-11-03  [Fertiliser].Apply(amount: 35, type: "UreaN", depth: 10)
            Operations 500
              2014-12-22  [Fertiliser].Apply(amount: 50, type: "UreaN", depth: 10)
              2015-01-22  [Fertiliser].Apply(amount: 50, type: "UreaN", depth: 10)
              2015-03-10  [Fertiliser].Apply(amount: 50, type: "UreaN", depth: 10)
              2015-04-16  [Fertiliser].Apply(amount: 50, type: "UreaN", depth: 10)
              2015-05-21  [Fertiliser].Apply(amount: 50, type: "UreaN", depth: 10)
              2015-07-31  [Fertiliser].Apply(amount: 50, type: "UreaN", depth: 10)
              2015-09-16  [Fertiliser].Apply(amount: 50, type: "UreaN", depth: 10)
              2015-11-19  [Fertiliser].Apply(amount: 50, type: "UreaN", depth: 10)
              2015-12-17  [Fertiliser].Apply(amount: 50, type: "UreaN", depth: 10)
              2016-01-26  [Fertiliser].Apply(amount: 50, type: "UreaN", depth: 10)
              2016-03-09  [Fertiliser].Apply(amount: 50, type: "UreaN", depth: 10)
              2016-04-20  [Fertiliser].Apply(amount: 50, type: "UreaN", depth: 10)
              2016-06-13  [Fertiliser].Apply(amount: 50, type: "UreaN", depth: 10)
              2016-08-24  [Fertiliser].Apply(amount: 50, type: "UreaN", depth: 10)
              2016-09-30  [Fertiliser].Apply(amount: 50, type: "UreaN", depth: 10)
              2016-11-03  [Fertiliser].Apply(amount: 50, type: "UreaN", depth: 10)
        Simulation FRNLRuakuraMix1
          Clock: Start=2014-09-01; End=2016-12-31
          Weather: FileName=Ruakura.met
          Summary summaryfile
          SoilArbitrator Soil Arbitrator
          Forages
            Parameters:
              Name                          LiveDigestibility  DeadDigestibility  LiveFractionConsumable  DeadFractionConsumable  LiveMinimumBiomass  DeadMinimumBiomass
              SurfaceOrganicMatter.Residue  0.7                0.3                1                       1                       100                 0
              AGPRyegrass.Leaf              0.7                0.3                1                       1                       100                 0
              AGPRyegrass.Stem              0.7                0.3                1                       1                       100                 0
              AGPRyegrass.Stolon            0.7                0.3                1                       1                       100                 0
              AGPWhiteClover.Leaf           0.7                0.3                1                       1                       100                 0
              AGPWhiteClover.Stem           0.7                0.3                1                       1                       100                 0
              AGPWhiteClover.Stolon         0.7                0.3                1                       1                       100                 0
          Zone Field: Area=1; Slope=0; AspectAngle=0; Altitude=50
            Folder Management
              Operations Sowing
                2014-09-01  [AGPRyegrass].EndCrop()
                2014-09-01  [AGPWhiteClover].EndCrop()
                2014-11-15  [AGPRyegrass].Sow(population: 0, cultivar: "R", depth: 0, rowSpacing: 0)
                2014-11-15  [AGPWhiteClover].Sow(population: 0, cultivar: "R", depth: 0, rowSpacing: 0)
              Operations NRate
              Operations BaseFertiliser
                2014-10-13  [Fertiliser].Apply(amount: 26.4, type: "UreaN", depth: 10)
                2014-12-23  [Fertiliser].Apply(amount: 3.9, type: "UreaN", depth: 10)
              Operations DefoliationSchedule
                2014-12-16  [DefoliationManager].Script.Defoliate(defoliationType: "Cut", amountDM: 100, amountType: "ResidualDM", duration: 1)
                2015-01-20  [DefoliationManager].Script.Defoliate(defoliationType: "Cut", amountDM: 100, amountType: "ResidualDM", duration: 1)
                2015-03-09  [DefoliationManager].Script.Defoliate(defoliationType: "Cut", amountDM: 100, amountType: "ResidualDM", duration: 1)
                2015-04-15  [DefoliationManager].Script.Defoliate(defoliationType: "Cut", amountDM: 100, amountType: "ResidualDM", duration: 1)
                2015-05-20  [DefoliationManager].Script.Defoliate(defoliationType: "Cut", amountDM: 100, amountType: "ResidualDM", duration: 1)
                2015-07-20  [DefoliationManager].Script.Defoliate(defoliationType: "Cut", amountDM: 100, amountType: "ResidualDM", duration: 1)
                2015-09-14  [DefoliationManager].Script.Defoliate(defoliationType: "Cut", amountDM: 100, amountType: "ResidualDM", duration: 1)
                2015-10-21  [DefoliationManager].Script.Defoliate(defoliationType: "Cut", amountDM: 100, amountType: "ResidualDM", duration: 1)
                2015-11-17  [DefoliationManager].Script.Defoliate(defoliationType: "Cut", amountDM: 100, amountType: "ResidualDM", duration: 1)
                2015-12-16  [DefoliationManager].Script.Defoliate(defoliationType: "Cut", amountDM: 100, amountType: "ResidualDM", duration: 1)
                2016-01-25  [DefoliationManager].Script.Defoliate(defoliationType: "Cut", amountDM: 100, amountType: "ResidualDM", duration: 1)
                2016-03-08  [DefoliationManager].Script.Defoliate(defoliationType: "Cut", amountDM: 100, amountType: "ResidualDM", duration: 1)
                2016-04-19  [DefoliationManager].Script.Defoliate(defoliationType: "Cut", amountDM: 100, amountType: "ResidualDM", duration: 1)
                2016-06-13  [DefoliationManager].Script.Defoliate(defoliationType: "Cut", amountDM: 100, amountType: "ResidualDM", duration: 1)
                2016-08-23  [DefoliationManager].Script.Defoliate(defoliationType: "Cut", amountDM: 100, amountType: "ResidualDM", duration: 1)
                2016-09-29  [DefoliationManager].Script.Defoliate(defoliationType: "Cut", amountDM: 100, amountType: "ResidualDM", duration: 1)
                2016-11-01  [DefoliationManager].Script.Defoliate(defoliationType: "Cut", amountDM: 100, amountType: "ResidualDM", duration: 1)
                2016-11-29  [DefoliationManager].Script.Defoliate(defoliationType: "Cut", amountDM: 100, amountType: "ResidualDM", duration: 1)
              Manager ExtraVariables
```csharp
// This will be replaced by the "ExtraVariables" section in "Replacements"

using Models.Soils;
using System;
using Models.Core;

namespace Models
{
    [Serializable] 
    public class Script : Model
    {
    }
}
```
              Manager DefoliationManager
                AllowAutomaticManagement = No
                DefoliationRotationStartDate = 01/01/1900 00:00:00
                DefoliationRotationEndDate = 12/31/2100 00:00:00
                DefoliationTriggerType = TargetStandingBiomass
                IntervalBetweenDefoliations = 15
                TargetStandingBiomass = 250
                DurationOfEachDefoliation = 1
                RemoveAmountType = ResidualDM
                AmountForEachDefoliation = 125
                MininumAmountToDefoliate = 75
                SuppressDefoliationOnWindow = No
                NoDefoliationWindowStartDate = 1-Jun
                NoDefoliationWindowEndDate = 30-Jul
                EnforceMinimumInterval = No
                MinimumInterval = 15
                EnforceMaximumInterval = No
                MaximumInterval = 90
                DMRemoveType = UserDefinedFraction
                FractionDMToRemove = 0.99
                NRemoveType = UserDefinedFraction
                FractionNToRemove = 0.99
                ReturnType = AsResidue
                NDungType = DefineCNratio
                ProportionOfNToDung = 0.4
                CNRatioDung = 17.5
                UrineDepth = 250
                SettingUrineNAmount = No
                UrineNSetAmount = 2
                PopulationDeclineRate = 0
                ConsiderTrampling = No
                MaximumLitterFractionToSoil = 0.01
                BiomassDefoliatedForMaximumLitterFraction = 120
                MeanGrowthPeriodType = BetweenDefoliationsOrMaxPeriod
                MaxPeriodForMeanGrowth = 30
```csharp
// This script will perform defoliations, i.e remove biomass, from any existing plant (PMF and/or AgPasture) that is alive in a field.
// General rules for when and how much to defoliate, as well as how to handle the material harvested, are supplied via the GUI.
// Defoliations can be triggered automatically by this manager, based on given rules, or by calling the 'Defoliate()' method
//  from another Script or a Schedule model. Note that in this case, some rules are overriden based on the parameters given in Defoliate().
// Developed by RCichota, last updated in 20/Jan/2025

using APSIM.Core;
using System;
using System.Linq;
using System.Collections.Generic;
using Newtonsoft.Json;
using APSIM.Shared.Utilities;
using Models.Core;
using Models.PMF;
using Models.Soils;
using Models.PMF.Interfaces;
using Models.AgPasture;
using Models.ForageDigestibility;
using APSIM.Numerics;

namespace Models
{
    [Serializable]
    public class Script : Model, IStructureDependency
    {
        [Link] private Clock clock;
        [Link] private Zone myZone;
        [Link] private IPhysical soilPhysical;
        [Link(ByName = true)] private ISolute Urea;
        [Link] private Surface.SurfaceOrganicMatter surfaceOM;
        [Link] private Forages swardForages;
        [Link] private ISummary summary;
        public  event BiomassRemovedDelegate BiomassRemoved;
        public  event EventHandler DefoliationHappenedToday;
        private string baseAmountType;
        private string currentAmountType;
        private double currentAmountForDefoliation;
        private double currentMinAmount;
        private double herbageToRemove;
        private int durationOfThisDefoliation;
        private int daysDefoliating;
        private double cumAmountHarvested;
        private double currentPostHarvest;
        private double swardPreviousPhenoStage;
        private bool aDefoliationHasHappened;
        
        public IStructure Structure { private get; set; }

        //> Links to other Apsim models
        [Link] private IPlant[] existingCrops;

        //> Events raised by this manager
        private EventArgs args = new EventArgs();

        //> User inputs from properties tab
        [Separator("Generic defoliation management - removes biomass from all PMF and AgPasture species in the field \n"
                 + "   this also includes residue management or the return of excreta (dung and urine, uniformly)")]
        [Description(" Allow this manager to control defoliations automatically?")]
        public yesNoAnswer AllowAutomaticManagement { get; set; }
        [Description(" Date to start the defoliation management (dd/mm/yyyy):")]
        public DateTime DefoliationRotationStartDate { get; set; }
        [Description(" Date to end the defoliation management (dd/mm/yyyy):")]
        public DateTime DefoliationRotationEndDate { get; set; }

        [Separator("Parameters defining how the defoliation is managed")]
        [Description(" How the defoliation events should be triggered?")]
        public DefoliationTriggerTypes DefoliationTriggerType { get; set; }
        [Description("   Minimum number of days between defoliation events:")]
        [Display(VisibleCallback = "isDefoliationTriggerAnInterval")]
        public int IntervalBetweenDefoliations { get; set; }
        [Description("   Minimum standing biomass to trigger a defoliation event (g/m2):")]
        [Display(VisibleCallback = "isDefoliationTriggerAnAmount")]
        public double TargetStandingBiomass { get; set; }
        [Description(" Duration of each defoliation event (days):")]
        public int DurationOfEachDefoliation { get; set; }
        [Description(" Which amount is defined to control biomass to be defoliated?")]
        public DefoliateAmountTypes RemoveAmountType { get; set; }
        [Description(" DM amount to use (g/m2):")]
        public double AmountForEachDefoliation { get; set; }
        [Description(" Minimum DM amount to remove (g/m2):")]
        [Display(VisibleCallback = "isAmountDMToRemove")]
        public double MininumAmountToDefoliate { get; set; }

        [Separator(" Additional management parameters to control defoliation frequency")]
        [Description(" Suppress defoliations over a period of time within the year?")]
        public yesNoAnswer SuppressDefoliationOnWindow { get; set; }
        [Description("   Date to start the defoliation suppression window (dd-mmm):")]
        [Display(VisibleCallback = "suppressingDefoliationOnWindow")]
        public string NoDefoliationWindowStartDate { get; set; }
        [Description("   Date to end the defoliation suppression window (dd-mmm):")]
        [Display(VisibleCallback = "suppressingDefoliationOnWindow")]
        public string NoDefoliationWindowEndDate { get; set; }
        [Description(" Enforce a minimum interval between defoliations?")]
        [Display(VisibleCallback = "isDefoliationTriggerAnAmount")]
        public yesNoAnswer EnforceMinimumInterval { get; set; }
        [Description("   Minimum number of days between defoliations:")]
        [Display(VisibleCallback = "minimumIntervalEnforced")]
        public int MinimumInterval { get; set; }
        [Description(" Enforce a maximum interval between defoliations?")]
        [Display(VisibleCallback = "isTriggerNotFixedInterval")]
        public yesNoAnswer EnforceMaximumInterval { get; set; }
        [Description("   Maximum number of days between defoliations:")]
        [Display(VisibleCallback = "maximumIntervalEnforced")]
        public int MaximumInterval { get; set; }

        [Separator("Parameters defining the management of the defoliated biomass")]
        [Description(" How much of the DM defoliated is to be removed from the field?")]
        public DMRemovalTypes DMRemoveType { get; set; }
        [Description("   Fraction of DM to remove off field (0-1):")]
        [Display(VisibleCallback = "userDefinesDMFraction")]
        public double FractionDMToRemove { get; set; }
        [Description(" How much of the N defoliated is to be removed from the field?")]
        public NRemovalTypes NRemoveType { get; set; }
        [Description("   Fraction of N to remove off field (0-1):")]
        [Display(VisibleCallback = "userDefinesNFraction")]
        public double FractionNToRemove { get; set; }
        [Description(" How the non-removed material is returned to the field?")]
        public ReturnAsTypes ReturnType { get; set; }

        [Separator("Parameters for partitioning non-removed N into urine and dung")]
        [Description(" How the partition of N to dung and urine is defined?")]
        [Display(VisibleCallback = "returningAsDungUrine")]
        public DungNContentTypes NDungType { get; set; }
        [Description("   Proportion of N returned in dung (0-1):")]
        [Display(VisibleCallback = "nitrogenInDungIsProportion")]
        public double ProportionOfNToDung { get; set; }
        [Description("   The C:N of dung, if using DefineCNratio (typically around 20):")]
        [Display(VisibleCallback = "nitrogenInDungIsCNRatio")]
        public double CNRatioDung { get; set; }
        [Description(" Soil depth down to which urine should be applied (mm):")]
        [Display(VisibleCallback = "returningAsDungUrine")]
        public double UrineDepth { get; set; }

        [Separator("Additional parameters to control N returns")]
        [Description(" Use a fixed N amount in each urine deposition?")]
        [Display(VisibleCallback = "returningAsDungUrine")]
        public yesNoAnswer SettingUrineNAmount { get; set; }
        [Description("   Amount of N to apply as \"urine\" (gN/m2)):")]
        [Display(VisibleCallback = "urineNAmountFixed")]
        public double UrineNSetAmount { get; set; }

        [Separator(" Additional parameters to control effects of defoliations")]
        [Description(" Fraction of population decline in each defoliation (0-1) Not Implemented:")]
        public double PopulationDeclineRate { get; set; } = 0.0;
        [Description(" Consider effects of trampling on surface OM (litter)?")]
        public yesNoAnswer ConsiderTrampling { get; set; }
        [Description(" Maximum fraction of litter incorporated to the soil (0-1):")]
        [Display(VisibleCallback = "consideringTrampling")]
        public double MaximumLitterFractionToSoil { get; set; }
        [Description(" Defoliated biomass for maximum rate of incorporation (g/m2): \n  (e.g. 90 for heavy cattle, 120 for ewes)")]
        [Display(VisibleCallback = "consideringTrampling")]
        public double BiomassDefoliatedForMaximumLitterFraction { get; set; }

        [Separator("Additional parameters for computing growth rates")]
        [Description(" Interval over which the mean growth rate will be calculated?")]
        public MeanGrowthPeriodTypes MeanGrowthPeriodType { get; set; }
        [Description("  Number of days to compute mean growth rate (maximum):")]
        [Display(VisibleCallback = "growthPeriodToBeGiven")]
        public int MaxPeriodForMeanGrowth { get; set; }

        //> Outputs from this manager
        [JsonIgnore][Units("g/m2")] // Pasture DM that can be consume (removed from plants) today
        public double ConsumableWt { get; set; }
        [JsonIgnore][Units("g/m2")] // N in the pasture material that can be consumed today
        public double ConsumableN { get; set; }
        [JsonIgnore][Units("g/m2")] // Pasture DM defoliated (removed from plants) today
        public double DefoliatedWt { get; set; }
        [JsonIgnore][Units("g/m2")] // N in the pasture material defoliated today
        public double DefoliatedN { get; set; }
        [JsonIgnore][Units("g/m2")] // Pasture DM harvested (removed from plants minus direct residue) today
        public double HarvestedWt { get; set; }
        [JsonIgnore][Units("g/m2")] // N in the pasture material harvested today
        public double HarvestedN { get; set; }
        [JsonIgnore][Units("g/m2")] // Pasture DM actually removed from the field
        public double RemovedWt { get; set; }
        [JsonIgnore][Units("g/m2")] // N in the pasture material removed from the field
        public double RemovedN { get; set; }
        [JsonIgnore][Units("g/m2")] // Pasture DM returned by this manager to the field
        public double ReturnedWt { get; set; }
        [JsonIgnore][Units("g/m2")] // N in the pasture material returned by this manager to the field
        public double ReturnedN { get; set; }
        [JsonIgnore][Units("g/m2")] // Non-removed N returned as dung (to SurfaceOM)
        public double NReturnedInDung { get; set; }
        [JsonIgnore][Units("g/m2")] // Non-removed N returned as urine (soil urea)
        public double NReturnedInUrine { get; set; }
        [JsonIgnore][Units("days")] // Number of days since the end of last defoliation event
        public int DaysSinceLastDefoliation { get; set; }
        [JsonIgnore][Units("g/m2")] // Total standing aboveground DM before a defoliation
        public double PreHarvestDM { get; set; }
        [JsonIgnore][Units("g/m2")] // Total standing aboveground DM after a defoliation
        public double PostHarvestDM { get; set; }
        [JsonIgnore][Units("g/m2")] // Total pasture DM harvested over a complete defoliation event
        public double RotationHarvestedDM { get; set; }
        [JsonIgnore][Units("g/m2")] // Mean sward growth rate over a given period before each defoliation
        public double MeanGrowthRateDM { get; set; }

        //> Internal variables
        private List<ModelWithDigestibleBiomass> existingForageCrops; // links to the forage interface of each plant organ
        private LinkedList<double> growthQueue;         // list of daily growth rates over the period to compute mean growth rate
        private double[] urineFraction;                 // fraction of urine N to be applied in each soil layer



        

        [EventSubscribe("StartOfSimulation")]
        private void OnStartOfSimulation(object sender, EventArgs e)
        {
            // check the type of amount given
            if (RemoveAmountType == DefoliateAmountTypes.DMToRemove)
            {
                baseAmountType = "DMToRemove";
            }
            else if (RemoveAmountType == DefoliateAmountTypes.ResidualDM)
            {
                baseAmountType = "ResidualDM";
            }

            // check the interval between events
            if (IntervalBetweenDefoliations < 1)
            {
                throw new Exception("The interval between defoliation events must be at least one day");
            }

            // check the duration for each defoliation
            if(DurationOfEachDefoliation <= 0)
            {
                throw new Exception("The duration of defoliations cannot be zero or negative!");
            }

            // check the fraction of defoliated material to remove from the field
            if (DMRemoveType == DMRemovalTypes.RemoveAll)
            {
                FractionDMToRemove = 1.0;
            }
            else if (DMRemoveType == DMRemovalTypes.RemoveNone)
            {
                FractionDMToRemove = 0.0;
            }
            else if (DMRemoveType == DMRemovalTypes.BasedOnDigestibility)
            {
                FractionDMToRemove = -1.0;  // will be calculated dynamically
            }
            else // DMRemoveType == DMRemovalTypes.UserDefinedFraction
            {
                if (FractionDMToRemove < 0.0)
                {
                    throw new Exception("The fraction of DM defoliated to remove from the field cannot be negative!");
                }
            }

            // check the fraction of defoliated N to remove from the field
            if (NRemoveType == NRemovalTypes.RemoveAll)
            {
                FractionNToRemove = 1.0;
            }
            else if (NRemoveType == NRemovalTypes.RemoveNone)
            {
                FractionNToRemove = 0.0;
            }
            else if (NRemoveType == NRemovalTypes.ProportionalToDM)
            {
                FractionNToRemove = FractionDMToRemove;
            }
            else // NRemoveType == NRemovalTypes.UserDefinedFraction
            {
                if (FractionNToRemove < 0.0)
                {
                    throw new Exception("The fraction of defoliated N to remove from the field cannot be negative!");
                }
            }

            // get links to the forage interface for each platn organ
            existingForageCrops = swardForages.ModelsWithDigestibleBiomass.ToList();

            // make sure that management starts when RotationStartDate < simulationStartDay
            DefoliationRotationEndDate = DefoliationRotationEndDate > clock.EndDate? clock.EndDate: DefoliationRotationEndDate;
            if ((clock.Today > DefoliationRotationStartDate) && (clock.Today < DefoliationRotationEndDate))
            {
                DefoliationRotationStartDate = clock.Today;
            }

            // initialise some variables
            growthQueue = new LinkedList<double>();
            swardPreviousPhenoStage = 1.0;
            DaysSinceLastDefoliation = 0;
            durationOfThisDefoliation = -1;
            daysDefoliating = 0;
            resetMyOutputs();

            // set the fraction of urine for each layer
            if (ReturnType == ReturnAsTypes.AsDungUrine)
            {
                double depthFromSurface = 0.0;
                double propAtZ0;
                double propAtZ1;
                for (int layer = 0; layer < soilPhysical.Thickness.Length; layer++)
                {
                    depthFromSurface += soilPhysical.Thickness[layer];
                    if (depthFromSurface >= UrineDepth)
                    { // bottom layer found
                        urineFraction = new double[layer + 1];
                        double distFactor = 1.5;
                        double totalProp = UrineDepth * Math.Pow(1.0, distFactor) / (distFactor + 1.0);
                        depthFromSurface = 0.0;
                        propAtZ1 = (UrineDepth - depthFromSurface) * Math.Pow(1.0 - depthFromSurface / UrineDepth, distFactor) / (distFactor + 1.0);
                        for (int z = 0; z < layer+1; z++)
                        {
                            propAtZ0 = propAtZ1;
                            depthFromSurface += soilPhysical.Thickness[z];
                            propAtZ1 = (UrineDepth - depthFromSurface) * Math.Pow(1.0 - depthFromSurface / UrineDepth, distFactor) / (distFactor + 1);
                            if (1.0 - (depthFromSurface / UrineDepth) < 0.0)
                            {
                                propAtZ1 = 0;
                            }
                            urineFraction[z] = (propAtZ0 - propAtZ1) / totalProp;
                        }
                        layer = soilPhysical.Thickness.Length;
                    }
                }
            }

            // write message in summary
            summary.WriteMessage(this," Defoliation manager initialisation", MessageType.Diagnostic);
            if (automaticManagementAllowed)
            {
                summary.WriteMessage(this, "   Automatic defoliations will happen between " + DefoliationRotationStartDate.ToShortDateString()
                                         + " and " + DefoliationRotationEndDate.ToShortDateString() + ".", MessageType.Diagnostic);
                if (SuppressDefoliationOnWindow == yesNoAnswer.Yes)
                {
                    summary.WriteMessage(this, "    But they will be suppressed between " + NoDefoliationWindowStartDate  + " and "
                                               + NoDefoliationWindowEndDate + ".", MessageType.Diagnostic);
                }

                summary.WriteMessage(this, "   Biomass from all species in the sward will be removed if criteria are matched.", MessageType.Diagnostic);
                if (DefoliationTriggerType == DefoliationTriggerTypes.TargetStandingBiomass)
                {
                    summary.WriteMessage(this, "   Events will happen whenever aboveground biomass surpasses " + TargetStandingBiomass.ToString("#0.0") + " g/m2.", MessageType.Diagnostic);
                    if(EnforceMinimumInterval == yesNoAnswer.Yes)
                    {
                        summary.WriteMessage(this, "     With a minimum of " + MinimumInterval + " days between defoliations", MessageType.Diagnostic);
                    }
                    if(EnforceMaximumInterval == yesNoAnswer.Yes)
                    {
                        summary.WriteMessage(this, "     With a maximum of " + MaximumInterval + " days between defoliations", MessageType.Diagnostic);
                    }
                }
                else
                {
                    summary.WriteMessage(this, "   Events will happen every " + IntervalBetweenDefoliations + " days, if there is enough biomass.", MessageType.Diagnostic);
                }

                if(baseAmountType == "ResidualDM")
                {
                    summary.WriteMessage(this, "   Removing biomass down to a residual amount of " + AmountForEachDefoliation.ToString("#.0") + " g/m2 over "
                                             + DurationOfEachDefoliation + " days.", MessageType.Diagnostic);
                }
                else
                {
                    summary.WriteMessage(this, "   Attempting to remove " + AmountForEachDefoliation.ToString("#.0") + " g/m2 of biomass per day over "
                                             + DurationOfEachDefoliation + " days.", MessageType.Diagnostic);
                }
            }
            else
            {
                summary.WriteMessage(this,"   Automatic defoliations are currently disabled, though defoliations can be triggered by another manager", MessageType.Diagnostic);
            }

            if(ReturnType == ReturnAsTypes.AsDungUrine)
            {
                summary.WriteMessage(this,"   Non-removed material will be returned as dung and urine. Urine added to soil according to proportions: "
                                         + string.Join(", ",urineFraction), MessageType.Diagnostic);
            }
            else
            {
                summary.WriteMessage(this,"   Non-removed material will be returned as residue.", MessageType.Diagnostic);
            }
        }

        [EventSubscribe("DoManagement")]
        private void OnDoManagement(object sender, EventArgs e)
        {
            // get the biomass available for defoliation
            ConsumableWt = harvestableSwardBiomassWt("All");
            ConsumableN = harvestableSwardBiomassN("All");

            // check whether we need to continue defoliating, i.e. within a multi-day defoliation event (need to check this first in the day)
            if ((daysDefoliating > 0) && (daysDefoliating < durationOfThisDefoliation))
            {
                // reset outputs
                resetMyOutputs();

                // re-check the amount to defoliate
                herbageToRemove = 0.0;
                if (currentAmountType == "DMToRemove")
                {
                    if(ConsumableWt > currentMinAmount + 0.001)
                    {
                        herbageToRemove = Math.Min(ConsumableWt, (currentAmountForDefoliation - cumAmountHarvested) / (durationOfThisDefoliation - daysDefoliating));
                    }
                }
                else if (currentAmountType == "ResidualDM")
                {
                    double currentDM = standingSwardBiomassWt;
                    if (currentDM > currentAmountForDefoliation)
                    {
                        herbageToRemove = Math.Min(ConsumableWt, (currentDM - currentAmountForDefoliation) / (durationOfThisDefoliation - daysDefoliating));
                    }
                }

                // remove plant biomass and return residue
                if (Math.Abs(herbageToRemove) >= 0.001)
                {
                    // set biomass removal
                    defoliateSward(herbageToRemove);

                    // return residue or excreta
                    if(ReturnedWt + ReturnedN > 0.0)
                    {
                        if (ReturnType == ReturnAsTypes.AsResidue)
                        {
                            returnResidues();
                        }
                        else
                        {
                            returnExcreta();
                        }
                    }

                    // consider trampling effect on surface OM
                    if (consideringTrampling)
                    {
                        doTrampling();
                    }

                    // gather amount removed this event
                    cumAmountHarvested += HarvestedWt;
                }

                daysDefoliating += 1;
            }

            // check whether a defoliation ended yesterday
            if (daysDefoliating < 0)
            { // clean up variables
                resetMyOutputs();
                daysDefoliating = 0;
            }

            // check whether automatic defoliations are enabled
            if (automaticManagementAllowed)
            {
                // check whether we are within the period in which defoliation management is allowed
                if ((clock.Today.Date >= DefoliationRotationStartDate.Date) && (clock.Today.Date <= DefoliationRotationEndDate.Date))
                {
                    // check whether the sward has plants alive that could be defoliated
                    if (swardHasLivingPlants)
                    {
                        // check whether the day counter to control defoliation interval needs to be set
                        if (clock.Today.Date == DefoliationRotationStartDate.Date)
                        { // set to the maximum interval, so a defoliation is triggered today
                            if(isDefoliationTriggerAnAmount)
                            {
                                if(EnforceMaximumInterval == yesNoAnswer.Yes)
                                {
                                    DaysSinceLastDefoliation = MaximumInterval;
                                }
                            }
                            else
                            {
                                DaysSinceLastDefoliation = IntervalBetweenDefoliations;
                            }
                        }

                        // check whether the day counter to control defoliation interval needs to be set off
                        double swardCurrentPhenoStage = swardPhenologyStage;
                        if ((swardPreviousPhenoStage < 1.0) && (swardCurrentPhenoStage >= 1.0))
                        { // sward was sown and has just emmerged, pretend a defoliation has happened to set the counter going
                            aDefoliationHasHappened = true;
                            DaysSinceLastDefoliation -= 30; // give an extra month for the pasture to grow (on top of 'normal' interval)
                        }
                        swardPreviousPhenoStage = swardCurrentPhenoStage;

                        // check whether a window for suppressing defoliations has been set
                        if (suppressingDefoliationOnWindow && DateUtilities.WithinDates(NoDefoliationWindowStartDate, clock.Today, NoDefoliationWindowEndDate))
                        { // do nothing as we're within the suppression window
                        }
                        else
                        {
                            // check whether we should start a defoliation event
                            if (DefoliationTriggerType == DefoliationTriggerTypes.FixedInterval)
                            {
                                if (DaysSinceLastDefoliation == IntervalBetweenDefoliations)
                                {
                                    Defoliate(AmountForEachDefoliation, baseAmountType, DurationOfEachDefoliation, MininumAmountToDefoliate, "yes");
                                }
                            }
                            else if (DefoliationTriggerType == DefoliationTriggerTypes.TargetInterval)
                            {
                                if (DaysSinceLastDefoliation >= IntervalBetweenDefoliations)
                                {
                                    if(EnforceMaximumInterval == yesNoAnswer.Yes && (DaysSinceLastDefoliation >= MaximumInterval))
                                    { // start a defoliation even if biomass is insufficient
                                        Defoliate(AmountForEachDefoliation, baseAmountType, DurationOfEachDefoliation, MininumAmountToDefoliate, "yes");
                                    }
                                    else
                                    {
                                        Defoliate(AmountForEachDefoliation, baseAmountType, DurationOfEachDefoliation, MininumAmountToDefoliate, "no");
                                    }
                                }
                            }
                            else  //DefoliationTriggerType == DefoliationTriggerTypes.TargetStandingBiomass
                            {
                                if (standingSwardBiomassWt >= TargetStandingBiomass)
                                {
                                    if(EnforceMinimumInterval == yesNoAnswer.Yes)
                                    { // check interval between defoliations
                                        if(DaysSinceLastDefoliation >= MinimumInterval)
                                        { // sufficient days passed since last defoliation
                                            Defoliate(AmountForEachDefoliation, baseAmountType, DurationOfEachDefoliation, 0.0, "no");
                                        }
                                        //else wait for minimum interval
                                    }
                                    else
                                    { // no checks, just defoliate
                                        Defoliate(AmountForEachDefoliation, baseAmountType, DurationOfEachDefoliation, 0.0, "no");
                                    }
                                }
                                else
                                {
                                    if(EnforceMaximumInterval == yesNoAnswer.Yes && (DaysSinceLastDefoliation >= MaximumInterval))
                                    { // start a defoliation even if biomass is insufficient
                                        Defoliate(AmountForEachDefoliation, baseAmountType, DurationOfEachDefoliation, 0.0, "yes");
                                    }
                                }
                            }
                        }
                    }
                }
                //// Note: Only the code above, responsible for triggering automatic events, is limited by 'AllowAutomaticManagement'.
                ////       The rest of the code is still available to perform one-off defoliations.
                ////       It can be called from another manager or a schedule thingy via Defoliate().
            }
        }

        [EventSubscribe("DoManagementCalculations")]
        private void OnDoManagementCalculations(object sender, EventArgs e)
        {
            // check whether a defoliation event has just been completed
            if (daysDefoliating == durationOfThisDefoliation)
            {
                // get amount of biomass remaining and zero counters
                PostHarvestDM = currentPostHarvest;
                RotationHarvestedDM = cumAmountHarvested;
                aDefoliationHasHappened = true;
                daysDefoliating = -1;

                // compute the mean growth rate for the queued period
                MeanGrowthRateDM = MathUtilities.Average(growthQueue.ToArray());
                growthQueue.Clear();
            }

            // count the days after a defoliation
            if (aDefoliationHasHappened && (daysDefoliating == 0))
            {
                DaysSinceLastDefoliation += 1;
            }

            // update the list holding growth rates
            updateGrowthQueue();
        }

        [EventSubscribe("EndOfDay")]
        private void OnEndOfDay(object sender, EventArgs e)
        {
            // send a 'message' to let models know that a defoliation has ended today (mostly for report)
            if ((daysDefoliating < 0) && (DefoliationHappenedToday != null))
            {
                DefoliationHappenedToday.Invoke(this, args);
            }
        }

        /// <summary>Sets up a defoliation event.</summary>
        /// <param name="amountDM">Amount of biomass to use (g/m2)</param>
        /// <param name="amountType">How the DM amount is interpreted (DMToRemove, ResidualDM)</param>
        /// <param name="duration">Number of days to defoliate over</param>
        /// <param name="minAmount">Minimum amount that can be removed, if using DMToRemove</param>
        /// <param name="mustDo">Flag whether a defoliation must be counted as such even if there is no biomass</param>
        public void Defoliate(double amountDM, string amountType, int duration = 1, double minAmount = 0.0, string mustDo = "yes")
        {
            // check whether there are plants in the sward that can be defoliated
            if (swardHasLivingPlants)
            {
                // check DM amount given
                if (amountDM < 0.0)
                {
                    throw new Exception("Amount to defoliate cannot be negative!");
                }
                else
                {
                    currentAmountForDefoliation = amountDM;
                }
                currentMinAmount = Math.Max(minAmount, 0.0);

                // check the type of amount given
                if (amountType.ToLower() == "dmtoremove")
                {
                    currentAmountType = "DMToRemove";
                }
                else if (amountType.ToLower() == "residualdm")
                {
                    currentAmountType = "ResidualDM";
                }
                else
                {
                    throw new Exception("Amount type should be \"DMToRemove\" or \"ResidualDM\"!");
                }

                // check duration given
                if (duration <= 0)
                {
                    throw new Exception("Duration of defoliation cannot be zero or negative!");
                }
                else
                {
                    durationOfThisDefoliation = duration;
                }

                // check existing biomass and amount to remove
                PreHarvestDM = standingSwardBiomassWt;
                herbageToRemove = 0.0;
                double harvestableBiomass = harvestableSwardBiomassWt("All");
                if (currentAmountType == "DMToRemove")
                {
                    if (currentAmountForDefoliation > 0.001)
                    { // a meaningful amount was given, check how much can be removed
                        if (harvestableBiomass > minAmount + 0.001)
                        {
                            herbageToRemove = Math.Min(harvestableBiomass, currentAmountForDefoliation / durationOfThisDefoliation);
                        }

                        summary.WriteMessage(this, "   Defoliation triggered, attempting to remove " + currentAmountForDefoliation.ToString("#0.0") + " g/m2 of biomass over " + durationOfThisDefoliation + " days", MessageType.Diagnostic);
                    }
                }
                else if (currentAmountType == "ResidualDM")
                {
                    // check how much biomass will be removed
                    if (PreHarvestDM > currentAmountForDefoliation)
                    {
                        herbageToRemove = Math.Min(harvestableBiomass, (PreHarvestDM - currentAmountForDefoliation) / durationOfThisDefoliation);
                    }

                    summary.WriteMessage(this, "   Defoliation triggered, attempting to remove biomass down to " + currentAmountForDefoliation.ToString("#0.0") + " g/m2 over " + durationOfThisDefoliation + " days", MessageType.Diagnostic);
                }

                // can defoliation begin?
                if (Math.Abs(herbageToRemove) >= 0.001)
                {
                    // set off first defoliation
                    defoliateSward(herbageToRemove);

                    // return residue or excreta
                    if(ReturnedWt + ReturnedN > 0.0)
                    {
                        if (ReturnType == ReturnAsTypes.AsResidue)
                        {
                            returnResidues();
                        }
                        else
                        {
                            returnExcreta();
                        }
                    }

                    // consider trampling effect on surface OM
                    if (consideringTrampling)
                    {
                        doTrampling();
                    }

                    // gather values for this event
                    cumAmountHarvested = HarvestedWt;
                    currentPostHarvest = standingSwardBiomassWt;
                    daysDefoliating = 1;
                    DaysSinceLastDefoliation = 0;
                }
                else
                {
                    // abort command as there is not enough biomass, except...
                    if (mustDo.ToLower() == "yes")
                    { // count the event as if it did happen
                        cumAmountHarvested = 0.0;
                        currentPostHarvest = standingSwardBiomassWt;
                        daysDefoliating = 1;
                        DaysSinceLastDefoliation = 0;
                        summary.WriteMessage(this, "   Defoliation triggered but no biomass was removed (total harvestable = " + harvestableBiomass.ToString("#0.0") + " g/m2)", MessageType.Diagnostic);
                    }
                    else
                    {
                        summary.WriteMessage(this, "   Defoliation did not happen because current biomass (" + PreHarvestDM.ToString("#0.0") + " g/m2) is too low (total harvestable = " + harvestableBiomass.ToString("#0.0") + " g/m2)", MessageType.Diagnostic);
                    }
                }
            }
            else
            {
                summary.WriteMessage(this, "   Defoliation did not happen because there is no growing plants in the sward", MessageType.Diagnostic);
            }
        }

        /// <summary>Resets the values of outputs.</summary>
        private void resetMyOutputs()
        {
            DefoliatedWt = 0.0;
            DefoliatedN = 0.0;
            HarvestedWt = 0.0;
            HarvestedN = 0.0;
            RemovedWt = 0.0;
            RemovedN = 0.0;
            ReturnedWt = 0.0;
            ReturnedN = 0.0;
            NReturnedInDung = 0.0;
            NReturnedInUrine = 0.0;
            RotationHarvestedDM = 0.0;
            MeanGrowthRateDM = 0.0;
        }

        /// <summary>Updates the lists holding data to compute mean growth rate.</summary>
        private void updateGrowthQueue()
        {
            growthQueue.AddFirst(todaysBiomassGrowthWt);
            if (MeanGrowthPeriodType != MeanGrowthPeriodTypes.BetweenDefoliations)
            {
               if (growthQueue.Count > MaxPeriodForMeanGrowth)
               { // Max period reached, need to remove last value in the queue
                   growthQueue.RemoveLast();
               }
            }
        }

        /// <summary>Flags whether there is any living plant in the sward.</summary>
        private bool swardHasLivingPlants
        {
            get
            {
                bool result = false;
                foreach (IPlant species in existingCrops)
                {
                    result |= species.IsAlive;
                }

                return result;
            }
        }

        /// <summary>Gets the phenology stage of the most developed plant in the sward.</summary>
        private double swardPhenologyStage
        {
            get
            {
                double result = 0.0;
                foreach (Plant species in   Structure.FindChildren<Plant>(relativeTo: (INodeModel)myZone).OfType<IModel>().ToList())
                {
                    if (species.IsAlive)
                    {
                        result = Math.Max(result, (double)Structure.Get(species.Name+".Phenology.Stage", relativeTo: myZone));
                    }
                }

                foreach (AgPasture.PastureSpecies species in   Structure.FindChildren<AgPasture.PastureSpecies>(relativeTo: (INodeModel)myZone).OfType<IModel>().ToList())
                {
                    if (species.IsAlive)
                    {
                        result = Math.Max(result, species.Stage);
                    }
                }

                return result;
            }
        }

        /// <summary>Amount of plant biomass aboveground (g/m2).</summary>
        private double standingSwardBiomassWt
        {
            get
            {
                double result = 0.0;
                foreach (IPlant species in existingCrops)
                {
                   result += species.AboveGround.Wt;
                }

                return result;
            }
        }

        /// <summary>Amount of N in plant's biomass aboveground (g/m2).</summary>
        private double standingSwardBiomassN
        {
            get
            {
                double result = 0.0;
                foreach (IPlant species in existingCrops)
                {
                    result += species.AboveGround.N;
                }

                return result;
            }
        }

        /// <summary>Amount of plant biomass from all organs available for defoliation (g/m2).</summary>
        /// <remarks>Uses the fractions set in 'Forages' model.</remarks>
        /// <param name="plantName">The name of the plant to retrieve its biomass</param>
        private double harvestableSwardBiomassWt(string plantName)
        {
            double amountWt = 0.0;
            foreach (var forage in existingForageCrops) 
            {
                foreach (var forageMaterial in forage.Material)
                {
                    string forageName = forageMaterial.Name.Split('.')[0];
                    if ((plantName == "All") || (forageName == plantName))
                    {
                        amountWt += forageMaterial.Consumable.Wt;
                    }
                }
            }

            return amountWt;
        }

        /// <summary>Amount of N in plant biomass available for defoliation (g/m2).</summary>
        /// <remarks>Uses the fractions set in 'Forages' model.</remarks>
        /// <param name="plantName">The name of the plant to retrieve its biomass</param>
        private double harvestableSwardBiomassN(string plantName)
        {
            double amountN = 0.0;
            foreach (var forage in existingForageCrops) 
            {
                foreach (var forageMaterial in forage.Material)
                {
                    string forageName = forageMaterial.Name.Split('.')[0];
                    if ((plantName == "All") || (forageName == plantName))
                    {
                        amountN += forageMaterial.Consumable.N;
                    }
                }
            }

            return amountN;
        }

        /// <summary>Gets the sward growth rate of aboveground biomass for today (g/m2).</summary>
        private double todaysBiomassGrowthWt
        {
            get
            {
                double result = 0.0;
                foreach (IPlant species in existingCrops)
                {
                    if (species.GetType().ToString().Contains("PMF"))
                    { // a PMF plant
                        foreach (IOrgan organ in Structure.FindChildren<IOrgan>(relativeTo: species as INodeModel, recurse: true).OfType<IModel>().ToList())
                        {
                            string speciesName = (species as Plant).Name;
                            if ((bool)Structure.Get(speciesName + "." + organ.Name + ".IsAboveGround", relativeTo: myZone))
                            {
                                result += (double)Structure.Get(speciesName + "." + organ.Name + ".Allocated.Wt", relativeTo: myZone);
                                result -= (double)Structure.Get(speciesName + "." + organ.Name + ".Detached.Wt", relativeTo: myZone);
                            }
                        }
                    }
                    else
                    { // an AgPasture plant
                        result += (species as PastureSpecies).HerbageGrowthWt*0.1;
                    }
                }

                return result;
            }
        }

        /// <summary>Triggers the actual biomass removal and gather DM and N amounts.</summary>
        /// <param name="amountToRemove">The total DM amount to remove (g/m2)</param>
        private void defoliateSward(double amountToRemove)
        {
            // get the amounts of biomass and N before today's defoliation
            double preRemovalDM = standingSwardBiomassWt;
            double preRemovalN = standingSwardBiomassN;
            double totalHarvestableAmount = harvestableSwardBiomassWt("All");

            // zero the outputs, just in case
            DefoliatedWt = 0.0;
            DefoliatedN = 0.0;
            HarvestedWt = 0.0;
            HarvestedN = 0.0;
            RemovedWt = 0.0;
            RemovedN = 0.0;

            // go over each forage species and organ and remove biomass
            foreach (var forage in existingForageCrops)
            {
                if(forage.Material.Count() > 0)
                {
                    // do the biomass removal/harvest
                    double speciesOrganFraction = forage.Material.Sum(m => m.Consumable.Wt)*0.1/totalHarvestableAmount;
                    double removeAmount = amountToRemove*speciesOrganFraction*10.0;

                    if (removeAmount > 0.0)
                    {
                        var forageDefoliated = forage.RemoveBiomass(amountToRemove: removeAmount);

                        // gather the amounts harvested (i.e. defoliated minus returned to residues)
                        HarvestedWt += forageDefoliated.Wt*0.1;
                        HarvestedN += forageDefoliated.N*0.1;

                        // check the fraction of defoliated biomass to be taken off field
                        double removeFractionDM = FractionDMToRemove;
                        double removeFractionN = FractionNToRemove;
                        if(FractionDMToRemove < 0.0)
                        { // use digestibility to define the fraction
                            removeFractionDM = forageDefoliated.Digestibility;

                            // check whether N fraction is proportional to DM
                            if (FractionNToRemove < 0.0)
                            {
                                removeFractionN = removeFractionDM;
                            }
                        }

                        // get the amounts actually removed from the field
                        RemovedWt += forageDefoliated.Wt*0.1*removeFractionDM;
                        RemovedN += forageDefoliated.N*0.1*removeFractionN;
                    }
                }
            }

            // get the amounts of biomass and N after today's defoliation
            double postRemovalDM = standingSwardBiomassWt;
            double postRemovalN = standingSwardBiomassN;

            // get total defoliation (total plant stuff lost)
            DefoliatedWt = preRemovalDM - postRemovalDM;
            DefoliatedN = preRemovalN - postRemovalN;

            // get amounts harvested, removed, and returned
            manageDefoliatedBiomass();
        }

        /// <summary>Gathers the DM and N amounts harvested, to be removed, and to be returned.</summary>
        private void manageDefoliatedBiomass()
        {
            if (HarvestedWt > 0.0)
            {
                // get the amounts to be returned to the field (as residue or dung+urine)
                ReturnedWt = HarvestedWt - RemovedWt;
                ReturnedN = HarvestedN - RemovedN;
                if (returningAsDungUrine)
                {
                    if (nitrogenInDungIsProportion)
                    {
                        NReturnedInDung = ReturnedN * ProportionOfNToDung;
                    }
                    else
                    {
                        NReturnedInDung = Math.Min(ReturnedN, ReturnedWt * 0.4 / CNRatioDung);
                    }

                    NReturnedInDung = Math.Min(NReturnedInDung, ReturnedN);
                    NReturnedInUrine = ReturnedN - NReturnedInDung;

                    if(urineNAmountFixed)
                    { // urine N to return is set in UI
                        NReturnedInUrine = UrineNSetAmount;
                    }
                }
                else
                {
                    NReturnedInDung = 0.0;
                    NReturnedInUrine = 0.0;
                }
            }
        }

        /// <summary>Returns the material not removed off field as residue.</summary>
        private void returnResidues()
        {
            if ((ReturnedWt > 0.0) || (ReturnedN > 0.0))
            {
                PMF.BiomassRemovedType BiomassResidue = new PMF.BiomassRemovedType();
                string[] type = new string[] { "Grass" };
                float[] dltdm = new float[] { (float)(10.0 * ReturnedWt) };
                float[] dltn = new float[] { (float)(10.0 * ReturnedN) };
                float[] dltp = new float[] { 0.0f };
                float[] fraction = new float[] { 1.0f };     // fraction is always 1.0 here

                BiomassResidue.crop_type = "Grass";
                BiomassResidue.dm_type = type;
                BiomassResidue.dlt_crop_dm = dltdm;
                BiomassResidue.dlt_dm_n = dltn;
                BiomassResidue.dlt_dm_p = dltp;
                BiomassResidue.fraction_to_residue = fraction;
                BiomassRemoved.Invoke(BiomassResidue);
            }
        }

        /// <summary>Returns the material not removed off field as dung and urine).</summary>
        private void returnExcreta()
        {
            if ((ReturnedWt > 0.0) || (NReturnedInDung > 0.0))
            {
                PMF.BiomassRemovedType BiomassDung = new PMF.BiomassRemovedType();
                string[] type = new string[] { "RuminantDung_PastureFed" };
                float[] dltdm = new float[] { (float)(10.0 * ReturnedWt) };
                float[] dltn = new float[] { (float)(10.0 * NReturnedInDung) };
                float[] dltp = new float[] { 0.0f };
                float[] fraction = new float[] { 1.0f };     // fraction is always 1.0 here

                BiomassDung.crop_type = "RuminantDung_PastureFed";
                BiomassDung.dm_type = type;
                BiomassDung.dlt_crop_dm = dltdm;
                BiomassDung.dlt_dm_n = dltn;
                BiomassDung.dlt_dm_p = dltp;
                BiomassDung.fraction_to_residue = fraction;
                BiomassRemoved.Invoke(BiomassDung);
            }

            if (NReturnedInUrine > 0.0)
            {
                double[] myUrineDeposition = new double[soilPhysical.Thickness.Length];
                for (int z = 0; z < urineFraction.Length; z++)
                {
                    myUrineDeposition[z] = NReturnedInUrine * 10.0 * urineFraction[z];
                }

                Urea.AddKgHaDelta(SoluteSetterType.Fertiliser, myUrineDeposition);
            }
        }

        /// <summary>Incorporate a fraction of surface OM material to the soil surface layer.</summary>
        /// <remarks>Assumes that trampling is proportional to the amount defoliated.</remarks>
        private void doTrampling(double fractionToIncorporate = 0.0)
        {
            if (DefoliatedWt > 0.0)
            {
                fractionToIncorporate = Math.Min(BiomassDefoliatedForMaximumLitterFraction/DefoliatedWt, MaximumLitterFractionToSoil);
                surfaceOM.Incorporate(fraction: fractionToIncorporate, depth: 100);
            }
        }

        // Auxiliary boolead for UI  - - - - - - - - - - - - - - - - - - - - - - - - - - - - - - - - -

        private bool automaticManagementAllowed
        { get { return AllowAutomaticManagement == yesNoAnswer.Yes; } }
        private bool isDefoliationTriggerAnInterval
        { get { return DefoliationTriggerType != DefoliationTriggerTypes.TargetStandingBiomass; } }
        private bool isTriggerNotFixedInterval
        { get { return DefoliationTriggerType != DefoliationTriggerTypes.FixedInterval; } }
        private bool isDefoliationTriggerAnAmount
        { get { return DefoliationTriggerType == DefoliationTriggerTypes.TargetStandingBiomass; } }
        private bool isAmountDMToRemove
        { get { return RemoveAmountType == DefoliateAmountTypes.DMToRemove; } }
        private bool suppressingDefoliationOnWindow
        { get { return SuppressDefoliationOnWindow == yesNoAnswer.Yes; } }
        private bool minimumIntervalEnforced
        { get { return isDefoliationTriggerAnAmount && (EnforceMinimumInterval == yesNoAnswer.Yes); } }
        private bool maximumIntervalEnforced
        { get { return isTriggerNotFixedInterval && (EnforceMaximumInterval == yesNoAnswer.Yes); } }
        private bool userDefinesDMFraction
        { get { return DMRemoveType == DMRemovalTypes.UserDefinedFraction; } }
        private bool userDefinesNFraction
        { get { return NRemoveType == NRemovalTypes.UserDefinedFraction; } }
        private bool returningAsDungUrine
        { get { return ReturnType == ReturnAsTypes.AsDungUrine; } }
        private bool nitrogenInDungIsProportion
        { get { return returningAsDungUrine && (NDungType == DungNContentTypes.DefineProportion); } }
        private bool nitrogenInDungIsCNRatio
        { get { return returningAsDungUrine && (NDungType == DungNContentTypes.DefineCNratio); } }
        private bool urineNAmountFixed
        { get { return SettingUrineNAmount == yesNoAnswer.Yes; } }
        private bool growthPeriodToBeGiven
        { get { return MeanGrowthPeriodType != MeanGrowthPeriodTypes.BetweenDefoliations; } }
        private bool consideringTrampling
        { get { return ConsiderTrampling == yesNoAnswer.Yes;} }

        // Auxiliary bits and pieces  - - - - - - - - - - - - - - - - - - - - - - - - - - - - - - - - -

        /// <summary>Flag for a positive or negative answer.</summary>
        public enum yesNoAnswer
        {
            /// <summary>Positive answer.</summary>
            Yes,
            /// <summary>Negative answer.</summary>
            No
        }

        /// <summary>Flag how defoliations will be triggered.</summary>
        public enum DefoliationTriggerTypes
        {
            /// <summary>Setting a fixed interval.</summary>
            FixedInterval,
            /// <summary>Setting a target (minimum) interval.</summary>
            TargetInterval,
            /// <summary>Setting a target (maximum) standing biomass.</summary>
            TargetStandingBiomass
        }

        /// <summary>How the DM amount given is interpreted.</summary>
        public enum DefoliateAmountTypes
        {
            /// <summary>Setting a DM amount to remove.</summary>
            DMToRemove,
            /// <summary>Setting the residual DM amount.</summary>
            ResidualDM
        }

        /// <summary>Fraction of defoliated DM to remove from field.</summary>
        public enum DMRemovalTypes
        {
            /// <summary>Remove all DM.</summary>
            RemoveAll,
            /// <summary>Remove no DM.</summary>
            RemoveNone,
            /// <summary>Remove a user-defined fraction.</summary>
            UserDefinedFraction,
            /// <summary>Remove a fraction based on plant digestibility.</summary>
            BasedOnDigestibility
        }

        /// <summary>Fraction of N in the defoliated material to remove from field.</summary>
        public enum NRemovalTypes
        {
            /// <summary>Remove all N.</summary>
            RemoveAll,
            /// <summary>Remove no N.</summary>
            RemoveNone,
            /// <summary>Remove a user-defined fraction.</summary>
            UserDefinedFraction,
            /// <summary>Remove a fraction equal to DM removed.</summary>
            ProportionalToDM
        }

        /// <summary>Define how the non-removed material is returned to the field.</summary>
        public enum ReturnAsTypes
        {
            /// <summary>Return plant material as residue.</summary>
            AsResidue,
            /// <summary>Return material as dung and urine.</summary>
            AsDungUrine
        }

        /// <summary>Define how the proportion of N in dung is defined.</summary>
        public enum DungNContentTypes
        {
            /// <summary>Define the proportion of N returned as dung.</summary>
            DefineProportion,
            /// <summary>Define the C:N of dung.</summary>
            DefineCNratio
        }

        /// <summary>Options for the period over which mean growth is computed.</summary>
        public enum MeanGrowthPeriodTypes
        {
            /// <summary>Compute over the period between defoliations.</summary>
            BetweenDefoliations,
            /// <summary>Compute over a fixed number of days.</summary>
            FixedPeriod,
            /// <summary>Compute over the period between defoliations, but limited to a maximum.</summary>
            BetweenDefoliationsOrMaxPeriod
        }
    }
}
```
            MicroClimate: a_interception=0; b_interception=1; c_interception=0; d_interception=0; SoilHeatFluxFraction=0.4; MinimumHeightDiffForNewLayer=0; NightInterceptionFraction=0.5; ReferenceHeight=2
            Irrigation
            Fertiliser
            SurfaceOrganicMatter: InitialResidueName=grass; InitialResidueType=grass; InitialResidueMass=500; InitialStandingFraction=0; InitialCPR=0; InitialCNR=40
            Soil: SoilType=Typic Udivitrand (US), Typic Orthic Allophanic Soil (NZ); LocalName=Horotiu Silt Loam; Site=Ruakura; NearestTown=Hamilton; Region=Waikato; Country=New Zealand; Latitude=0; Longitude=0
              DataSource=Based primarily on data from Close et al (2003), complemented with NZ NSD.
              Physical
                Thickness  ParticleSizeClay  BD     AirDry  LL15   DUL    SAT    KS
                200        20                0.88   0.07    0.22   0.421  0.587  507.8
                200        18.5              0.85   0.21    0.219  0.327  0.623  4445.1
                130        11                1.009  0.177   0.177  0.314  0.572  7262
                140        6.5               1.055  0.139   0.139  0.291  0.536  11928
                380        5.1               1.055  0.125   0.125  0.182  0.504  25031
                230        3.8               0.839  0.102   0.102  0.123  0.439  28410.4
                220        2.4               0.695  0.083   0.083  0.101  0.363  42658.3
                SoilCrop ChicorySoil: LL=[0.22, 0.219, 0.177, 0.139, 0.125, 0.102, 0.083]; KL=[0.07, 0.058, 0.038, 0.025, 0.01, 0.004, 0.002]; XF=[1, 1, 1, 1, 1, 1, 1]
                SoilCrop PlantainForageSoil: LL=[0.22, 0.219, 0.177, 0.139, 0.125, 0.102, 0.083]; KL=[0.08, 0.07, 0.05, 0.03, 0.01, 0.003, 0]; XF=[1, 1, 1, 1, 1, 1, 1]
                SoilCrop AGPRyegrassSoil: LL=[0.22, 0.219, 0.177, 0.139, 0.125, 0.102, 0.083]; KL=[0.1, 0.085, 0.055, 0.02, 0.005, 0, 0]; XF=[1, 1, 1, 1, 1, 1, 1]
                SoilCrop AGPWhiteCloverSoil: LL=[0.22, 0.219, 0.177, 0.139, 0.125, 0.102, 0.083]; KL=[0.085, 0.05, 0, 0, 0, 0, 0]; XF=[1, 1, 1, 1, 1, 1, 1]
                SoilCrop WhiteCloverSoil: LL=[0.22, 0.219, 0.177, 0.139, 0.125, 0.102, 0.083]; KL=[0.085, 0.077, 0.04, 0.01, 0.001, 0, 0]; XF=[1, 1, 1, 1, 1, 1, 1]
                SoilCrop AGPLucerneSoil: LL=[0.22, 0.219, 0.177, 0.139, 0.125, 0.102, 0.083]; KL=[0.06, 0.05, 0.035, 0.025, 0.015, 0.01, 0.01]; XF=[1, 1, 1, 1, 1, 1, 1]
                SoilCrop LucerneSoil: LL=[0.22, 0.219, 0.177, 0.139, 0.125, 0.102, 0.083]; KL=[0.06, 0.05, 0.035, 0.025, 0.015, 0.01, 0.01]; XF=[1, 1, 1, 1, 1, 1, 1]
              WaterBalance SoilWater: SummerDate=1-Oct; SummerU=9; SummerCona=4; WinterDate=1-Apr; WinterU=6; WinterCona=3; DiffusConst=88; DiffusSlope=35; Salb=0.15; CN2Bare=70; CNRed=20; CNCov=0.8; DischargeWidth=0; CatchmentArea=0; PSIDul=-100; Thickness=[200, 200, 130, 140, 380, 230, 220]; SWCON=[0.48, 0.59, 0.61, 0.6, 0.63, 0.7, 0.71]
              Organic: FOMCNRatio=40; CarbonUnits=Total
                Thickness  Carbon  SoilCNRatio  FBiom  FInert  FOM
                200        8       12.5         0.075  0.7     338.974
                200        1.88    12.5         0.013  0.79    227.221
                130        0.93    12.5         0.009  0.9     175.199
                140        0.43    12.5         0.008  0.94    132.413
                380        0.13    12.5         0.007  0.96    61.9249
                230        0.1     12.5         0.005  0.99    39.0922
                220        0.07    12.5         0.005  0.995   25.1768
              Chemical: Thickness=[200, 200, 130, 140, 380, 230, 220]; PH=[6, 6, 6, 6, 6, 6, 6]; PHUnits=Water
              Nutrient
              Water: Thickness=[200, 200, 130, 140, 380, 230, 220]; InitialValues=[0.4009, 0.3162, 0.3003, 0.2758, 0.1763, 0.1209, 0.0992]; FilledFromTop=false
              Solute NO3: Thickness=[200, 200, 130, 140, 380, 230, 220]; InitialValuesUnits=ppm; WaterTableConcentration=0; D0=0; DepthConstant=0; MaxDepthSoluteAccessible=0; RunoffEffectivenessAtMovingSolute=0; MaxEffectiveRunoff=0
                InitialValues=[8.52273, 4.11765, 0.797423, 0.797423, 0.798126, 0.80277, 0.80277]
              Solute NH4: Thickness=[200, 200, 130, 140, 380, 230, 220]; InitialValuesUnits=ppm; WaterTableConcentration=0; D0=0; DepthConstant=0; MaxDepthSoluteAccessible=0; RunoffEffectivenessAtMovingSolute=0; MaxEffectiveRunoff=0
                InitialValues=[0.5, 0.2, 0.097239, 0.097239, 0.100377, 0.121085, 0.121085]
              Solute Urea: Thickness=[200, 200, 130, 140, 380, 230, 220]; InitialValues=[0, 0, 0, 0, 0, 0, 0]; InitialValuesUnits=kg/ha; WaterTableConcentration=0; D0=0; DepthConstant=0; MaxDepthSoluteAccessible=0; RunoffEffectivenessAtMovingSolute=0; MaxEffectiveRunoff=0
              SoilTemperature Temperature
            PastureSpecies AGPRyegrass: doyGermination=275; daysEmergenceToAnthesis=120; daysAnthesisToMaturity=85; degreesDayForAnthesis=1100; degreesDayForMaturity=900; daysAnnualsFactor=45; CanopyType=PastureSpecies; InitialShootDM=1100; InitialRootDM=450; InitialRootDepth=1000; initialDMFractionsGrasses=[0.15, 0.25, 0.25, 0.05, 0.05, 0.1, 0.1, 0.05, 0, 0, 0]; initialDMFractionsForbs=[0.2, 0.2, 0.15, 0.05, 0.1, 0.15, 0.1, 0.05, 0, 0, 0]; PhotosyntheticEfficiency=0.01; PhotosynthesisCurveFactor=0.8; FractionPAR=0.5; ReferenceCO2=380; CO2EffectScaleFactor=700; CO2EffectOffsetFactor=600; CO2EffectMinimum=0.7; CO2EffectExponent=2; ReproSeasonDurationCoeff=2; ReproSeasonShouldersLengthFactor=1; ReproSeasonOnsetDurationFactor=0.6; RelativeTurnoverEmerging=2; DetachmentDroughtCoefficient=3; DetachmentDroughtEffectMin=0.1; TurnoverStockFactor=0.01; TurnoverDefoliationEffectMin=0.025; MinimumGreenLeafProp=0.8; MinimumGreenRootProp=0.5
              initialDMFractionsLegumes=[0.16, 0.23, 0.22, 0.05, 0.03, 0.05, 0.05, 0.01, 0.04, 0.08, 0.08]
              LinearInterpolationFunction FVPDFunction
            PastureSpecies AGPWhiteClover: doyGermination=275; daysEmergenceToAnthesis=120; daysAnthesisToMaturity=85; degreesDayForAnthesis=1100; degreesDayForMaturity=900; daysAnnualsFactor=45; CanopyType=PastureSpecies; InitialShootDM=500; InitialRootDM=150; InitialRootDepth=350; initialDMFractionsGrasses=[0.15, 0.25, 0.25, 0.05, 0.05, 0.1, 0.1, 0.05, 0, 0, 0]; initialDMFractionsForbs=[0.2, 0.2, 0.15, 0.05, 0.1, 0.15, 0.1, 0.05, 0, 0, 0]; PhotosyntheticEfficiency=0.01; PhotosynthesisCurveFactor=0.8; FractionPAR=0.5; ReferenceCO2=380; CO2EffectScaleFactor=700; CO2EffectOffsetFactor=600; CO2EffectMinimum=0.7; CO2EffectExponent=2; ReproSeasonDurationCoeff=2; ReproSeasonShouldersLengthFactor=1; ReproSeasonOnsetDurationFactor=0.6; RelativeTurnoverEmerging=2; DetachmentDroughtCoefficient=3; DetachmentDroughtEffectMin=0.1; TurnoverStockFactor=0.01; TurnoverDefoliationEffectMin=0.025; MinimumGreenLeafProp=0.8; MinimumGreenRootProp=0.5
              initialDMFractionsLegumes=[0.16, 0.23, 0.22, 0.05, 0.03, 0.05, 0.05, 0.01, 0.04, 0.08, 0.08]
              LinearInterpolationFunction FVPDFunction
            Report: EventNames=[Clock].DoReport
              VariableNames:
                [Clock].Today as Date
                [Clock].Today.DayOfYear as DayOfYear
                [Weather].Radn as SolarRadiation
                ([AGPWhiteClover].InterceptedRadn+[AGPRyegrass].InterceptedRadn) as InterceptedRadiation
                [AGPRyegrass].InterceptedRadn as Ryegrass.RadiationIntercepted
                [AGPWhiteClover].InterceptedRadn as WhiteClover.RadiationIntercepted
                [Weather].Rain as Rainfall
                [Irrigation].IrrigationApplied as IrrigationApplied
                [MicroClimate].PrecipitationInterception as PrecipitationInterception
                [MicroClimate].PetTotal
                [Soil].SoilWater.Eo as Eo
                [Soil].SoilWater.Es as Evaporation
                (sum([AGPWhiteClover].WaterUptake)+sum([AGPRyegrass].WaterUptake))) as Transpiration
                [Soil].SoilWater.pond as PondedWater
                [Soil].SoilWater.Drainage as Drainage
                [Soil].SoilWater.Runoff as Runoff
                sum([Soil].SoilWater.LateralOutflow) as LateralFlow
                sum([Soil].Water.MM) as TotalSWC
                sum([Soil].Physical.DULmm) as TotalDUL
                sum([Soil].Physical.LL15mm) as TotalLL15
                [Soil].Water.Volumetric[1] as SWCTopLayer
                [Soil].Physical.DUL[1] as DULTopLayer
                [Fertiliser].NitrogenApplied as FertiliserN
                sum([Soil].Nutrient.DenitrifiedN) as DenitrifiedN
                ([Soil].SoilWater.LeachNH4 + [Soil].SoilWater.LeachNO3) as LeachedN
                ([AGPWhiteClover].SoilUptakeN+[AGPRyegrass].SoilUptakeN) as UptakeN
                sum([Soil].Nutrient.MineralisedN) as MineralisedSoilN
                sum([SurfaceOrganicMatter].SurfaceResidue.Decomposition.MineralisedN) as MineralisedSurfOMN
                ([AGPWhiteClover].LitterDepositionN*0.1+[AGPRyegrass].LitterDepositionN*0.1) as DetachedAGN
                ([AGPWhiteClover].RootDetachedN*0.1+[AGPRyegrass].RootDetachedN*0.1) as DetachedBGN
                ([AGPWhiteClover].LitterDepositionN+[AGPWhiteClover].RootDetachedN+[AGPRyegrass].LitterDepositionN+[AGPRyegrass].RootDetachedN) as DetachedTotalN
                [AGPWhiteClover].FixedN as FixedN
                (sum([Soil].Urea.kgha) + sum([Soil].NH4.kgha) + sum([Soil].NO3.kgha)) as SoilNContent
                sum([Soil].Urea.kgha) as SoilUrea
                sum([Soil].NH4.kgha) as SoilNH4
                sum([Soil].NO3.kgha) as SoilNO3
                (sum([Soil].NH4.kgha[1:4])+sum([Soil].NO3.kgha[1:4])) as TopSoilN
                [SurfaceOrganicMatter].N as TotalSurfOMN
                sum([Soil].Nutrient.FOM.N) as TotalFOMN
                sum([Soil].Nutrient.Humic.N) as TotalHumicN
                sum([Soil].Nutrient.Microbial.N as TotalMicrobialN
                [DefoliationManager].Script.RotationHarvestedDM as RotationHarvestedWt
                [DefoliationManager].Script.PreHarvestDM
                [DefoliationManager].Script.PostHarvestDM
                [DefoliationManager].Script.DefoliatedN as NTakenOff
                [DefoliationManager].Script.HarvestedN
                (10*[DefoliationManager].Script.RemovedN) as Defoliate.Script.RemovedN
                [DefoliationManager].Script.DefoliatedWt as HarvestedWt
                [DefoliationManager].Script.HarvestedWt
                [DefoliationManager].Script.DefoliatedWt
                ([DefoliationManager].Script.RemovedN/([DefoliationManager].Script.RemovedWt+0.000001) as RemovedNConc
                [ExtraVariables].Script.AccumHarvestedWt as CumulativeHarvestedWt
                [ExtraVariables].Script.AccumHarvestedN as CumulativeNTakenOff
                ([AGPWhiteClover].HarvestedWt/([AGPRyegrass].HarvestedWt + [AGPWhiteClover].HarvestedWt + 0.000001)) as WhiteClover.HarvestedFraction
                ([AGPRyegrass].HarvestedWt/([AGPRyegrass].HarvestedWt + [AGPWhiteClover].HarvestedWt + 0.000001)) as Ryegrass.HarvestedFraction
                ([AGPWhiteClover].TotalWt+[AGPRyegrass].TotalWt)*0.1 as TotalPlantWt
                ([AGPWhiteClover].AboveGroundLiveWt+[AGPRyegrass].AboveGroundLiveWt+[AGPWhiteClover].BelowGroundWt+[AGPRyegrass].BelowGroundWt)*0.1 as TotalPlantLiveWt
                ([AGPWhiteClover].AboveGroundWt+[AGPRyegrass].AboveGroundWt)*0.1 as AboveGroundWt
                ([AGPWhiteClover].BelowGroundWt+[AGPRyegrass].BelowGroundWt)*0.1 as BelowGroundWt
                ([AGPWhiteClover].TotalN+[AGPRyegrass].TotalN)*0.1 as TotalPlantN
                ([AGPWhiteClover].AboveGroundN+[AGPRyegrass].AboveGroundN)*0.1 as AboveGroundN
                ([AGPWhiteClover].BelowGroundN+[AGPRyegrass].BelowGroundN)*0.1 as BelowGroundN
                (([AGPWhiteClover].AboveGroundN+[AGPRyegrass].AboveGroundN)/([AGPWhiteClover].AboveGroundWt+[AGPRyegrass].AboveGroundWt+0.000001)) as AboveGroundNConc
                (([AGPWhiteClover].BelowGroundN+[AGPRyegrass].BelowGroundN)/([AGPWhiteClover].BelowGroundWt+[AGPRyegrass].BelowGroundWt+0.000001)) as BelowGroundNConc
                ([AGPWhiteClover].AboveGroundLiveWt+[AGPRyegrass].AboveGroundLiveWt)*0.1 as AboveGroundLiveWt
                ([AGPWhiteClover].AboveGroundLiveN+[AGPRyegrass].AboveGroundLiveN)*0.1 as AboveGroundDeadWt
                ([AGPWhiteClover].BelowGroundWt+[AGPRyegrass].BelowGroundWt)*0.1 as BelowGroundLiveWt
                (([AGPWhiteClover].AboveGroundLiveN+[AGPRyegrass].AboveGroundLiveN)/([AGPWhiteClover].AboveGroundLiveWt+[AGPRyegrass].AboveGroundLiveWt+0.000001)) as AboveGroundLiveNc
                [ExtraVariables].Script.HerbageNConc as HerbageNConc
                ([AGPRyegrass].TotalWt*0.1) as Ryegrass.Total.Wt
                ([AGPRyegrass].AboveGroundLiveWt*0.1+[AGPRyegrass].BelowGroundWt*0.1) as Ryegrass.TotalLive.Wt
                ([AGPRyegrass].AboveGroundWt*0.1) as Ryegrass.AboveGround.Wt
                ([AGPRyegrass].BelowGroundWt*0.1) as Ryegrass.BelowGround.Wt
                ([AGPRyegrass].AboveGroundLiveWt*0.1) as Ryegrass.AboveGroundLive.Wt
                ([AGPRyegrass].AboveGroundDeadWt*0.1) as Ryegrass.AboveGroundDead.Wt
                ([AGPRyegrass].BelowGroundWt*0.1) as Ryegrass.BelowGroundLive.Wt
                ([AGPRyegrass].TotalN*0.1) as Ryegrass.Total.N
                ([AGPRyegrass].AboveGroundN*0.1) as Ryegrass.AboveGround.N
                ([AGPRyegrass].BelowGroundN*0.1) as Ryegrass.BelowGround.N
                [AGPRyegrass].AboveGroundNConc as Ryegrass.AboveGround.NConc
                ([AGPRyegrass].BelowGroundN/([AGPRyegrass].BelowGroundWt+0.000001)) as Ryegrass.BelowGround.NConc
                ([AGPRyegrass].AboveGroundLiveN/([AGPRyegrass].AboveGroundLiveWt+0.000001)) as Ryegrass.AboveGroundLive.NConc
                ([AGPWhiteClover].TotalWt*0.1) as WhiteClover.Total.Wt
                ([AGPWhiteClover].AboveGroundLiveWt*0.1+[AGPWhiteClover].BelowGroundWt*0.1) as WhiteClover.TotalLive.Wt
                ([AGPWhiteClover].AboveGroundWt*0.1) as WhiteClover.AboveGround.Wt
                ([AGPWhiteClover].BelowGroundWt*0.1) as WhiteClover.BelowGround.Wt
                ([AGPWhiteClover].AboveGroundLiveWt*0.1) as WhiteClover.AboveGroundLive.Wt
                ([AGPWhiteClover].AboveGroundDeadWt*0.1) as WhiteClover.AboveGroundDead.Wt
                ([AGPWhiteClover].BelowGroundWt*0.1) as WhiteClover.BelowGroundLive.Wt
                ([AGPWhiteClover].TotalN*0.1) as WhiteClover.Total.N
                ([AGPWhiteClover].AboveGroundN*0.1) as WhiteClover.AboveGround.N
                ([AGPWhiteClover].BelowGroundN*0.1) as WhiteClover.BelowGround.N
                [AGPWhiteClover].AboveGroundNConc as WhiteClover.AboveGround.NConc
                ([AGPWhiteClover].BelowGroundN/([AGPWhiteClover].BelowGroundWt+0.000001)) as WhiteClover.BelowGround.NConc
                ([AGPWhiteClover].AboveGroundLiveN/([AGPWhiteClover].AboveGroundLiveWt+0.000001)) as WhiteClover.AboveGroundLive.NConc
                ([AGPWhiteClover].CoverTotal+[AGPRyegrass].CoverTotal) as CoverTotal
                ([AGPWhiteClover].CoverDead+[AGPRyegrass].CoverDead) as CoverDead
                [MicroClimate].CanopyCover
                ([AGPWhiteClover].LAIGreen+[AGPRyegrass].LAIGreen) as LAIgreen
                ([AGPWhiteClover].LAIDead+[AGPRyegrass].LAIDead) as LAIdead
                (([AGPWhiteClover].Height+[AGPRyegrass].Height)/2) as AverageShootHeight
                (([AGPWhiteClover].RootDepth+[AGPRyegrass].RootDepth)/2) as AverageRootDepth
                ([AGPWhiteClover].Root.LengthDensity+[AGPRyegrass].Root.LengthDensity) as Total.RootLengthDensity
                ([AGPWhiteClover].AboveGroundWt/([AGPWhiteClover].AboveGroundWt+[AGPRyegrass].AboveGroundWt+0.000001)) as WhiteClover.BiomassFraction
                ([AGPRyegrass].AboveGroundWt/([AGPWhiteClover].AboveGroundWt+[AGPRyegrass].AboveGroundWt+0.000001)) as Ryegrass.BiomassFraction
                ([AGPWhiteClover].AboveGroundLiveWt/([AGPWhiteClover].BelowGroundWt+0.000001)) as WhiteClover.ShootRootRatio
                ([AGPWhiteClover].AboveGroundLiveWt/([AGPWhiteClover].AboveGroundLiveWt+[AGPWhiteClover].BelowGroundWt+0.000001)) as WhiteClover.CurrentAboveGroundFraction
                ([AGPRyegrass].AboveGroundLiveWt/([AGPRyegrass].BelowGroundWt+0.000001)) as Ryegrass.ShootRootRatio
                ([AGPRyegrass].AboveGroundLiveWt/([AGPRyegrass].AboveGroundLiveWt+[AGPRyegrass].BelowGroundWt+0.000001)) as Ryegrass.CurrentAboveGroundFraction
                [AGPRyegrass].CoverTotal as Ryegrass.CoverTotal
                [AGPWhiteClover].CoverTotal as WhiteClover.CoverTotal
                [AGPRyegrass].Height as Ryegrass.Height
                [AGPWhiteClover].Height as WhiteClover.Height
                [AGPRyegrass].LAI as Ryegrass.LAI
                [AGPWhiteClover].LAI as WhiteClover.LAI
                [AGPRyegrass].RootDepth as Ryegrass.Root.Depth
                [AGPWhiteClover].RootDepth as WhiteClover.Root.Depth
                [AGPRyegrass].GlfNSupply
                [AGPRyegrass].GlfWaterSupply
                [AGPRyegrass].GlfWaterLogging
                [AGPRyegrass].GlfNContent
                [AGPRyegrass].GlfCO2
                [AGPRyegrass].GlfTemperature
                [AGPRyegrass].GlfColdDamage
                [AGPRyegrass].GlfHeatDamage
                [AGPWhiteClover].GlfNSupply
                [AGPWhiteClover].GlfWaterSupply
                [AGPWhiteClover].GlfWaterLogging
                [AGPWhiteClover].GlfNContent
                [AGPWhiteClover].GlfCO2
                [AGPWhiteClover].GlfTemperature
                [AGPWhiteClover].GlfColdDamage
                [AGPWhiteClover].GlfHeatDamage
      Experiment FRNLRuakuraMix2
        DisabledSimNames=[FRNLRuakuraNRate50, FRNLRuakuraNRate100, FRNLRuakuraNRate200, FRNLRuakuraNRate350]
        Memo
          ###FRNL Ruakura###

          This simulation setup was based on field trials performed at DairyNZ's Scott Farm, in Ruakura, New Zealand, between 2014 and 2016.  The experiment was part of the FRNL (Forages for Reduced Nitrogen Leaching) program and the data is basically unpublished (references will be added when they come about).  Here only plots with mixed pasture species are used.  The species included were ryegrass, white clover, lucerne, chicory, and plantain (weeds also occured, but are not included in the simulation - the fraction of biomass was fairly small).
          The experiment consisted of six fertiliser treatments (nominally at N rates of 0, 50, 100, 200, 350 and 500 kg/ha/yr) in three replicates; actual amounts varied as fertiliser applications followed pasture harvests.  Measurements comprised yield, for each species, and quality indicators (here N content is used), for whole sward.
          Observed data supplied by Grant Edwards, Lincoln University.

          The soil at the experimental site was a Horotiu silt loam (an Orthic Allophanic soil; USDA: Typic Udivitrand), the parameters required were inferred using data from the New Zealand National Soils Database (Landcare Research).
          Weather data was obtained from nearby Ruakura weather station (NIWA).
          Simulation of ryegrass and lucerne are done using the AgPasture model as the PMF versions are still under development.
        Factors
          Factor NRate: Specification=[NRate]
            Operations 0
            Operations 50
              2014-12-22  [Fertiliser].Apply(amount: 5, type: "UreaN", depth: 10)
              2015-01-19  [Fertiliser].Apply(amount: 5, type: "UreaN", depth: 10)
              2015-03-03  [Fertiliser].Apply(amount: 5, type: "UreaN", depth: 10)
              2015-04-21  [Fertiliser].Apply(amount: 5, type: "UreaN", depth: 10)
              2015-06-10  [Fertiliser].Apply(amount: 5, type: "UreaN", depth: 10)
              2015-09-09  [Fertiliser].Apply(amount: 5, type: "UreaN", depth: 10)
              2015-10-19  [Fertiliser].Apply(amount: 5, type: "UreaN", depth: 10)
              2015-11-19  [Fertiliser].Apply(amount: 5, type: "UreaN", depth: 10)
              2015-12-22  [Fertiliser].Apply(amount: 5, type: "UreaN", depth: 10)
              2016-02-03  [Fertiliser].Apply(amount: 5, type: "UreaN", depth: 10)
              2016-05-06  [Fertiliser].Apply(amount: 5, type: "UreaN", depth: 10)
              2016-07-12  [Fertiliser].Apply(amount: 5, type: "UreaN", depth: 10)
              2016-09-14  [Fertiliser].Apply(amount: 5, type: "UreaN", depth: 10)
            Operations 100
              2014-12-22  [Fertiliser].Apply(amount: 10, type: "UreaN", depth: 10)
              2015-01-19  [Fertiliser].Apply(amount: 10, type: "UreaN", depth: 10)
              2015-03-03  [Fertiliser].Apply(amount: 10, type: "UreaN", depth: 10)
              2015-04-21  [Fertiliser].Apply(amount: 10, type: "UreaN", depth: 10)
              2015-06-10  [Fertiliser].Apply(amount: 10, type: "UreaN", depth: 10)
              2015-09-09  [Fertiliser].Apply(amount: 10, type: "UreaN", depth: 10)
              2015-10-19  [Fertiliser].Apply(amount: 10, type: "UreaN", depth: 10)
              2015-11-19  [Fertiliser].Apply(amount: 10, type: "UreaN", depth: 10)
              2015-12-22  [Fertiliser].Apply(amount: 10, type: "UreaN", depth: 10)
              2016-02-03  [Fertiliser].Apply(amount: 10, type: "UreaN", depth: 10)
              2016-05-06  [Fertiliser].Apply(amount: 10, type: "UreaN", depth: 10)
              2016-07-12  [Fertiliser].Apply(amount: 10, type: "UreaN", depth: 10)
              2016-09-14  [Fertiliser].Apply(amount: 10, type: "UreaN", depth: 10)
            Operations 200
              2014-12-22  [Fertiliser].Apply(amount: 20, type: "UreaN", depth: 10)
              2015-01-19  [Fertiliser].Apply(amount: 20, type: "UreaN", depth: 10)
              2015-03-03  [Fertiliser].Apply(amount: 20, type: "UreaN", depth: 10)
              2015-04-21  [Fertiliser].Apply(amount: 20, type: "UreaN", depth: 10)
              2015-06-10  [Fertiliser].Apply(amount: 20, type: "UreaN", depth: 10)
              2015-09-09  [Fertiliser].Apply(amount: 20, type: "UreaN", depth: 10)
              2015-10-19  [Fertiliser].Apply(amount: 20, type: "UreaN", depth: 10)
              2015-11-19  [Fertiliser].Apply(amount: 20, type: "UreaN", depth: 10)
              2015-12-22  [Fertiliser].Apply(amount: 20, type: "UreaN", depth: 10)
              2016-02-03  [Fertiliser].Apply(amount: 20, type: "UreaN", depth: 10)
              2016-05-06  [Fertiliser].Apply(amount: 20, type: "UreaN", depth: 10)
              2016-07-12  [Fertiliser].Apply(amount: 20, type: "UreaN", depth: 10)
              2016-09-14  [Fertiliser].Apply(amount: 20, type: "UreaN", depth: 10)
            Operations 350
              2014-12-22  [Fertiliser].Apply(amount: 35, type: "UreaN", depth: 10)
              2015-01-19  [Fertiliser].Apply(amount: 35, type: "UreaN", depth: 10)
              2015-03-03  [Fertiliser].Apply(amount: 35, type: "UreaN", depth: 10)
              2015-04-21  [Fertiliser].Apply(amount: 35, type: "UreaN", depth: 10)
              2015-06-10  [Fertiliser].Apply(amount: 35, type: "UreaN", depth: 10)
              2015-09-09  [Fertiliser].Apply(amount: 35, type: "UreaN", depth: 10)
              2015-10-19  [Fertiliser].Apply(amount: 35, type: "UreaN", depth: 10)
              2015-11-19  [Fertiliser].Apply(amount: 35, type: "UreaN", depth: 10)
              2015-12-22  [Fertiliser].Apply(amount: 35, type: "UreaN", depth: 10)
              2016-02-03  [Fertiliser].Apply(amount: 35, type: "UreaN", depth: 10)
              2016-05-06  [Fertiliser].Apply(amount: 35, type: "UreaN", depth: 10)
              2016-07-12  [Fertiliser].Apply(amount: 35, type: "UreaN", depth: 10)
              2016-09-14  [Fertiliser].Apply(amount: 35, type: "UreaN", depth: 10)
            Operations 500
              2014-12-22  [Fertiliser].Apply(amount: 50, type: "UreaN", depth: 10)
              2015-01-19  [Fertiliser].Apply(amount: 50, type: "UreaN", depth: 10)
              2015-03-03  [Fertiliser].Apply(amount: 50, type: "UreaN", depth: 10)
              2015-04-21  [Fertiliser].Apply(amount: 50, type: "UreaN", depth: 10)
              2015-06-10  [Fertiliser].Apply(amount: 50, type: "UreaN", depth: 10)
              2015-09-09  [Fertiliser].Apply(amount: 50, type: "UreaN", depth: 10)
              2015-10-19  [Fertiliser].Apply(amount: 50, type: "UreaN", depth: 10)
              2015-11-19  [Fertiliser].Apply(amount: 50, type: "UreaN", depth: 10)
              2015-12-22  [Fertiliser].Apply(amount: 50, type: "UreaN", depth: 10)
              2016-02-03  [Fertiliser].Apply(amount: 50, type: "UreaN", depth: 10)
              2016-05-06  [Fertiliser].Apply(amount: 50, type: "UreaN", depth: 10)
              2016-07-12  [Fertiliser].Apply(amount: 50, type: "UreaN", depth: 10)
              2016-09-14  [Fertiliser].Apply(amount: 50, type: "UreaN", depth: 10)
        Simulation FRNLRuakuraMix2
          Clock: Start=2014-09-01; End=2016-12-31
          Weather: FileName=Ruakura.met
          Summary summaryfile
          SoilArbitrator Soil Arbitrator
          Forages
            Parameters:
              Name                          LiveDigestibility  DeadDigestibility  LiveFractionConsumable  DeadFractionConsumable  LiveMinimumBiomass  DeadMinimumBiomass
              SurfaceOrganicMatter.Residue  0.7                0.3                1                       1                       100                 0
              Chicory.Leaf                  0.7                0.3                1                       1                       100                 0
              Chicory.Stem                  0.7                0.3                1                       1                       100                 0
              Chicory.Inflorescence         0.7                0.3                1                       1                       100                 0
              Chicory.Taproot               0.7                0.3                1                       1                       100                 0
              Chicory.Root                  0                  0                  0                       0                       0                   0
              PlantainForage.Leaf           0.7                0.3                1                       1                       100                 0
              PlantainForage.Stem           0.7                0.3                1                       1                       100                 0
              PlantainForage.Inflorescence  0.7                0.3                1                       1                       100                 0
              PlantainForage.Taproot        0.7                0.3                1                       1                       100                 0
              PlantainForage.Root           0                  0                  0                       0                       0                   0
              AGPRyegrass.Leaf              0.7                0.3                1                       1                       100                 0
              AGPRyegrass.Stem              0.7                0.3                1                       1                       100                 0
              AGPRyegrass.Stolon            0.7                0.3                1                       1                       100                 0
              AGPLucerne.Leaf               0.7                0.3                1                       1                       100                 0
              AGPLucerne.Stem               0.7                0.3                1                       1                       100                 0
              AGPLucerne.Stolon             0.7                0.3                1                       1                       100                 0
              AGPWhiteClover.Leaf           0.7                0.3                1                       1                       100                 0
              AGPWhiteClover.Stem           0.7                0.3                1                       1                       100                 0
              AGPWhiteClover.Stolon         0.7                0.3                1                       1                       100                 0
          Zone Field: Area=1; Slope=0; AspectAngle=0; Altitude=50
            Folder Management
              Operations Sowing
                2014-10-24  [Chicory].Sow(population: 100, cultivar: "Choice", depth: 10, rowSpacing: 150)
                2014-10-24  [PlantainForage].Sow(population: 100, cultivar: "Tonic", depth: 10, rowSpacing: 150)
                2014-09-01  [AGPWhiteClover].EndCrop()
                2014-11-15  [AGPWhiteClover].Sow(population: 0, cultivar: "W", depth: 0, rowSpacing: 0)
                2014-09-01  [AGPRyegrass].EndCrop()
                2014-11-15  [AGPRyegrass].Sow(population: 0, cultivar: "R", depth: 0, rowSpacing: 0)
                2014-09-01  [AGPLucerne].EndCrop()
                2014-11-05  [AGPLucerne].Sow(population: 0, cultivar: "L", depth: 0, rowSpacing: 0)
              Operations NRate
              Operations BaseFertiliser: same as Evaluation.NewZealand.FRNLRuakuraMix1.FRNLRuakuraMix1.Field.Management.BaseFertiliser
              Manager DefoliationManager
                AutomaticManagementIsEnabled = False
                DefoliationRotationStartDate = 11/01/2014 00:00:00
                DefoliationRotationEndDate = 12/31/2100 00:00:00
                DefoliateType = Cut
                DefoliationTriggerType = TargetStandingBiomass
                IntervalBetweenDefoliations = 21
                TargetStandingBiomass = 200
                DurationOfEachDefoliation = 1
                RemoveAmountType = ResidualDM
                AmountForEachDefoliation = 150
                RemoveAllBiomassIsEnabled = False
                DMRemoveType = UserDefinedFraction
                FractionDMToRemove = 1
                NRemoveType = UserDefinedFraction
                FractionNToRemove = 1
                ReturnType = AsResidue
                NDungType = DefineCNratio
                ProportionN2Dung = 0.4
                CNRatioDung = 20
                UrineDepth = 250
```csharp
// Performs defoliations, or removes biomass, from any existing plant (PMF and/or AgPasture) based on a set of given rules.  
// Defoliations can be triggered automatically by this manager or be called from another Script or a Schedule model.
// Developed by RCichota, last updated in 31/Mar/2019

namespace Models
{
using APSIM.Core;
using Models.ForageDigestibility;
using Newtonsoft.Json;
using System.Linq;
using Models.Interfaces;
using Models.PMF;
using Models.Soils;
using Models.Core;
using APSIM.Shared.Utilities;
using System.Collections.Generic;
using System.Xml.Serialization;
using System;
using Models.Soils.Nutrients;
using Models.PMF.Interfaces;

    [Serializable]
    public class Script : Model, IStructureDependency
    {
        [Link] private Clock clock;
        [Link] private Zone myZone;
        [Link] private Soil mySoil;
        [Link(ByName = true)] private ISolute Urea;
        [Link] private ISummary mySummary;
        [Link] private Forages forages;
        public  event BiomassRemovedDelegate BiomassRemoved;
        private string baseDefoliationType;
        private string typeOfDefoliation;
        private string baseAmountType;
        private string typeOfAmount;
        private double amountGiven;
        private double herbageToRemove;
        private int durationOfDefoliation;
        private int daysDefoliating;
        private double cumAmountHarvested;
        private double atZ0;
        private double atZ1;
        private double fractionToRemove;
        private double fractionToResidue;
        private double speciesHarvestedWt;
        private double speciesHarvestedN;
        private double speciesFractionToRemove;
        [Link]
        private IPhysical soilPhysical;
        
        public IStructure Structure { private get; set; }


        //> Links to other Apsim models
        //Auxiliary 'links'
        private List<Plant> PMFSpecies = new List<Plant>();
        private List<AgPasture.PastureSpecies> AgPSpecies = new List<AgPasture.PastureSpecies>();

        //> Events raised by this manager

        //> User inputs from properties tab
        [Separator("Generic defoliation management - removes biomass from PMF and AgPasture species, plus residue management")]
        [Description("Allow this manager to control defoliations? ")]
        public bool AutomaticManagementIsEnabled { get; set; }
        [Description("Date to start the defoliation management (dd/mm/yyyy): ")]
        public DateTime DefoliationRotationStartDate { get; set; }
        [Description("Date to end the defoliation management (dd/mm/yyyy): ")]
        public DateTime DefoliationRotationEndDate { get; set; }

        [Separator("Parameters defining how the defoliation is managed")]
        [Description("What type of defoliation should be triggered? ")]
        public DefoliationTypes DefoliateType { get; set; }
        [Description("How the defoliations should be triggered? ")]
        public DefoliationTriggerTypes DefoliationTriggerType { get; set; }
        [Description("  Minimum number of days between defoliations, used if trigger is an interval: ")]
        public int IntervalBetweenDefoliations { get; set; }
        [Description("  Minimum standing biomass to start defoliations, used if trigger is DM target(g/m2): ")]
        public int TargetStandingBiomass { get; set; }
        [Description("Duration of each defoliation event (days): ")]
        public int DurationOfEachDefoliation { get; set; }
        [Description("Which amount is being defined? ")]
        public DefoliateAmountTypes RemoveAmountType { get; set; }
        [Description("DM amount to use (g/m2): ")]
        public double AmountForEachDefoliation { get; set; }
        [Description("For PMF species, allow all biomass to be removed? ")]
        public bool RemoveAllBiomassIsEnabled { get; set; }

        [Separator("Parameters defining the management of the defoliated biomass")]
        [Description("How much of the DM defoliated is to be removed from the field? ")]
        public DMRemovalTypes DMRemoveType { get; set; }
        [Description("  Fraction of DM to remove off field, if using UserDefinedFraction (0-1): ")]
        public double FractionDMToRemove { get; set; }
        [Description("How much of the N defoliated is to be removed from the field? ")]
        public NRemovalTypes NRemoveType { get; set; }
        [Description("  Fraction of N to remove off field, if using UserDefinedFraction (0-1): ")]
        public double FractionNToRemove { get; set; }
        [Description("How the non-removed material is returned to the field? ")]
        public ReturnAsTypes ReturnType { get; set; }

        [Separator("Parameters for partitioning non-removed N into urine and dung")]
        [Description("How the partition of N to dung and urine is defined? ")]
        public DungNContentTypes NDungType { get; set; }
        [Description("  Proportion of N returned in dung, if using DefineProportion (0-1): ")]
        public double ProportionN2Dung { get; set; }
        [Description("  The C:N of dung, if using DefineCNratio (typically around 20): ")]
        public double CNRatioDung { get; set; }
        [Description("Soil depth down to which urine should be applied (mm): ")]
        public double UrineDepth { get; set; }

        //> Outputs from this manager
        [JsonIgnore][Units("g/m2")] // Pasture DM defoliated (removed from plants) today
        public double DefoliatedWt{ get; set; }
        [JsonIgnore][Units("g/m2")] // N in the pasture material defoliated today
        public double DefoliatedN{ get; set; }
        [JsonIgnore][Units("g/m2")] // Pasture DM harvested (removed from plants minus direct residue) today
        public double HarvestedWt{ get; set; }
        [JsonIgnore][Units("g/m2")] // N in the pasture material harvested today
        public double HarvestedN{ get; set; }
        [JsonIgnore][Units("g/m2")] // Pasture DM actually removed from the field
        public double RemovedWt{ get; set; }
        [JsonIgnore][Units("g/m2")] // N in the pasture material removed from the field
        public double RemovedN{ get; set; }
        [JsonIgnore][Units("g/m2")] // Pasture DM returned by this manager to the field
        public double ReturnedWt{ get; set; }
        [JsonIgnore][Units("g/m2")] // N in the pasture material returned by this manager to the field
        public double ReturnedN{ get; set; }
        [JsonIgnore][Units("g/m2")] // Non-removed N returned as dung (to SurfaceOM)
        public double NReturnedInDung{ get; set; }
        [JsonIgnore][Units("g/m2")] // Non-removed N returned as urine (soil urea)
        public double NReturnedInUrine{ get; set; }
        [JsonIgnore][Units("days")] // Number of days since the end of last defoliation event
        public int DaysSinceLastDefoliation{ get; set; }
        [JsonIgnore][Units("g/m2")] // Total standing aboveground DM before a defoliation
        public double PreHarvestDM{ get; set; }
        [JsonIgnore][Units("g/m2")] // Total standing aboveground DM after a defoliation
        public double PostHarvestDM{ get; set; }
        [JsonIgnore][Units("g/m2")] // Total pasture DM harvested over a complete defoliation event
        public double RotationHarvestedDM{ get; set; }

        //> Internal variables
        private double[] urineFraction;                  // fraction of urine to be applied in each soil layer
        // auxiliary boolean
        private bool aDefoliationHasHappened = false; // flag whether a defoliation has happened in this simulation run

        // auxiliary - lists of species and removal fractions
        private string[] swardSpeciesName;              // name of each species in the sward
        private string[] swardSpeciesType;              // type of each species in the sward (PMF or AgPasture)
        private double[] speciesFraction;              // biomass fraction of harvestable material of each species


        

        [EventSubscribe("StartOfSimulation")]
        private void OnSimulationCommencing(object sender, EventArgs e)
        {
            // check the type of defoliation given
            if (DefoliateType == DefoliationTypes.Cut)
                baseDefoliationType = "Cut";
            else if (DefoliateType == DefoliationTypes.Graze)
                baseDefoliationType = "Graze";
            else
                baseDefoliationType = "Harvest";

            // check the type of amount given
            if (RemoveAmountType == DefoliateAmountTypes.DMToRemove)
                baseAmountType = "DMToRemove";
            else if (RemoveAmountType == DefoliateAmountTypes.ResidualDM)
                baseAmountType = "ResidualDM";
            else
                baseAmountType = "UseDefoliationFractions";

            // check the interval between events
            if (IntervalBetweenDefoliations < 1)
                throw new Exception("The interval between defoliation events must be at least one day");

            // check the duration for each defoliation
            if(DurationOfEachDefoliation <= 0)
                throw new Exception("The duration of defoliations cannot be zero or negative!");

            // check the fraction of defoliated material to remove from the field
            if (DMRemoveType == DMRemovalTypes.RemoveAll)
                FractionDMToRemove = 1.0;
            else if (DMRemoveType == DMRemovalTypes.RemoveNone)
                FractionDMToRemove = 0.0;
            else if (DMRemoveType == DMRemovalTypes.BasedOnDigestibility)
                FractionDMToRemove = -1.0;  // will be calculated dynamically
            else // DMRemoveType == DMRemovalTypes.UserDefinedFraction
            {
                if (FractionDMToRemove < 0.0)
                    throw new Exception("The fraction of DM defoliated to remove from the field cannot be negative!");
            }

            // check the fraction of defoliated N to remove from the field
            if (NRemoveType == NRemovalTypes.RemoveAll)
                FractionNToRemove = 1.0;
            else if (NRemoveType == NRemovalTypes.RemoveNone)
                FractionNToRemove = 0.0;
            else if (NRemoveType == NRemovalTypes.ProportionalToDM)
                FractionNToRemove = FractionDMToRemove;
            else // NRemoveType == NRemovalTypes.UserDefinedFraction
            {
                if (FractionNToRemove < 0.0)
                    throw new Exception("The fraction of defoliated N to remove from the field cannot be negative!");
            }

            // set up the links to all plant species
            PMFSpecies =   Structure.FindChildren<Plant>(recurse: true, relativeTo: (INodeModel)myZone).ToList();
            AgPSpecies =   Structure.FindChildren<AgPasture.PastureSpecies>(recurse: true, relativeTo: (INodeModel)myZone).ToList();

            int numPlants = PMFSpecies.Count + AgPSpecies.Count;
            swardSpeciesName = new string[numPlants];
            swardSpeciesType = new string[numPlants];
            int i = 0;
            foreach (Plant species in   Structure.FindChildren<Plant>(recurse: true, relativeTo: (INodeModel)myZone).OfType<IModel>().ToList())
            {
                swardSpeciesName[i] = species.Name;
                swardSpeciesType[i] = "PMF";
                i += 1;
            }
            foreach (AgPasture.PastureSpecies species in   Structure.FindChildren<AgPasture.PastureSpecies>(recurse: true, relativeTo: (INodeModel)myZone).OfType<IModel>().ToList())
            {
                swardSpeciesName[i] = species.Name;
                swardSpeciesType[i] = "AgPasture";
                i += 1;
            }

            // initialise some variables
            speciesFraction = new double[numPlants];
            
            DaysSinceLastDefoliation = 0;
            durationOfDefoliation = -1;
            daysDefoliating = 0;
            resetMyOutputs();

            // set the fraction of urine for each layer
            if (ReturnType == ReturnAsTypes.AsDungUrine)
            {
                double depthFromSurface = 0.0;
                for (int layer = 0; layer < soilPhysical.Thickness.Length; layer++)
                {
                    depthFromSurface += soilPhysical.Thickness[layer];
                    if (depthFromSurface >= UrineDepth)
                    { // bottom layer found
                        urineFraction = new double[layer + 1];
                        double distFactor = 1.5;
                        double totalProp = UrineDepth * Math.Pow(1.0, distFactor) / (distFactor + 1.0);
                        depthFromSurface = 0.0;
                        atZ1 = (UrineDepth - depthFromSurface) * Math.Pow(1.0 - depthFromSurface / UrineDepth, distFactor) / (distFactor + 1.0);
                        for (int z = 0; z < layer+1; z++)
                        {
                            atZ0 = atZ1;
                            depthFromSurface += soilPhysical.Thickness[z];
                            atZ1 = (UrineDepth - depthFromSurface) * Math.Pow(1.0 - depthFromSurface / UrineDepth, distFactor) / (distFactor + 1);
                            if (1.0 - (depthFromSurface / UrineDepth) < 0.0)
                                atZ1 = 0;
                            urineFraction[z] = (atZ0 - atZ1) / totalProp;
                        }
                        layer = soilPhysical.Thickness.Length;
                    }
                }
            }

            // write message in summary
            mySummary.WriteMessage(this," Automatic defoliation manager initialised", MessageType.Diagnostic);
            if (AutomaticManagementIsEnabled)
            {
                mySummary.WriteMessage(this, "   Defoliations will happen between " + DefoliationRotationStartDate.ToShortDateString()
                                          + " and " + DefoliationRotationEndDate.ToShortDateString() + ".", MessageType.Diagnostic);
                mySummary.WriteMessage(this, "   Biomass from the sward will be defoliated simulating a \"" + baseDefoliationType + "\" rotation.", MessageType.Diagnostic);
                if (DefoliationTriggerType == DefoliationTriggerTypes.TargetStandingBiomass)
                    mySummary.WriteMessage(this, "   Events will happen whenever aboveground biomass surpasses " + TargetStandingBiomass.ToString("#0.0") + " g/m2.", MessageType.Diagnostic);
                else
                    mySummary.WriteMessage(this, "   Events will happen every " + IntervalBetweenDefoliations + " days, if there is enough biomass.", MessageType.Diagnostic);
                if(baseAmountType == "ResidualDM")
                    mySummary.WriteMessage(this, "   Removing biomass down to a residual amount of " + AmountForEachDefoliation.ToString("#.0") + " g/m2 over " 
                                             + DurationOfEachDefoliation + " days.", MessageType.Diagnostic);
                else
                    mySummary.WriteMessage(this, "   Removing " + AmountForEachDefoliation.ToString("#.0") + " g/m2 of biomass per day over " 
                                             + DurationOfEachDefoliation + " days.", MessageType.Diagnostic);
            }
            else
            {
                mySummary.WriteMessage(this,"   Automatic defoliations are currently disabled, though defoliations can be triggered by another manager", MessageType.Diagnostic);
                mySummary.WriteMessage(this,"   If called, the manager will remove biomass from the sward simulating a \"" + baseDefoliationType + "\" event.", MessageType.Diagnostic);
            }

            if(ReturnType == ReturnAsTypes.AsDungUrine)
            {
                mySummary.WriteMessage(this,"   Non-removed material will be returned as dung and urine. Urine added to soil according to proportions: "
                + string.Join(", ",urineFraction), MessageType.Diagnostic);
            }
            else
                mySummary.WriteMessage(this,"   Non-removed material will be returned as residue.", MessageType.Diagnostic);
        }

        [EventSubscribe("DoManagement")]
        private void OnDoManagement(object sender, EventArgs e)
        {
            // check whether we need to continue defoliationg, i.e. within a multi-day defoliation event (need to check this first in the day)
            if ((daysDefoliating > 0) && (daysDefoliating < durationOfDefoliation))
            {
                // reset outputs
                resetMyOutputs();

                // re-check the amount to defoliate
                double harvestableBiomass = harvestableSwardBiomass("All", "Harvestable");
                if (typeOfAmount == "DMToRemove")
                {
                    if(harvestableBiomass > 0.001)
                        herbageToRemove = Math.Min(harvestableBiomass, (amountGiven - cumAmountHarvested) / (durationOfDefoliation - daysDefoliating));
                }
                else if (typeOfAmount == "ResidualDM")
                {
                    double currentDM = standingSwardBiomassWt;
                    if (currentDM > amountGiven)
                        herbageToRemove = Math.Min(harvestableBiomass, (currentDM - amountGiven) / (durationOfDefoliation - daysDefoliating));
                }

                // remove plant biomass and return residue
                if (Math.Abs(herbageToRemove) >= 0.001)
                {
                    // set biomass removal
mySummary.WriteMessage(this, "   Defoliation initialised on DoManagement - " + clock.Today.Date.ToShortDateString(), MessageType.Diagnostic);
                    defoliateSward(herbageToRemove, typeOfDefoliation);

                    // return residue or excreta
                    if(ReturnedWt + ReturnedN > 0.0)
                    {
                        if (ReturnType == ReturnAsTypes.AsResidue)
                            returnResidues();
                        else
                            returnExcreta();
                    }

                    // gather amount removed this event
                    cumAmountHarvested += HarvestedWt;
                }

                daysDefoliating += 1;
            }

            // check whether a defoliation ended yesterday
            if (daysDefoliating < 0)
            { // clean up variables
                resetMyOutputs();
                daysDefoliating = 0;
            }

            // check whether automatic defoliations are enabled
            if (AutomaticManagementIsEnabled)
            {
                // check whether we are within the period in which defoliations can happen
                if ((clock.Today.Date >= DefoliationRotationStartDate.Date) && (clock.Today.Date <= DefoliationRotationEndDate.Date))
                {
                    if (clock.Today.Date == DefoliationRotationStartDate.Date)
                        DaysSinceLastDefoliation = IntervalBetweenDefoliations;

                    // check whether we should start a defoliation event
                    if (DefoliationTriggerType == DefoliationTriggerTypes.FixedInterval)
                    {
                        if (DaysSinceLastDefoliation == IntervalBetweenDefoliations)
                            Defoliate(baseDefoliationType, AmountForEachDefoliation, baseAmountType, DurationOfEachDefoliation);
                    }
                    else if (DefoliationTriggerType == DefoliationTriggerTypes.TargetInterval)
                    {
                        if (DaysSinceLastDefoliation >= IntervalBetweenDefoliations)
                            Defoliate(baseDefoliationType, AmountForEachDefoliation, baseAmountType, DurationOfEachDefoliation);
                    }
                    else  //DefoliationTriggerType == DefoliationTriggerTypes.TargetStandingBiomass
                    {
                        if (standingSwardBiomassWt >= TargetStandingBiomass)
                            Defoliate(baseDefoliationType, AmountForEachDefoliation, baseAmountType, DurationOfEachDefoliation);
                    }
                }
                //// Note: Only the code above, responsible for triggering automatic events, is limited by 'AutomaticManagementIsEnabled'. 
                ////       The rest of the code is still available to perform one-off defoliations.
                ////       It can be called from another manager or a schedulle thingy via Defoliate().
            }
        }

        [EventSubscribe("DoManagementCalculations")]
        private void OnDoManagementCalculations(object sender, EventArgs e)
        {
            // check whether a defoliation event has just been completed
            if (daysDefoliating == durationOfDefoliation)
            {
                // get amount of biomass remaining and zero counters
                PostHarvestDM = standingSwardBiomassWt;
                RotationHarvestedDM = cumAmountHarvested;
                aDefoliationHasHappened = true;
                daysDefoliating = -1;
            }

            // count the days after a defoliation
            if (aDefoliationHasHappened && (daysDefoliating == 0))
                DaysSinceLastDefoliation += 1;
        }

        /// <summary>Sets up a defoliation event.</summary>
        /// <param name="defoliationType">Type of defoliation (cut, graze, or harvest)</param>
        /// <param name="amountDM">Amount of biomass to use (g/m2)</param>
        /// <param name="amountType">How the DM amount is interpreted (toRemove, residual)</param>
        /// <param name="duration">Number of days to defoliate over</param>
        public void Defoliate(string defoliationType, double amountDM, string amountType, int duration)
        {
            // check whether there are plants in the sward that can be defoliated
            if (swardHasLivingPlants)
            {
                // check the defoliation type
                if (defoliationType.ToLower() == "cut")
                    typeOfDefoliation = "Cut";
                else if (defoliationType.ToLower() == "graze")
                    typeOfDefoliation = "Graze";
                else if (defoliationType.ToLower() == "harvest")
                    typeOfDefoliation = "Harvest";
                else
                    throw new Exception("Defoliation type should be either \"Cut\", \"Graze\", or \"Harvest\"!");

                // check DM amount given
                if (amountDM < 0.0)
                    throw new Exception("Amount to defoliate cannot be negative!");
                else
                    amountGiven = amountDM;

                // check the type of amount given
                if (amountType.ToLower() == "dmtoremove")
                    typeOfAmount = "DMToRemove";
                else if (amountType.ToLower() == "residualdm")
                    typeOfAmount = "ResidualDM";
                else if (amountType.ToLower() == "usedefoliationfractions")
                    typeOfAmount = "UseDefoliationFractions";
                else
                    throw new Exception("Amount type should be \"DMToRemove\", \"ResidualDM\", or \"UseDefoliationFractions\"!");

                // check duration given
                if (duration <= 0)
                    throw new Exception("Duration of defoliation cannot be zero or negative!");
                else
                    durationOfDefoliation = duration;

                // check existing biomass and amount to remove
                PreHarvestDM = standingSwardBiomassWt;
                herbageToRemove = 0.0;
                double harvestableBiomass = harvestableSwardBiomass("All", "Harvestable");
                if (typeOfAmount == "UseDefoliationFractions")
                { // amount given is ignored, removal based on fractions
                    amountGiven = 0.0;
                    if (harvestableBiomass > 0.0)
                        herbageToRemove = -1.0;

                    mySummary.WriteMessage(this, "   Defoliation triggered, removing biomass using the removal fractions (set or default), during " + durationOfDefoliation + " days", MessageType.Diagnostic);
                }
                else if (typeOfAmount == "DMToRemove")
                {
                    if (amountGiven > 0.001)
                    { // a meaningful amount was given, check whether all can be removed
                        if (harvestableBiomass > 0.001)
                            herbageToRemove = Math.Min(harvestableBiomass, amountGiven / durationOfDefoliation);

                        mySummary.WriteMessage(this, "   Defoliation triggered, attempting to remove " + amountGiven.ToString("#0.0") + " g/m2 of biomass over " + durationOfDefoliation + " days", MessageType.Diagnostic);
                    }
                }
                else if (typeOfAmount == "ResidualDM")
                {
                    // check how much biomass will be removed
                    if (PreHarvestDM > amountGiven)
                        herbageToRemove = Math.Min(harvestableBiomass, (PreHarvestDM - amountGiven) / durationOfDefoliation);

                    mySummary.WriteMessage(this, "   Defoliation triggered, attempting to remove biomass down to " + amountGiven.ToString("#0.0") + " g/m2 over " + durationOfDefoliation + " days", MessageType.Diagnostic);
                }

                // can defoliation begin?
                if (Math.Abs(herbageToRemove) >= 0.001)
                {
                    // set off first defoliation
mySummary.WriteMessage(this, "   Defoliation initialised on Defoliate - " + clock.Today.Date.ToShortDateString(), MessageType.Diagnostic);
                    defoliateSward(herbageToRemove, typeOfDefoliation);

                    // return residue or excreta
                    if(ReturnedWt + ReturnedN > 0.0)
                    {
                        if (ReturnType == ReturnAsTypes.AsResidue)
                            returnResidues();
                        else
                            returnExcreta();
                    }

                    // gather values for this event
                    cumAmountHarvested = HarvestedWt;
                    daysDefoliating = 1;
                    DaysSinceLastDefoliation = 0;
                }
                else
                {
                    // abort command as there is not enough biomass, check interval type
                    if (DefoliationTriggerType == DefoliationTriggerTypes.FixedInterval)
                    { // count the event as if it did happen
                        cumAmountHarvested = 0.0;
                        daysDefoliating = 1;
                        DaysSinceLastDefoliation = 0;
                    }

                    mySummary.WriteMessage(this, "   Defoliation did not happend because current biomass (" + PreHarvestDM.ToString("#0.0") + " g/m2) is too low (total harvestable = " + harvestableBiomass.ToString("#0.0") + " g/m2)", MessageType.Diagnostic);
                }
            }
            else
            {
                mySummary.WriteMessage(this, "   Defoliation did not happend because there is no growing plants in the sward", MessageType.Diagnostic);
            }
        }

        /// <summary>Resets the values of outputs.</summary>
        private void resetMyOutputs()
        {
            DefoliatedWt = 0.0;
            DefoliatedN = 0.0;
            HarvestedWt = 0.0;
            HarvestedN = 0.0;
            RemovedWt = 0.0;
            RemovedN = 0.0;
            ReturnedWt = 0.0;
            ReturnedN = 0.0;
            NReturnedInDung = 0.0;
            NReturnedInUrine = 0.0;
            RotationHarvestedDM = 0.0;
        }

        /// <summary>Flags whether there is any living plant in the sward.</summary>
        private bool swardHasLivingPlants
        {
            get
            {
                bool result = false;
                foreach (Plant species in PMFSpecies)
                       result |= species.IsAlive;
                foreach (AgPasture.PastureSpecies species in AgPSpecies)
                       result |= species.IsAlive;
                return result;
            }
        }

        /// <summary>Amount of plant biomass aboveground (g/m2).</summary>
        private double standingSwardBiomassWt
        {
            get
            {
                double result = 0.0;
                foreach (Plant species in PMFSpecies)
                   result += (double)Structure.Get(species.Name+".AboveGround.Wt", relativeTo: myZone);
                foreach (AgPasture.PastureSpecies species in AgPSpecies)
                    result += species.Standing.Wt*0.1;
                return result;
            }
        }

        /// <summary>Amount of N in plant's biomass aboveground (g/m2).</summary>
        private double standingSwardBiomassN
        {
            get
            {
                double result = 0.0;
                foreach (Plant species in PMFSpecies)
                   result += (double)Structure.Get(species.Name+".AboveGround.N", relativeTo: myZone);
                foreach (AgPasture.PastureSpecies species in AgPSpecies)
                    result += species.Standing.N*0.1;
                return result;
            }
        }

        /// <summary>Amount of plant biomass from all organs available for defoliation (g/m2).</summary>
        /// <remarks>Assumes that organs with a BiomassRemoval.FractionToRemove > 0 are harvestable.
        /// For AgPasture, harvestable is based on minimum DM.</remarks>
        /// <param name="plantName">The name of the plant to retrieve its biomass</param>
        /// <param name="fractionType">The type of fraction to use (harvestable or total)</param>
        private double harvestableSwardBiomass(string plantName, string fractionType)
        {
            double amountWt = 0.0;
            double fraction = 0.0;
            foreach (var forage in forages.ModelsWithDigestibleBiomass)
            {
                if (plantName == "All" || forage.Name == plantName)
                {
                    foreach (var material in forage.Material) 
                    {
                        if (fractionType == "Total")
                            amountWt += material.Total.Wt;
                        else
                            amountWt += material.Consumable.Wt;
                    }
                }
            }
            
            return amountWt;
        }

        /// <summary>Triggers the actual biomass removal and gather DM and N amounts.</summary>
        /// <param name="amountToRemove">The total DM amount to remove (g/m2)</param>
        /// <param name="removalType">The type of removal (Cut, Graze, Harvest)</param>
        private void defoliateSward(double amountToRemove, string removalType)
        {
            // get the amounts of biomass and N before today's defoliation
            double preRemovalDM = standingSwardBiomassWt;
            double preRemovalN = standingSwardBiomassN;
            double fractionToRemove = 0.0;

            // gather the actual biomass removal fractions, checking whether they need to be adjusted
            double totalHarvestableAmount = harvestableSwardBiomass("All", "Harvestable");
            if (amountToRemove > 0.0)
            { // an amount was given for defoliation, adjust removal fractions for each species in order to remove the amount specified
                fractionToRemove = amountToRemove / totalHarvestableAmount;
            }
            else if (amountToRemove < 0.0)
            { // defoliation is not based on an amount, removal is determined simply by the removal fractions
                fractionToRemove = 1.0;
            }

            for (int i = 0; i < swardSpeciesName.Length; i++)
            {
                speciesFraction[i] = harvestableSwardBiomass(swardSpeciesName[i], "Harvestable") / totalHarvestableAmount;
                if (swardSpeciesType[i] == "PMF")
                {
                    // check whether the plant is alive
                    bool speciesIsAlive = (bool)Structure.Get(swardSpeciesName[i]+".IsEmerged", relativeTo: myZone);
                    if (speciesIsAlive)
                    {
                        // set removal fractions (these overrides the default removals in the plant)
                        setRemoveFraction(swardSpeciesName[i], fractionToRemove);

                        // do the actual biomass removal
                        foreach (Plant species in PMFSpecies)
                        {
                            if(species.Name == swardSpeciesName[i])
                            {

                                break;
                            }
                        }
                    }
                }
                else
                {
                    // check whether the plant is alive
                    bool speciesIsAlive = (bool)Structure.Get(swardSpeciesName[i]+".IsAlive", relativeTo: myZone);
                    if (speciesIsAlive)
                    {
                        // set removal amount (needs to be in kg/ha)
                        double amountRequired = (double)Structure.Get(swardSpeciesName[i]+".Harvestable.Wt", relativeTo: myZone);
                        if (amountToRemove > 0.0)
                            amountRequired = amountToRemove * speciesFraction[i] * 10.0;

                        // do the actual biomass removal
                        foreach (AgPasture.PastureSpecies species in AgPSpecies)
                        {
                            if(species.Name == swardSpeciesName[i])
                            {
                                species.RemoveBiomass(amount: amountRequired, type: "SetRemoveAmount");
                                break;
                            }
                        }
                    }
                }
            }

            // get the amounts of biomass and N after today's defoliation
            double postRemovalDM = standingSwardBiomassWt;
            double postRemovalN = standingSwardBiomassN;

            // get total defoliation (total plant stuff lost)
            DefoliatedWt = preRemovalDM - postRemovalDM;
            DefoliatedN = preRemovalN - postRemovalN;

            // get amounts harvested, removed, and returned
            manageDefoliatedBiomass();
        }

        /// <summary>Sets the biomass removal fractions for PMF plants.</summary>
        /// <param name="plantName">The name of PMF species</param>
        /// <param name="fractionHarvestable">The fraction of harvestable biomass to be removed (0-1)</param>
        private void setRemoveFraction(string plantName, double fractionHarvestable)
        {
            /*foreach (Plant species in PMFSpecies)
            {
                if ((species.Name == plantName) && (species.IsAlive))
                {

                    // set removal fractions (these overrides the default removals in the plant)
                    foreach (IOrgan organ in   Structure.FindChildren<IOrgan>(recurse: true, relativeTo: (INodeModel)species).OfType<IModel>().ToList())
                    {
                        // first get the removal for Live material
                        fractionToRemove = (double)Structure.Get(species.Name + "." + organ.Name + ".BiomassRemovalDefaults." + typeOfDefoliation + ".FractionLiveToRemove", relativeTo: myZone);
                        if (RemoveAllBiomassIsEnabled && (fractionToRemove > 0.0))
                            fractionToRemove = 0.95;
                        fractionToRemove = fractionHarvestable * fractionToRemove;
                        fractionToRemove = Math.Min(1.0, fractionToRemove);
                        defoliationFractions.SetFractionToRemove(organ.Name, fractionToRemove, "Live");
                        if (RemoveAllBiomassIsEnabled)
                            fractionToResidue = 0.0;
                        else
                            fractionToResidue = (double)Structure.Get(species.Name + "." + organ.Name + ".BiomassRemovalDefaults." + typeOfDefoliation + ".FractionLiveToResidue", relativeTo: myZone);
                        fractionToResidue = Math.Min(fractionHarvestable * fractionToResidue, 1.0 - fractionToRemove);
                        defoliationFractions.SetFractionToResidue(organ.Name, fractionToResidue, "Live");

                        // then get the removal for Dead material
                        fractionToRemove = (double)Structure.Get(species.Name + "." + organ.Name + ".BiomassRemovalDefaults." + typeOfDefoliation + ".FractionDeadToRemove", relativeTo: myZone);
                        if (RemoveAllBiomassIsEnabled && (fractionToRemove > 0.0))
                            fractionToRemove = 0.95;
                        fractionToRemove = fractionHarvestable * fractionToRemove;
                        fractionToRemove = Math.Min(1.0, fractionToRemove);
                        defoliationFractions.SetFractionToRemove(organ.Name, fractionToRemove, "Dead");
                        if (RemoveAllBiomassIsEnabled)
                            fractionToResidue = 0.0;
                        else
                            fractionToResidue = (double)Structure.Get(species.Name + "." + organ.Name + ".BiomassRemovalDefaults." + typeOfDefoliation + ".FractionDeadToResidue", relativeTo: myZone);
                        fractionToResidue = Math.Min(fractionHarvestable * fractionToResidue, 1.0 - fractionToRemove);
                        defoliationFractions.SetFractionToResidue(organ.Name, fractionToResidue, "Dead");
                    }
                }
            }*/
        }

        /// <summary>Gathers the DM and N amounts harvested, to be removed, and to be returned.</summary>
        private void manageDefoliatedBiomass()
        {
            double digestibilityStructural = 0.65;
            double digestibilityNonStrucutural = 1.0;

            if (DefoliatedWt > 0.0)
            {
                HarvestedWt = 0.0;
                HarvestedN = 0.0;
                RemovedWt = 0.0;
                RemovedN = 0.0;

                foreach (Plant species in PMFSpecies)
                {
                    if(species.AboveGround.Wt > 0.0)
                    {
                        // get the amount harvested (plant stuff removed from plants)
                        speciesHarvestedWt = 0.0;
                        speciesHarvestedN = 0.0;
                        foreach (IOrgan organ in   Structure.FindChildren<IOrgan>(recurse: true, relativeTo: (INodeModel)species).OfType<IModel>().ToList())
                        {
                            speciesHarvestedWt += (double)Structure.Get(species.Name+"."+organ.Name+".Removed.Wt", relativeTo: myZone);
                            speciesHarvestedN += (double)Structure.Get(species.Name+"."+organ.Name+".Removed.N", relativeTo: myZone);
                        }

                        HarvestedWt += speciesHarvestedWt;
                        HarvestedN += speciesHarvestedN;

                        // get the DM fraction to be removed
                        if(FractionDMToRemove>=0.0)
                        {
                            speciesFractionToRemove = FractionDMToRemove;
                        }
                        else
                        { // use digestibility to define the fraction
                            double fracStructural = species.AboveGround.StructuralWt/species.AboveGround.Wt;
                            speciesFractionToRemove = (1.0 - fracStructural)*digestibilityNonStrucutural + fracStructural*digestibilityStructural;
                            speciesFractionToRemove = Math.Min(1.0, Math.Max(0.0, speciesFractionToRemove));
                        }

                        // get the amounts actually removed from field
                        RemovedWt += speciesHarvestedWt * speciesFractionToRemove;
                        RemovedN += speciesHarvestedN * FractionNToRemove;
                   }
                }

                foreach (AgPasture.PastureSpecies species in AgPSpecies)
                {
                    if(species.AboveGroundWt > 0.0)
                    {
                        // get the amount harvested
                        speciesHarvestedWt = species.HarvestedWt*0.1;
                        speciesHarvestedN = species.HarvestedN*0.1;
                        HarvestedWt += speciesHarvestedWt;
                        HarvestedN += speciesHarvestedN;

                        // get fraction to be removed
                        if(FractionDMToRemove>=0.0)
                        {
                            speciesFractionToRemove = FractionDMToRemove;
                        }
                        else
                        { // use digestibility to define the fraction
                            speciesFractionToRemove = species.HarvestedDigestibility;
                        }

                        // get the amounts actually removed from field
                        RemovedWt += speciesHarvestedWt * speciesFractionToRemove;
                        RemovedN += speciesHarvestedN * FractionNToRemove;
                    }
                }

                // get the amounts to be returned to the field (as residue or dung+urine)
                ReturnedWt = HarvestedWt - RemovedWt;
                ReturnedN = HarvestedN - RemovedN;
                if (ReturnType == ReturnAsTypes.AsDungUrine)
                {
                    if (NDungType == DungNContentTypes.DefineProportion)
                        NReturnedInDung = ReturnedN * ProportionN2Dung;
                    else
                        NReturnedInDung = Math.Min(ReturnedN, ReturnedWt * 0.4 / CNRatioDung);
                    NReturnedInDung = Math.Min(NReturnedInDung, ReturnedN);
                    NReturnedInUrine = ReturnedN - NReturnedInDung;
                }
                else
                {
                    NReturnedInDung = 0.0;
                    NReturnedInUrine = 0.0;
                }
            }
        }

        /// <summary>Returns the material not removed off field as residue.</summary>
        private void returnResidues()
        {
            if ((ReturnedWt > 0.0) || (ReturnedN > 0.0))
            {
                PMF.BiomassRemovedType BiomassResidue = new PMF.BiomassRemovedType();
                string[] type = new string[] { "Grass" };
                float[] dltdm = new float[] { (float)(10.0 * ReturnedWt) };
                float[] dltn = new float[] { (float)(10.0 * ReturnedN) };
                float[] dltp = new float[] { 0 };
                float[] fraction = new float[] { 1 };     // fraction is always 1.0 here

                BiomassResidue.crop_type = "Grass";
                BiomassResidue.dm_type = type;
                BiomassResidue.dlt_crop_dm = dltdm;
                BiomassResidue.dlt_dm_n = dltn;
                BiomassResidue.dlt_dm_p = dltp;
                BiomassResidue.fraction_to_residue = fraction;
                BiomassRemoved.Invoke(BiomassResidue);
            }
        }

        /// <summary>Returns the material not removed off field as dung and urine).</summary>
        private void returnExcreta()
        {
            if ((ReturnedWt > 0.0) || (NReturnedInDung > 0.0))
            {
                PMF.BiomassRemovedType BiomassDung = new PMF.BiomassRemovedType();
                string[] type = new string[] { "RuminantDung_PastureFed" };
                float[] dltdm = new float[] { (float)(10.0 * ReturnedWt) };
                float[] dltn = new float[] { (float)(10.0 * NReturnedInDung) };
                float[] dltp = new float[] { 0 };
                float[] fraction = new float[] { 1 };     // fraction is always 1.0 here

                BiomassDung.crop_type = "RuminantDung_PastureFed";
                BiomassDung.dm_type = type;
                BiomassDung.dlt_crop_dm = dltdm;
                BiomassDung.dlt_dm_n = dltn;
                BiomassDung.dlt_dm_p = dltp;
                BiomassDung.fraction_to_residue = fraction;
                BiomassRemoved.Invoke(BiomassDung);
            }

            if (NReturnedInUrine > 0.0)
            {
                double[] myUrineDeposition = new double[soilPhysical.Thickness.Length];
                for (int z = 0; z < urineFraction.Length; z++)
                    myUrineDeposition[z] = NReturnedInUrine * 10.0 * urineFraction[z];
                Urea.AddKgHaDelta(SoluteSetterType.Fertiliser, myUrineDeposition);
            }
        }

        // Auxiliary bits and pieces  - - - - - - - - - - - - - - - - - - - - - - - - - - - - - - - - -

        /// <summary>Type of defoliation to use</summary>
        public enum DefoliationTypes
        {
            /// <summary>Cut</summary>
            Cut,
            /// <summary>Graze</summary>
            Graze,
            /// <summary>Harvest</summary>
            Harvest
        }

        /// <summary>Flag how defoliations will be triggered</summary>
        public enum DefoliationTriggerTypes
        {
            /// <summary>Setting a fixed interval</summary>
            FixedInterval,
            /// <summary>Setting a target (minimum) inteval</summary>
            TargetInterval,
            /// <summary>Setting a target (maximum) standing biomass</summary>
            TargetStandingBiomass
        }

        /// <summary>How the DM amount given is interpreted</summary>
        public enum DefoliateAmountTypes
        {
            /// <summary>Setting a DM amount to remove</summary>
            DMToRemove,
            /// <summary>Setting the residual DM amount</summary>
            ResidualDM,
            /// <summary>Remove according to crop's BiomassRemovalFractions</summary>
            None_UseDefoliationFractions
        }

        /// <summary>Fraction of defoliated DM to remove from field</summary>
        public enum DMRemovalTypes
        {
            /// <summary>Remove all DM</summary>
            RemoveAll,
            /// <summary>Remove no DM</summary>
            RemoveNone,
            /// <summary>Remove a user-defined fraction</summary>
            UserDefinedFraction,
            /// <summary>Remove a fraction based on plant digestibility</summary>
            BasedOnDigestibility
        }

        /// <summary>Fraction of N in the defoliated material to remove from field</summary>
        public enum NRemovalTypes
        {
            /// <summary>Remove all N</summary>
            RemoveAll,
            /// <summary>Remove no N</summary>
            RemoveNone,
            /// <summary>Remove a user-defined fraction</summary>
            UserDefinedFraction,
            /// <summary>Remove a fraction equal to DM removed</summary>
            ProportionalToDM
        }

        /// <summary>Define how the non-removed material is returned to the field</summary>
        public enum ReturnAsTypes
        {
            /// <summary>Return plant material as residue</summary>
            AsResidue,
            /// <summary>Return meterial as dung and urine</summary>
            AsDungUrine
        }

        /// <summary>Define how the proportion of N in dung is defined</summary>
        public enum DungNContentTypes
        {
            /// <summary>Define the proportion of N returned as dung</summary>
            DefineProportion,
            /// <summary>Define the C:N of dung</summary>
            DefineCNratio
        }
    }
}
```
              Operations DefoliationSchedule
                2014-12-15  [DefoliationManager].Script.Defoliate(defoliationType: "Cut", amountDM: 100, amountType: "ResidualDM", duration: 1)
                2015-01-20  [DefoliationManager].Script.Defoliate(defoliationType: "Cut", amountDM: 100, amountType: "ResidualDM", duration: 1)
                2015-03-18  [DefoliationManager].Script.Defoliate(defoliationType: "Cut", amountDM: 100, amountType: "ResidualDM", duration: 1)
                2015-04-20  [DefoliationManager].Script.Defoliate(defoliationType: "Cut", amountDM: 100, amountType: "ResidualDM", duration: 1)
                2015-06-08  [DefoliationManager].Script.Defoliate(defoliationType: "Cut", amountDM: 100, amountType: "ResidualDM", duration: 1)
                2015-09-07  [DefoliationManager].Script.Defoliate(defoliationType: "Cut", amountDM: 100, amountType: "ResidualDM", duration: 1)
                2015-10-14  [DefoliationManager].Script.Defoliate(defoliationType: "Cut", amountDM: 100, amountType: "ResidualDM", duration: 1)
                2015-11-17  [DefoliationManager].Script.Defoliate(defoliationType: "Cut", amountDM: 100, amountType: "ResidualDM", duration: 1)
                2015-12-21  [DefoliationManager].Script.Defoliate(defoliationType: "Cut", amountDM: 100, amountType: "ResidualDM", duration: 1)
                2016-01-21  [DefoliationManager].Script.Defoliate(defoliationType: "Cut", amountDM: 100, amountType: "ResidualDM", duration: 1)
                2016-03-08  [DefoliationManager].Script.Defoliate(defoliationType: "Cut", amountDM: 100, amountType: "ResidualDM", duration: 1)
                2016-05-25  [DefoliationManager].Script.Defoliate(defoliationType: "Cut", amountDM: 100, amountType: "ResidualDM", duration: 1)
                2016-08-18  [DefoliationManager].Script.Defoliate(defoliationType: "Cut", amountDM: 100, amountType: "ResidualDM", duration: 1)
                2016-09-21  [DefoliationManager].Script.Defoliate(defoliationType: "Cut", amountDM: 100, amountType: "ResidualDM", duration: 1)
                2016-10-26  [DefoliationManager].Script.Defoliate(defoliationType: "Cut", amountDM: 100, amountType: "ResidualDM", duration: 1)
                2016-11-30  [DefoliationManager].Script.Defoliate(defoliationType: "Cut", amountDM: 100, amountType: "ResidualDM", duration: 1)
                2016-12-10  [DefoliationManager].Script.Defoliate(defoliationType: "Cut", amountDM: 100, amountType: "ResidualDM", duration: 1)
              Manager ExtraVariables
                script: same as in Evaluation.NewZealand.FRNLRuakuraMix1.FRNLRuakuraMix1.Field.Management.ExtraVariables
              Manager SettingUpParams
                setParamStartDate = 12/01/2014 00:00:00
                setParamHeight = 250
```csharp
// Set some plant parameters, for tests and development
// Following suggestions by Val Snow: Plant competition seem to be better done if heights are all the same (maybe due to some issue/feature of MicroClimate)

using APSIM.Core;
using System;
using Models.Core;
using System.Collections.Generic;
using System.Text;
using Models;
using Models.Soils;
using Models.PMF;
using System.Xml.Serialization;
using APSIM.Shared.Utilities;

namespace Models
{
    [Serializable]
    public class Script : Model, IStructureDependency
    {
        [Link] private Clock Clock;
        [Link] private Zone myZone;
        public IStructure Structure { private get; set; }


        //User inputs from properties tab
        [Separator("Setting up some parameters of plants")]
        [Description(" Enter the date to set plant parameters (dd/mm/yyyy):")]
        public DateTime setParamStartDate { get; set; }
        [Description(" Enter the height to set all plants to (mm):")]
        public double setParamHeight { get; set; }


        //Internal variables



        

        [EventSubscribe("StartOfSimulation")]
        private void OnSimulationCommencing(object sender, EventArgs e)
        {
            // make sure that manager will work when startDate<simulationStartDay
            if (Clock.Today > setParamStartDate)
                setParamStartDate = Clock.Today;
        }

        [EventSubscribe("StartOfDay")]
        private void OnStartOfDay(object sender, EventArgs e)
        {
            // make sure that rotation start when startDate<simulationStartDay
            if (Clock.Today == setParamStartDate)
            {
                double[] xVals = new double[] {0, 10};
                double[] yVals = new double[] {setParamHeight, setParamHeight};
                Structure.Set("Chicory.Leaf.HeightFunction.XYPairs.X", xVals, relativeTo: myZone);
                Structure.Set("Chicory.Leaf.HeightFunction.XYPairs.Y", yVals, relativeTo: myZone);
                Structure.Set("PlantainForage.Leaf.HeightFunction.XYPairs.X", xVals, relativeTo: myZone);
                Structure.Set("PlantainForage.Leaf.HeightFunction.XYPairs.Y", yVals, relativeTo: myZone);
                /*Structure.Set("AGPWhiteClover.PlantHeightMaximum", setParamHeight, relativeTo: myZone);
                Structure.Set("AGPWhiteClover.PlantHeightMinimum", setParamHeight, relativeTo: myZone);
                Structure.Set("AGPRyegrass.PlantHeightMaximum", setParamHeight, relativeTo: myZone);
                Structure.Set("AGPRyegrass.PlantHeightMinimum", setParamHeight, relativeTo: myZone);
                Structure.Set("AGPLucerne.PlantHeightMaximum", setParamHeight, relativeTo: myZone);
                Structure.Set("AGPLucerne.PlantHeightMinimum", setParamHeight, relativeTo: myZone);*/
            }
        }
    }
}
```
            MicroClimate: a_interception=0; b_interception=1; c_interception=0; d_interception=0; SoilHeatFluxFraction=0.4; MinimumHeightDiffForNewLayer=0; NightInterceptionFraction=0.5; ReferenceHeight=2
            Irrigation
            Fertiliser
            SurfaceOrganicMatter: InitialResidueName=grass; InitialResidueType=grass; InitialResidueMass=500; InitialStandingFraction=0; InitialCPR=0; InitialCNR=40
            Soil: SoilType=Typic Udivitrand (US), Typic Orthic Allophanic Soil (NZ); LocalName=Horotiu Silt Loam; Site=Ruakura; NearestTown=Hamilton; Region=Waikato; Country=New Zealand; Latitude=0; Longitude=0
              DataSource=Based primarily on data from Close et al (2003), complemented with NZ NSD.
              Physical
                Thickness  ParticleSizeClay  BD     AirDry  LL15   DUL    SAT    KS
                200        20                0.88   0.07    0.22   0.421  0.587  507.8
                200        18.5              0.85   0.21    0.219  0.327  0.623  4445.1
                130        11                1.009  0.177   0.177  0.314  0.572  7262
                140        6.5               1.055  0.139   0.139  0.291  0.536  11928
                380        5.1               1.055  0.125   0.125  0.182  0.504  25031
                230        3.8               0.839  0.102   0.102  0.123  0.439  28410.4
                220        2.4               0.695  0.083   0.083  0.101  0.363  42658.3
                SoilCrop ChicorySoil: LL=[0.22, 0.219, 0.177, 0.139, 0.125, 0.102, 0.083]; KL=[0.07, 0.058, 0.038, 0.025, 0.01, 0.004, 0.002]; XF=[1, 1, 1, 1, 1, 1, 1]
                SoilCrop PlantainForageSoil: LL=[0.22, 0.219, 0.177, 0.139, 0.125, 0.102, 0.083]; KL=[0.08, 0.07, 0.05, 0.03, 0.01, 0.003, 0]; XF=[1, 1, 1, 1, 1, 1, 1]
                SoilCrop AGPRyegrassSoil: LL=[0.22, 0.219, 0.177, 0.139, 0.125, 0.102, 0.083]; KL=[0.1, 0.085, 0.055, 0.02, 0.005, 0, 0]; XF=[1, 1, 1, 1, 1, 1, 1]
                SoilCrop WhiteCloverSoil: LL=[0.22, 0.219, 0.177, 0.139, 0.125, 0.102, 0.083]; KL=[0.085, 0.077, 0.04, 0.01, 0.001, 0, 0]; XF=[1, 1, 1, 1, 1, 1, 1]
                SoilCrop AGPWhiteCloverSoil: LL=[0.22, 0.219, 0.177, 0.139, 0.125, 0.102, 0.083]; KL=[0.085, 0.05, 0, 0, 0, 0, 0]; XF=[1, 1, 1, 1, 1, 1, 1]
                SoilCrop LucerneSoil: LL=[0.22, 0.219, 0.177, 0.139, 0.125, 0.102, 0.083]; KL=[0.06, 0.05, 0.035, 0.025, 0.015, 0.01, 0.01]; XF=[1, 1, 1, 1, 1, 1, 1]
                SoilCrop AGPLucerneSoil: LL=[0.22, 0.219, 0.177, 0.139, 0.125, 0.102, 0.083]; KL=[0.06, 0.05, 0.035, 0.025, 0.015, 0.01, 0.01]; XF=[1, 1, 1, 1, 1, 1, 1]
              WaterBalance SoilWater: same as Evaluation.NewZealand.FRNLRuakuraMix1.FRNLRuakuraMix1.Field.Soil.SoilWater
              Organic: same as Evaluation.NewZealand.FRNLRuakuraMix1.FRNLRuakuraMix1.Field.Soil.Organic
              Chemical: Thickness=[200, 200, 130, 140, 380, 230, 220]; PH=[6, 6, 6, 6, 6, 6, 6]; PHUnits=Water
              Nutrient
              Water: Thickness=[200, 200, 130, 140, 380, 230, 220]; InitialValues=[0.4009, 0.3162, 0.3003, 0.2758, 0.1763, 0.1209, 0.0992]; FilledFromTop=false
              Solute NO3: same as Evaluation.NewZealand.FRNLRuakuraMix1.FRNLRuakuraMix1.Field.Soil.NO3
              Solute NH4: same as Evaluation.NewZealand.FRNLRuakuraMix1.FRNLRuakuraMix1.Field.Soil.NH4
              Solute Urea: same as Evaluation.NewZealand.FRNLRuakuraMix1.FRNLRuakuraMix1.Field.Soil.Urea
              SoilTemperature Temperature
            Plant Chicory
            Plant PlantainForage
            PastureSpecies AGPRyegrass: same as Evaluation.NewZealand.FRNLRuakuraMix1.FRNLRuakuraMix1.Field.AGPRyegrass
            PastureSpecies AGPLucerne: doyGermination=275; daysEmergenceToAnthesis=120; daysAnthesisToMaturity=85; degreesDayForAnthesis=1100; degreesDayForMaturity=900; daysAnnualsFactor=45; CanopyType=PastureSpecies; InitialShootDM=500; InitialRootDM=250; InitialRootDepth=750; initialDMFractionsGrasses=[0.15, 0.25, 0.25, 0.05, 0.05, 0.1, 0.1, 0.05, 0, 0, 0]; initialDMFractionsForbs=[0.2, 0.2, 0.15, 0.05, 0.1, 0.15, 0.1, 0.05, 0, 0, 0]; PhotosyntheticEfficiency=0.01; PhotosynthesisCurveFactor=0.8; FractionPAR=0.5; ReferenceCO2=380; CO2EffectScaleFactor=700; CO2EffectOffsetFactor=600; CO2EffectMinimum=0.7; CO2EffectExponent=2; ReproSeasonDurationCoeff=2; ReproSeasonShouldersLengthFactor=1; ReproSeasonOnsetDurationFactor=0.6; RelativeTurnoverEmerging=2; DetachmentDroughtCoefficient=3; DetachmentDroughtEffectMin=0.1; TurnoverStockFactor=0.01; TurnoverDefoliationEffectMin=0.025; MinimumGreenLeafProp=0.8; MinimumGreenRootProp=0.5
              initialDMFractionsLegumes=[0.16, 0.23, 0.22, 0.05, 0.03, 0.05, 0.05, 0.01, 0.04, 0.08, 0.08]
              LinearInterpolationFunction FVPDFunction
            PastureSpecies AGPWhiteClover: same as Evaluation.NewZealand.FRNLRuakuraMix1.FRNLRuakuraMix1.Field.AGPWhiteClover
            Report: EventNames=[Clock].DoReport
              VariableNames:
                [Clock].Today as Date
                [Clock].Today.DayOfYear as DayOfYear
                [Weather].Radn as SolarRadiation
                ([AGPWhiteClover].InterceptedRadn+[AGPRyegrass].InterceptedRadn) as InterceptedRadiation
                [AGPRyegrass].InterceptedRadn as Ryegrass.RadiationIntercepted
                [AGPWhiteClover].InterceptedRadn as WhiteClover.RadiationIntercepted
                [Weather].Rain as Rainfall
                [Irrigation].IrrigationApplied as IrrigationApplied
                [MicroClimate].PrecipitationInterception as PrecipitationInterception
                [MicroClimate].PetTotal
                [Soil].SoilWater.Eo as Eo
                [Soil].SoilWater.Es as Evaporation
                (sum([AGPWhiteClover].WaterUptake)+sum([AGPRyegrass].WaterUptake))) as Transpiration
                [Soil].SoilWater.pond as PondedWater
                [Soil].SoilWater.Drainage as Drainage
                [Soil].SoilWater.Runoff as Runoff
                sum([Soil].SoilWater.LateralOutflow) as LateralFlow
                sum([Soil].Water.MM) as TotalSWC
                sum([Soil].Physical.DULmm) as TotalDUL
                sum([Soil].Physical.LL15mm) as TotalLL15
                [Soil].Water.Volumetric[1] as SWCTopLayer
                [Soil].Physical.DUL[1] as DULTopLayer
                [Fertiliser].NitrogenApplied as FertiliserN
                sum([Soil].Nutrient.DenitrifiedN) as DenitrifiedN
                ([Soil].SoilWater.LeachNH4 + [Soil].SoilWater.LeachNO3) as LeachedN
                ([AGPWhiteClover].SoilUptakeN+[AGPRyegrass].SoilUptakeN) as UptakeN
                sum([Soil].Nutrient.MineralisedN) as MineralisedSoilN
                sum([SurfaceOrganicMatter].SurfaceResidue.Decomposition.MineralisedN) as MineralisedSurfOMN
                ([AGPWhiteClover].LitterDepositionN*0.1+[AGPRyegrass].LitterDepositionN*0.1) as DetachedAGN
                ([AGPWhiteClover].RootDetachedN*0.1+[AGPRyegrass].RootDetachedN*0.1) as DetachedBGN
                ([AGPWhiteClover].LitterDepositionN+[AGPWhiteClover].RootDetachedN+[AGPRyegrass].LitterDepositionN+[AGPRyegrass].RootDetachedN) as DetachedTotalN
                [AGPWhiteClover].FixedN as FixedN
                (sum([Soil].Urea.kgha) + sum([Soil].NH4.kgha) + sum([Soil].NO3.kgha)) as SoilNContent
                sum([Soil].Urea.kgha) as SoilUrea
                sum([Soil].NH4.kgha) as SoilNH4
                sum([Soil].NO3.kgha) as SoilNO3
                (sum([Soil].NH4.kgha[1:4])+sum([Soil].NO3.kgha[1:4])) as TopSoilN
                [SurfaceOrganicMatter].N as TotalSurfOMN
                sum([Soil].Nutrient.FOM.N) as TotalFOMN
                sum([Soil].Nutrient.Humic.N) as TotalHumicN
                sum([Soil].Nutrient.Microbial.N as TotalMicrobialN
                [DefoliationManager].Script.RotationHarvestedDM as RotationHarvestedWt
                [DefoliationManager].Script.PreHarvestDM
                [DefoliationManager].Script.PostHarvestDM
                [DefoliationManager].Script.DefoliatedN as NTakenOff
                [DefoliationManager].Script.HarvestedN
                (10*[DefoliationManager].Script.RemovedN) as Defoliate.Script.RemovedN
                [DefoliationManager].Script.DefoliatedWt as HarvestedWt
                ([DefoliationManager].Script.RemovedN/([DefoliationManager].Script.RemovedWt+0.000001) as RemovedNConc
                [ExtraVariables].Script.AccumHarvestedWt as CumulativeHarvestedWt
                [ExtraVariables].Script.AccumHarvestedN as CumulativeNTakenOff
                ([AGPWhiteClover].HarvestedWt/([AGPRyegrass].HarvestedWt + [AGPWhiteClover].HarvestedWt + 0.000001)) as WhiteClover.HarvestedFraction
                ([AGPRyegrass].HarvestedWt/([AGPRyegrass].HarvestedWt + [AGPWhiteClover].HarvestedWt + 0.000001)) as Ryegrass.HarvestedFraction
                ([AGPWhiteClover].TotalWt+[AGPRyegrass].TotalWt)*0.1 as TotalPlantWt
                ([AGPWhiteClover].AboveGroundLiveWt+[AGPRyegrass].AboveGroundLiveWt+[AGPWhiteClover].BelowGroundWt+[AGPRyegrass].BelowGroundWt)*0.1 as TotalPlantLiveWt
                ([AGPWhiteClover].AboveGroundWt+[AGPRyegrass].AboveGroundWt)*0.1 as AboveGroundWt
                ([AGPWhiteClover].BelowGroundWt+[AGPRyegrass].BelowGroundWt)*0.1 as BelowGroundWt
                ([AGPWhiteClover].TotalN+[AGPRyegrass].TotalN)*0.1 as TotalPlantN
                ([AGPWhiteClover].AboveGroundN+[AGPRyegrass].AboveGroundN)*0.1 as AboveGroundN
                ([AGPWhiteClover].BelowGroundN+[AGPRyegrass].BelowGroundN)*0.1 as BelowGroundN
                (([AGPWhiteClover].AboveGroundN+[AGPRyegrass].AboveGroundN)/([AGPWhiteClover].AboveGroundWt+[AGPRyegrass].AboveGroundWt+0.000001)) as AboveGroundNConc
                (([AGPWhiteClover].BelowGroundN+[AGPRyegrass].BelowGroundN)/([AGPWhiteClover].BelowGroundWt+[AGPRyegrass].BelowGroundWt+0.000001)) as BelowGroundNConc
                ([AGPWhiteClover].AboveGroundLiveWt+[AGPRyegrass].AboveGroundLiveWt)*0.1 as AboveGroundLiveWt
                ([AGPWhiteClover].AboveGroundLiveN+[AGPRyegrass].AboveGroundLiveN)*0.1 as AboveGroundDeadWt
                ([AGPWhiteClover].BelowGroundWt+[AGPRyegrass].BelowGroundWt)*0.1 as BelowGroundLiveWt
                (([AGPWhiteClover].AboveGroundLiveN+[AGPRyegrass].AboveGroundLiveN)/([AGPWhiteClover].AboveGroundLiveWt+[AGPRyegrass].AboveGroundLiveWt+0.000001)) as AboveGroundLiveNc
                [ExtraVariables].Script.HerbageNConc as HerbageNConc
                ([AGPRyegrass].TotalWt*0.1) as Ryegrass.Total.Wt
                ([AGPRyegrass].AboveGroundLiveWt*0.1+[AGPRyegrass].BelowGroundWt*0.1) as Ryegrass.TotalLive.Wt
                ([AGPRyegrass].AboveGroundWt*0.1) as Ryegrass.AboveGround.Wt
                ([AGPRyegrass].BelowGroundWt*0.1) as Ryegrass.BelowGround.Wt
                ([AGPRyegrass].AboveGroundLiveWt*0.1) as Ryegrass.AboveGroundLive.Wt
                ([AGPRyegrass].AboveGroundDeadWt*0.1) as Ryegrass.AboveGroundDead.Wt
                ([AGPRyegrass].BelowGroundWt*0.1) as Ryegrass.BelowGroundLive.Wt
                ([AGPRyegrass].TotalN*0.1) as Ryegrass.Total.N
                ([AGPRyegrass].AboveGroundN*0.1) as Ryegrass.AboveGround.N
                ([AGPRyegrass].BelowGroundN*0.1) as Ryegrass.BelowGround.N
                [AGPRyegrass].AboveGroundNConc as Ryegrass.AboveGround.NConc
                ([AGPRyegrass].BelowGroundN/([AGPRyegrass].BelowGroundWt+0.000001)) as Ryegrass.BelowGround.NConc
                ([AGPRyegrass].AboveGroundLiveN/([AGPRyegrass].AboveGroundLiveWt+0.000001)) as Ryegrass.AboveGroundLive.NConc
                ([AGPWhiteClover].TotalWt*0.1) as WhiteClover.Total.Wt
                ([AGPWhiteClover].AboveGroundLiveWt*0.1+[AGPWhiteClover].BelowGroundWt*0.1) as WhiteClover.TotalLive.Wt
                ([AGPWhiteClover].AboveGroundWt*0.1) as WhiteClover.AboveGround.Wt
                ([AGPWhiteClover].BelowGroundWt*0.1) as WhiteClover.BelowGround.Wt
                ([AGPWhiteClover].AboveGroundLiveWt*0.1) as WhiteClover.AboveGroundLive.Wt
                ([AGPWhiteClover].AboveGroundDeadWt*0.1) as WhiteClover.AboveGroundDead.Wt
                ([AGPWhiteClover].BelowGroundWt*0.1) as WhiteClover.BelowGroundLive.Wt
                ([AGPWhiteClover].TotalN*0.1) as WhiteClover.Total.N
                ([AGPWhiteClover].AboveGroundN*0.1) as WhiteClover.AboveGround.N
                ([AGPWhiteClover].BelowGroundN*0.1) as WhiteClover.BelowGround.N
                [AGPWhiteClover].AboveGroundNConc as WhiteClover.AboveGround.NConc
                ([AGPWhiteClover].BelowGroundN/([AGPWhiteClover].BelowGroundWt+0.000001)) as WhiteClover.BelowGround.NConc
                ([AGPWhiteClover].AboveGroundLiveN/([AGPWhiteClover].AboveGroundLiveWt+0.000001)) as WhiteClover.AboveGroundLive.NConc
                ([AGPWhiteClover].CoverTotal+[AGPRyegrass].CoverTotal) as CoverTotal
                ([AGPWhiteClover].CoverDead+[AGPRyegrass].CoverDead) as CoverDead
                [MicroClimate].CanopyCover
                ([AGPWhiteClover].LAIGreen+[AGPRyegrass].LAIGreen) as LAIgreen
                ([AGPWhiteClover].LAIDead+[AGPRyegrass].LAIDead) as LAIdead
                (([AGPWhiteClover].Height+[AGPRyegrass].Height)/2) as AverageShootHeight
                (([AGPWhiteClover].RootDepth+[AGPRyegrass].RootDepth)/2) as AverageRootDepth
                ([AGPWhiteClover].Root.LengthDensity+[AGPRyegrass].Root.LengthDensity) as Total.RootLengthDensity
                ([AGPWhiteClover].AboveGroundWt/([AGPWhiteClover].AboveGroundWt+[AGPRyegrass].AboveGroundWt+0.000001)) as WhiteClover.BiomassFraction
                ([AGPRyegrass].AboveGroundWt/([AGPWhiteClover].AboveGroundWt+[AGPRyegrass].AboveGroundWt+0.000001)) as Ryegrass.BiomassFraction
                ([AGPWhiteClover].AboveGroundLiveWt/([AGPWhiteClover].BelowGroundWt+0.000001)) as WhiteClover.ShootRootRatio
                ([AGPWhiteClover].AboveGroundLiveWt/([AGPWhiteClover].AboveGroundLiveWt+[AGPWhiteClover].BelowGroundWt+0.000001)) as WhiteClover.CurrentAboveGroundFraction
                ([AGPRyegrass].AboveGroundLiveWt/([AGPRyegrass].BelowGroundWt+0.000001)) as Ryegrass.ShootRootRatio
                ([AGPRyegrass].AboveGroundLiveWt/([AGPRyegrass].AboveGroundLiveWt+[AGPRyegrass].BelowGroundWt+0.000001)) as Ryegrass.CurrentAboveGroundFraction
                [AGPRyegrass].CoverTotal as Ryegrass.CoverTotal
                [AGPWhiteClover].CoverTotal as WhiteClover.CoverTotal
                [AGPRyegrass].Height as Ryegrass.Height
                [AGPWhiteClover].Height as WhiteClover.Height
                [AGPRyegrass].LAI as Ryegrass.LAI
                [AGPWhiteClover].LAI as WhiteClover.LAI
                [AGPRyegrass].RootDepth as Ryegrass.Root.Depth
                [AGPWhiteClover].RootDepth as WhiteClover.Root.Depth
                [AGPRyegrass].GlfNSupply
                [AGPRyegrass].GlfWaterSupply
                [AGPRyegrass].GlfWaterLogging
                [AGPRyegrass].GlfNContent
                [AGPRyegrass].GlfCO2
                [AGPRyegrass].GlfTemperature
                [AGPRyegrass].GlfColdDamage
                [AGPRyegrass].GlfHeatDamage
                [AGPWhiteClover].GlfNSupply
                [AGPWhiteClover].GlfWaterSupply
                [AGPWhiteClover].GlfWaterLogging
                [AGPWhiteClover].GlfNContent
                [AGPWhiteClover].GlfCO2
                [AGPWhiteClover].GlfTemperature
                [AGPWhiteClover].GlfColdDamage
                [AGPWhiteClover].GlfHeatDamage
      Experiment SFFFKerikeriMix
        DisabledSimNames=[FRNLRuakuraNRate50, FRNLRuakuraNRate100, FRNLRuakuraNRate200, FRNLRuakuraNRate350]
        Memo
          ###SFFF Kerikeri###

          This experiment

          The soil at the experimental site was a Horotiu silt loam (an Orthic Allophanic soil; USDA: Typic Udivitrand), the parameters required were inferred using data from the New Zealand National Soils Database (Landcare Research).
          Weather data was obtained from nearby Ruakura weather station (NIWA).
          Simulation of ryegrass and lucerne are done using the AgPasture model as the PMF versions are still under development.
        Factors
          Factor Sowing
            CompositeFactor 0-PR
              Specifications:
                [Sowing]
                [DefoliationSchedule]
              Operations Sowing
                2021-04-10  [AGPWhiteClover].EndCrop()
                2021-04-10  [AGPRyegrass].EndCrop()
                2021-04-10  [AGPTallFescue].EndCrop()
                2021-04-15  [AGPRyegrass].Sow(population: 0, cultivar: "R", depth: 0, rowSpacing: 0)
              Operations DefoliationSchedule
                2021-07-27  [DefoliationManager].Script.Defoliate(defoliationType: "Cut", amountDM: 100, amountType: "ResidualDM", duration: 1)
                2021-09-29  [DefoliationManager].Script.Defoliate(defoliationType: "Cut", amountDM: 100, amountType: "ResidualDM", duration: 1)
                2021-11-23  [DefoliationManager].Script.Defoliate(defoliationType: "Cut", amountDM: 100, amountType: "ResidualDM", duration: 1)
                2022-01-07  [DefoliationManager].Script.Defoliate(defoliationType: "Cut", amountDM: 100, amountType: "ResidualDM", duration: 1)
                2022-02-18  [DefoliationManager].Script.Defoliate(defoliationType: "Cut", amountDM: 100, amountType: "ResidualDM", duration: 1)
                2022-04-07  [DefoliationManager].Script.Defoliate(defoliationType: "Cut", amountDM: 100, amountType: "ResidualDM", duration: 1)
                2022-05-13  [DefoliationManager].Script.Defoliate(defoliationType: "Cut", amountDM: 100, amountType: "ResidualDM", duration: 1)
                2022-09-03  [DefoliationManager].Script.Defoliate(defoliationType: "Cut", amountDM: 100, amountType: "ResidualDM", duration: 1)
                2022-10-07  [DefoliationManager].Script.Defoliate(defoliationType: "Cut", amountDM: 100, amountType: "ResidualDM", duration: 1)
                2022-11-18  [DefoliationManager].Script.Defoliate(defoliationType: "Cut", amountDM: 100, amountType: "ResidualDM", duration: 1)
                2023-01-25  [DefoliationManager].Script.Defoliate(defoliationType: "Cut", amountDM: 100, amountType: "ResidualDM", duration: 1)
                2023-03-29  [DefoliationManager].Script.Defoliate(defoliationType: "Cut", amountDM: 100, amountType: "ResidualDM", duration: 1)
                2023-05-16  [DefoliationManager].Script.Defoliate(defoliationType: "Cut", amountDM: 100, amountType: "ResidualDM", duration: 1)
                2023-08-14  [DefoliationManager].Script.Defoliate(defoliationType: "Cut", amountDM: 100, amountType: "ResidualDM", duration: 1)
                2023-10-03  [DefoliationManager].Script.Defoliate(defoliationType: "Cut", amountDM: 100, amountType: "ResidualDM", duration: 1)
                2023-11-09  [DefoliationManager].Script.Defoliate(defoliationType: "Cut", amountDM: 100, amountType: "ResidualDM", duration: 1)
            CompositeFactor 100-P
              Specifications:
                [Sowing]
                [DefoliationSchedule]
              Operations Sowing
                2021-04-15  [AGPWhiteClover].EndCrop()
                2021-04-15  [AGPRyegrass].EndCrop()
                2021-04-15  [AGPTallFescue].EndCrop()
                2021-04-15  [PlantainForage].Sow(population: 100, cultivar: "Tonic", depth: 10, rowSpacing: 150)
              Operations DefoliationSchedule
                2021-09-29  [DefoliationManager].Script.Defoliate(defoliationType: "Cut", amountDM: 100, amountType: "ResidualDM", duration: 1)
                2021-11-23  [DefoliationManager].Script.Defoliate(defoliationType: "Cut", amountDM: 100, amountType: "ResidualDM", duration: 1)
                2022-01-07  [DefoliationManager].Script.Defoliate(defoliationType: "Cut", amountDM: 100, amountType: "ResidualDM", duration: 1)
                2022-02-18  [DefoliationManager].Script.Defoliate(defoliationType: "Cut", amountDM: 100, amountType: "ResidualDM", duration: 1)
                2022-04-07  [DefoliationManager].Script.Defoliate(defoliationType: "Cut", amountDM: 100, amountType: "ResidualDM", duration: 1)
                2022-05-13  [DefoliationManager].Script.Defoliate(defoliationType: "Cut", amountDM: 100, amountType: "ResidualDM", duration: 1)
                2022-09-03  [DefoliationManager].Script.Defoliate(defoliationType: "Cut", amountDM: 100, amountType: "ResidualDM", duration: 1)
                2022-10-07  [DefoliationManager].Script.Defoliate(defoliationType: "Cut", amountDM: 100, amountType: "ResidualDM", duration: 1)
                2022-11-18  [DefoliationManager].Script.Defoliate(defoliationType: "Cut", amountDM: 100, amountType: "ResidualDM", duration: 1)
                2023-01-25  [DefoliationManager].Script.Defoliate(defoliationType: "Cut", amountDM: 100, amountType: "ResidualDM", duration: 1)
                2023-03-29  [DefoliationManager].Script.Defoliate(defoliationType: "Cut", amountDM: 100, amountType: "ResidualDM", duration: 1)
                2023-05-16  [DefoliationManager].Script.Defoliate(defoliationType: "Cut", amountDM: 100, amountType: "ResidualDM", duration: 1)
                2023-08-14  [DefoliationManager].Script.Defoliate(defoliationType: "Cut", amountDM: 100, amountType: "ResidualDM", duration: 1)
                2023-10-03  [DefoliationManager].Script.Defoliate(defoliationType: "Cut", amountDM: 100, amountType: "ResidualDM", duration: 1)
                2023-11-09  [DefoliationManager].Script.Defoliate(defoliationType: "Cut", amountDM: 100, amountType: "ResidualDM", duration: 1)
            CompositeFactor 15-PR
              Specifications:
                [Sowing]
                [DefoliationSchedule]
              Operations Sowing
                2021-04-10  [AGPWhiteClover].EndCrop()
                2021-04-10  [AGPRyegrass].EndCrop()
                2021-04-10  [AGPTallFescue].EndCrop()
                2021-04-15  [AGPRyegrass].Sow(population: 0, cultivar: "R", depth: 0, rowSpacing: 0)
                2021-04-15  [PlantainForage].Sow(population: 100, cultivar: "Tonic", depth: 10, rowSpacing: 150)
              Operations DefoliationSchedule: same as Evaluation.NewZealand.SFFFKerikeriMix.Factors.Sowing.100-P.DefoliationSchedule
            CompositeFactor 30-HR
              Specifications:
                [Sowing]
                [DefoliationSchedule]
              Operations Sowing
                2021-04-10  [AGPWhiteClover].EndCrop()
                2021-04-10  [AGPRyegrass].EndCrop()
                2021-04-10  [AGPTallFescue].EndCrop()
                2021-04-15  [PlantainForage].Sow(population: 30, cultivar: "Tonic", depth: 10, rowSpacing: 150)
                2021-04-15  [AGPRyegrass].Sow(population: 70, cultivar: "R", depth: 0, rowSpacing: 0)
              Operations DefoliationSchedule: same as Evaluation.NewZealand.SFFFKerikeriMix.Factors.Sowing.100-P.DefoliationSchedule
            CompositeFactor 30-IR: same as Evaluation.NewZealand.SFFFKerikeriMix.Factors.Sowing.15-PR
            CompositeFactor 30-PR
              Specifications:
                [Sowing]
                [DefoliationSchedule]
              Operations Sowing
                2021-04-10  [AGPWhiteClover].EndCrop()
                2021-04-10  [AGPRyegrass].EndCrop()
                2021-04-10  [AGPTallFescue].EndCrop()
                2021-04-15  [PlantainForage].Sow(population: 100, cultivar: "Tonic", depth: 10, rowSpacing: 150)
                2021-04-15  [AGPRyegrass].Sow(population: 0, cultivar: "R", depth: 0, rowSpacing: 0)
              Operations DefoliationSchedule: same as Evaluation.NewZealand.SFFFKerikeriMix.Factors.Sowing.100-P.DefoliationSchedule
            CompositeFactor 30-PRWC
              Specifications:
                [Sowing]
                [DefoliationSchedule]
              Operations Sowing
                2021-04-10  [AGPWhiteClover].EndCrop()
                2021-04-10  [AGPRyegrass].EndCrop()
                2021-04-10  [AGPTallFescue].EndCrop()
                2021-04-15  [PlantainForage].Sow(population: 30, cultivar: "Tonic", depth: 10, rowSpacing: 150)
                2021-04-15  [AGPRyegrass].Sow(population: 0, cultivar: "R", depth: 0, rowSpacing: 0)
                2021-04-15  [AGPWhiteClover].Sow(population: 0, cultivar: "W", depth: 0, rowSpacing: 0)
              Operations DefoliationSchedule: same as Evaluation.NewZealand.SFFFKerikeriMix.Factors.Sowing.100-P.DefoliationSchedule
            CompositeFactor 30-TF
              Specifications:
                [Sowing]
                [DefoliationSchedule]
              Operations Sowing
                2021-04-10  [AGPWhiteClover].EndCrop()
                2021-04-10  [AGPRyegrass].EndCrop()
                2021-04-10  [AGPTallFescue].EndCrop()
                2021-04-15  [PlantainForage].Sow(population: 100, cultivar: "Tonic", depth: 10, rowSpacing: 150)
                2021-04-15  [AGPTallFescue].Sow(population: 0, cultivar: "R", depth: 0, rowSpacing: 0)
              Operations DefoliationSchedule: same as Evaluation.NewZealand.SFFFKerikeriMix.Factors.Sowing.100-P.DefoliationSchedule
            CompositeFactor 30-TR: same as Evaluation.NewZealand.SFFFKerikeriMix.Factors.Sowing.30-PR
            CompositeFactor 50-PR: same as Evaluation.NewZealand.SFFFKerikeriMix.Factors.Sowing.30-PR
        Simulation KerikeriMix
          Clock: Start=2021-04-15; End=2023-10-03
          Weather: FileName=Kerikeri.met
          Summary summaryfile
          SoilArbitrator Soil Arbitrator
          Forages
            Parameters:
              Name                          LiveDigestibility  DeadDigestibility  LiveFractionConsumable  DeadFractionConsumable  LiveMinimumBiomass  DeadMinimumBiomass
              SurfaceOrganicMatter.Residue  0.7                0.3                1                       1                       100                 0
              Chicory.Leaf                  0.7                0.3                1                       1                       100                 0
              Chicory.Stem                  0.7                0.3                1                       1                       100                 0
              Chicory.Inflorescence         0.7                0.3                1                       1                       100                 0
              Chicory.Taproot               0.7                0.3                1                       1                       100                 0
              Chicory.Root                  0                  0                  0                       0                       0                   0
              PlantainForage.Leaf           0.7                0.3                1                       1                       100                 0
              PlantainForage.Stem           0.7                0.3                1                       1                       100                 0
              PlantainForage.Inflorescence  0.7                0.3                1                       1                       100                 0
              PlantainForage.Taproot        0.7                0.3                1                       1                       100                 0
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          Zone Field: Area=1; Slope=0; AspectAngle=0; Altitude=50
            Folder Management
              Operations Sowing
              Operations NRate
                2021-04-16  [Fertiliser].Apply(amount: 100, type: "UreaN", depth: 10)
                2021-08-10  [Fertiliser].Apply(amount: 30, type: "UreaN", depth: 10)
                2021-10-14  [Fertiliser].Apply(amount: 100, type: "UreaN", depth: 10)
                2021-12-22  [Fertiliser].Apply(amount: 61, type: "UreaN", depth: 10)
                2022-01-20  [Fertiliser].Apply(amount: 46, type: "UreaN", depth: 10)
                2022-04-14  [Fertiliser].Apply(amount: 30, type: "UreaN", depth: 10)
                2022-05-24  [Fertiliser].Apply(amount: 17, type: "UreaN", depth: 10)
                2022-07-04  [Fertiliser].Apply(amount: 100, type: "DAP", depth: 10)
                2022-09-08  [Fertiliser].Apply(amount: 41, type: "UreaN", depth: 10)
                2022-10-13  [Fertiliser].Apply(amount: 30, type: "UreaN", depth: 10)
                2022-12-02  [Fertiliser].Apply(amount: 45, type: "UreaN", depth: 10)
                2023-02-20  [Fertiliser].Apply(amount: 60, type: "UreaN", depth: 10)
                2023-04-12  [Fertiliser].Apply(amount: 52, type: "UreaN", depth: 10)
                2023-08-28  [Fertiliser].Apply(amount: 26, type: "UreaN", depth: 10)
                2023-09-04  [Fertiliser].Apply(amount: 100, type: "DAP", depth: 10)
              Manager DefoliationManager: same as Evaluation.NewZealand.FRNLRuakuraMix2.FRNLRuakuraMix2.Field.Management.DefoliationManager
              Operations DefoliationSchedule: same as Evaluation.NewZealand.SFFFKerikeriMix.Factors.Sowing.0-PR.DefoliationSchedule
              Manager ExtraVariables
                script: same as in Evaluation.NewZealand.FRNLRuakuraMix1.FRNLRuakuraMix1.Field.Management.ExtraVariables
              Manager SettingUpParams
                setParamStartDate = 12/01/2021 00:00:00
                setParamHeight = 250
                script: same as in Evaluation.NewZealand.FRNLRuakuraMix2.FRNLRuakuraMix2.Field.Management.SettingUpParams
            MicroClimate: a_interception=0; b_interception=1; c_interception=0; d_interception=0; SoilHeatFluxFraction=0.4; MinimumHeightDiffForNewLayer=0; NightInterceptionFraction=0.5; ReferenceHeight=2
            Irrigation
            Fertiliser
            SurfaceOrganicMatter: InitialResidueName=grass; InitialResidueType=grass; InitialResidueMass=500; InitialStandingFraction=0; InitialCPR=0; InitialCNR=40
            Soil: SoilType=Typic Udivitrand (US), Typic Orthic Allophanic Soil (NZ); LocalName=Horotiu Silt Loam; Site=Ruakura; NearestTown=Hamilton; Region=Waikato; Country=New Zealand; Latitude=0; Longitude=0
              DataSource=Based primarily on data from Close et al (2003), complemented with NZ NSD.
              Physical
                Thickness  ParticleSizeSand  ParticleSizeSilt  ParticleSizeClay  Rocks     BD     AirDry  LL15   DUL    SAT    KS
                200        28                52                20                0         0.88   0.07    0.22   0.421  0.587  507.8
                200        28.525            52.975            18.5              0         0.85   0.21    0.219  0.327  0.623  4445.1
                130        31.15             57.85             11                0         1.009  0.177   0.177  0.314  0.572  7262
                140        32.725            60.775            6.5               0         1.055  0.139   0.139  0.291  0.536  11928
                380        33.215            61.685            5.1               0         1.055  0.125   0.125  0.182  0.504  25031
                230        33.67             62.53             3.8               0.309269  0.839  0.102   0.102  0.123  0.439  28410.4
                220        34.16             63.44             2.4               0.470918  0.695  0.083   0.083  0.101  0.363  42658.3
                Rocks, ParticleSizeSand, ParticleSizeSilt source: Calculated
                SoilCrop PlantainForageSoil: LL=[0.22, 0.219, 0.177, 0.139, 0.125, 0.102, 0.083]; KL=[0.08, 0.07, 0.05, 0.03, 0.01, 0.003, 0]; XF=[1, 1, 1, 1, 1, 1, 1]
                SoilCrop AGPRyegrassSoil: LL=[0.22, 0.219, 0.177, 0.139, 0.125, 0.102, 0.083]; KL=[0.1, 0.085, 0.055, 0.02, 0.005, 0, 0]; XF=[1, 1, 1, 1, 1, 1, 1]
                SoilCrop WhiteCloverSoil: LL=[0.22, 0.219, 0.177, 0.139, 0.125, 0.102, 0.083]; KL=[0.085, 0.077, 0.04, 0.01, 0.001, 0, 0]; XF=[1, 1, 1, 1, 1, 1, 1]
                SoilCrop AGPWhiteCloverSoil: LL=[0.22, 0.219, 0.177, 0.139, 0.125, 0.102, 0.083]; KL=[0.085, 0.05, 0, 0, 0, 0, 0]; XF=[1, 1, 1, 1, 1, 1, 1]
                SoilCrop LucerneSoil: LL=[0.22, 0.219, 0.177, 0.139, 0.125, 0.102, 0.083]; KL=[0.06, 0.05, 0.035, 0.025, 0.015, 0.01, 0.01]; XF=[1, 1, 1, 1, 1, 1, 1]
                SoilCrop AGPTallFescueSoil: LL=[0.22, 0.219, 0.177, 0.139, 0.125, 0.102, 0.083]; KL=[0.1, 0.085, 0.055, 0.02, 0.005, 0, 0]; XF=[1, 1, 1, 1, 1, 1, 1]
                SoilCrop ChicorySoil: LL=[0.22, 0.219, 0.177, 0.139, 0.125, 0.102, 0.083]; KL=[0.07, 0.058, 0.038, 0.025, 0.01, 0.004, 0.002]; XF=[1, 1, 1, 1, 1, 1, 1]
              WaterBalance SoilWater: same as Evaluation.NewZealand.FRNLRuakuraMix1.FRNLRuakuraMix1.Field.Soil.SoilWater
              Organic: same as Evaluation.NewZealand.FRNLRuakuraMix1.FRNLRuakuraMix1.Field.Soil.Organic
              Chemical: PHUnits=Water
                Thickness  PH  CEC
                200        6   25.216
                200        6   11.080675
                130        6   7.11655
                140        6   4.89558
                380        6   3.879605
                230        6   3.49549
                220        6   3.08702
                CEC source: Calculated
              Nutrient
              Water: Thickness=[200, 200, 130, 140, 380, 230, 220]; InitialValues=[0.4009, 0.3162, 0.3003, 0.2758, 0.1763, 0.1209, 0.0992]; FilledFromTop=false
              Solute NO3: same as Evaluation.NewZealand.FRNLRuakuraMix1.FRNLRuakuraMix1.Field.Soil.NO3
              Solute NH4: same as Evaluation.NewZealand.FRNLRuakuraMix1.FRNLRuakuraMix1.Field.Soil.NH4
              Solute Urea: same as Evaluation.NewZealand.FRNLRuakuraMix1.FRNLRuakuraMix1.Field.Soil.Urea
              SoilTemperature Temperature
            Plant Chicory
            Plant PlantainForage
            PastureSpecies AGPRyegrass: doyGermination=275; daysEmergenceToAnthesis=120; daysAnthesisToMaturity=85; degreesDayForAnthesis=1100; degreesDayForMaturity=900; daysAnnualsFactor=45; CanopyType=PastureSpecies; InitialShootDM=0; InitialRootDM=0; InitialRootDepth=0; initialDMFractionsGrasses=[0.15, 0.25, 0.25, 0.05, 0.05, 0.1, 0.1, 0.05, 0, 0, 0]; initialDMFractionsForbs=[0.2, 0.2, 0.15, 0.05, 0.1, 0.15, 0.1, 0.05, 0, 0, 0]; PhotosyntheticEfficiency=0.01; PhotosynthesisCurveFactor=0.8; FractionPAR=0.5; ReferenceCO2=380; CO2EffectScaleFactor=700; CO2EffectOffsetFactor=600; CO2EffectMinimum=0.7; CO2EffectExponent=2; ReproSeasonDurationCoeff=2; ReproSeasonShouldersLengthFactor=1; ReproSeasonOnsetDurationFactor=0.6; RelativeTurnoverEmerging=2; DetachmentDroughtCoefficient=3; DetachmentDroughtEffectMin=0.1; TurnoverStockFactor=0.01; TurnoverDefoliationEffectMin=0.025; MinimumGreenLeafProp=0.8; MinimumGreenRootProp=0.5
              initialDMFractionsLegumes=[0.16, 0.23, 0.22, 0.05, 0.03, 0.05, 0.05, 0.01, 0.04, 0.08, 0.08]
              LinearInterpolationFunction FVPDFunction
            PastureSpecies AGPWhiteClover: doyGermination=275; daysEmergenceToAnthesis=120; daysAnthesisToMaturity=85; degreesDayForAnthesis=1100; degreesDayForMaturity=900; daysAnnualsFactor=45; CanopyType=PastureSpecies; InitialShootDM=0; InitialRootDM=0; InitialRootDepth=0; initialDMFractionsGrasses=[0.15, 0.25, 0.25, 0.05, 0.05, 0.1, 0.1, 0.05, 0, 0, 0]; initialDMFractionsForbs=[0.2, 0.2, 0.15, 0.05, 0.1, 0.15, 0.1, 0.05, 0, 0, 0]; PhotosyntheticEfficiency=0.01; PhotosynthesisCurveFactor=0.8; FractionPAR=0.5; ReferenceCO2=380; CO2EffectScaleFactor=700; CO2EffectOffsetFactor=600; CO2EffectMinimum=0.7; CO2EffectExponent=2; ReproSeasonDurationCoeff=2; ReproSeasonShouldersLengthFactor=1; ReproSeasonOnsetDurationFactor=0.6; RelativeTurnoverEmerging=2; DetachmentDroughtCoefficient=3; DetachmentDroughtEffectMin=0.1; TurnoverStockFactor=0.01; TurnoverDefoliationEffectMin=0.025; MinimumGreenLeafProp=0.8; MinimumGreenRootProp=0.5
              initialDMFractionsLegumes=[0.16, 0.23, 0.22, 0.05, 0.03, 0.05, 0.05, 0.01, 0.04, 0.08, 0.08]
              LinearInterpolationFunction FVPDFunction
            PastureSpecies AGPTallFescue: doyGermination=275; daysEmergenceToAnthesis=120; daysAnthesisToMaturity=85; degreesDayForAnthesis=1100; degreesDayForMaturity=900; daysAnnualsFactor=45; CanopyType=PastureSpecies; InitialShootDM=0; InitialRootDM=0; InitialRootDepth=0; initialDMFractionsGrasses=[0.15, 0.25, 0.25, 0.05, 0.05, 0.1, 0.1, 0.05, 0, 0, 0]; initialDMFractionsForbs=[0.2, 0.2, 0.15, 0.05, 0.1, 0.15, 0.1, 0.05, 0, 0, 0]; PhotosyntheticEfficiency=0.01; PhotosynthesisCurveFactor=0.8; FractionPAR=0.5; ReferenceCO2=380; CO2EffectScaleFactor=700; CO2EffectOffsetFactor=600; CO2EffectMinimum=0.7; CO2EffectExponent=2; ReproSeasonDurationCoeff=2; ReproSeasonShouldersLengthFactor=1; ReproSeasonOnsetDurationFactor=0.6; RelativeTurnoverEmerging=2; DetachmentDroughtCoefficient=3; DetachmentDroughtEffectMin=0.1; TurnoverStockFactor=0.01; TurnoverDefoliationEffectMin=0.025; MinimumGreenLeafProp=0.8; MinimumGreenRootProp=0.5
              initialDMFractionsLegumes=[0.16, 0.23, 0.22, 0.05, 0.03, 0.05, 0.05, 0.01, 0.04, 0.08, 0.08]
              LinearInterpolationFunction FVPDFunction
            Report: same as Evaluation.NewZealand.FRNLRuakuraMix2.FRNLRuakuraMix2.Field.Report
      Experiment SFFFWaikatoAllophanicMix
        DisabledSimNames=[FRNLRuakuraNRate50, FRNLRuakuraNRate100, FRNLRuakuraNRate200, FRNLRuakuraNRate350]
        Memo
          ###SFFF Waikato###

          This simulation setup was based on field trials performed at DairyNZ's Scott Farm, in Ruakura, New Zealand, between 2014 and 2016.  The experiment was part of the FRNL (Forages for Reduced Nitrogen Leaching) program and the data is basically unpublished (references will be added when they come about).  Here only plots with mixed pasture species are used.  The species included were ryegrass, white clover, lucerne, chicory, and plantain (weeds also occured, but are not included in the simulation - the fraction of biomass was fairly small).
          The experiment consisted of six fertiliser treatments (nominally at N rates of 0, 50, 100, 200, 350 and 500 kg/ha/yr) in three replicates; actual amounts varied as fertiliser applications followed pasture harvests.  Measurements comprised yield, for each species, and quality indicators (here N content is used), for whole sward.
          Observed data supplied by Grant Edwards, Lincoln University.

          The soil at the experimental site was a Horotiu silt loam (an Orthic Allophanic soil; USDA: Typic Udivitrand), the parameters required were inferred using data from the New Zealand National Soils Database (Landcare Research).
          Weather data was obtained from nearby Ruakura weather station (NIWA).
          Simulation of ryegrass and lucerne are done using the AgPasture model as the PMF versions are still under development.
        Factors
          Factor Sowing
            CompositeFactor 0-PR
              Specifications:
                [Sowing]
                [DefoliationSchedule]
              Operations Sowing
                2021-04-01  [AGPWhiteClover].EndCrop()
                2021-04-01  [AGPRyegrass].EndCrop()
                2021-04-01  [AGPTallFescue].EndCrop()
                2021-04-08  [AGPRyegrass].Sow(population: 0, cultivar: "R", depth: 0, rowSpacing: 0)
              Operations DefoliationSchedule: same as Evaluation.NewZealand.SFFFKerikeriMix.Factors.Sowing.0-PR.DefoliationSchedule
            CompositeFactor 100-P
              Specifications:
                [Sowing]
                [DefoliationSchedule]
              Operations Sowing
                2021-04-01  [AGPWhiteClover].EndCrop()
                2021-04-01  [AGPRyegrass].EndCrop()
                2021-04-01  [AGPTallFescue].EndCrop()
                2021-04-08  [PlantainForage].Sow(population: 100, cultivar: "Tonic", depth: 10, rowSpacing: 150)
              Operations DefoliationSchedule: same as Evaluation.NewZealand.SFFFKerikeriMix.Factors.Sowing.100-P.DefoliationSchedule
            CompositeFactor 15-PR
              Specifications:
                [Sowing]
                [DefoliationSchedule]
              Operations Sowing
                2021-04-01  [AGPWhiteClover].EndCrop()
                2021-04-01  [AGPRyegrass].EndCrop()
                2021-04-01  [AGPTallFescue].EndCrop()
                2021-04-08  [AGPRyegrass].Sow(population: 0, cultivar: "R", depth: 0, rowSpacing: 0)
                2021-04-08  [PlantainForage].Sow(population: 100, cultivar: "Tonic", depth: 10, rowSpacing: 150)
              Operations DefoliationSchedule: same as Evaluation.NewZealand.SFFFKerikeriMix.Factors.Sowing.100-P.DefoliationSchedule
            CompositeFactor 30-HR
              Specifications:
                [Sowing]
                [DefoliationSchedule]
              Operations Sowing
                2021-04-01  [AGPWhiteClover].EndCrop()
                2021-04-01  [AGPRyegrass].EndCrop()
                2021-04-01  [AGPTallFescue].EndCrop()
                2021-04-08  [PlantainForage].Sow(population: 30, cultivar: "Tonic", depth: 10, rowSpacing: 150)
                2021-04-08  [AGPRyegrass].Sow(population: 70, cultivar: "R", depth: 0, rowSpacing: 0)
              Operations DefoliationSchedule: same as Evaluation.NewZealand.SFFFKerikeriMix.Factors.Sowing.100-P.DefoliationSchedule
            CompositeFactor 30-IR: same as Evaluation.NewZealand.SFFFWaikatoAllophanicMix.Factors.Sowing.15-PR
            CompositeFactor 30-PR
              Specifications:
                [Sowing]
                [DefoliationSchedule]
              Operations Sowing
                2021-04-01  [AGPWhiteClover].EndCrop()
                2021-04-01  [AGPRyegrass].EndCrop()
                2021-04-01  [AGPTallFescue].EndCrop()
                2021-04-08  [PlantainForage].Sow(population: 100, cultivar: "Tonic", depth: 10, rowSpacing: 150)
                2021-04-08  [AGPRyegrass].Sow(population: 0, cultivar: "R", depth: 0, rowSpacing: 0)
              Operations DefoliationSchedule: same as Evaluation.NewZealand.SFFFKerikeriMix.Factors.Sowing.100-P.DefoliationSchedule
            CompositeFactor 30-PRWC
              Specifications:
                [Sowing]
                [DefoliationSchedule]
              Operations Sowing
                2021-04-01  [AGPWhiteClover].EndCrop()
                2021-04-01  [AGPRyegrass].EndCrop()
                2021-04-01  [AGPTallFescue].EndCrop()
                2021-04-08  [PlantainForage].Sow(population: 100, cultivar: "Tonic", depth: 10, rowSpacing: 150)
                2021-04-08  [AGPRyegrass].Sow(population: 0, cultivar: "R", depth: 0, rowSpacing: 0)
                2021-04-08  [AGPWhiteClover].Sow(population: 0, cultivar: "W", depth: 0, rowSpacing: 0)
              Operations DefoliationSchedule: same as Evaluation.NewZealand.SFFFKerikeriMix.Factors.Sowing.100-P.DefoliationSchedule
            CompositeFactor 30-TF
              Specifications:
                [Sowing]
                [DefoliationSchedule]
              Operations Sowing
                2021-04-01  [AGPWhiteClover].EndCrop()
                2021-04-01  [AGPRyegrass].EndCrop()
                2021-04-01  [AGPTallFescue].EndCrop()
                2021-04-08  [PlantainForage].Sow(population: 100, cultivar: "Tonic", depth: 10, rowSpacing: 150)
                2021-04-08  [AGPTallFescue].Sow(population: 0, cultivar: "R", depth: 0, rowSpacing: 0)
              Operations DefoliationSchedule: same as Evaluation.NewZealand.SFFFKerikeriMix.Factors.Sowing.100-P.DefoliationSchedule
            CompositeFactor 30-TR: same as Evaluation.NewZealand.SFFFWaikatoAllophanicMix.Factors.Sowing.30-PR
            CompositeFactor 50-PR: same as Evaluation.NewZealand.SFFFWaikatoAllophanicMix.Factors.Sowing.30-PR
        Simulation WaikatoMixAllophanic
          Clock: Start=2021-04-01; End=2024-06-20
          Weather: FileName=Ruakura.met
          Summary summaryfile
          SoilArbitrator Soil Arbitrator
          Forages: same as Evaluation.NewZealand.SFFFKerikeriMix.KerikeriMix.Forages
          Zone Field: Area=1; Slope=0; AspectAngle=0; Altitude=50
            Folder Management
              Operations Sowing
              Operations NRate
                2021-04-13  [Fertiliser].Apply(amount: 200, type: "DAP", depth: 10)
                2021-06-09  [Fertiliser].Apply(amount: 194, type: "UreaN", depth: 10)
                2021-12-16  [Fertiliser].Apply(amount: 150, type: "UreaN", depth: 10)
                2022-03-28  [Fertiliser].Apply(amount: 25, type: "UreaN", depth: 10)
                2022-05-16  [Fertiliser].Apply(amount: 80, type: "UreaN", depth: 10)
                2022-05-26  [Fertiliser].Apply(amount: 55, type: "UreaN", depth: 10)
                2022-08-09  [Fertiliser].Apply(amount: 67.5, type: "UreaN", depth: 10)
                2022-10-10  [Fertiliser].Apply(amount: 35, type: "UreaN", depth: 10)
                2022-12-21  [Fertiliser].Apply(amount: 68.5, type: "UreaN", depth: 10)
                2023-02-12  [Fertiliser].Apply(amount: 125, type: "UreaN", depth: 10)
                2023-03-21  [Fertiliser].Apply(amount: 75, type: "UreaN", depth: 10)
                2023-07-11  [Fertiliser].Apply(amount: 110, type: "UreaN", depth: 10)
                2023-09-08  [Fertiliser].Apply(amount: 140, type: "UreaN", depth: 10)
                2023-10-13  [Fertiliser].Apply(amount: 97, type: "UreaN", depth: 10)
                2024-03-22  [Fertiliser].Apply(amount: 81, type: "UreaN", depth: 10)
              Manager DefoliationManager: same as Evaluation.NewZealand.FRNLRuakuraMix2.FRNLRuakuraMix2.Field.Management.DefoliationManager
              Operations DefoliationSchedule
              Manager ExtraVariables
                script: same as in Evaluation.NewZealand.FRNLRuakuraMix1.FRNLRuakuraMix1.Field.Management.ExtraVariables
              Manager SettingUpParams: same as Evaluation.NewZealand.FRNLRuakuraMix2.FRNLRuakuraMix2.Field.Management.SettingUpParams
            MicroClimate: a_interception=0; b_interception=1; c_interception=0; d_interception=0; SoilHeatFluxFraction=0.4; MinimumHeightDiffForNewLayer=0; NightInterceptionFraction=0.5; ReferenceHeight=2
            Irrigation
            Fertiliser
            SurfaceOrganicMatter: InitialResidueName=grass; InitialResidueType=grass; InitialResidueMass=500; InitialStandingFraction=0; InitialCPR=0; InitialCNR=40
            Soil: SoilType=Typic Udivitrand (US), Typic Orthic Allophanic Soil (NZ); LocalName=Horotiu Silt Loam; Site=Ruakura; NearestTown=Hamilton; Region=Waikato; Country=New Zealand; Latitude=-37.9164; Longitude=175.195
              DataSource=Based primarily on data from Close et al (2003), complemented with NZ NSD.
              Physical
                Thickness  ParticleSizeSand  ParticleSizeSilt  ParticleSizeClay  Rocks     BD    AirDry  LL15   DUL    SAT     KS
                100        28                52                20                0         0.83  0.07    0.248  0.535  0.6344  507.8
                100        28.525            52.975            18.5              0         0.76  0.21    0.225  0.499  0.6825  4445.1
                100        31.15             57.85             11                0         0.64  0.177   0.345  0.49   0.727   7262
                100        32.725            60.775            6.5               0         0.64  0.139   0.308  0.501  0.7028  11928
                200        33.215            61.685            5.1               0         0.63  0.125   0.345  0.5    0.7051  25031
                200        33.67             62.53             3.8               0.309269  0.69  0.102   0.252  0.498  0.7291  28410.4
                200        34.16             63.44             2.4               0.470918  0.74  0.083   0.333  0.511  0.6983  42658.3
                Rocks, ParticleSizeSand, ParticleSizeSilt source: Calculated
                SoilCrop PlantainForageSoil: LL=[0.22, 0.219, 0.177, 0.139, 0.125, 0.102, 0.083]; KL=[0.08, 0.07, 0.05, 0.03, 0.01, 0.003, 0]; XF=[1, 1, 1, 1, 1, 1, 1]
                SoilCrop AGPRyegrassSoil: LL=[0.22, 0.219, 0.177, 0.139, 0.125, 0.102, 0.083]; KL=[0.1, 0.085, 0.055, 0.02, 0.005, 0, 0]; XF=[1, 1, 1, 1, 1, 1, 1]
                SoilCrop WhiteCloverSoil: LL=[0.22, 0.219, 0.177, 0.139, 0.125, 0.102, 0.083]; KL=[0.085, 0.077, 0.04, 0.01, 0.001, 0, 0]; XF=[1, 1, 1, 1, 1, 1, 1]
                SoilCrop AGPWhiteCloverSoil: LL=[0.22, 0.219, 0.177, 0.139, 0.125, 0.102, 0.083]; KL=[0.085, 0.05, 0, 0, 0, 0, 0]; XF=[1, 1, 1, 1, 1, 1, 1]
                SoilCrop LucerneSoil: same as Evaluation.NewZealand.SFFFKerikeriMix.KerikeriMix.Field.Soil.Physical.LucerneSoil
                SoilCrop AGPTallFescueSoil: LL=[0.22, 0.219, 0.177, 0.139, 0.125, 0.102, 0.083]; KL=[0.1, 0.085, 0.055, 0.02, 0.005, 0, 0]; XF=[1, 1, 1, 1, 1, 1, 1]
                SoilCrop ChicorySoil: same as Evaluation.NewZealand.SFFFKerikeriMix.KerikeriMix.Field.Soil.Physical.ChicorySoil
              WaterBalance SoilWater: SummerDate=1-Oct; SummerU=9; SummerCona=4; WinterDate=1-Apr; WinterU=6; WinterCona=3; DiffusConst=88; DiffusSlope=35; Salb=0.15; CN2Bare=70; CNRed=20; CNCov=0.8; DischargeWidth=0; CatchmentArea=0; PSIDul=-100; Thickness=[100, 100, 100, 100, 200, 200, 200]; SWCON=[0.48, 0.59, 0.61, 0.6, 0.63, 0.7, 0.71]
              Organic: FOMCNRatio=40; CarbonUnits=Total
                Thickness  Carbon  SoilCNRatio  FBiom  FInert  FOM
                100        8       12.5         0.075  0.7     338.974
                100        1.88    12.5         0.013  0.79    227.221
                100        0.93    12.5         0.009  0.9     175.199
                100        0.43    12.5         0.008  0.94    132.413
                200        0.13    12.5         0.007  0.96    61.9249
                200        0.1     12.5         0.005  0.99    39.0922
                200        0.07    12.5         0.005  0.995   25.1768
              Chemical: PHUnits=Water
                Thickness  PH  CEC
                100        6   25.216
                100        6   11.080675
                100        6   7.11655
                100        6   4.89558
                200        6   3.879605
                200        6   3.49549
                200        6   3.08702
                CEC source: Calculated
              Nutrient
              Water: Thickness=[100, 100, 100, 100, 200, 200, 200]; InitialValues=[0.535, 0.499, 0.49, 0.501, 0.5, 0.498, 0.4825]; FilledFromTop=true
              Solute NO3: Thickness=[100, 100, 100, 100, 200, 200, 220]; InitialValuesUnits=ppm; WaterTableConcentration=0; D0=0; DepthConstant=0; MaxDepthSoluteAccessible=0; RunoffEffectivenessAtMovingSolute=0; MaxEffectiveRunoff=0
                InitialValues=[8.52273, 4.11765, 0.797423, 0.797423, 0.798126, 0.80277, 0.80277]
              Solute NH4: Thickness=[100, 100, 100, 100, 200, 200, 200]; InitialValuesUnits=ppm; WaterTableConcentration=0; D0=0; DepthConstant=0; MaxDepthSoluteAccessible=0; RunoffEffectivenessAtMovingSolute=0; MaxEffectiveRunoff=0
                InitialValues=[0.5, 0.2, 0.097239, 0.097239, 0.100377, 0.121085, 0.121085]
              Solute Urea: Thickness=[100, 100, 100, 100, 200, 200, 200]; InitialValues=[0, 0, 0, 0, 0, 0, 0]; InitialValuesUnits=kg/ha; WaterTableConcentration=0; D0=0; DepthConstant=0; MaxDepthSoluteAccessible=0; RunoffEffectivenessAtMovingSolute=0; MaxEffectiveRunoff=0
              SoilTemperature Temperature
            Plant Chicory
            Plant PlantainForage
            PastureSpecies AGPRyegrass: same as Evaluation.NewZealand.SFFFKerikeriMix.KerikeriMix.Field.AGPRyegrass
            PastureSpecies AGPWhiteClover: same as Evaluation.NewZealand.SFFFKerikeriMix.KerikeriMix.Field.AGPWhiteClover
            PastureSpecies AGPTallFescue: same as Evaluation.NewZealand.SFFFKerikeriMix.KerikeriMix.Field.AGPTallFescue
            Report: EventNames=[Clock].DoReport
              VariableNames:
                [Clock].Today as Date
                [Clock].Today.DayOfYear as DayOfYear
                [Weather].Radn as SolarRadiation
                ([AGPWhiteClover].InterceptedRadn+[AGPRyegrass].InterceptedRadn) as InterceptedRadiation
                [AGPRyegrass].InterceptedRadn as Ryegrass.RadiationIntercepted
                [AGPWhiteClover].InterceptedRadn as WhiteClover.RadiationIntercepted
                [Weather].Rain as Rainfall
                [Irrigation].IrrigationApplied as IrrigationApplied
                [MicroClimate].PrecipitationInterception as PrecipitationInterception
                [MicroClimate].PetTotal
                [Soil].SoilWater.Eo as Eo
                [Soil].SoilWater.Es as Evaporation
                (sum([AGPWhiteClover].WaterUptake)+sum([AGPRyegrass].WaterUptake))) as Transpiration
                [Soil].SoilWater.pond as PondedWater
                [Soil].SoilWater.Drainage as Drainage
                [Soil].SoilWater.Runoff as Runoff
                sum([Soil].SoilWater.LateralOutflow) as LateralFlow
                sum([Soil].Water.MM) as TotalSWC
                sum([Soil].Physical.DULmm) as TotalDUL
                sum([Soil].Physical.LL15mm) as TotalLL15
                [Soil].Water.Volumetric[1] as SWCTopLayer
                [Soil].Physical.DUL[1] as DULTopLayer
                [Fertiliser].NitrogenApplied as FertiliserN
                sum([Soil].Nutrient.DenitrifiedN) as DenitrifiedN
                ([Soil].SoilWater.LeachNH4 + [Soil].SoilWater.LeachNO3) as LeachedN
                ([AGPWhiteClover].SoilUptakeN+[AGPRyegrass].SoilUptakeN) as UptakeN
                sum([Soil].Nutrient.MineralisedN) as MineralisedSoilN
                sum([SurfaceOrganicMatter].SurfaceResidue.Decomposition.MineralisedN) as MineralisedSurfOMN
                ([AGPWhiteClover].LitterDepositionN*0.1+[AGPRyegrass].LitterDepositionN*0.1) as DetachedAGN
                ([AGPWhiteClover].RootDetachedN*0.1+[AGPRyegrass].RootDetachedN*0.1) as DetachedBGN
                ([AGPWhiteClover].LitterDepositionN+[AGPWhiteClover].RootDetachedN+[AGPRyegrass].LitterDepositionN+[AGPRyegrass].RootDetachedN) as DetachedTotalN
                [AGPWhiteClover].FixedN as FixedN
                (sum([Soil].Urea.kgha) + sum([Soil].NH4.kgha) + sum([Soil].NO3.kgha)) as SoilNContent
                sum([Soil].Urea.kgha) as SoilUrea
                sum([Soil].NH4.kgha) as SoilNH4
                sum([Soil].NO3.kgha) as SoilNO3
                (sum([Soil].NH4.kgha[1:4])+sum([Soil].NO3.kgha[1:4])) as TopSoilN
                [SurfaceOrganicMatter].N as TotalSurfOMN
                sum([Soil].Nutrient.FOM.N) as TotalFOMN
                sum([Soil].Nutrient.Humic.N) as TotalHumicN
                sum([Soil].Nutrient.Microbial.N as TotalMicrobialN
                [DefoliationManager].Script.RotationHarvestedDM as RotationHarvestedWt
                [DefoliationManager].Script.PreHarvestDM
                [DefoliationManager].Script.PostHarvestDM
                [DefoliationManager].Script.DefoliatedN as NTakenOff
                [DefoliationManager].Script.HarvestedN
                (10*[DefoliationManager].Script.RemovedN) as Defoliate.Script.RemovedN
                [DefoliationManager].Script.HarvestedWt as HarvestedWt
                ([DefoliationManager].Script.RemovedN/([DefoliationManager].Script.RemovedWt+0.000001) as RemovedNConc
                [ExtraVariables].Script.AccumHarvestedWt as CumulativeHarvestedWt
                [ExtraVariables].Script.AccumHarvestedN as CumulativeNTakenOff
                ([AGPWhiteClover].HarvestedWt/([AGPRyegrass].HarvestedWt + [AGPWhiteClover].HarvestedWt + 0.000001)) as WhiteClover.HarvestedFraction
                ([AGPRyegrass].HarvestedWt/([AGPRyegrass].HarvestedWt + [AGPWhiteClover].HarvestedWt + 0.000001)) as Ryegrass.HarvestedFraction
                ([AGPWhiteClover].TotalWt+[AGPRyegrass].TotalWt)*0.1 as TotalPlantWt
                ([AGPWhiteClover].AboveGroundLiveWt+[AGPRyegrass].AboveGroundLiveWt+[AGPWhiteClover].BelowGroundWt+[AGPRyegrass].BelowGroundWt)*0.1 as TotalPlantLiveWt
                ([AGPWhiteClover].AboveGroundWt+[AGPRyegrass].AboveGroundWt)*0.1 as AboveGroundWt
                ([AGPWhiteClover].BelowGroundWt+[AGPRyegrass].BelowGroundWt)*0.1 as BelowGroundWt
                ([AGPWhiteClover].TotalN+[AGPRyegrass].TotalN)*0.1 as TotalPlantN
                ([AGPWhiteClover].AboveGroundN+[AGPRyegrass].AboveGroundN)*0.1 as AboveGroundN
                ([AGPWhiteClover].BelowGroundN+[AGPRyegrass].BelowGroundN)*0.1 as BelowGroundN
                (([AGPWhiteClover].AboveGroundN+[AGPRyegrass].AboveGroundN)/([AGPWhiteClover].AboveGroundWt+[AGPRyegrass].AboveGroundWt+0.000001)) as AboveGroundNConc
                (([AGPWhiteClover].BelowGroundN+[AGPRyegrass].BelowGroundN)/([AGPWhiteClover].BelowGroundWt+[AGPRyegrass].BelowGroundWt+0.000001)) as BelowGroundNConc
                ([AGPWhiteClover].AboveGroundLiveWt+[AGPRyegrass].AboveGroundLiveWt)*0.1 as AboveGroundLiveWt
                ([AGPWhiteClover].AboveGroundLiveN+[AGPRyegrass].AboveGroundLiveN)*0.1 as AboveGroundDeadWt
                ([AGPWhiteClover].BelowGroundWt+[AGPRyegrass].BelowGroundWt)*0.1 as BelowGroundLiveWt
                (([AGPWhiteClover].AboveGroundLiveN+[AGPRyegrass].AboveGroundLiveN)/([AGPWhiteClover].AboveGroundLiveWt+[AGPRyegrass].AboveGroundLiveWt+0.000001)) as AboveGroundLiveNc
                [ExtraVariables].Script.HerbageNConc as HerbageNConc
                ([AGPRyegrass].TotalWt*0.1) as Ryegrass.Total.Wt
                ([AGPRyegrass].AboveGroundLiveWt*0.1+[AGPRyegrass].BelowGroundWt*0.1) as Ryegrass.TotalLive.Wt
                ([AGPRyegrass].AboveGroundWt*0.1) as Ryegrass.AboveGround.Wt
                ([AGPRyegrass].BelowGroundWt*0.1) as Ryegrass.BelowGround.Wt
                ([AGPRyegrass].AboveGroundLiveWt*0.1) as Ryegrass.AboveGroundLive.Wt
                ([AGPRyegrass].AboveGroundDeadWt*0.1) as Ryegrass.AboveGroundDead.Wt
                ([AGPRyegrass].BelowGroundWt*0.1) as Ryegrass.BelowGroundLive.Wt
                ([AGPRyegrass].TotalN*0.1) as Ryegrass.Total.N
                ([AGPRyegrass].AboveGroundN*0.1) as Ryegrass.AboveGround.N
                ([AGPRyegrass].BelowGroundN*0.1) as Ryegrass.BelowGround.N
                [AGPRyegrass].AboveGroundNConc as Ryegrass.AboveGround.NConc
                ([AGPRyegrass].BelowGroundN/([AGPRyegrass].BelowGroundWt+0.000001)) as Ryegrass.BelowGround.NConc
                ([AGPRyegrass].AboveGroundLiveN/([AGPRyegrass].AboveGroundLiveWt+0.000001)) as Ryegrass.AboveGroundLive.NConc
                ([AGPWhiteClover].TotalWt*0.1) as WhiteClover.Total.Wt
                ([AGPWhiteClover].AboveGroundLiveWt*0.1+[AGPWhiteClover].BelowGroundWt*0.1) as WhiteClover.TotalLive.Wt
                ([AGPWhiteClover].AboveGroundWt*0.1) as WhiteClover.AboveGround.Wt
                ([AGPWhiteClover].BelowGroundWt*0.1) as WhiteClover.BelowGround.Wt
                ([AGPWhiteClover].AboveGroundLiveWt*0.1) as WhiteClover.AboveGroundLive.Wt
                ([AGPWhiteClover].AboveGroundDeadWt*0.1) as WhiteClover.AboveGroundDead.Wt
                ([AGPWhiteClover].BelowGroundWt*0.1) as WhiteClover.BelowGroundLive.Wt
                ([AGPWhiteClover].TotalN*0.1) as WhiteClover.Total.N
                ([AGPWhiteClover].AboveGroundN*0.1) as WhiteClover.AboveGround.N
                ([AGPWhiteClover].BelowGroundN*0.1) as WhiteClover.BelowGround.N
                [AGPWhiteClover].AboveGroundNConc as WhiteClover.AboveGround.NConc
                ([AGPWhiteClover].BelowGroundN/([AGPWhiteClover].BelowGroundWt+0.000001)) as WhiteClover.BelowGround.NConc
                ([AGPWhiteClover].AboveGroundLiveN/([AGPWhiteClover].AboveGroundLiveWt+0.000001)) as WhiteClover.AboveGroundLive.NConc
                ([AGPWhiteClover].CoverTotal+[AGPRyegrass].CoverTotal) as CoverTotal
                ([AGPWhiteClover].CoverDead+[AGPRyegrass].CoverDead) as CoverDead
                [MicroClimate].CanopyCover
                ([AGPWhiteClover].LAIGreen+[AGPRyegrass].LAIGreen) as LAIgreen
                ([AGPWhiteClover].LAIDead+[AGPRyegrass].LAIDead) as LAIdead
                (([AGPWhiteClover].Height+[AGPRyegrass].Height)/2) as AverageShootHeight
                (([AGPWhiteClover].RootDepth+[AGPRyegrass].RootDepth)/2) as AverageRootDepth
                ([AGPWhiteClover].Root.LengthDensity+[AGPRyegrass].Root.LengthDensity) as Total.RootLengthDensity
                ([AGPWhiteClover].AboveGroundWt/([AGPWhiteClover].AboveGroundWt+[AGPRyegrass].AboveGroundWt+0.000001)) as WhiteClover.BiomassFraction
                ([AGPRyegrass].AboveGroundWt/([AGPWhiteClover].AboveGroundWt+[AGPRyegrass].AboveGroundWt+0.000001)) as Ryegrass.BiomassFraction
                ([AGPWhiteClover].AboveGroundLiveWt/([AGPWhiteClover].BelowGroundWt+0.000001)) as WhiteClover.ShootRootRatio
                ([AGPWhiteClover].AboveGroundLiveWt/([AGPWhiteClover].AboveGroundLiveWt+[AGPWhiteClover].BelowGroundWt+0.000001)) as WhiteClover.CurrentAboveGroundFraction
                ([AGPRyegrass].AboveGroundLiveWt/([AGPRyegrass].BelowGroundWt+0.000001)) as Ryegrass.ShootRootRatio
                ([AGPRyegrass].AboveGroundLiveWt/([AGPRyegrass].AboveGroundLiveWt+[AGPRyegrass].BelowGroundWt+0.000001)) as Ryegrass.CurrentAboveGroundFraction
                [AGPRyegrass].CoverTotal as Ryegrass.CoverTotal
                [AGPWhiteClover].CoverTotal as WhiteClover.CoverTotal
                [AGPRyegrass].Height as Ryegrass.Height
                [AGPWhiteClover].Height as WhiteClover.Height
                [AGPRyegrass].LAI as Ryegrass.LAI
                [AGPWhiteClover].LAI as WhiteClover.LAI
                [AGPRyegrass].RootDepth as Ryegrass.Root.Depth
                [AGPWhiteClover].RootDepth as WhiteClover.Root.Depth
                [AGPRyegrass].GlfNSupply
                [AGPRyegrass].GlfWaterSupply
                [AGPRyegrass].GlfWaterLogging
                [AGPRyegrass].GlfNContent
                [AGPRyegrass].GlfCO2
                [AGPRyegrass].GlfTemperature
                [AGPRyegrass].GlfColdDamage
                [AGPRyegrass].GlfHeatDamage
                [AGPWhiteClover].GlfNSupply
                [AGPWhiteClover].GlfWaterSupply
                [AGPWhiteClover].GlfWaterLogging
                [AGPWhiteClover].GlfNContent
                [AGPWhiteClover].GlfCO2
                [AGPWhiteClover].GlfTemperature
                [AGPWhiteClover].GlfColdDamage
                [AGPWhiteClover].GlfHeatDamage
      Experiment SFFFWaikatoGleyMix
        DisabledSimNames=[FRNLRuakuraNRate50, FRNLRuakuraNRate100, FRNLRuakuraNRate200, FRNLRuakuraNRate350]
        Memo: same as Evaluation.NewZealand.SFFFWaikatoAllophanicMix.Memo
        Factors
          Factor Sowing
            CompositeFactor 0-PR: same as Evaluation.NewZealand.SFFFWaikatoAllophanicMix.Factors.Sowing.0-PR
            CompositeFactor 100-P
              Specifications:
                [Sowing]
                [DefoliationSchedule]
                [SettingUpParams]
              Operations Sowing: same as Evaluation.NewZealand.SFFFWaikatoAllophanicMix.Factors.Sowing.100-P.Sowing
              Operations DefoliationSchedule: same as Evaluation.NewZealand.SFFFKerikeriMix.Factors.Sowing.100-P.DefoliationSchedule
              Manager SettingUpParams
                setParamStartDate = 04/15/2021 00:00:00
                setParamHeight = 0
                script: same as in Evaluation.NewZealand.FRNLRuakuraMix2.FRNLRuakuraMix2.Field.Management.SettingUpParams
            CompositeFactor 15-PR: same as Evaluation.NewZealand.SFFFWaikatoAllophanicMix.Factors.Sowing.15-PR
            CompositeFactor 30-HR: same as Evaluation.NewZealand.SFFFWaikatoAllophanicMix.Factors.Sowing.30-HR
            CompositeFactor 30-IR: same as Evaluation.NewZealand.SFFFWaikatoAllophanicMix.Factors.Sowing.15-PR
            CompositeFactor 30-PR: same as Evaluation.NewZealand.SFFFWaikatoAllophanicMix.Factors.Sowing.30-PR
            CompositeFactor 30-PRWC: same as Evaluation.NewZealand.SFFFWaikatoAllophanicMix.Factors.Sowing.30-PRWC
            CompositeFactor 30-TF: same as Evaluation.NewZealand.SFFFWaikatoAllophanicMix.Factors.Sowing.30-TF
            CompositeFactor 30-TR: same as Evaluation.NewZealand.SFFFWaikatoAllophanicMix.Factors.Sowing.30-PR
            CompositeFactor 50-PR: same as Evaluation.NewZealand.SFFFWaikatoAllophanicMix.Factors.Sowing.30-PR
        Simulation WaikatoMixGley
          Clock: Start=2021-04-01; End=2024-06-20
          Weather: FileName=Ruakura.met
          Summary summaryfile
          SoilArbitrator Soil Arbitrator
          Zone Field: Area=1; Slope=0; AspectAngle=0; Altitude=50
            Folder Management
              Operations Sowing: same as Evaluation.NewZealand.FRNLRuakuraMix2.FRNLRuakuraMix2.Field.Management.Sowing
              Operations NRate
                2021-04-13  [Fertiliser].Apply(amount: 200, type: "DAP", depth: 10)
                2022-03-03  [Fertiliser].Apply(amount: 139, type: "UreaN", depth: 10)
                2022-03-28  [Fertiliser].Apply(amount: 50, type: "UreaN", depth: 10)
                2022-06-21  [Fertiliser].Apply(amount: 42.5, type: "UreaN", depth: 10)
                2022-07-07  [Fertiliser].Apply(amount: 50, type: "UreaN", depth: 10)
                2022-09-19  [Fertiliser].Apply(amount: 64, type: "UreaN", depth: 10)
                2022-12-21  [Fertiliser].Apply(amount: 55, type: "UreaN", depth: 10)
                2023-02-16  [Fertiliser].Apply(amount: 50, type: "UreaN", depth: 10)
                2023-03-21  [Fertiliser].Apply(amount: 55, type: "UreaN", depth: 10)
                2023-07-19  [Fertiliser].Apply(amount: 110, type: "UreaN", depth: 10)
                2023-11-23  [Fertiliser].Apply(amount: 230, type: "UreaN", depth: 10)
                2024-03-22  [Fertiliser].Apply(amount: 215, type: "UreaN", depth: 10)
              Operations BaseFertiliser: same as Evaluation.NewZealand.FRNLRuakuraMix1.FRNLRuakuraMix1.Field.Management.BaseFertiliser
              Manager DefoliationManager: same as Evaluation.NewZealand.FRNLRuakuraMix2.FRNLRuakuraMix2.Field.Management.DefoliationManager
              Operations DefoliationSchedule
                2021-06-09  [DefoliationManager].Script.Defoliate(defoliationType: "Cut", amountDM: 100, amountType: "ResidualDM", duration: 1)
                2021-07-05  [DefoliationManager].Script.Defoliate(defoliationType: "Cut", amountDM: 100, amountType: "ResidualDM", duration: 1)
                2021-08-16  [DefoliationManager].Script.Defoliate(defoliationType: "Cut", amountDM: 100, amountType: "ResidualDM", duration: 1)
                2021-09-21  [DefoliationManager].Script.Defoliate(defoliationType: "Cut", amountDM: 100, amountType: "ResidualDM", duration: 1)
                2021-10-08  [DefoliationManager].Script.Defoliate(defoliationType: "Cut", amountDM: 100, amountType: "ResidualDM", duration: 1)
                2021-11-02  [DefoliationManager].Script.Defoliate(defoliationType: "Cut", amountDM: 100, amountType: "ResidualDM", duration: 1)
                2021-11-09  [DefoliationManager].Script.Defoliate(defoliationType: "Cut", amountDM: 100, amountType: "ResidualDM", duration: 1)
                2021-11-30  [DefoliationManager].Script.Defoliate(defoliationType: "Cut", amountDM: 100, amountType: "ResidualDM", duration: 1)
                2021-12-16  [DefoliationManager].Script.Defoliate(defoliationType: "Cut", amountDM: 100, amountType: "ResidualDM", duration: 1)
                2022-01-06  [DefoliationManager].Script.Defoliate(defoliationType: "Cut", amountDM: 100, amountType: "ResidualDM", duration: 1)
                2022-01-24  [DefoliationManager].Script.Defoliate(defoliationType: "Cut", amountDM: 100, amountType: "ResidualDM", duration: 1)
                2022-03-03  [DefoliationManager].Script.Defoliate(defoliationType: "Cut", amountDM: 100, amountType: "ResidualDM", duration: 1)
                2022-03-19  [DefoliationManager].Script.Defoliate(defoliationType: "Cut", amountDM: 100, amountType: "ResidualDM", duration: 1)
                2022-05-26  [DefoliationManager].Script.Defoliate(defoliationType: "Cut", amountDM: 100, amountType: "ResidualDM", duration: 1)
                2022-06-21  [DefoliationManager].Script.Defoliate(defoliationType: "Cut", amountDM: 100, amountType: "ResidualDM", duration: 1)
                2022-08-09  [DefoliationManager].Script.Defoliate(defoliationType: "Cut", amountDM: 100, amountType: "ResidualDM", duration: 1)
                2022-09-11  [DefoliationManager].Script.Defoliate(defoliationType: "Cut", amountDM: 100, amountType: "ResidualDM", duration: 1)
                2022-10-10  [DefoliationManager].Script.Defoliate(defoliationType: "Cut", amountDM: 100, amountType: "ResidualDM", duration: 1)
                2022-12-03  [DefoliationManager].Script.Defoliate(defoliationType: "Cut", amountDM: 100, amountType: "ResidualDM", duration: 1)
                2023-02-07  [DefoliationManager].Script.Defoliate(defoliationType: "Cut", amountDM: 100, amountType: "ResidualDM", duration: 1)
                2023-03-19  [DefoliationManager].Script.Defoliate(defoliationType: "Cut", amountDM: 100, amountType: "ResidualDM", duration: 1)
                2023-05-15  [DefoliationManager].Script.Defoliate(defoliationType: "Cut", amountDM: 100, amountType: "ResidualDM", duration: 1)
                2023-07-04  [DefoliationManager].Script.Defoliate(defoliationType: "Cut", amountDM: 100, amountType: "ResidualDM", duration: 1)
                2023-07-18  [DefoliationManager].Script.Defoliate(defoliationType: "Cut", amountDM: 100, amountType: "ResidualDM", duration: 1)
                2023-09-04  [DefoliationManager].Script.Defoliate(defoliationType: "Cut", amountDM: 100, amountType: "ResidualDM", duration: 1)
                2023-10-13  [DefoliationManager].Script.Defoliate(defoliationType: "Cut", amountDM: 100, amountType: "ResidualDM", duration: 1)
                2023-11-23  [DefoliationManager].Script.Defoliate(defoliationType: "Cut", amountDM: 100, amountType: "ResidualDM", duration: 1)
                2024-01-10  [DefoliationManager].Script.Defoliate(defoliationType: "Cut", amountDM: 100, amountType: "ResidualDM", duration: 1)
                2024-01-24  [DefoliationManager].Script.Defoliate(defoliationType: "Cut", amountDM: 100, amountType: "ResidualDM", duration: 1)
                2024-03-02  [DefoliationManager].Script.Defoliate(defoliationType: "Cut", amountDM: 100, amountType: "ResidualDM", duration: 1)
                2024-03-20  [DefoliationManager].Script.Defoliate(defoliationType: "Cut", amountDM: 100, amountType: "ResidualDM", duration: 1)
                2024-04-28  [DefoliationManager].Script.Defoliate(defoliationType: "Cut", amountDM: 100, amountType: "ResidualDM", duration: 1)
                2024-06-02  [DefoliationManager].Script.Defoliate(defoliationType: "Cut", amountDM: 100, amountType: "ResidualDM", duration: 1)
              Manager ExtraVariables
                script: same as in Evaluation.NewZealand.FRNLRuakuraMix1.FRNLRuakuraMix1.Field.Management.ExtraVariables
              Manager SettingUpParams: same as Evaluation.NewZealand.FRNLRuakuraMix2.FRNLRuakuraMix2.Field.Management.SettingUpParams
            MicroClimate: a_interception=0; b_interception=1; c_interception=0; d_interception=0; SoilHeatFluxFraction=0.4; MinimumHeightDiffForNewLayer=0; NightInterceptionFraction=0.5; ReferenceHeight=2
            Irrigation
            Fertiliser
            SurfaceOrganicMatter: InitialResidueName=grass; InitialResidueType=grass; InitialResidueMass=500; InitialStandingFraction=0; InitialCPR=0; InitialCNR=40
            Soil HorotiuSoil: SoilType=Typic Orthic Gley; LocalName=Silty clay loam; Site=Ruakura; NearestTown=Hamilton; Region=Waikato; Country=New Zealand; Latitude=-37.915722; Longitude=175.193; DataSource=Plantain Potency and Practice SFFF Dairy NZ
              Chemical: PHUnits=Water
                Thickness  PH   CEC
                100        5.6  21.3
                100        5.4  23.8
                100        5.9  15.4
                100        5.8  13.9
                200        5.8  16
                200        5.4  3.5
                200        5.4  3.3
              Physical
                Thickness  ParticleSizeSand  ParticleSizeSilt  ParticleSizeClay  Rocks  BD    AirDry  LL15   DUL    SAT    KS
                100        47                33                20                0      0.99  0.114   0.22   0.484  0.581  553
                100        65                17                19                0      0.92  0.209   0.229  0.446  0.609  5083
                100        76                13                11                0      1.16  0.177   0.267  0.444  0.54   8353
                100        84                10                7                 0      1.13  0.139   0.291  0.441  0.5    13589
                200        88                8                 5                 0      1.08  0.125   0.199  0.391  0.5    38963
                200        91                6                 3                 4      1.26  0.102   0.128  0.249  0.446  45280
                200        94                5                 1                 25     1.28  0.07    0.077  0.275  0.37   53606
                SoilCrop PlantainForageSoil: LL=[0.228, 0.22, 0.182, 0.15, 0.142, 0.103, 0.08]; KL=[0.1, 0.08, 0.05, 0.02, 0.01, 0.01, 0]; XF=[1, 1, 1, 1, 1, 1, 0.5]
                SoilCrop AGPRyegrassSoil: LL=[0.22, 0.219, 0.177, 0.139, 0.125, 0.102, 0.083]; KL=[0.1, 0.085, 0.055, 0.02, 0.005, 0, 0]; XF=[1, 1, 1, 1, 1, 1, 1]
                SoilCrop WhiteCloverSoil: LL=[0.22, 0.219, 0.177, 0.139, 0.125, 0.102, 0.083]; KL=[0.085, 0.077, 0.04, 0.01, 0.001, 0, 0]; XF=[1, 1, 1, 1, 1, 1, 1]
                SoilCrop AGPWhiteCloverSoil: LL=[0.22, 0.219, 0.177, 0.139, 0.125, 0.102, 0.083]; KL=[0.085, 0.05, 0, 0, 0, 0, 0]; XF=[1, 1, 1, 1, 1, 1, 1]
                SoilCrop LucerneSoil: same as Evaluation.NewZealand.SFFFKerikeriMix.KerikeriMix.Field.Soil.Physical.LucerneSoil
                SoilCrop AGPTallFescueSoil: LL=[0.22, 0.219, 0.177, 0.139, 0.125, 0.102, 0.083]; KL=[0.1, 0.085, 0.055, 0.02, 0.005, 0, 0]; XF=[1, 1, 1, 1, 1, 1, 1]
                SoilCrop ChicorySoil: same as Evaluation.NewZealand.SFFFKerikeriMix.KerikeriMix.Field.Soil.Physical.ChicorySoil
              WaterBalance SoilWater: SummerDate=1-Nov; SummerU=6; SummerCona=3.5; WinterDate=1-Apr; WinterU=3; WinterCona=1.5; DiffusConst=88; DiffusSlope=35; Salb=0.13; CN2Bare=70; CNRed=23; CNCov=0.8; PSIDul=-100; Thickness=[100, 100, 100, 100, 200, 200, 200]; SWCON=[0.55, 0.6, 0.7, 0.7, 0.75, 0.8, 0.8]
              Organic: FOMCNRatio=40; CarbonUnits=Total
                Thickness  Carbon  SoilCNRatio  FBiom  FInert  FOM
                100        3.8     11.5         0.07   0.5     750
                100        5.1     10.7         0.035  0.63    340
                100        1.5     11.4         0.025  0.75    90
                100        1       9.7          0.02   0.85    45
                200        1.1     11.4         0.01   0.93    25
                200        0.2     7.9          0.01   0.98    0
                200        0.1     5.7          0.01   0.99    0
              Water: Thickness=[100, 100, 100, 100, 200, 200, 200]; InitialValues=[0.484, 0.446, 0.444, 0.441, 0.391, 0.157, 0.077]; FilledFromTop=true
              Nutrient
              Solute NO3: Thickness=[100, 100, 100, 100, 200, 200, 220]; InitialValues=[15, 10, 5, 5, 4.47368, 1, 1]; InitialValuesUnits=ppm; WaterTableConcentration=0; D0=0; DepthConstant=0; MaxDepthSoluteAccessible=0; RunoffEffectivenessAtMovingSolute=0; MaxEffectiveRunoff=0
              Solute NH4: Thickness=[200, 200, 130, 140, 380, 230, 220]; InitialValues=[0.5, 0.2, 0.093, 0.093, 0.093, 0.093, 0.093]; InitialValuesUnits=ppm; WaterTableConcentration=0; D0=0; DepthConstant=0; MaxDepthSoluteAccessible=0; RunoffEffectivenessAtMovingSolute=0; MaxEffectiveRunoff=0
              Solute Urea: same as Evaluation.NewZealand.FRNLRuakuraMix1.FRNLRuakuraMix1.Field.Soil.Urea
              SoilTemperature Temperature
            Plant PlantainForage
            PastureSpecies AGPRyegrass: same as Evaluation.NewZealand.SFFFKerikeriMix.KerikeriMix.Field.AGPRyegrass
            PastureSpecies AGPWhiteClover: same as Evaluation.NewZealand.SFFFKerikeriMix.KerikeriMix.Field.AGPWhiteClover
            Plant Chicory
            PastureSpecies AGPTallFescue: same as Evaluation.NewZealand.SFFFKerikeriMix.KerikeriMix.Field.AGPTallFescue
            Report: same as Evaluation.NewZealand.FRNLRuakuraMix2.FRNLRuakuraMix2.Field.Report
          Forages: same as Evaluation.NewZealand.SFFFKerikeriMix.KerikeriMix.Forages
      Experiment SFFFManawatuMix
        DisabledSimNames=[FRNLRuakuraNRate50, FRNLRuakuraNRate100, FRNLRuakuraNRate200, FRNLRuakuraNRate350]
        Memo: same as Evaluation.NewZealand.SFFFWaikatoAllophanicMix.Memo
        Factors
          Factor Sowing
            CompositeFactor 0-PR: Specifications=[Sowing]
              Operations Sowing
                2021-04-10  [AGPWhiteClover].EndCrop()
                2021-04-10  [AGPRyegrass].EndCrop()
                2021-04-10  [AGPTallFescue].EndCrop()
                2021-04-12  [AGPRyegrass].Sow(population: 0, cultivar: "R", depth: 0, rowSpacing: 0)
            CompositeFactor 100-P: Specifications=[Sowing]
              Operations Sowing
                2021-04-10  [AGPWhiteClover].EndCrop()
                2021-04-10  [AGPRyegrass].EndCrop()
                2021-04-10  [AGPTallFescue].EndCrop()
                2021-04-12  [PlantainForage].Sow(population: 30, cultivar: "Tonic", depth: 10, rowSpacing: 150)
            CompositeFactor 15-PR: Specifications=[Sowing]
              Operations Sowing
                2021-04-10  [AGPWhiteClover].EndCrop()
                2021-04-10  [AGPRyegrass].EndCrop()
                2021-04-10  [AGPTallFescue].EndCrop()
                2021-04-12  [PlantainForage].Sow(population: 100, cultivar: "Tonic", depth: 10, rowSpacing: 150)
                2021-04-12  [AGPRyegrass].Sow(population: 0, cultivar: "R", depth: 0, rowSpacing: 0)
            CompositeFactor 30-HR: same as Evaluation.NewZealand.SFFFManawatuMix.Factors.Sowing.15-PR
            CompositeFactor 30-IR: same as Evaluation.NewZealand.SFFFManawatuMix.Factors.Sowing.15-PR
            CompositeFactor 30-PR: same as Evaluation.NewZealand.SFFFManawatuMix.Factors.Sowing.0-PR
            CompositeFactor 30-PRWC: Specifications=[Sowing]
              Operations Sowing
                2021-04-10  [AGPWhiteClover].EndCrop()
                2021-04-10  [AGPRyegrass].EndCrop()
                2021-04-10  [AGPTallFescue].EndCrop()
                2021-04-12  [PlantainForage].Sow(population: 100, cultivar: "Tonic", depth: 10, rowSpacing: 150)
                2021-04-12  [AGPRyegrass].Sow(population: 0, cultivar: "R", depth: 0, rowSpacing: 0)
                2021-04-12  [AGPWhiteClover].Sow(population: 0, cultivar: "W", depth: 0, rowSpacing: 0)
            CompositeFactor 30-TF: Specifications=[Sowing]
              Operations Sowing
                2021-04-10  [AGPWhiteClover].EndCrop()
                2021-04-10  [AGPRyegrass].EndCrop()
                2021-04-10  [AGPTallFescue].EndCrop()
                2021-04-12  [PlantainForage].Sow(population: 100, cultivar: "Tonic", depth: 10, rowSpacing: 150)
                2021-04-12  [AGPTallFescue].Sow(population: 0, cultivar: "R", depth: 0, rowSpacing: 0)
            CompositeFactor 30-TR: same as Evaluation.NewZealand.SFFFManawatuMix.Factors.Sowing.15-PR
            CompositeFactor 50-PR: same as Evaluation.NewZealand.SFFFManawatuMix.Factors.Sowing.15-PR
        Simulation ManawatuMix
          Clock: Start=2021-04-12; End=2024-06-20
          Weather: FileName=PalmerstonNorth.met
          Summary summaryfile
          SoilArbitrator Soil Arbitrator
          Forages: same as Evaluation.NewZealand.SFFFKerikeriMix.KerikeriMix.Forages
          Zone Field: Area=1; Slope=0; AspectAngle=0; Altitude=50
            Folder Management
              Operations Sowing
              Operations NRate
                2021-04-22  [Fertiliser].Apply(amount: 200, type: "DAP", depth: 10)
                2021-06-25  [Fertiliser].Apply(amount: 100, type: "UreaN", depth: 10)
                2021-08-16  [Fertiliser].Apply(amount: 120, type: "UreaN", depth: 10)
                2021-10-04  [Fertiliser].Apply(amount: 100, type: "UreaN", depth: 10)
                2021-10-22  [Fertiliser].Apply(amount: 130, type: "UreaN", depth: 10)
                2021-11-18  [Fertiliser].Apply(amount: 280, type: "UreaN", depth: 10)
                2021-12-21  [Fertiliser].Apply(amount: 120, type: "UreaN", depth: 10)
                2022-01-11  [Fertiliser].Apply(amount: 60, type: "UreaN", depth: 10)
                2022-03-28  [Fertiliser].Apply(amount: 90, type: "UreaN", depth: 10)
                2022-04-28  [Fertiliser].Apply(amount: 87, type: "UreaN", depth: 10)
                2022-05-28  [Fertiliser].Apply(amount: 110, type: "UreaN", depth: 10)
                2022-06-30  [Fertiliser].Apply(amount: 90, type: "UreaN", depth: 10)
                2022-08-05  [Fertiliser].Apply(amount: 90, type: "UreaN", depth: 10)
                2022-10-15  [Fertiliser].Apply(amount: 41, type: "UreaN", depth: 10)
                2022-11-08  [Fertiliser].Apply(amount: 125, type: "UreaN", depth: 10)
                2022-12-05  [Fertiliser].Apply(amount: 120, type: "UreaN", depth: 10)
                2023-03-13  [Fertiliser].Apply(amount: 176, type: "UreaN", depth: 10)
                2023-06-14  [Fertiliser].Apply(amount: 138, type: "UreaN", depth: 10)
                2023-10-26  [Fertiliser].Apply(amount: 75, type: "UreaN", depth: 10)
                2024-04-03  [Fertiliser].Apply(amount: 21, type: "UreaN", depth: 10)
              Manager DefoliationManager: same as Evaluation.NewZealand.FRNLRuakuraMix2.FRNLRuakuraMix2.Field.Management.DefoliationManager
              Operations DefoliationSchedule
                2021-06-25  [DefoliationManager].Script.Defoliate(defoliationType: "Cut", amountDM: 100, amountType: "ResidualDM", duration: 1)
                2021-08-16  [DefoliationManager].Script.Defoliate(defoliationType: "Cut", amountDM: 100, amountType: "ResidualDM", duration: 1)
                2021-09-29  [DefoliationManager].Script.Defoliate(defoliationType: "Cut", amountDM: 100, amountType: "ResidualDM", duration: 1)
                2021-10-22  [DefoliationManager].Script.Defoliate(defoliationType: "Cut", amountDM: 100, amountType: "ResidualDM", duration: 1)
                2021-11-18  [DefoliationManager].Script.Defoliate(defoliationType: "Cut", amountDM: 100, amountType: "ResidualDM", duration: 1)
                2021-12-21  [DefoliationManager].Script.Defoliate(defoliationType: "Cut", amountDM: 100, amountType: "ResidualDM", duration: 1)
                2022-01-11  [DefoliationManager].Script.Defoliate(defoliationType: "Cut", amountDM: 100, amountType: "ResidualDM", duration: 1)
                2022-02-23  [DefoliationManager].Script.Defoliate(defoliationType: "Cut", amountDM: 100, amountType: "ResidualDM", duration: 1)
                2022-03-28  [DefoliationManager].Script.Defoliate(defoliationType: "Cut", amountDM: 100, amountType: "ResidualDM", duration: 1)
                2022-04-26  [DefoliationManager].Script.Defoliate(defoliationType: "Cut", amountDM: 100, amountType: "ResidualDM", duration: 1)
                2022-05-26  [DefoliationManager].Script.Defoliate(defoliationType: "Cut", amountDM: 100, amountType: "ResidualDM", duration: 1)
                2022-06-23  [DefoliationManager].Script.Defoliate(defoliationType: "Cut", amountDM: 100, amountType: "ResidualDM", duration: 1)
                2022-08-05  [DefoliationManager].Script.Defoliate(defoliationType: "Cut", amountDM: 100, amountType: "ResidualDM", duration: 1)
                2022-09-08  [DefoliationManager].Script.Defoliate(defoliationType: "Cut", amountDM: 100, amountType: "ResidualDM", duration: 1)
                2022-10-13  [DefoliationManager].Script.Defoliate(defoliationType: "Cut", amountDM: 100, amountType: "ResidualDM", duration: 1)
                2022-11-07  [DefoliationManager].Script.Defoliate(defoliationType: "Cut", amountDM: 100, amountType: "ResidualDM", duration: 1)
                2022-12-05  [DefoliationManager].Script.Defoliate(defoliationType: "Cut", amountDM: 100, amountType: "ResidualDM", duration: 1)
                2023-01-04  [DefoliationManager].Script.Defoliate(defoliationType: "Cut", amountDM: 100, amountType: "ResidualDM", duration: 1)
                2023-01-25  [DefoliationManager].Script.Defoliate(defoliationType: "Cut", amountDM: 100, amountType: "ResidualDM", duration: 1)
                2023-03-13  [DefoliationManager].Script.Defoliate(defoliationType: "Cut", amountDM: 100, amountType: "ResidualDM", duration: 1)
                2023-04-14  [DefoliationManager].Script.Defoliate(defoliationType: "Cut", amountDM: 100, amountType: "ResidualDM", duration: 1)
                2023-06-06  [DefoliationManager].Script.Defoliate(defoliationType: "Cut", amountDM: 100, amountType: "ResidualDM", duration: 1)
                2023-09-06  [DefoliationManager].Script.Defoliate(defoliationType: "Cut", amountDM: 100, amountType: "ResidualDM", duration: 1)
                2023-10-26  [DefoliationManager].Script.Defoliate(defoliationType: "Cut", amountDM: 100, amountType: "ResidualDM", duration: 1)
                2023-11-22  [DefoliationManager].Script.Defoliate(defoliationType: "Cut", amountDM: 100, amountType: "ResidualDM", duration: 1)
                2023-12-18  [DefoliationManager].Script.Defoliate(defoliationType: "Cut", amountDM: 100, amountType: "ResidualDM", duration: 1)
                2024-02-01  [DefoliationManager].Script.Defoliate(defoliationType: "Cut", amountDM: 100, amountType: "ResidualDM", duration: 1)
                2024-04-03  [DefoliationManager].Script.Defoliate(defoliationType: "Cut", amountDM: 100, amountType: "ResidualDM", duration: 1)
                2024-06-05  [DefoliationManager].Script.Defoliate(defoliationType: "Cut", amountDM: 100, amountType: "ResidualDM", duration: 1)
              Manager ExtraVariables
                script: same as in Evaluation.NewZealand.FRNLRuakuraMix1.FRNLRuakuraMix1.Field.Management.ExtraVariables
              Manager SettingUpParams: same as Evaluation.NewZealand.FRNLRuakuraMix2.FRNLRuakuraMix2.Field.Management.SettingUpParams
            MicroClimate: a_interception=0; b_interception=1; c_interception=0; d_interception=0; SoilHeatFluxFraction=0.4; MinimumHeightDiffForNewLayer=0; NightInterceptionFraction=0.5; ReferenceHeight=2
            Irrigation
            Fertiliser
            SurfaceOrganicMatter: InitialResidueName=grass; InitialResidueType=grass; InitialResidueMass=500; InitialStandingFraction=0; InitialCPR=0; InitialCNR=40
            Soil: SoilType=Mottled Immature Pallic; LocalName=Manawatu; Site=2919a Cheltenham-Hunterville road; NearestTown=Longburn; Region=Manawatu; Country=New Zealand; NaturalVegetation=long term grass; Latitude=-40.406; Longitude=175.536; LocationAccuracy=+/-50 m; YearOfSampling=2021; DataSource=Plantain Potency and Practice SFFF Dairy NZ
              Physical
                Thickness  ParticleSizeSand  ParticleSizeSilt  ParticleSizeClay  Rocks  BD    AirDry  LL15   DUL    SAT    KS
                100        13.735            74.265            12                0      1.16  0.163   0.163  0.427  0.535  1996.371
                100        13.063            72.937            14                0      1.19  0.156   0.16   0.38   0.521  917.695
                100        2.554             78.446            19                0      1.34  0.15    0.158  0.37   0.494  311.124
                100        6.973             75.027            18                0      1.55  0.139   0.158  0.353  0.415  268.836
                200        24.063            58.467            17.47             0      1.56  0.125   0.164  0.311  0.411  656.485
                200        42.878            43.552            13.57             0      1.56  0.1     0.17   0.337  0.411  1184.37
                SoilCrop PlantainForageSoil: LL=[0.163, 0.159, 0.171, 0.181, 0.158, 0.101]; KL=[0.1, 0.095, 0.08, 0.05, 0.02, 0.015]; XF=[1, 1, 1, 1, 1, 1]
                SoilCrop AGPRyegrassSoil: LL=[0.22, 0.219, 0.177, 0.139, 0.125, 0.102, 0.083]; KL=[0.1, 0.085, 0.055, 0.02, 0.005, 0, 0]; XF=[1, 1, 1, 1, 1, 1, 1]
                SoilCrop WhiteCloverSoil: LL=[0.22, 0.219, 0.177, 0.139, 0.125, 0.102, 0.083]; KL=[0.085, 0.077, 0.04, 0.01, 0.001, 0, 0]; XF=[1, 1, 1, 1, 1, 1, 1]
                SoilCrop AGPWhiteCloverSoil: LL=[0.22, 0.219, 0.177, 0.139, 0.125, 0.102, 0.083]; KL=[0.085, 0.05, 0, 0, 0, 0, 0]; XF=[1, 1, 1, 1, 1, 1, 1]
                SoilCrop LucerneSoil: same as Evaluation.NewZealand.SFFFKerikeriMix.KerikeriMix.Field.Soil.Physical.LucerneSoil
                SoilCrop AGPTallFescueSoil: LL=[0.22, 0.219, 0.177, 0.139, 0.125, 0.102, 0.083]; KL=[0.1, 0.085, 0.055, 0.02, 0.005, 0, 0]; XF=[1, 1, 1, 1, 1, 1, 1]
                SoilCrop ChicorySoil: same as Evaluation.NewZealand.SFFFKerikeriMix.KerikeriMix.Field.Soil.Physical.ChicorySoil
              WaterBalance SoilWater: SummerDate=1-Nov; SummerU=6; SummerCona=3.5; WinterDate=1-Apr; WinterU=3; WinterCona=2; DiffusConst=88; DiffusSlope=35; Salb=0.13; CN2Bare=73; CNRed=20; CNCov=0.8; PSIDul=-100; Thickness=[100, 100, 100, 100, 200, 200]; SWCON=[0.638, 0.566, 0.547, 0.45, 0.558, 0.614]
              Organic: FOMCNRatio=40; CarbonUnits=Total
                Thickness  Carbon  SoilCNRatio  FBiom  FInert  FOM
                100        3.3     10.5         0.08   0.329   450
                100        2.6     10.2         0.055  0.418   400
                100        1.6     10.2         0.035  0.702   180
                100        0.6     8.7          0.025  0.876   170
                200        0.5     8.9          0.018  0.943   30
                200        0.4     8.2          0.013  0.96    10
              Chemical: PHUnits=Water
                Thickness  PH   CEC
                100        6.3  17.4
                100        6.4  15.1
                100        6.4  10.9
                100        6.4  8.2
                200        6.2  9.5
                200        5.7  10.4
              Nutrient
              Water: Thickness=[100, 100, 100, 100, 200, 200]; InitialValues=[0.432, 0.373, 0.354, 0.348, 0.327, 0.288]; FilledFromTop=false
              Solute NO3: Thickness=[100, 100, 100, 100, 200, 200]; InitialValues=[10, 7, 3, 1, 1, 1]; InitialValuesUnits=ppm; WaterTableConcentration=0; D0=0; DepthConstant=0; MaxDepthSoluteAccessible=0; RunoffEffectivenessAtMovingSolute=0; MaxEffectiveRunoff=0
              Solute NH4: Thickness=[100, 100, 100, 100, 200, 200]; InitialValues=[2, 1, 0.5, 0.3, 0.2, 0.1]; InitialValuesUnits=ppm; WaterTableConcentration=0; D0=0; DepthConstant=0; MaxDepthSoluteAccessible=0; RunoffEffectivenessAtMovingSolute=0; MaxEffectiveRunoff=0
              Solute Urea: Thickness=[100, 100, 100, 100, 200, 200]; InitialValues=[0, 0, 0, 0, 0, 0]; InitialValuesUnits=kg/ha; WaterTableConcentration=0; D0=0; DepthConstant=0; MaxDepthSoluteAccessible=0; RunoffEffectivenessAtMovingSolute=0; MaxEffectiveRunoff=0
              SoilTemperature Temperature
            Plant Chicory
            Plant PlantainForage
            PastureSpecies AGPRyegrass: same as Evaluation.NewZealand.SFFFKerikeriMix.KerikeriMix.Field.AGPRyegrass
            PastureSpecies AGPWhiteClover: same as Evaluation.NewZealand.SFFFKerikeriMix.KerikeriMix.Field.AGPWhiteClover
            PastureSpecies AGPTallFescue: same as Evaluation.NewZealand.SFFFKerikeriMix.KerikeriMix.Field.AGPTallFescue
            Report: same as Evaluation.NewZealand.FRNLRuakuraMix2.FRNLRuakuraMix2.Field.Report
      Experiment SFFFKimihiaMix
        DisabledSimNames=[FRNLRuakuraNRate50, FRNLRuakuraNRate100, FRNLRuakuraNRate200, FRNLRuakuraNRate350]
        Memo: same as Evaluation.NewZealand.SFFFWaikatoAllophanicMix.Memo
        Factors
          Factor Sowing
            CompositeFactor 0-PR: Specifications=[Sowing]
              Operations Sowing
                2021-11-20  [AGPWhiteClover].EndCrop()
                2021-11-20  [AGPRyegrass].EndCrop()
                2021-11-20  [AGPTallFescue].EndCrop()
                2021-11-26  [AGPRyegrass].Sow(population: 0, cultivar: "R", depth: 0, rowSpacing: 0)
            CompositeFactor 100-P
              Specifications:
                [Sowing]
                [DefoliationSchedule]
              Operations Sowing
                2021-11-20  [AGPWhiteClover].EndCrop()
                2021-11-20  [AGPRyegrass].EndCrop()
                2021-11-20  [AGPTallFescue].EndCrop()
                2021-11-26  [PlantainForage].Sow(population: 100, cultivar: "Tonic", depth: 10, rowSpacing: 150)
              Operations DefoliationSchedule
                2022-02-09  [DefoliationManager].Script.Defoliate(defoliationType: "Cut", amountDM: 100, amountType: "ResidualDM", duration: 1)
                2022-03-03  [DefoliationManager].Script.Defoliate(defoliationType: "Cut", amountDM: 100, amountType: "ResidualDM", duration: 1)
                2022-03-29  [DefoliationManager].Script.Defoliate(defoliationType: "Cut", amountDM: 100, amountType: "ResidualDM", duration: 1)
                2022-05-15  [DefoliationManager].Script.Defoliate(defoliationType: "Cut", amountDM: 100, amountType: "ResidualDM", duration: 1)
                2022-09-15  [DefoliationManager].Script.Defoliate(defoliationType: "Cut", amountDM: 100, amountType: "ResidualDM", duration: 1)
                2022-10-19  [DefoliationManager].Script.Defoliate(defoliationType: "Cut", amountDM: 100, amountType: "ResidualDM", duration: 1)
                2022-11-23  [DefoliationManager].Script.Defoliate(defoliationType: "Cut", amountDM: 100, amountType: "ResidualDM", duration: 1)
                2022-12-19  [DefoliationManager].Script.Defoliate(defoliationType: "Cut", amountDM: 100, amountType: "ResidualDM", duration: 1)
                2023-01-27  [DefoliationManager].Script.Defoliate(defoliationType: "Cut", amountDM: 100, amountType: "ResidualDM", duration: 1)
                2023-03-01  [DefoliationManager].Script.Defoliate(defoliationType: "Cut", amountDM: 100, amountType: "ResidualDM", duration: 1)
                2023-03-31  [DefoliationManager].Script.Defoliate(defoliationType: "Cut", amountDM: 100, amountType: "ResidualDM", duration: 1)
                2023-04-28  [DefoliationManager].Script.Defoliate(defoliationType: "Cut", amountDM: 100, amountType: "ResidualDM", duration: 1)
                2023-06-30  [DefoliationManager].Script.Defoliate(defoliationType: "Cut", amountDM: 100, amountType: "ResidualDM", duration: 1)
                2023-08-31  [DefoliationManager].Script.Defoliate(defoliationType: "Cut", amountDM: 100, amountType: "ResidualDM", duration: 1)
                2023-10-05  [DefoliationManager].Script.Defoliate(defoliationType: "Cut", amountDM: 100, amountType: "ResidualDM", duration: 1)
                2023-11-01  [DefoliationManager].Script.Defoliate(defoliationType: "Cut", amountDM: 100, amountType: "ResidualDM", duration: 1)
                2023-11-22  [DefoliationManager].Script.Defoliate(defoliationType: "Cut", amountDM: 100, amountType: "ResidualDM", duration: 1)
                2023-12-20  [DefoliationManager].Script.Defoliate(defoliationType: "Cut", amountDM: 100, amountType: "ResidualDM", duration: 1)
                2024-01-31  [DefoliationManager].Script.Defoliate(defoliationType: "Cut", amountDM: 100, amountType: "ResidualDM", duration: 1)
                2024-03-04  [DefoliationManager].Script.Defoliate(defoliationType: "Cut", amountDM: 100, amountType: "ResidualDM", duration: 1)
                2024-04-04  [DefoliationManager].Script.Defoliate(defoliationType: "Cut", amountDM: 100, amountType: "ResidualDM", duration: 1)
                2024-05-07  [DefoliationManager].Script.Defoliate(defoliationType: "Cut", amountDM: 100, amountType: "ResidualDM", duration: 1)
                2024-06-12  [DefoliationManager].Script.Defoliate(defoliationType: "Cut", amountDM: 100, amountType: "ResidualDM", duration: 1)
                2024-07-29  [DefoliationManager].Script.Defoliate(defoliationType: "Cut", amountDM: 100, amountType: "ResidualDM", duration: 1)
                2024-09-06  [DefoliationManager].Script.Defoliate(defoliationType: "Cut", amountDM: 100, amountType: "ResidualDM", duration: 1)
                2024-10-09  [DefoliationManager].Script.Defoliate(defoliationType: "Cut", amountDM: 100, amountType: "ResidualDM", duration: 1)
                2024-11-05  [DefoliationManager].Script.Defoliate(defoliationType: "Cut", amountDM: 100, amountType: "ResidualDM", duration: 1)
                2024-12-04  [DefoliationManager].Script.Defoliate(defoliationType: "Cut", amountDM: 100, amountType: "ResidualDM", duration: 1)
            CompositeFactor 15-PR: Specifications=[Sowing]
              Operations Sowing
                2021-11-20  [AGPWhiteClover].EndCrop()
                2021-11-20  [AGPRyegrass].EndCrop()
                2021-11-20  [AGPTallFescue].EndCrop()
                2021-11-26  [AGPRyegrass].Sow(population: 0, cultivar: "R", depth: 0, rowSpacing: 0)
                2021-11-26  [PlantainForage].Sow(population: 100, cultivar: "Tonic", depth: 10, rowSpacing: 150)
            CompositeFactor 30-HR: same as Evaluation.NewZealand.SFFFKimihiaMix.Factors.Sowing.15-PR
            CompositeFactor 30-IR: same as Evaluation.NewZealand.SFFFKimihiaMix.Factors.Sowing.15-PR
            CompositeFactor 30-PR: same as Evaluation.NewZealand.SFFFKimihiaMix.Factors.Sowing.15-PR
            CompositeFactor 30-PRWC: Specifications=[Sowing]
              Operations Sowing
                2021-11-20  [AGPWhiteClover].EndCrop()
                2021-11-20  [AGPRyegrass].EndCrop()
                2021-11-20  [AGPTallFescue].EndCrop()
                2021-11-26  [AGPRyegrass].Sow(population: 0, cultivar: "R", depth: 0, rowSpacing: 0)
                2021-11-26  [PlantainForage].Sow(population: 100, cultivar: "Tonic", depth: 10, rowSpacing: 150)
                2021-11-26  [AGPWhiteClover].Sow(population: 0, cultivar: "W", depth: 0, rowSpacing: 0)
            CompositeFactor 30-TF: Specifications=[Sowing]
              Operations Sowing
                2021-11-20  [AGPWhiteClover].EndCrop()
                2021-11-20  [AGPRyegrass].EndCrop()
                2021-11-20  [AGPTallFescue].EndCrop()
                2021-11-26  [PlantainForage].Sow(population: 100, cultivar: "Tonic", depth: 10, rowSpacing: 150)
                2021-11-26  [AGPTallFescue].Sow(population: 0, cultivar: "R", depth: 0, rowSpacing: 0)
            CompositeFactor 30-TR: same as Evaluation.NewZealand.SFFFKimihiaMix.Factors.Sowing.15-PR
            CompositeFactor 50-PR: same as Evaluation.NewZealand.SFFFKimihiaMix.Factors.Sowing.15-PR
        Simulation CanterburyMix
          Clock: Start=2021-11-26; End=2024-11-05
          Weather: FileName=Lincoln-Broadfields.met
          Summary summaryfile
          SoilArbitrator Soil Arbitrator
          Forages: same as Evaluation.NewZealand.SFFFKerikeriMix.KerikeriMix.Forages
          Zone Field: Area=1; Slope=0; AspectAngle=0; Altitude=50
            Folder Management
              Operations Sowing
              Operations NRate
                2021-11-30  [Fertiliser].Apply(amount: 250, type: "DAP", depth: 10)
                2022-01-15  [Fertiliser].Apply(amount: 100, type: "UreaN", depth: 10)
                2022-02-15  [Fertiliser].Apply(amount: 100, type: "UreaN", depth: 10)
                2022-03-06  [Fertiliser].Apply(amount: 65, type: "UreaN", depth: 10)
                2022-10-03  [Fertiliser].Apply(amount: 75, type: "UreaN", depth: 10)
                2022-11-25  [Fertiliser].Apply(amount: 145, type: "UreaN", depth: 10)
                2023-01-10  [Fertiliser].Apply(amount: 145, type: "UreaN", depth: 10)
                2023-02-03  [Fertiliser].Apply(amount: 81.2, type: "UreaN", depth: 10)
                2023-03-03  [Fertiliser].Apply(amount: 145.3, type: "UreaN", depth: 10)
                2023-03-31  [Fertiliser].Apply(amount: 256.41, type: "UreaN", depth: 10)
                2023-05-01  [Fertiliser].Apply(amount: 243.59, type: "UreaN", depth: 10)
                2023-10-16  [Fertiliser].Apply(amount: 80, type: "UreaN", depth: 10)
                2023-11-01  [Fertiliser].Apply(amount: 80, type: "UreaN", depth: 10)
                2023-11-22  [Fertiliser].Apply(amount: 80, type: "UreaN", depth: 10)
                2024-03-07  [Fertiliser].Apply(amount: 80, type: "UreaN", depth: 10)
                2024-04-04  [Fertiliser].Apply(amount: 50, type: "UreaN", depth: 10)
                2024-05-16  [Fertiliser].Apply(amount: 50, type: "UreaN", depth: 10)
                2024-06-12  [Fertiliser].Apply(amount: 50, type: "UreaN", depth: 10)
                2024-08-06  [Fertiliser].Apply(amount: 50, type: "UreaN", depth: 10)
                2024-10-10  [Fertiliser].Apply(amount: 55, type: "UreaN", depth: 10)
              Manager DefoliationManager: same as Evaluation.NewZealand.FRNLRuakuraMix2.FRNLRuakuraMix2.Field.Management.DefoliationManager
              Operations DefoliationSchedule
                2022-01-12  [DefoliationManager].Script.Defoliate(defoliationType: "Cut", amountDM: 100, amountType: "ResidualDM", duration: 1)
                2022-02-09  [DefoliationManager].Script.Defoliate(defoliationType: "Cut", amountDM: 100, amountType: "ResidualDM", duration: 1)
                2022-03-03  [DefoliationManager].Script.Defoliate(defoliationType: "Cut", amountDM: 100, amountType: "ResidualDM", duration: 1)
                2022-03-29  [DefoliationManager].Script.Defoliate(defoliationType: "Cut", amountDM: 100, amountType: "ResidualDM", duration: 1)
                2022-05-15  [DefoliationManager].Script.Defoliate(defoliationType: "Cut", amountDM: 100, amountType: "ResidualDM", duration: 1)
                2022-09-15  [DefoliationManager].Script.Defoliate(defoliationType: "Cut", amountDM: 100, amountType: "ResidualDM", duration: 1)
                2022-10-19  [DefoliationManager].Script.Defoliate(defoliationType: "Cut", amountDM: 100, amountType: "ResidualDM", duration: 1)
                2022-11-23  [DefoliationManager].Script.Defoliate(defoliationType: "Cut", amountDM: 100, amountType: "ResidualDM", duration: 1)
                2022-12-19  [DefoliationManager].Script.Defoliate(defoliationType: "Cut", amountDM: 100, amountType: "ResidualDM", duration: 1)
                2023-01-27  [DefoliationManager].Script.Defoliate(defoliationType: "Cut", amountDM: 100, amountType: "ResidualDM", duration: 1)
                2023-03-01  [DefoliationManager].Script.Defoliate(defoliationType: "Cut", amountDM: 100, amountType: "ResidualDM", duration: 1)
                2023-03-31  [DefoliationManager].Script.Defoliate(defoliationType: "Cut", amountDM: 100, amountType: "ResidualDM", duration: 1)
                2023-04-28  [DefoliationManager].Script.Defoliate(defoliationType: "Cut", amountDM: 100, amountType: "ResidualDM", duration: 1)
                2023-06-30  [DefoliationManager].Script.Defoliate(defoliationType: "Cut", amountDM: 100, amountType: "ResidualDM", duration: 1)
                2023-08-31  [DefoliationManager].Script.Defoliate(defoliationType: "Cut", amountDM: 100, amountType: "ResidualDM", duration: 1)
                2023-10-05  [DefoliationManager].Script.Defoliate(defoliationType: "Cut", amountDM: 100, amountType: "ResidualDM", duration: 1)
                2023-11-01  [DefoliationManager].Script.Defoliate(defoliationType: "Cut", amountDM: 100, amountType: "ResidualDM", duration: 1)
                2023-11-22  [DefoliationManager].Script.Defoliate(defoliationType: "Cut", amountDM: 100, amountType: "ResidualDM", duration: 1)
                2023-12-20  [DefoliationManager].Script.Defoliate(defoliationType: "Cut", amountDM: 100, amountType: "ResidualDM", duration: 1)
                2024-01-31  [DefoliationManager].Script.Defoliate(defoliationType: "Cut", amountDM: 100, amountType: "ResidualDM", duration: 1)
                2024-03-04  [DefoliationManager].Script.Defoliate(defoliationType: "Cut", amountDM: 100, amountType: "ResidualDM", duration: 1)
                2024-04-04  [DefoliationManager].Script.Defoliate(defoliationType: "Cut", amountDM: 100, amountType: "ResidualDM", duration: 1)
                2024-05-07  [DefoliationManager].Script.Defoliate(defoliationType: "Cut", amountDM: 100, amountType: "ResidualDM", duration: 1)
                2024-06-12  [DefoliationManager].Script.Defoliate(defoliationType: "Cut", amountDM: 100, amountType: "ResidualDM", duration: 1)
                2024-07-29  [DefoliationManager].Script.Defoliate(defoliationType: "Cut", amountDM: 100, amountType: "ResidualDM", duration: 1)
                2024-09-06  [DefoliationManager].Script.Defoliate(defoliationType: "Cut", amountDM: 100, amountType: "ResidualDM", duration: 1)
                2024-10-09  [DefoliationManager].Script.Defoliate(defoliationType: "Cut", amountDM: 100, amountType: "ResidualDM", duration: 1)
                2024-11-05  [DefoliationManager].Script.Defoliate(defoliationType: "Cut", amountDM: 100, amountType: "ResidualDM", duration: 1)
                2024-12-04  [DefoliationManager].Script.Defoliate(defoliationType: "Cut", amountDM: 100, amountType: "ResidualDM", duration: 1)
              Manager ExtraVariables
                script: same as in Evaluation.NewZealand.FRNLRuakuraMix1.FRNLRuakuraMix1.Field.Management.ExtraVariables
              Manager SettingUpParams: same as Evaluation.NewZealand.FRNLRuakuraMix2.FRNLRuakuraMix2.Field.Management.SettingUpParams
            MicroClimate: a_interception=0; b_interception=1; c_interception=0; d_interception=0; SoilHeatFluxFraction=0.4; MinimumHeightDiffForNewLayer=0; NightInterceptionFraction=0.5; ReferenceHeight=2
            Irrigation
            Fertiliser
            SurfaceOrganicMatter: InitialResidueName=grass; InitialResidueType=grass; InitialResidueMass=500; InitialStandingFraction=0; InitialCPR=0; InitialCNR=40
            Soil TempletonPaparua: SoilType=Udic Haplustept (US),  Immature Pallic Soil (NZ); LocalName=Templeton Fine Sandy Loam; Site=LURDF; NearestTown=Lincoln; Region=Canterbury; Country=New Zealand; Latitude=-43.6124; Longitude=172.469; DataSource=Plantain Potency and Practice SFFF Dairy NZ
              Comments=Different references name the soil at the site as either Templeton or Paparua (very similar soils)
              Chemical: PHUnits=Water
                Thickness  PH   CEC
                100        6    0.189
                100        6.1  0.254
                100        6.1  0.269
                100        6.4  0.24
                200        6.8  0.366
                200        6.9  0.288
              Physical
                Thickness  ParticleSizeSand  ParticleSizeSilt  ParticleSizeClay  Rocks  BD    AirDry  LL15   DUL    SAT    KS
                100        17.4              60.9              21.8              0      1.26  0.12    0.126  0.355  0.524  2913.761
                100        24.8              56.9              18.3              0      1.3   0.14    0.148  0.328  0.468  1052.63
                100        21                59.5              19.5              0      1.53  0.12    0.14   0.33   0.422  182.149
                100        37                52.6              10.3              0      1.57  0.11    0.127  0.339  0.407  1272.997
                200        43.6              46.9              9.5               0      1.66  0.125   0.175  0.324  0.373  1767.199
                200        24.2              59.3              16.6              0      1.6   0.1     0.119  0.316  0.395  586.553
                SoilCrop PlantainForageSoil: LL=[0.17, 0.177, 0.186, 0.132, 0.141, 0.138]; KL=[0.12, 0.11, 0.06, 0.03, 0.01, 0.01]; XF=[1, 1, 1, 1, 1, 1]
                SoilCrop AGPRyegrassSoil: LL=[0.22, 0.219, 0.177, 0.139, 0.125, 0.102, 0.083]; KL=[0.1, 0.085, 0.055, 0.02, 0.005, 0, 0]; XF=[1, 1, 1, 1, 1, 1, 1]
                SoilCrop WhiteCloverSoil: LL=[0.22, 0.219, 0.177, 0.139, 0.125, 0.102, 0.083]; KL=[0.085, 0.077, 0.04, 0.01, 0.001, 0, 0]; XF=[1, 1, 1, 1, 1, 1, 1]
                SoilCrop AGPWhiteCloverSoil: LL=[0.22, 0.219, 0.177, 0.139, 0.125, 0.102, 0.083]; KL=[0.085, 0.05, 0, 0, 0, 0, 0]; XF=[1, 1, 1, 1, 1, 1, 1]
                SoilCrop LucerneSoil: same as Evaluation.NewZealand.SFFFKerikeriMix.KerikeriMix.Field.Soil.Physical.LucerneSoil
                SoilCrop AGPTallFescueSoil: LL=[0.22, 0.219, 0.177, 0.139, 0.125, 0.102, 0.083]; KL=[0.1, 0.085, 0.055, 0.02, 0.005, 0, 0]; XF=[1, 1, 1, 1, 1, 1, 1]
                SoilCrop ChicorySoil: same as Evaluation.NewZealand.SFFFKerikeriMix.KerikeriMix.Field.Soil.Physical.ChicorySoil
              WaterBalance SoilWater: SummerDate=1-Nov; SummerU=6; SummerCona=3.5; WinterDate=1-apr; WinterU=3; WinterCona=1.5; DiffusConst=88; DiffusSlope=35; Salb=0.13; CN2Bare=73; CNRed=20; CNCov=0.8; PSIDul=-100; Thickness=[100, 100, 100, 100, 200, 200]; SWCON=[0.5, 0.41, 0.27, 0.39, 0.49, 0.42]
              Organic: FOMCNRatio=40; CarbonUnits=Total
                Thickness  Carbon  SoilCNRatio  FBiom  FInert  FOM
                100        2.5     11.1         0.08   0.4     650
                100        2.1     11.2         0.04   0.695   350
                100        1.1     10.5         0.03   0.845   175
                100        0.5     9            0.02   0.89    60
                200        0.3     7.6          0.01   0.96    15
                200        0.3     6.8          0.01   0.99    0
              Water: Thickness=[100, 100, 100, 100, 200, 200]; InitialValues=[0.355, 0.328, 0.33, 0.339, 0.324, 0.3145]; FilledFromTop=true
              Nutrient
              Solute NO3: Thickness=[100, 100, 100, 100, 200, 200]; InitialValues=[4, 3, 1.5, 1.5, 1.5, 0.78]; InitialValuesUnits=ppm; WaterTableConcentration=0; D0=0; DepthConstant=0; MaxDepthSoluteAccessible=0; RunoffEffectivenessAtMovingSolute=0; MaxEffectiveRunoff=0
              Solute NH4: Thickness=[100, 100, 100, 100, 200, 200]; InitialValues=[0.493827, 0.34965, 0.2, 0.2, 0.135135, 0.070922]; InitialValuesUnits=ppm; WaterTableConcentration=0; D0=0; DepthConstant=0; MaxDepthSoluteAccessible=0; RunoffEffectivenessAtMovingSolute=0; MaxEffectiveRunoff=0
              Solute Urea: same as Evaluation.NewZealand.SFFFManawatuMix.ManawatuMix.Field.Soil.Urea
              SoilTemperature Temperature
            Plant Chicory
            Plant PlantainForage
            PastureSpecies AGPRyegrass: same as Evaluation.NewZealand.SFFFKerikeriMix.KerikeriMix.Field.AGPRyegrass
            PastureSpecies AGPWhiteClover: same as Evaluation.NewZealand.SFFFKerikeriMix.KerikeriMix.Field.AGPWhiteClover
            PastureSpecies AGPTallFescue: same as Evaluation.NewZealand.SFFFKerikeriMix.KerikeriMix.Field.AGPTallFescue
            Report: same as Evaluation.NewZealand.FRNLRuakuraMix2.FRNLRuakuraMix2.Field.Report
      Experiment SFFFSouthlandMix
        DisabledSimNames=[FRNLRuakuraNRate50, FRNLRuakuraNRate100, FRNLRuakuraNRate200, FRNLRuakuraNRate350]
        Memo: same as Evaluation.NewZealand.SFFFWaikatoAllophanicMix.Memo
        Factors
          Factor Sowing
            CompositeFactor 0-PR: Specifications=[Sowing]
              Operations Sowing
                2021-12-01  [AGPWhiteClover].EndCrop()
                2021-12-01  [AGPRyegrass].EndCrop()
                2021-12-01  [AGPTallFescue].EndCrop()
                2021-12-08  [AGPRyegrass].Sow(population: 0, cultivar: "R", depth: 0, rowSpacing: 0)
            CompositeFactor 100-P: Specifications=[Sowing]
              Operations Sowing
                2021-12-01  [AGPWhiteClover].EndCrop()
                2021-12-01  [AGPRyegrass].EndCrop()
                2021-12-01  [AGPTallFescue].EndCrop()
                2021-12-08  [PlantainForage].Sow(population: 100, cultivar: "Tonic", depth: 10, rowSpacing: 150)
            CompositeFactor 15-PR: Specifications=[Sowing]
              Operations Sowing
                2021-12-01  [AGPWhiteClover].EndCrop()
                2021-12-01  [AGPRyegrass].EndCrop()
                2021-12-01  [AGPTallFescue].EndCrop()
                2021-12-08  [AGPRyegrass].Sow(population: 0, cultivar: "R", depth: 0, rowSpacing: 0)
                2021-12-08  [PlantainForage].Sow(population: 100, cultivar: "Tonic", depth: 10, rowSpacing: 150)
            CompositeFactor 30-HR: same as Evaluation.NewZealand.SFFFSouthlandMix.Factors.Sowing.15-PR
            CompositeFactor 30-IR: same as Evaluation.NewZealand.SFFFSouthlandMix.Factors.Sowing.15-PR
            CompositeFactor 30-PR: same as Evaluation.NewZealand.SFFFSouthlandMix.Factors.Sowing.15-PR
            CompositeFactor 30-PRWC: Specifications=[Sowing]
              Operations Sowing
                2021-12-01  [AGPWhiteClover].EndCrop()
                2021-12-01  [AGPRyegrass].EndCrop()
                2021-12-01  [AGPTallFescue].EndCrop()
                2021-12-08  [AGPRyegrass].Sow(population: 0, cultivar: "R", depth: 0, rowSpacing: 0)
                2021-12-08  [PlantainForage].Sow(population: 30, cultivar: "Tonic", depth: 10, rowSpacing: 150)
                2021-12-08  [AGPWhiteClover].Sow(population: 50, cultivar: "W", depth: 0, rowSpacing: 0)
            CompositeFactor 30-TF: Specifications=[Sowing]
              Operations Sowing
                2021-12-01  [AGPWhiteClover].EndCrop()
                2021-12-01  [AGPRyegrass].EndCrop()
                2021-12-01  [AGPTallFescue].EndCrop()
                2021-12-08  [PlantainForage].Sow(population: 30, cultivar: "Tonic", depth: 10, rowSpacing: 150)
                2021-12-08  [AGPTallFescue].Sow(population: 70, cultivar: "R", depth: 0, rowSpacing: 0)
            CompositeFactor 30-TR: Specifications=[Sowing]
              Operations Sowing
                2021-12-01  [AGPWhiteClover].EndCrop()
                2021-12-01  [AGPRyegrass].EndCrop()
                2021-12-01  [AGPTallFescue].EndCrop()
                2021-12-08  [AGPRyegrass].Sow(population: 0, cultivar: "R", depth: 0, rowSpacing: 0)
                2021-12-08  [PlantainForage].Sow(population: 30, cultivar: "Tonic", depth: 10, rowSpacing: 150)
            CompositeFactor 50-PR: same as Evaluation.NewZealand.SFFFSouthlandMix.Factors.Sowing.15-PR
        Simulation SouthlandMix
          Clock: Start=2021-12-08; End=2024-12-05
          Weather: FileName=SouthlandNASA.met
          Summary summaryfile
          SoilArbitrator Soil Arbitrator
          Forages: same as Evaluation.NewZealand.SFFFKerikeriMix.KerikeriMix.Forages
          Zone Field: Area=1; Slope=0; AspectAngle=0; Altitude=50
            Folder Management
              Operations Sowing
              Operations NRate
                2021-12-08  [Fertiliser].Apply(amount: 200, type: "DAP", depth: 10)
                2022-02-09  [Fertiliser].Apply(amount: 40, type: "UreaN", depth: 10)
                2022-02-16  [Fertiliser].Apply(amount: 188, type: "UreaN", depth: 10)
                2022-03-02  [Fertiliser].Apply(amount: 191.6, type: "UreaN", depth: 10)
                2022-04-13  [Fertiliser].Apply(amount: 149, type: "UreaN", depth: 10)
                2022-08-29  [Fertiliser].Apply(amount: 156.5, type: "UreaN", depth: 10)
                2022-10-20  [Fertiliser].Apply(amount: 200, type: "DAP", depth: 10)
                2022-10-20  [Fertiliser].Apply(amount: 100, type: "UreaN", depth: 10)
                2022-11-10  [Fertiliser].Apply(amount: 163, type: "UreaN", depth: 10)
                2022-12-05  [Fertiliser].Apply(amount: 163, type: "UreaN", depth: 10)
                2023-01-13  [Fertiliser].Apply(amount: 195, type: "UreaN", depth: 10)
                2023-02-09  [Fertiliser].Apply(amount: 130.4, type: "UreaN", depth: 10)
                2023-03-07  [Fertiliser].Apply(amount: 50, type: "UreaN", depth: 10)
                2023-03-07  [Fertiliser].Apply(amount: 210, type: "DAP", depth: 10)
                2023-04-21  [Fertiliser].Apply(amount: 130, type: "UreaN", depth: 10)
                2023-09-06  [Fertiliser].Apply(amount: 140, type: "UreaN", depth: 10)
                2023-10-19  [Fertiliser].Apply(amount: 162, type: "UreaN", depth: 10)
                2023-11-08  [Fertiliser].Apply(amount: 140, type: "UreaN", depth: 10)
                2023-12-22  [Fertiliser].Apply(amount: 129, type: "UreaN", depth: 10)
                2024-01-26  [Fertiliser].Apply(amount: 166, type: "UreaN", depth: 10)
                2024-02-27  [Fertiliser].Apply(amount: 120, type: "UreaN", depth: 10)
                2024-02-27  [Fertiliser].Apply(amount: 250, type: "DAP", depth: 10)
                2024-03-25  [Fertiliser].Apply(amount: 150, type: "UreaN", depth: 10)
                2024-05-23  [Fertiliser].Apply(amount: 140, type: "UreaN", depth: 10)
                2024-08-14  [Fertiliser].Apply(amount: 150, type: "UreaN", depth: 10)
                2024-08-25  [Fertiliser].Apply(amount: 65, type: "UreaN", depth: 10)
                2024-09-20  [Fertiliser].Apply(amount: 100, type: "UreaN", depth: 10)
                2024-11-11  [Fertiliser].Apply(amount: 200, type: "UreaN", depth: 10)
              Manager DefoliationManager: same as Evaluation.NewZealand.FRNLRuakuraMix2.FRNLRuakuraMix2.Field.Management.DefoliationManager
              Operations DefoliationSchedule
                2022-02-08  [DefoliationManager].Script.Defoliate(defoliationType: "Cut", amountDM: 100, amountType: "ResidualDM", duration: 1)
                2022-03-02  [DefoliationManager].Script.Defoliate(defoliationType: "Cut", amountDM: 100, amountType: "ResidualDM", duration: 1)
                2022-03-29  [DefoliationManager].Script.Defoliate(defoliationType: "Cut", amountDM: 100, amountType: "ResidualDM", duration: 1)
                2022-05-10  [DefoliationManager].Script.Defoliate(defoliationType: "Cut", amountDM: 100, amountType: "ResidualDM", duration: 1)
                2022-07-04  [DefoliationManager].Script.Defoliate(defoliationType: "Cut", amountDM: 100, amountType: "ResidualDM", duration: 1)
                2022-08-29  [DefoliationManager].Script.Defoliate(defoliationType: "Cut", amountDM: 100, amountType: "ResidualDM", duration: 1)
                2022-10-10  [DefoliationManager].Script.Defoliate(defoliationType: "Cut", amountDM: 100, amountType: "ResidualDM", duration: 1)
                2022-11-10  [DefoliationManager].Script.Defoliate(defoliationType: "Cut", amountDM: 100, amountType: "ResidualDM", duration: 1)
                2022-12-05  [DefoliationManager].Script.Defoliate(defoliationType: "Cut", amountDM: 100, amountType: "ResidualDM", duration: 1)
                2023-01-05  [DefoliationManager].Script.Defoliate(defoliationType: "Cut", amountDM: 100, amountType: "ResidualDM", duration: 1)
                2023-01-30  [DefoliationManager].Script.Defoliate(defoliationType: "Cut", amountDM: 100, amountType: "ResidualDM", duration: 1)
                2023-03-06  [DefoliationManager].Script.Defoliate(defoliationType: "Cut", amountDM: 100, amountType: "ResidualDM", duration: 1)
                2023-04-18  [DefoliationManager].Script.Defoliate(defoliationType: "Cut", amountDM: 100, amountType: "ResidualDM", duration: 1)
                2023-05-30  [DefoliationManager].Script.Defoliate(defoliationType: "Cut", amountDM: 100, amountType: "ResidualDM", duration: 1)
                2023-08-31  [DefoliationManager].Script.Defoliate(defoliationType: "Cut", amountDM: 100, amountType: "ResidualDM", duration: 1)
                2023-10-09  [DefoliationManager].Script.Defoliate(defoliationType: "Cut", amountDM: 100, amountType: "ResidualDM", duration: 1)
                2023-11-08  [DefoliationManager].Script.Defoliate(defoliationType: "Cut", amountDM: 100, amountType: "ResidualDM", duration: 1)
                2023-12-07  [DefoliationManager].Script.Defoliate(defoliationType: "Cut", amountDM: 100, amountType: "ResidualDM", duration: 1)
                2024-01-08  [DefoliationManager].Script.Defoliate(defoliationType: "Cut", amountDM: 100, amountType: "ResidualDM", duration: 1)
                2024-02-13  [DefoliationManager].Script.Defoliate(defoliationType: "Cut", amountDM: 100, amountType: "ResidualDM", duration: 1)
                2024-03-14  [DefoliationManager].Script.Defoliate(defoliationType: "Cut", amountDM: 100, amountType: "ResidualDM", duration: 1)
                2024-05-03  [DefoliationManager].Script.Defoliate(defoliationType: "Cut", amountDM: 100, amountType: "ResidualDM", duration: 1)
                2024-07-17  [DefoliationManager].Script.Defoliate(defoliationType: "Cut", amountDM: 100, amountType: "ResidualDM", duration: 1)
                2024-09-23  [DefoliationManager].Script.Defoliate(defoliationType: "Cut", amountDM: 100, amountType: "ResidualDM", duration: 1)
                2024-11-11  [DefoliationManager].Script.Defoliate(defoliationType: "Cut", amountDM: 100, amountType: "ResidualDM", duration: 1)
                2024-12-04  [DefoliationManager].Script.Defoliate(defoliationType: "Cut", amountDM: 100, amountType: "ResidualDM", duration: 1)
              Manager ExtraVariables
                script: same as in Evaluation.NewZealand.FRNLRuakuraMix1.FRNLRuakuraMix1.Field.Management.ExtraVariables
              Manager SettingUpParams: same as Evaluation.NewZealand.FRNLRuakuraMix2.FRNLRuakuraMix2.Field.Management.SettingUpParams
            MicroClimate: a_interception=0; b_interception=1; c_interception=0; d_interception=0; SoilHeatFluxFraction=0.4; MinimumHeightDiffForNewLayer=0; NightInterceptionFraction=0.5; ReferenceHeight=2
            Irrigation
            Fertiliser
            SurfaceOrganicMatter: InitialResidueName=grass; InitialResidueType=grass; InitialResidueMass=500; InitialStandingFraction=0; InitialCPR=0; InitialCNR=40
            Soil: SoilType=Typic Orthic Brown; LocalName=Southland; Site=273 Edendale-Seaward Downs Rd; NearestTown=Edendale; Region=Southland; Country=New Zealand; NaturalVegetation=long term grass; Latitude=-46.3415; Longitude=168.781; LocationAccuracy=+/-50 m; YearOfSampling=2022; DataSource=Plantain Potency and Practice SFFF Dairy NZ
              Physical
                Thickness  ParticleSizeSand  ParticleSizeSilt  ParticleSizeClay  Rocks  BD    AirDry  LL15   DUL    SAT    KS
                100        13.735            74.265            12                0      0.94  0.032   0.19   0.534  0.627  1996.371
                100        13.063            72.937            14                0      1.13  0.028   0.207  0.477  0.568  917.695
                100        2.554             78.446            19                0      1.11  0.025   0.185  0.43   0.58   311.124
                100        6.973             75.027            18                0      1.23  0.023   0.21   0.448  0.535  268.836
                200        24.063            58.467            17.47             0      1.29  0.023   0.219  0.444  0.512  656.485
                200        42.878            43.552            13.57             0      1.32  0.023   0.228  0.44   0.501  1184.37
                200        45.032            41.968            13                0      1.45  0.019   0.208  0.446  0.452  1423.197
                SoilCrop PlantainForageSoil: LL=[0.163, 0.159, 0.171, 0.181, 0.158, 0.101, 0.085]; KL=[0.1, 0.095, 0.08, 0.05, 0.02, 0.015, 0.01]; XF=[1, 1, 1, 1, 1, 1, 1]
                SoilCrop AGPRyegrassSoil: LL=[0.22, 0.219, 0.177, 0.139, 0.125, 0.102, 0.083]; KL=[0.1, 0.085, 0.055, 0.02, 0.005, 0, 0]; XF=[1, 1, 1, 1, 1, 1, 1]
                SoilCrop WhiteCloverSoil: LL=[0.22, 0.219, 0.177, 0.139, 0.125, 0.102, 0.083]; KL=[0.085, 0.077, 0.04, 0.01, 0.001, 0, 0]; XF=[1, 1, 1, 1, 1, 1, 1]
                SoilCrop AGPWhiteCloverSoil: LL=[0.22, 0.219, 0.177, 0.139, 0.125, 0.102, 0.083]; KL=[0.085, 0.05, 0, 0, 0, 0, 0]; XF=[1, 1, 1, 1, 1, 1, 1]
                SoilCrop LucerneSoil: same as Evaluation.NewZealand.SFFFKerikeriMix.KerikeriMix.Field.Soil.Physical.LucerneSoil
                SoilCrop AGPTallFescueSoil: LL=[0.22, 0.219, 0.177, 0.139, 0.125, 0.102, 0.083]; KL=[0.1, 0.085, 0.055, 0.02, 0.005, 0, 0]; XF=[1, 1, 1, 1, 1, 1, 1]
                SoilCrop ChicorySoil: same as Evaluation.NewZealand.SFFFKerikeriMix.KerikeriMix.Field.Soil.Physical.ChicorySoil
              WaterBalance SoilWater: SummerDate=1-Nov; SummerU=6; SummerCona=3.5; WinterDate=1-Apr; WinterU=3; WinterCona=2; DiffusConst=88; DiffusSlope=35; Salb=0.13; CN2Bare=73; CNRed=20; CNCov=0.8; PSIDul=-100; Thickness=[100, 100, 100, 100, 200, 200, 200]; SWCON=[0.638, 0.566, 0.547, 0.45, 0.558, 0.614, 0.546]
              Organic: FOMCNRatio=40; CarbonUnits=Total
                Thickness  Carbon  SoilCNRatio  FBiom  FInert  FOM
                100        6.7     10.5         0.08   0.329   450
                100        4.4     10.4         0.055  0.418   400
                100        3.2     10.7         0.035  0.702   180
                100        2.2     10.2         0.025  0.876   170
                200        1.7     10.1         0.018  0.943   30
                200        1.2     9.7          0.013  0.96    10
                200        0.9     9            0.01   0.969   6
              Chemical: PHUnits=Water
                Thickness  PH   CEC
                100        6    26
                100        5.8  20.8
                100        5.9  17.4
                100        5.6  13.1
                200        5.6  11.6
                200        5.8  10.2
                200        5.9  9.8
              Nutrient
              Water: Thickness=[100, 100, 100, 100, 200, 200, 200]; InitialValues=[0.534, 0.477, 0.43, 0.448, 0.444, 0.4333, 0.208]; FilledFromTop=true
              Solute NO3: Thickness=[100, 100, 100, 100, 200, 200, 200]; InitialValues=[10, 7, 3, 1, 1, 1, 1]; InitialValuesUnits=ppm; WaterTableConcentration=0; D0=0; DepthConstant=0; MaxDepthSoluteAccessible=0; RunoffEffectivenessAtMovingSolute=0; MaxEffectiveRunoff=0
              Solute NH4: Thickness=[100, 100, 100, 100, 200, 200, 200]; InitialValues=[2, 1, 0.5, 0.3, 0.2, 0.2, 0.2]; InitialValuesUnits=ppm; WaterTableConcentration=0; D0=0; DepthConstant=0; MaxDepthSoluteAccessible=0; RunoffEffectivenessAtMovingSolute=0; MaxEffectiveRunoff=0
              Solute Urea: same as Evaluation.NewZealand.SFFFWaikatoAllophanicMix.WaikatoMixAllophanic.Field.Soil.Urea
              SoilTemperature Temperature
            Plant Chicory
            Plant PlantainForage
            PastureSpecies AGPRyegrass: same as Evaluation.NewZealand.SFFFKerikeriMix.KerikeriMix.Field.AGPRyegrass
            PastureSpecies AGPWhiteClover: same as Evaluation.NewZealand.SFFFKerikeriMix.KerikeriMix.Field.AGPWhiteClover
            PastureSpecies AGPTallFescue: same as Evaluation.NewZealand.SFFFKerikeriMix.KerikeriMix.Field.AGPTallFescue
            Report: same as Evaluation.NewZealand.FRNLRuakuraMix2.FRNLRuakuraMix2.Field.Report
    Folder Denmark
      Experiment FoulumMix1
        Memo
          ###Foulum species competition###

          This simulation setup was based on field trials performed at the the Foulumgaard Experimental Station, Aarhus University, Denmark, between 2013 and 2015.  The trial was part of an experiment studying species competition in multi-species sward in a dairy organic farming context.  This comprises the establishement of plots sown with various species in monoculture and in a few combinations, either varying the number and type of species or the relative sowing rate.  The plots received either no N fertiliser or a nominal annual rate of 250 kgN/ha applied as cattle slurry.  Details of the site and trial can be found in publications ([#CongEtAl2017]; [#CongAndEriksen2018]; and [#CongEtAl2018]).  Here only a selection of plots with mixed pasture species are used, these involved ryegrass, red clover, chicory and ribwort plantain (weeds also occurred, but are not included in the simulation - the fraction of biomass was fairly small).  In these plots ryegrass and red clover were sown in equal proportion with either chicory or plantain; the proportion of forbs was set to either 20% or 60% of the sown population (thus ryegrass and clover populations were, respectively, at 40% or 20% each).  Each treatment combining sowing rate and N inputs had three replicates.  Measurements comprised total yield and respective values for each species.
          Observed data supplied by Wen Feng Cong and Jorgen Eriksen, Aarhus University.

          The soil at the experimental site was a loamy sand (a Typic Hapludult on the USDA classification), the parameters required were derived from data published and slightly adjusted with measurements done at the experimental site ([#JacobsenFoulum1989]; [#HeidmannFoulum1989]).
          Weather data was obtained from nearby weather station (Aarhus University).
          Simulation of ryegrass is done using the AgPasture model as the PMF version is still under development.
          The cultivars used are those developed for New Zealand conditions, this will need rectifying in the future.
        Factors
          Permutation
            Factor NInputs: Specification=[FertiliserSchedule]
              Operations Nil
              Operations Slurry
                2014-04-01  [SurfaceOrganicMatter].Add(mass: 1022.7, N: 40.9, P: 0.0, type: "fym", name: "slurry")
                2014-04-01  [Fertiliser].Apply(amount: 50.0, type: "NH4N", depth: 5)
                2014-06-04  [SurfaceOrganicMatter].Add(mass: 481.5, N: 19.3, P: 0.0, type: "fym", name: "slurry")
                2014-06-04  [Fertiliser].Apply(amount: 20.0, type: "NH4N", depth: 5)
                2014-07-03  [SurfaceOrganicMatter].Add(mass: 478.6, N: 19.1, P: 0.0, type: "fym", name: "slurry")
                2014-07-03  [Fertiliser].Apply(amount: 24.4, type: "NH4N", depth: 5)
                2014-08-22  [SurfaceOrganicMatter].Add(mass: 560.5, N: 22.4, P: 0.0, type: "fym", name: "slurry")
                2014-08-22  [Fertiliser].Apply(amount: 19.1, type: "NH4N", depth: 5)
                2015-04-07  [SurfaceOrganicMatter].Add(mass: 1022.7, N: 40.9, P: 0.0, type: "fym", name: "slurry")
                2015-04-07  [Fertiliser].Apply(amount: 50.0, type: "NH4N", depth: 5)
                2015-06-10  [SurfaceOrganicMatter].Add(mass: 481.5, N: 19.3, P: 0.0, type: "fym", name: "slurry")
                2015-06-10  [Fertiliser].Apply(amount: 20.0, type: "NH4N", depth: 5)
                2015-07-21  [SurfaceOrganicMatter].Add(mass: 478.6, N: 19.1, P: 0.0, type: "fym", name: "slurry")
                2015-07-21  [Fertiliser].Apply(amount: 24.4, type: "NH4N", depth: 5)
                2015-09-03  [SurfaceOrganicMatter].Add(mass: 560.5, N: 22.4, P: 0.0, type: "fym", name: "slurry")
                2015-09-03  [Fertiliser].Apply(amount: 19.1, type: "NH4N", depth: 5)
            Factor SpeciesMix: Specification=[Sowing]
              Operations NoForbs
                2013-05-06  [RedClover].Sow(population: 250, cultivar: "Rajah", depth: 5, rowSpacing: 150)
                2013-01-01  [AGPRyegrass].EndCrop()
                2013-05-31  [AGPRyegrass].Sow(population: 0, cultivar: "R", depth: 0, rowSpacing: 0)
        Simulation FoulumMix1
          Clock: Start=2013-01-01; End=2015-12-31
          Weather: FileName=Foulum.met
          Summary summaryfile
          SoilArbitrator Soil Arbitrator
          Forages
            Parameters:
              Name                          LiveDigestibility  DeadDigestibility  LiveFractionConsumable  DeadFractionConsumable  LiveMinimumBiomass  DeadMinimumBiomass
              SurfaceOrganicMatter.Residue  0.7                0.3                1                       1                       100                 0
              RedClover.Leaf                0.7                0.3                1                       1                       100                 0
              RedClover.Petiole             0.7                0.3                1                       1                       100                 0
              RedClover.Stem                0.7                0.3                1                       1                       100                 0
              RedClover.Inflorescence       0.7                0.3                1                       1                       100                 0
              RedClover.Nodule              0.7                0.3                1                       1                       100                 0
              RedClover.Taproot             0.7                0.3                1                       1                       100                 0
              RedClover.Root                0                  0                  0                       0                       0                   0
              AGPRyegrass.Leaf              0.7                0.3                1                       1                       100                 0
              AGPRyegrass.Stem              0.7                0.3                1                       1                       100                 0
              AGPRyegrass.Stolon            0.7                0.3                1                       1                       100                 0
          Zone Field: Area=1; Slope=0; AspectAngle=0; Altitude=50
            Folder Management
              Operations Sowing
              Operations BaseNApplication
                2013-05-03  [SurfaceOrganicMatter].Add(mass: 5114, N: 40.9, P: 0.0, type: "fym", name: "slurry")
                2013-05-03  [Fertiliser].Apply(amount: 50, type: "NH4N", depth: 5)
              Operations FertiliserSchedule
              Operations IrrigationSchedulle
                2013-07-17  [Irrigation].Apply(amount: 25)
                2013-08-28  [Irrigation].Apply(amount: 25)
                2014-12-06  [Irrigation].Apply(amount: 33)
                2014-07-04  [Irrigation].Apply(amount: 25)
              Manager DefoliationManager: same as Evaluation.NewZealand.FRNLRuakuraMix2.FRNLRuakuraMix2.Field.Management.DefoliationManager
              Operations DefoliationSchedule
                2013-07-04  [DefoliationManager].Script.Defoliate(defoliationType: "Cut", amountDM: 100, amountType: "ResidualDM", duration: 1)
                2013-10-01  [DefoliationManager].Script.Defoliate(defoliationType: "Cut", amountDM: 100, amountType: "ResidualDM", duration: 1)
                2014-05-22  [DefoliationManager].Script.Defoliate(defoliationType: "Cut", amountDM: 100, amountType: "ResidualDM", duration: 1)
                2014-07-02  [DefoliationManager].Script.Defoliate(defoliationType: "Cut", amountDM: 100, amountType: "ResidualDM", duration: 1)
                2014-08-20  [DefoliationManager].Script.Defoliate(defoliationType: "Cut", amountDM: 100, amountType: "ResidualDM", duration: 1)
                2014-10-06  [DefoliationManager].Script.Defoliate(defoliationType: "Cut", amountDM: 100, amountType: "ResidualDM", duration: 1)
                2015-06-01  [DefoliationManager].Script.Defoliate(defoliationType: "Cut", amountDM: 100, amountType: "ResidualDM", duration: 1)
                2015-07-14  [DefoliationManager].Script.Defoliate(defoliationType: "Cut", amountDM: 100, amountType: "ResidualDM", duration: 1)
                2015-08-24  [DefoliationManager].Script.Defoliate(defoliationType: "Cut", amountDM: 100, amountType: "ResidualDM", duration: 1)
                2015-10-19  [DefoliationManager].Script.Defoliate(defoliationType: "Cut", amountDM: 100, amountType: "ResidualDM", duration: 1)
              Manager ExtraVariables
                script: same as in Evaluation.NewZealand.FRNLRuakuraMix1.FRNLRuakuraMix1.Field.Management.ExtraVariables
              Manager SettingUpParams
                setParamStartDate = 01/01/2013 00:00:00
                setParamHeight = 250
```csharp
// Set some plant parameters, for tests and development
// Following suggestions by Val Snow: Plant competition seem to be better done if heights are all the same (maybe due to some issue/feature of MicroClimate)

using APSIM.Core;
using System;
using Models.Core;
using System.Collections.Generic;
using System.Text;
using Models;
using Models.Soils;
using Models.PMF;
using System.Xml.Serialization;
using APSIM.Shared.Utilities;

namespace Models
{
    [Serializable]
    public class Script : Model, IStructureDependency
    {
        [Link] private Clock Clock;
        [Link] private Zone myZone;
        public IStructure Structure { private get; set; }


        //User inputs from properties tab
        [Separator("Setting up some parameters of plants")]
        [Description(" Enter the date to set plant parameters (dd/mm/yyyy):")]
        public DateTime setParamStartDate { get; set; }
        [Description(" Enter the height to set all plants to (mm):")]
        public double setParamHeight { get; set; }


        //Internal variables



        

        [EventSubscribe("StartOfSimulation")]
        private void OnSimulationCommencing(object sender, EventArgs e)
        {
            // make sure that manager will work when startDate<simulationStartDay
            if (Clock.Today > setParamStartDate)
                setParamStartDate = Clock.Today;
        }

        [EventSubscribe("StartOfDay")]
        private void OnStartOfDay(object sender, EventArgs e)
        {
            // make sure that rotation start when startDate<simulationStartDay
            if (Clock.Today == setParamStartDate)
            {
                double[] xVals = new double[] {0, 10};
                double[] yVals = new double[] {setParamHeight, setParamHeight};
                Structure.Set("RedClover.Leaf.HeightFunction.XYPairs.X", xVals, relativeTo: myZone);
                Structure.Set("RedClover.Leaf.HeightFunction.XYPairs.Y", yVals, relativeTo: myZone);
                /*Structure.Set("Ryegrass.PlantHeightMaximum", setParamHeight, relativeTo: myZone);
                Structure.Set("Ryegrass.PlantHeightMinimum", setParamHeight, relativeTo: myZone);*/
            }
        }
    }
}
```
            MicroClimate: a_interception=0; b_interception=1; c_interception=0; d_interception=0; SoilHeatFluxFraction=0.4; MinimumHeightDiffForNewLayer=0; NightInterceptionFraction=0.5; ReferenceHeight=2
            Irrigation
            Fertiliser
            SurfaceOrganicMatter: InitialResidueName=grass; InitialResidueType=grass; InitialResidueMass=1000; InitialStandingFraction=0; InitialCPR=0; InitialCNR=40
            Soil: SoilType=Typic Hapludult (US); LocalName=Loamy Sandy Soil; Site=Foulum; NearestTown=Tjelle; Region=Viborg; Country=Denmark; Latitude=0; Longitude=0
              DataSource=Based on data published by Jacobsen (1989) and Heidmann et al (1989)
              Chemical: Thickness=[200, 250, 250, 300, 250, 250]; PH=[6, 6, 6, 6, 6, 6]; PHUnits=Water
              Physical
                Thickness  ParticleSizeClay  BD    AirDry  LL15   DUL    SAT    KS
                200        6.7               1.47  0.024   0.072  0.299  0.42   1467
                250        6.2               1.44  0.053   0.056  0.268  0.437  1039
                250        7.1               1.65  0.054   0.054  0.182  0.377  4748
                300        4.6               1.73  0.049   0.049  0.2    0.342  882
                250        7.7               1.76  0.054   0.054  0.219  0.305  655
                250        7.7               1.86  0.062   0.062  0.219  0.294  612
                SoilCrop ChicorySoil: LL=[0.072, 0.056, 0.054, 0.049, 0.054, 0.062]; KL=[0.07, 0.06, 0.03, 0.01, 0.004, 0.002]; XF=[1, 1, 1, 1, 1, 1]
                SoilCrop PlantainForageSoil: LL=[0.072, 0.056, 0.054, 0.049, 0.054, 0.062]; KL=[0.08, 0.07, 0.04, 0.013, 0.005, 0]; XF=[1, 1, 1, 1, 1, 1]
                SoilCrop AGPRyegrassSoil: LL=[0.072, 0.056, 0.054, 0.049, 0.054, 0.062]; KL=[0.1, 0.085, 0.047, 0.01, 0.003, 0]; XF=[1, 1, 1, 1, 1, 1]
                SoilCrop RedCloverSoil: LL=[0.072, 0.056, 0.054, 0.049, 0.054, 0.062]; KL=[0.085, 0.075, 0.033, 0.002, 0, 0]; XF=[1, 1, 1, 1, 1, 1]
              WaterBalance SoilWater: SummerDate=15-Sep; SummerU=6; SummerCona=3; WinterDate=15-Apr; WinterU=3; WinterCona=1; DiffusConst=88; DiffusSlope=35; Salb=0.2; CN2Bare=70; CNRed=20; CNCov=0.8; DischargeWidth=0; CatchmentArea=0; PSIDul=-100
                Thickness  SWCON  KLAT
                200        0.391  0
                250        0.304  0
                250        0.437  0
                300        0.291  0
                250        0.334  0
                250        0.343  0
              Nutrient
              Organic: FOMCNRatio=40; CarbonUnits=Total
                Thickness  Carbon  SoilCNRatio  FBiom  FInert  FOM
                200        1.89    11.9         0.065  0.1     1000
                250        0.99    11.9         0.02   0.275   750
                250        0.45    11.9         0.015  0.65    310
                300        0.12    11.9         0.01   0.8     160
                250        0.06    11.9         0.007  0.95    25
                250        0.06    11.9         0.005  0.99    5
              Water: Thickness=[200, 250, 250, 300, 250, 250]; InitialValues=[0.299, 0.268, 0.182, 0.2, 0.219, 0.219]; FilledFromTop=false
              Solute NO3: Thickness=[200, 250, 250, 300, 250, 250]; InitialValues=[5.10204, 1.94444, 0.536769, 0.536769, 0.331492, 0.331492]; InitialValuesUnits=ppm; WaterTableConcentration=0; D0=0; DepthConstant=0; MaxDepthSoluteAccessible=0; RunoffEffectivenessAtMovingSolute=0; MaxEffectiveRunoff=0
              Solute NH4: Thickness=[200, 250, 250, 300, 250, 250]; InitialValuesUnits=ppm; WaterTableConcentration=0; D0=0; DepthConstant=0; MaxDepthSoluteAccessible=0; RunoffEffectivenessAtMovingSolute=0; MaxEffectiveRunoff=0
                InitialValues=[0.340136, 0.138889, 0.0536769, 0.0536769, 0.0276243, 0.0276243]
              Solute Urea: Thickness=[200, 250, 250, 300, 250, 250]; InitialValues=[0, 0, 0, 0, 0, 0]; InitialValuesUnits=kg/ha; WaterTableConcentration=0; D0=0; DepthConstant=0; MaxDepthSoluteAccessible=0; RunoffEffectivenessAtMovingSolute=0; MaxEffectiveRunoff=0
              SoilTemperature Temperature
            Plant RedClover
            PastureSpecies AGPRyegrass: doyGermination=275; daysEmergenceToAnthesis=120; daysAnthesisToMaturity=85; degreesDayForAnthesis=1100; degreesDayForMaturity=900; daysAnnualsFactor=45; CanopyType=PastureSpecies; InitialShootDM=1500; InitialRootDM=450; InitialRootDepth=750; initialDMFractionsGrasses=[0.15, 0.25, 0.25, 0.05, 0.05, 0.1, 0.1, 0.05, 0, 0, 0]; initialDMFractionsForbs=[0.2, 0.2, 0.15, 0.05, 0.1, 0.15, 0.1, 0.05, 0, 0, 0]; PhotosyntheticEfficiency=0.01; PhotosynthesisCurveFactor=0.8; FractionPAR=0.5; ReferenceCO2=380; CO2EffectScaleFactor=700; CO2EffectOffsetFactor=600; CO2EffectMinimum=0.7; CO2EffectExponent=2; ReproSeasonDurationCoeff=2; ReproSeasonShouldersLengthFactor=1; ReproSeasonOnsetDurationFactor=0.6; RelativeTurnoverEmerging=2; DetachmentDroughtCoefficient=3; DetachmentDroughtEffectMin=0.1; TurnoverStockFactor=0.01; TurnoverDefoliationEffectMin=0.025; MinimumGreenLeafProp=0.8; MinimumGreenRootProp=0.5
              initialDMFractionsLegumes=[0.16, 0.23, 0.22, 0.05, 0.03, 0.05, 0.05, 0.01, 0.04, 0.08, 0.08]
              LinearInterpolationFunction FVPDFunction
            Report: EventNames=[Clock].DoReport
              VariableNames:
                [Clock].Today as Date
                [Clock].Today.DayOfYear as DayOfYear
                [Weather].Radn as SolarRadiation
                [MicroClimate].NetRadiation
                ([RedClover].Leaf.RadiationIntercepted+[AGPRyegrass].InterceptedRadn) as InterceptedRadiation
                [Weather].MeanT
                [Weather].Rain as Rainfall
                [Irrigation].IrrigationApplied as IrrigationApplied
                [MicroClimate].PrecipitationInterception as PrecipitationInterception
                [MicroClimate].PetTotal
                [Soil].SoilWater.Eo as Eo
                [Soil].SoilWater.Es as Evaporation
                ([RedClover].Leaf.Transpiration+sum([AGPRyegrass].WaterUptake)) as Transpiration
                [Soil].SoilWater.pond as PondedWater
                [Soil].SoilWater.Drainage as Drainage
                [Soil].SoilWater.Runoff as Runoff
                sum([Soil].SoilWater.LateralOutflow) as LateralFlow
                sum([Soil].Water.MM) as TotalSWC
                sum([Soil].Physical.DULmm) as TotalDUL
                sum([Soil].Physical.LL15mm) as TotalLL15
                [Soil].Water.Volumetric[1] as SWCTopLayer
                [Soil].Physical.DUL[1] as DULTopLayer
                [Fertiliser].NitrogenApplied as FertiliserN
                sum([Soil].Nutrient.DenitrifiedN) as DenitrifiedN
                ([Soil].SoilWater.LeachNH4 + [Soil].SoilWater.LeachNO3) as LeachedN
                (([RedClover].Root.NTakenUp)*10+[AGPRyegrass].SoilUptakeN) as UptakeN
                sum([Soil].Nutrient.MineralisedN) as MineralisedSoilN
                sum([SurfaceOrganicMatter].SurfaceResidue.Decomposition.MineralisedN) as MineralisedSurfOMN
                ([RedClover].Leaf.Detached.N+[RedClover].Petiole.Detached.N+[RedClover].Stem.Detached.N+[RedClover].Inflorescence.Detached.N+[AGPRyegrass].LitterDepositionN*0.1) as DetachedAGN
                ([RedClover].Root.Detached.N+[AGPRyegrass].RootDetachedN*0.1) as DetachedBGN
                (10*([RedClover].Leaf.Detached.N+[RedClover].Petiole.Detached.N+[RedClover].Stem.Detached.N+[RedClover].Inflorescence.Detached.N+[RedClover].Taproot.Detached.N+[RedClover].Root.Detached.N)+[AGPRyegrass].LitterDepositionN+[AGPRyegrass].RootDetachedN) as DetachedTotalN
                10*[RedClover].Nodule.NFixed as FixedN
                (sum([Soil].Urea.kgha) + sum([Soil].NH4.kgha) + sum([Soil].NO3.kgha)) as SoilNContent
                sum([Soil].Urea.kgha) as SoilUrea
                sum([Soil].NH4.kgha) as SoilNH4
                sum([Soil].NO3.kgha) as SoilNO3
                (sum([Soil].NH4.kgha[1:4])+sum([Soil].NO3.kgha[1:4])) as TopSoilN
                [SurfaceOrganicMatter].N as TotalSurfOMN
                sum([Soil].Nutrient.FOM.N) as TotalFOMN
                sum([Soil].Nutrient.Humic.N) as TotalHumicN
                sum([Soil].Nutrient.Microbial.N as TotalMicrobialN
                [DefoliationManager].Script.RotationHarvestedDM as RotationHarvestedWt
                [DefoliationManager].Script.PreHarvestDM
                [DefoliationManager].Script.PostHarvestDM
                [DefoliationManager].Script.DefoliatedN as NTakenOff
                [DefoliationManager].Script.HarvestedN
                (10*[DefoliationManager].Script.RemovedN) as Defoliate.Script.RemovedN
                [DefoliationManager].Script.DefoliatedWt as HarvestedWt
                ([DefoliationManager].Script.RemovedN/([DefoliationManager].Script.RemovedWt+0.000001) as RemovedNConc
                [ExtraVariables].Script.AccumHarvestedWt as CumulativeHarvestedWt
                [ExtraVariables].Script.AccumHarvestedN as CumulativeNTakenOff
                ([RedClover].Total.Wt+[AGPRyegrass].TotalWt*0.1) as TotalPlantWt
                ([RedClover].AboveGroundLive.Wt+[AGPRyegrass].AboveGroundLiveWt*0.1+[RedClover].BelowGround.Wt+[AGPRyegrass].BelowGroundWt*0.1) as TotalPlantLiveWt
                ([RedClover].AboveGround.Wt+[AGPRyegrass].AboveGroundWt*0.1) as AboveGroundWt
                ([RedClover].BelowGround.Wt+[AGPRyegrass].BelowGroundWt*0.1) as BelowGroundWt
                ([RedClover].Total.N+[AGPRyegrass].TotalN*0.1) as TotalPlantN
                ([RedClover].AboveGround.N+[AGPRyegrass].AboveGroundN*0.1) as AboveGroundN
                ([RedClover].BelowGround.N+[AGPRyegrass].BelowGroundN*0.1) as BelowGroundN
                (([RedClover].AboveGround.N+[AGPRyegrass].AboveGroundN*0.1)/([RedClover].AboveGround.Wt+[AGPRyegrass].AboveGroundWt*0.1+0.000001)) as AboveGroundNConc
                (([RedClover].BelowGround.N+[AGPRyegrass].BelowGroundN*0.1)/([RedClover].BelowGround.Wt+[AGPRyegrass].BelowGroundWt*0.1+0.000001)) as BelowGroundNConc
                ([RedClover].AboveGroundLive.Wt+[AGPRyegrass].AboveGroundLiveWt*0.1) as AboveGroundLiveWt
                ([RedClover].AboveGroundLive.N+[AGPRyegrass].AboveGroundLiveN*0.1) as AboveGroundDeadWt
                ([RedClover].BelowGround.Wt+[AGPRyegrass].BelowGroundWt*0.1) as BelowGroundLiveWt
                (([RedClover].AboveGroundLive.N+[AGPRyegrass].AboveGroundLiveN*0.1)/([RedClover].AboveGroundLive.Wt+[AGPRyegrass].AboveGroundLiveWt*0.1+0.000001)) as AboveGroundLiveNc
                [ExtraVariables].Script.HerbageNConc as HerbageNConc
                ([AGPRyegrass].TotalWt*0.1) as Ryegrass.Total.Wt
                ([AGPRyegrass].AboveGroundLiveWt*0.1+[AGPRyegrass].BelowGroundWt*0.1) as Ryegrass.TotalLive.Wt
                ([AGPRyegrass].AboveGroundWt*0.1) as Ryegrass.AboveGround.Wt
                ([AGPRyegrass].BelowGroundWt*0.1) as Ryegrass.BelowGround.Wt
                ([AGPRyegrass].AboveGroundLiveWt*0.1) as Ryegrass.AboveGroundLive.Wt
                ([AGPRyegrass].AboveGroundDeadWt*0.1) as Ryegrass.AboveGroundDead.Wt
                ([AGPRyegrass].BelowGroundWt*0.1) as Ryegrass.BelowGroundLive.Wt
                ([AGPRyegrass].TotalN*0.1) as Ryegrass.Total.N
                ([AGPRyegrass].AboveGroundN*0.1) as Ryegrass.AboveGround.N
                ([AGPRyegrass].BelowGroundN*0.1) as Ryegrass.BelowGround.N
                [AGPRyegrass].AboveGroundNConc as Ryegrass.AboveGround.NConc
                ([AGPRyegrass].BelowGroundN/([AGPRyegrass].BelowGroundWt+0.000001)) as Ryegrass.BelowGround.NConc
                ([AGPRyegrass].AboveGroundLiveN/([AGPRyegrass].AboveGroundLiveWt+0.000001)) as Ryegrass.AboveGroundLive.NConc
                [AGPRyegrass].Standing.NConc as RyegrassHerbageNConc
                [RedClover].Total.Wt
                [RedClover].TotalLive.Wt
                [RedClover].AboveGround.Wt
                [RedClover].BelowGround.Wt
                [RedClover].AboveGroundLive.Wt
                [RedClover].AboveGroundDead.Wt
                [RedClover].BelowGroundLive.Wt
                [RedClover].Total.N
                [RedClover].AboveGround.N
                [RedClover].BelowGround.N
                [RedClover].AboveGround.NConc
                [RedClover].BelowGround.NConc
                [RedClover].AboveGroundLive.NConc
                (([RedClover].Leaf.N+[RedClover].Petiole.N+[RedClover].Inflorescence.N)/(([RedClover].Leaf.Wt+[RedClover].Petiole.Wt+[RedClover].Inflorescence.Wt+0.000001)) as RedCloverHerbageNConc
                ([RedClover].AboveGround.Wt/([RedClover].AboveGround.Wt+[AGPRyegrass].AboveGroundWt*0.1+0.000001)) as RedClover.BiomassFraction
                ([AGPRyegrass].AboveGroundWt*0.1/([RedClover].AboveGround.Wt+[AGPRyegrass].AboveGroundWt*0.1+0.000001)) as Ryegrass.BiomassFraction
                ([RedClover].AboveGround.N/([RedClover].AboveGround.N+[AGPRyegrass].AboveGroundN*0.1+0.000001)) as RedClover.NitrogenFraction
                ([AGPRyegrass].AboveGroundN*0.1/([RedClover].AboveGround.N+[AGPRyegrass].AboveGroundN*0.1+0.000001)) as Ryegrass.NitrogenFraction
                ([RedClover].Leaf.CoverTotal+[AGPRyegrass].CoverTotal) as CoverTotal
                ([RedClover].Leaf.CoverDead+[AGPRyegrass].CoverDead) as CoverDead
                [MicroClimate].CanopyCover
                ([RedClover].Leaf.LAI+[AGPRyegrass].LAIGreen) as LAIgreen
                ([RedClover].Leaf.LAIDead+[AGPRyegrass].LAIDead) as LAIdead
                (([RedClover].Leaf.Height+[AGPRyegrass].Height)/2) as AverageShootHeight
                (([RedClover].Root.Depth+[AGPRyegrass].RootDepth)/2) as AverageRootDepth
                ([RedClover].Root.LengthDensity+[AGPRyegrass].Root.LengthDensity) as Total.RootLengthDensity
                [RedClover].Leaf.CoverTotal as RedClover.CoverTotal
                [AGPRyegrass].CoverTotal as Ryegrass.CoverTotal
                (0*[AGPRyegrass].TotalWt) as Ryegrass.Population
                [RedClover].Population
                [RedClover].Leaf.Height as RedClover.Height
                [AGPRyegrass].Height as Ryegrass.Height
                [RedClover].Root.Depth
                [AGPRyegrass].RootDepth as Ryegrass.Root.Depth
                [RedClover].Root.LengthDensity
                [AGPRyegrass].Root.LengthDensity as Ryegrass.Root.LengthDensity
                [RedClover].Leaf.LAI as RedClover.LAI
                [AGPRyegrass].LAI as Ryegrass.LAI
                [RedClover].Leaf.RadiationIntercepted as RedClover.RadiationIntercepted
                [AGPRyegrass].InterceptedRadn as Ryegrass.RadiationIntercepted
                [RedClover].Phenology.Stage
                [AGPRyegrass].Stage as Ryegrass.Phenology.Stage
                [RedClover].ShootRootRatio
                ([RedClover].AboveGroundLive.Wt/([RedClover].TotalLive.Wt+0.000001)) as RedClover.CurrentAboveGroundFraction
                ([AGPRyegrass].AboveGroundLiveWt/([AGPRyegrass].BelowGroundWt+0.000001)) as Ryegrass.ShootRootRatio
                ([AGPRyegrass].AboveGroundLiveWt/([AGPRyegrass].AboveGroundLiveWt+[AGPRyegrass].BelowGroundWt+0.000001)) as Ryegrass.CurrentAboveGroundFraction
                [AGPRyegrass].GlfNSupply
                [AGPRyegrass].GlfWaterSupply
                [AGPRyegrass].GlfWaterLogging
                [AGPRyegrass].GlfNContent
                [AGPRyegrass].GlfCO2
                [AGPRyegrass].GlfTemperature
                [AGPRyegrass].GlfColdDamage
                [AGPRyegrass].GlfHeatDamage
                [RedClover].Leaf.Fw
                [RedClover].Leaf.Fn
                [RedClover].Leaf.FNmetabolic
                [RedClover].Leaf.Photosynthesis.FCO2
                [RedClover].Leaf.Photosynthesis.FN
                [RedClover].Leaf.Photosynthesis.FT
                [RedClover].Leaf.Photosynthesis.FW
                [RedClover].Leaf.Photosynthesis.FVPD
                [RedClover].Leaf.FRGR
      Experiment FoulumMix2
        Memo: same as Evaluation.Denmark.FoulumMix1.Memo
        Factors
          Permutation
            Factor NInputs: same as Evaluation.Denmark.FoulumMix1.Factors.Permutation.NInputs
            Factor SpeciesMix: Specification=[Sowing]
              Operations LessChicory
                2013-05-06  [Chicory].Sow(population: 100, cultivar: "Puna", depth: 10, rowSpacing: 150)
                2013-05-06  [RedClover].Sow(population: 150, cultivar: "Rajah", depth: 5, rowSpacing: 150)
                2013-01-01  [AGPRyegrass].EndCrop()
                2013-05-31  [AGPRyegrass].Sow(population: 0, cultivar: "R", depth: 0, rowSpacing: 0)
              Operations MoreChicory
                2013-05-06  [Chicory].Sow(population: 300, cultivar: "Puna", depth: 10, rowSpacing: 150)
                2013-05-06  [RedClover].Sow(population: 75, cultivar: "Rajah", depth: 5, rowSpacing: 150)
                2013-01-01  [AGPRyegrass].EndCrop()
                2013-06-05  [AGPRyegrass].Sow(population: 0, cultivar: "R", depth: 0, rowSpacing: 0)
        Simulation FoulumMix2
          Clock: Start=2013-01-01; End=2015-12-31
          Weather: FileName=Foulum.met
          Summary summaryfile
          SoilArbitrator Soil Arbitrator
          Forages
            Parameters:
              Name                          LiveDigestibility  DeadDigestibility  LiveFractionConsumable  DeadFractionConsumable  LiveMinimumBiomass  DeadMinimumBiomass
              SurfaceOrganicMatter.Residue  0.7                0.3                1                       1                       100                 0
              Chicory.Leaf                  0.7                0.3                1                       1                       100                 0
              Chicory.Stem                  0.7                0.3                1                       1                       100                 0
              Chicory.Inflorescence         0.7                0.3                1                       1                       100                 0
              Chicory.Taproot               0.7                0.3                1                       1                       100                 0
              Chicory.Root                  0                  0                  0                       0                       0                   0
              AGPRyegrass.Leaf              0.7                0.3                1                       1                       100                 0
              AGPRyegrass.Stem              0.7                0.3                1                       1                       100                 0
              AGPRyegrass.Stolon            0.7                0.3                1                       1                       100                 0
              RedClover.Leaf                0.7                0.3                1                       1                       100                 0
              RedClover.Petiole             0.7                0.3                1                       1                       100                 0
              RedClover.Stem                0.7                0.3                1                       1                       100                 0
              RedClover.Inflorescence       0.7                0.3                1                       1                       100                 0
              RedClover.Nodule              0.7                0.3                1                       1                       100                 0
              RedClover.Taproot             0.7                0.3                1                       1                       100                 0
              RedClover.Root                0                  0                  0                       0                       0                   0
          Zone Field: Area=1; Slope=0; AspectAngle=0; Altitude=50
            Folder Management
              Operations Sowing
              Operations BaseNApplication: same as Evaluation.Denmark.FoulumMix1.FoulumMix1.Field.Management.BaseNApplication
              Operations FertiliserSchedule
              Operations IrrigationSchedulle: same as Evaluation.Denmark.FoulumMix1.FoulumMix1.Field.Management.IrrigationSchedulle
              Manager DefoliationManager: same as Evaluation.NewZealand.FRNLRuakuraMix2.FRNLRuakuraMix2.Field.Management.DefoliationManager
              Operations DefoliationSchedule: same as Evaluation.Denmark.FoulumMix1.FoulumMix1.Field.Management.DefoliationSchedule
              Manager ExtraVariables
                script: same as in Evaluation.NewZealand.FRNLRuakuraMix1.FRNLRuakuraMix1.Field.Management.ExtraVariables
              Manager SettingUpParams
                setParamStartDate = 01/01/2013 00:00:00
                setParamHeight = 250
```csharp
// Set some plant parameters, for tests and development
// Following suggestions by Val Snow: Plant competition seem to be better done if heights are all the same (maybe due to some issue/feature of MicroClimate)

using APSIM.Core;
using System;
using Models.Core;
using System.Collections.Generic;
using System.Text;
using Models;
using Models.Soils;
using Models.PMF;
using System.Xml.Serialization;
using APSIM.Shared.Utilities;

namespace Models
{
    [Serializable]
    public class Script : Model, IStructureDependency
    {
        [Link] private Clock Clock;
        [Link] private Zone myZone;
        public IStructure Structure { private get; set; }


        //User inputs from properties tab
        [Separator("Setting up some parameters of plants")]
        [Description(" Enter the date to set plant parameters (dd/mm/yyyy):")]
        public DateTime setParamStartDate { get; set; }
        [Description(" Enter the height to set all plants to (mm):")]
        public double setParamHeight { get; set; }


        //Internal variables



        

        [EventSubscribe("StartOfSimulation")]
        private void OnSimulationCommencing(object sender, EventArgs e)
        {
            // make sure that manager will work when startDate<simulationStartDay
            if (Clock.Today > setParamStartDate)
                setParamStartDate = Clock.Today;
        }

        [EventSubscribe("StartOfDay")]
        private void OnStartOfDay(object sender, EventArgs e)
        {
            // make sure that rotation start when startDate<simulationStartDay
            if (Clock.Today == setParamStartDate)
            {
                double[] xVals = new double[] {0, 10};
                double[] yVals = new double[] {setParamHeight, setParamHeight};
                Structure.Set("Chicory.Leaf.HeightFunction.XYPairs.X", xVals, relativeTo: myZone);
                Structure.Set("Chicory.Leaf.HeightFunction.XYPairs.Y", yVals, relativeTo: myZone);
                Structure.Set("RedClover.Leaf.HeightFunction.XYPairs.X", xVals, relativeTo: myZone);
                Structure.Set("RedClover.Leaf.HeightFunction.XYPairs.Y", yVals, relativeTo: myZone);
                /*Structure.Set("Ryegrass.PlantHeightMaximum", setParamHeight, relativeTo: myZone);
                Structure.Set("Ryegrass.PlantHeightMinimum", setParamHeight, relativeTo: myZone);*/
            }
        }
    }
}
```
            MicroClimate: a_interception=0; b_interception=1; c_interception=0; d_interception=0; SoilHeatFluxFraction=0.4; MinimumHeightDiffForNewLayer=0; NightInterceptionFraction=0.5; ReferenceHeight=2
            Irrigation
            Fertiliser
            SurfaceOrganicMatter: InitialResidueName=grass; InitialResidueType=grass; InitialResidueMass=1000; InitialStandingFraction=0; InitialCPR=0; InitialCNR=40
            Soil: same as Evaluation.Denmark.FoulumMix1.FoulumMix1.Field.Soil
            Plant Chicory
            PastureSpecies AGPRyegrass: same as Evaluation.Denmark.FoulumMix1.FoulumMix1.Field.AGPRyegrass
            Plant RedClover
            Report: same as Evaluation.Denmark.FoulumMix1.FoulumMix1.Field.Report
      Experiment FoulumMix3
        Memo
          ###Foulum species competition###

          This simulation setup was based on field trials performed at the the Foulumgaard Experimental Station, Aarhus University, Denmark, between 2013 and 2015.  The trial was part of an experiment studying species competition in multi-species sward in a dairy organic farming context.  This comprises the stablishement of plots sown with various species in monoculture and in a few combinations, either varying the number and type of species or the relative sowing rate.  The plots received either no N fertiliser or a nominal annual rate of 250 kgN/ha applied as cattle slurry.  Details of the site and trial can be found in publications ([#CongEtAl2017]; [#CongAndEriksen2018]; and [#CongEtAl2018]).  Here only a selection of plots with mixed pasture species are used, these involved ryegrass, red clover, chicory and ribwort plantain (weeds also occured, but are not included in the simulation - the fraction of biomass was fairly small).  In these plots ryegrass and red clover were sown in equal proportion with either chicory or plantain; the proportion of forbs was set to either 20% or 60% of the sown population (thus ryerass and clover populations were, respectively, at 40% or 20% each).  Each treatment combining sowing rate and N inputs had three replicates.  Measurements comprised total yield and respective values for each species.
          Observed data supplied by Wen Feng Cong and Jorgen Eriksen, Aarhus University.

          The soil at the experimental site was a loamy sand (a Typic Hapludult on the USDA classification), the parameters required were derived from data published and slighlty adjusted with measurements done at the experimental site ([#JacobsenFoulum1989]; [#HeidmannFoulum1989]).
          Weather data was obtained from nearby weather station (Arhus University).
          Simulation of ryegrass is done using the AgPasture model as the PMF version is still under development.
        Factors
          Permutation
            Factor NInputs: same as Evaluation.Denmark.FoulumMix1.Factors.Permutation.NInputs
            Factor SpeciesMix: Specification=[Sowing]
              Operations LessPlantain
                2013-05-06  [PlantainForage].Sow(population: 100, cultivar: "Tonic", depth: 10, rowSpacing: 150)
                2013-05-06  [RedClover].Sow(population: 150, cultivar: "Rajah", depth: 5, rowSpacing: 150)
                2013-01-01  [AGPRyegrass].EndCrop()
                2013-05-31  [AGPRyegrass].Sow(population: 0, cultivar: "R", depth: 0, rowSpacing: 0)
              Operations MorePlantain
                2013-05-06  [PlantainForage].Sow(population: 300, cultivar: "Tonic", depth: 10, rowSpacing: 150)
                2013-05-06  [RedClover].Sow(population: 75, cultivar: "Rajah", depth: 5, rowSpacing: 150)
                2013-01-01  [AGPRyegrass].EndCrop()
                2013-06-05  [AGPRyegrass].Sow(population: 0, cultivar: "R", depth: 0, rowSpacing: 0)
        Simulation FoulumMix3
          Clock: Start=2013-01-01; End=2015-12-31
          Weather: FileName=Foulum.met
          Summary summaryfile
          SoilArbitrator Soil Arbitrator
          Forages
            Parameters:
              Name                          LiveDigestibility  DeadDigestibility  LiveFractionConsumable  DeadFractionConsumable  LiveMinimumBiomass  DeadMinimumBiomass
              SurfaceOrganicMatter.Residue  0.7                0.3                1                       1                       100                 0
              PlantainForage.Leaf           0.7                0.3                1                       1                       100                 0
              PlantainForage.Stem           0.7                0.3                1                       1                       100                 0
              PlantainForage.Inflorescence  0.7                0.3                1                       1                       100                 0
              PlantainForage.Taproot        0.7                0.3                1                       1                       100                 0
              PlantainForage.Root           0                  0                  0                       0                       0                   0
              AGPRyegrass.Leaf              0.7                0.3                1                       1                       100                 0
              AGPRyegrass.Stem              0.7                0.3                1                       1                       100                 0
              AGPRyegrass.Stolon            0.7                0.3                1                       1                       100                 0
              RedClover.Leaf                0.7                0.3                1                       1                       100                 0
              RedClover.Petiole             0.7                0.3                1                       1                       100                 0
              RedClover.Stem                0.7                0.3                1                       1                       100                 0
              RedClover.Inflorescence       0.7                0.3                1                       1                       100                 0
              RedClover.Nodule              0.7                0.3                1                       1                       100                 0
              RedClover.Taproot             0.7                0.3                1                       1                       100                 0
              RedClover.Root                0                  0                  0                       0                       0                   0
          Zone Field: Area=1; Slope=0; AspectAngle=0; Altitude=50
            Folder Management
              Operations Sowing
              Operations BaseNApplication: same as Evaluation.Denmark.FoulumMix1.FoulumMix1.Field.Management.BaseNApplication
              Operations FertiliserSchedule
              Operations IrrigationSchedulle: same as Evaluation.Denmark.FoulumMix1.FoulumMix1.Field.Management.IrrigationSchedulle
              Manager DefoliationManager: same as Evaluation.NewZealand.FRNLRuakuraMix2.FRNLRuakuraMix2.Field.Management.DefoliationManager
              Operations DefoliationSchedule: same as Evaluation.Denmark.FoulumMix1.FoulumMix1.Field.Management.DefoliationSchedule
              Manager ExtraVariables
                script: same as in Evaluation.NewZealand.FRNLRuakuraMix1.FRNLRuakuraMix1.Field.Management.ExtraVariables
              Manager SettingUpParams
                setParamStartDate = 01/01/2013 00:00:00
                setParamHeight = 250
```csharp
// Set some plant parameters, for tests and development
// Following suggestions by Val Snow: Plant competition seem to be better done if heights are all the same (maybe due to some issue/feature of MicroClimate)

using APSIM.Core;
using System;
using Models.Core;
using System.Collections.Generic;
using System.Text;
using Models;
using Models.Soils;
using Models.PMF;
using System.Xml.Serialization;
using APSIM.Shared.Utilities;

namespace Models
{
    [Serializable]
    public class Script : Model, IStructureDependency
    {
        [Link] private Clock Clock;
        [Link] private Zone myZone;
        public IStructure Structure { private get; set; }


        //User inputs from properties tab
        [Separator("Setting up some parameters of plants")]
        [Description(" Enter the date to set plant parameters (dd/mm/yyyy):")]
        public DateTime setParamStartDate { get; set; }
        [Description(" Enter the height to set all plants to (mm):")]
        public double setParamHeight { get; set; }


        //Internal variables



        

        [EventSubscribe("StartOfSimulation")]
        private void OnSimulationCommencing(object sender, EventArgs e)
        {
            // make sure that manager will work when startDate<simulationStartDay
            if (Clock.Today > setParamStartDate)
                setParamStartDate = Clock.Today;
        }

        [EventSubscribe("StartOfDay")]
        private void OnStartOfDay(object sender, EventArgs e)
        {
            // make sure that rotation start when startDate<simulationStartDay
            if (Clock.Today == setParamStartDate)
            {
                double[] xVals = new double[] {0, 10};
                double[] yVals = new double[] {setParamHeight, setParamHeight};
                Structure.Set("PlantainForage.Leaf.HeightFunction.XYPairs.X", xVals, relativeTo: myZone);
                Structure.Set("PlantainForage.Leaf.HeightFunction.XYPairs.Y", yVals, relativeTo: myZone);
                Structure.Set("RedClover.Leaf.HeightFunction.XYPairs.X", xVals, relativeTo: myZone);
                Structure.Set("RedClover.Leaf.HeightFunction.XYPairs.Y", yVals, relativeTo: myZone);
                /*Structure.Set("Ryegrass.PlantHeightMaximum", setParamHeight, relativeTo: myZone);
                Structure.Set("Ryegrass.PlantHeightMinimum", setParamHeight, relativeTo: myZone);*/
            }
        }
    }
}
```
            MicroClimate: a_interception=0; b_interception=1; c_interception=0; d_interception=0; SoilHeatFluxFraction=0.4; MinimumHeightDiffForNewLayer=0; NightInterceptionFraction=0.5; ReferenceHeight=2
            Irrigation
            Fertiliser
            SurfaceOrganicMatter: InitialResidueName=grass; InitialResidueType=grass; InitialResidueMass=1000; InitialStandingFraction=0; InitialCPR=0; InitialCNR=40
            Soil: same as Evaluation.Denmark.FoulumMix1.FoulumMix1.Field.Soil
            Plant PlantainForage
            PastureSpecies AGPRyegrass: same as Evaluation.Denmark.FoulumMix1.FoulumMix1.Field.AGPRyegrass
            Plant RedClover
            Report: same as Evaluation.Denmark.FoulumMix1.FoulumMix1.Field.Report
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