Simulations: Version=165
  Folder Replacements
    Manager Defoliate
      Crop =
      cutPasture_StartDate = 2050-05-20
      cutPasture_EndDate = 2100-12-31
      defoliateType = Graze
      interval2Cut = 21
      durationOfCut = 1
      removeAmountType = DMToRemove
      herbageAmount = 500
      fracDM2Remove = 1
      fracN2Remove = 1
      urineDepth = 10
      fracN2Dung = 0.4
      fracPopDecline = 0.05
```csharp
// Defoliates on a regular cycle or one-off via a schedule
// currently defoliates by the amount specified spread evenly over the specified period

using Models.PMF.Interfaces;
using APSIM.Shared.Utilities;
using System.Xml.Serialization;
using Models.PMF;
using Models.Soils;
using Models;
using System.Text;
using System.Collections.Generic;
using Models.Core;
using System;
using Newtonsoft.Json;

namespace Models
{
    [Serializable]
    public class Script : Model
    {
        [Link] Zone zone;
        [Link] Clock Clock;
        [Link] Plant Chicory;
        [Link] Fertiliser fertiliser;
        [Link] ISummary summary = null;

        [Description("Choose the crop to harvest:")]
        public IPlant Crop { get; set; }

        [Description("Enter the date to start the rotation (dd/mm/yyyy):")]
        public DateTime cutPasture_StartDate { get; set; }

        [Description("Enter the date to end the rotation (dd/mm/yyyy):")]
        public DateTime cutPasture_EndDate { get; set; }

        [Description("Select type of defoliation:")]
        public defoliationTypes defoliateType { get; set; }

        [Description("Enter the interval between defoliations (days):")]
        public int interval2Cut { get; set; }

        [Description("Enter the number of days to defoliate over (days):")]
        public int durationOfCut { get; set; }

        [Description("Choose what amount is being defined:")]
        public removeAmountTypes removeAmountType { get; set; }

        [Description("Enter the amount to use (kgDM/ha):")]
        public double herbageAmount { get; set; }

        [Description("Enter the fraction of DM that is removed from the field (0-1):")]
        public double fracDM2Remove { get; set; }

        [Description("Enter the fraction of N that is removed from the field (0-1):")]
        public double fracN2Remove { get; set; }

        [Description("Enter the depth down to which urine will applied (mm):")]
        public double urineDepth { get; set; }

        [Description("Enter the proportion of N returned in dung (0-1):")]
        public double fracN2Dung { get; set; }

        [Description("Enter the fraction of population decline due to defoliation (0-1):")]
        public double fracPopDecline { get; set; }

        //fraction of each plant part returned as residue (0-1), wastage
        private double leafResidueFrac = 0.01;
        private double stemResidueFrac = 0.01;
        private double flowerResidueFrac = 0.01;
        private double minLeafAmount = 5.0;

        //Outputs
        //Pasture DM defoliated today (kg/ha)
        [JsonIgnore] public double DefoliatedDM{ get; set; }
        //N defoliate today
        [JsonIgnore] public double DefoliatedN{ get; set; }
        //Pasture DM harvested today (kg/ha)
        [JsonIgnore] public double HarvestedDM{ get; set; }
        //N harvested today
        [JsonIgnore] public double HarvestedN{ get; set; }
        //DM removed from the paddock
        [JsonIgnore] public double RemovedDM{ get; set; }
        //N removed from the paddock
        [JsonIgnore] public double RemovedN{ get; set; }
        //DM returned to the paddock
        [JsonIgnore] public double ReturnedDM{ get; set; }
        //N returned to the paddock
        [JsonIgnore] public double ReturnedN{ get; set; }
        //N returned as dung (SurfaceOM)
        [JsonIgnore] public double NReturnedInDung{ get; set; }
        //N returned as urine (urea)
        [JsonIgnore] public double NReturnedInUrine{ get; set; }
        //Number of days after last harvest
        [JsonIgnore] public int DaysAfterCut{ get; set; }
        //Total standing DM (Leaf + Stem/Sheath) before cut
        [JsonIgnore] public double PreHarvestDM{ get; set; }
        //Total standing DM (Leaf + Stem/Sheath) after cut
        [JsonIgnore] public double PostHarvestDM{ get; set; }

        //Pasture DM harvested this rotation (kg/ha)
        [JsonIgnore] public double RotationHarvestedDM{ get; set; }
        //Pasture DM to be harvested this rotation (kg/ha)
        [JsonIgnore] public double RotationHarvestingDM{ get; set; }

        //Internal variables

        //The fraction of urine to be applied in each layer
        private double[] FracLayer;
        // total herbage to remove in g/m2 per day
        private double herbageToRemove;
        // counter
        private int daysCutting = 0;
        // type of defoliation (Cut or Graze)
        private string defoliationType;
        // type of DM amount (ResidualDM or DMToRemove)
        private string amountType;
        // auxiliary
        private bool aCutHasHappened = false;
        private bool isStillCutting = false;
        private double cumAmountHarvested;

        // event to add residue / dung to surface OM
        public event BiomassRemovedDelegate BiomassRemoved;

        [EventSubscribe("StartOfSimulation")]
        private void OnSimulationCommencing(object sender, EventArgs e)
        {
            
            DaysAfterCut = 0;
            resetVariables();
            if (defoliateType == defoliationTypes.Cut)
                defoliationType = "Cut";
            else
                defoliationType = "Graze";

            if (removeAmountType == removeAmountTypes.ResidualDM)
                amountType = "ResidualDM";
            else
                amountType = "DMToRemove";

            // make sure that rotation start when startDate<simulationStartDay
            if ((Clock.Today > cutPasture_StartDate) && (Clock.Today < cutPasture_EndDate))
                cutPasture_StartDate = Clock.Today;
        }

        [EventSubscribe("DoManagement")]
        private void OnDoManagement(object sender, EventArgs e)
        {
            if (Clock.Today == cutPasture_StartDate)
                DaysAfterCut = interval2Cut;

            if ((Clock.Today >= cutPasture_StartDate) && (Clock.Today <= cutPasture_EndDate))
            {
                // Check whether we should start cutting
                if ((Chicory.IsEmerged) && (DaysAfterCut > 0) && (DaysAfterCut == interval2Cut))
                {
                    Defoliate(defoliationType, herbageAmount * 0.1, amountType, durationOfCut);
                }
            }

            // Check whether we need to continue cutting
            //if ((daysCutting > 0) && (daysCutting <= durationOfCut))
            if (isStillCutting)
            {
                // reset outputs
                resetVariables();

                removeDM(herbageToRemove, defoliationType);
                returnExcreta();
                cumAmountHarvested += HarvestedDM;
                daysCutting += 1;
            }

            // reset outputs
            if (daysCutting < 0)
            {
                resetVariables();
                daysCutting = 0;
            }
        }

        [EventSubscribe("DoManagementCalculations")]
        private void OnDoManagementCalculations(object sender, EventArgs e)
        {
            if ((daysCutting > 0) && (daysCutting < durationOfCut))
                isStillCutting = true;

            if (daysCutting == durationOfCut)
            {
                PostHarvestDM = (double)zone.Get("Chicory.AboveGround.Wt");
                RotationHarvestedDM = cumAmountHarvested;
                aCutHasHappened = true;
                isStillCutting = false;
                daysCutting = -1;
                Chicory.Population = Chicory.Population * (1.0 - fracPopDecline);
            }

            if (aCutHasHappened && (daysCutting == 0))
                DaysAfterCut += 1;
        }

        public enum removeAmountTypes
        {
            /// <summary>Setting DM amount to remove</summary>
            DMToRemove,
            /// <summary>Setting residual DM amount</summary>
            ResidualDM
        }

        public enum defoliationTypes
        {
            /// <summary>Cut</summary>
            Cut,
            /// <summary>Graze</summary>
            Graze
        }

        // resets the values of all outputs
        private void resetVariables()
        {
            DefoliatedDM = 0.0;
            DefoliatedN = 0.0;
            HarvestedDM = 0.0;
            HarvestedN = 0.0;
            RemovedDM = 0.0;
            RemovedN = 0.0;
            ReturnedDM = 0.0;
            ReturnedN = 0.0;
            NReturnedInDung = 0.0;
            NReturnedInUrine = 0.0;
            RotationHarvestedDM = 0.0;
            RotationHarvestingDM = 0.0;
        }

        // Perform the basic calculations for defoliation
        public void Defoliate(string defoliationType, double amountDM, string amountType, int duration)
        {
            // get the existing plant amount
            PreHarvestDM = (double)zone.Get("Chicory.AboveGround.Wt");

            // check duration
            if (duration <= 0)
                throw new Exception("Duration of graze/cut rotation is zero or negative");
            
            // check amount to remove
            if ((amountType == "DMToRemove") && (PreHarvestDM > 0.0))
            {
                summary.WriteMessage(this, "   Defoliating " + (10.0 * amountDM).ToString("#0.0") + "kg/ha over " + duration + " days", MessageType.Diagnostic);
                herbageToRemove = amountDM / duration;
            }
            else if ((amountType == "ResidualDM") && (PreHarvestDM > amountDM))
            {
                summary.WriteMessage(this, "   Defoliating down to approximately " + (10.0 * amountDM).ToString("#0.0") + "kg/ha over " + duration + " days", MessageType.Diagnostic);
                herbageToRemove = (PreHarvestDM - amountDM) / duration;
            }
            else
            {
                herbageToRemove = 0.0;
                summary.WriteMessage(this, "   Defoliation will not happend because there is not enough plant material", MessageType.Diagnostic);
                return;
            }

            RotationHarvestingDM = herbageToRemove * duration;
            durationOfCut = duration;
            // first defoliation
            removeDM(herbageToRemove, defoliationType);
            returnExcreta();
            cumAmountHarvested = HarvestedDM;
            daysCutting = 1;
            DaysAfterCut = 0;
        }

        private void removeDM(double removeAmount, string removeType)
        {
            // get the existing biomass
            double leafLiveWt = (double)zone.Get("Chicory.Leaf.Live.Wt");
            double stemLiveWt = (double)zone.Get("Chicory.Stem.Live.Wt");
            double flowerLiveWt = (double)zone.Get("Chicory.Inflorescence.Live.Wt");
            double leafDeadWt = (double)zone.Get("Chicory.Leaf.Dead.Wt");
            double stemDeadWt = (double)zone.Get("Chicory.Stem.Dead.Wt");
            double flowerDeadWt = (double)zone.Get("Chicory.Inflorescence.Dead.Wt");
            double leafLiveN = (double)zone.Get("Chicory.Leaf.Live.N");
            double stemLiveN = (double)zone.Get("Chicory.Stem.Live.N");
            double flowerLiveN = (double)zone.Get("Chicory.Inflorescence.Live.N");
            double leafDeadN = (double)zone.Get("Chicory.Leaf.Dead.N");
            double stemDeadN = (double)zone.Get("Chicory.Stem.Dead.N");
            double flowerDeadN = (double)zone.Get("Chicory.Inflorescence.Dead.N");

            double existingWt = leafLiveWt + leafDeadWt + stemLiveWt + stemDeadWt + flowerLiveWt + flowerDeadWt;
            double existingN = leafLiveN + leafDeadN + stemLiveN + stemDeadN + flowerLiveN + flowerDeadN;

            // Can we harvest anything?
            double removingWt = Math.Min(existingWt, removeAmount);
            if (removingWt > 0.0)
            {
                // get the fractions to remove for each organ (will override the default values)
                // the default is [Chicory].Leaf.BiomassRemovalDefaults.Cut.FractionRemoved, or equivalent
                // >> double leafFracToRemove = removeAmount * (leafLiveWt + leafDeadWt) / existingWt / existingWt;
                double fracToRemove = removingWt / existingWt;
                double leafFracToRemove = 0.0;
                if ((leafLiveWt + leafDeadWt) > 0.0)
                {
                    if (leafLiveWt < minLeafAmount)
                    {
                        // leafWt cannot go below a minimum
                        leafFracToRemove = (removingWt + leafLiveWt - minLeafAmount) / existingWt;
                    }
                    else
                        leafFracToRemove = fracToRemove;
                }

                double stemFracToRemove = ((stemLiveWt + stemDeadWt) > 0.0) ? fracToRemove : 0.0;
                double flowerFracToRemove = ((flowerLiveWt + flowerDeadWt) > 0.0) ? fracToRemove : 0.0;

                // get the fractions to residue (i.e. wastage - will override the default values)
                // the default is [Chicory].Leaf.BiomassRemovalDefaults.Cut.FractionToResidue, or equivalent
                double leafFracToResidue = leafResidueFrac * leafFracToRemove;
                double stemFracToResidue = stemResidueFrac * stemFracToRemove;
                double flowerFracToResidue = flowerResidueFrac * flowerFracToRemove;

                // correct the values to defoliate (so our removing = remove + residue)
                leafFracToRemove -= leafFracToResidue;
                stemFracToRemove -= stemFracToResidue;
                flowerFracToRemove -= flowerFracToResidue;

                // set removal fractions (these overrides the default removals in the plant)
                // Actually do the biomass removal
                var Leaf = Chicory.FindChild<IHasDamageableBiomass>("Leaf");
                var Stem = Chicory.FindChild<IHasDamageableBiomass>("Stem");
                var Inflorescence = Chicory.FindChild<IHasDamageableBiomass>("Inflorescence");
                var Root = Chicory.FindChild<IHasDamageableBiomass>("Root");
                var Taproot = Chicory.FindChild<IHasDamageableBiomass>("Taproot");
                Leaf.RemoveBiomass(liveToRemove: leafFracToRemove, deadToRemove: 0.0, liveToResidue: leafFracToResidue, deadToResidue: 0.0);
                Stem.RemoveBiomass(liveToRemove: stemFracToRemove, deadToRemove: 0.0, liveToResidue: stemFracToResidue, deadToResidue: 0.0);
                Inflorescence.RemoveBiomass(liveToRemove: flowerFracToRemove, deadToRemove: 0.0, liveToResidue: flowerFracToResidue, deadToResidue: 0.0);
                Root.RemoveBiomass(liveToRemove: 0.0, deadToRemove: 0.0, liveToResidue: 0.0, deadToResidue: 0.0);
                Taproot.RemoveBiomass(liveToRemove: 0.0, deadToRemove: 0.0, liveToResidue: 0.0, deadToResidue: 0.0);


                // get the new existing plant amount
                double postHarvestWt = (double)zone.Get("Chicory.AboveGround.Wt");
                double postHarvestN = (double)zone.Get("Chicory.AboveGround.N");

                // get total defoliation (total plant stuff lost)
                DefoliatedDM = existingWt - postHarvestWt;
                DefoliatedN = existingN - postHarvestN;

                // get total harvested (plant stuff removed from plants)
                HarvestedDM = (double)zone.Get("Chicory.Leaf.Removed.Wt")
                + (double)zone.Get("Chicory.Stem.Removed.Wt")
                + (double)zone.Get("Chicory.Inflorescence.Removed.Wt");
                HarvestedN = (double)zone.Get("Chicory.Leaf.Removed.N")
                + (double)zone.Get("Chicory.Stem.Removed.N")
                + (double)zone.Get("Chicory.Inflorescence.Removed.N");

                // get amounts actually removed from field and that to be returned (residue or dung/urine)
                RemovedDM = HarvestedDM * fracDM2Remove;
                RemovedN = HarvestedN * fracN2Remove;
                ReturnedDM = HarvestedDM - RemovedDM;
                ReturnedN = HarvestedN - RemovedN;
                NReturnedInDung = ReturnedN * fracN2Dung;
                NReturnedInUrine = ReturnedN - NReturnedInDung;
            }
            else
            {
            }
        }

        // Return dung and urine
        private void returnExcreta()
        {
            if ((ReturnedDM > 0.0) || (NReturnedInDung > 0.0))
            {
                PMF.BiomassRemovedType BiomassDung = new PMF.BiomassRemovedType();
                string[] type = new string[] { "RuminantDung_PastureFed" };
                float[] dltdm = new float[] { (Single)ReturnedDM };
                float[] dltn = new float[] { (Single)NReturnedInDung };
                float[] dltp = new float[] { 0 };
                float[] fraction = new float[] { 1 };     // fraction is always 1.0 here

                BiomassDung.crop_type = "RuminantDung_PastureFed";
                BiomassDung.dm_type = type;
                BiomassDung.dlt_crop_dm = dltdm;
                BiomassDung.dlt_dm_n = dltn;
                BiomassDung.dlt_dm_p = dltp;
                BiomassDung.fraction_to_residue = fraction;
                BiomassRemoved.Invoke(BiomassDung);
            }

            if (NReturnedInUrine > 0.0)
            {
                fertiliser.Apply(NReturnedInUrine * 10, Fertiliser.Types.UreaN, urineDepth);
            }
        }
    }
}
```
    Manager ExtraVariables
```csharp
using Newtonsoft.Json;
using Models.PMF.Organs;
using Models.Soils.Nutrients;
using Models.Interfaces;
using System;
using Models.Core;
using System.Collections.Generic;
using System.Text;
using Models.Soils;
using Models.PMF;
using Models;
using System.Xml.Serialization;
using APSIM.Shared.Utilities;
using Models.Climate;

namespace Models
{
    [Serializable] 
    public class Script : Model
    {
        [Link] private Clock Clock;
        [Link] private Weather Met;
        [Link] private Fertiliser Fert;
        [Link] private Irrigation Irrig;
        [Link] private Plant Chicory;
        [Link] private Zone zone;
        [Link] private ISummary summary;
        private DateTime YearStartDate;
        [Link(ByName = true)]
        private ISolute Urea;
        [Link]
        private ISolute NO3;
        [Link(ByName = true)]
        private ISolute NH4;
        [Link]
        private Nutrient SoilNitrogen;
        [Link(Type = LinkType.Path, Path = "[Chicory].Root")]
        private Root root;
        [Link] private Soils.Soil Soil;
        [Link] private Models.Surface.SurfaceOrganicMatter SOM;
        [Link]
        private IPhysical soilPhysical;
        [Link]
        private ISoilWater waterBalance;
        [Link(Type=LinkType.Path, Path="[Nutrient].SurfaceResidue.Decomposition")] private CarbonFlow SurfaceDecomposition;                    
        [JsonIgnore] public bool InitialDay { get; set; }
        
        [JsonIgnore] public double AccumPlantN { get; set; }
        [JsonIgnore] public double AccumMineralisation { get; set; }
        [JsonIgnore] public double AccumDenit { get; set; }
        [JsonIgnore] public double AccumFert { get; set; }
        [JsonIgnore] public double AccumLeach { get; set; }
        [JsonIgnore] public double AccumDetach { get; set; }
        [JsonIgnore] public double DeltaSoilOMN { get; set; }
        [JsonIgnore] public double DeltaSurfaceOMN { get; set; }
        [JsonIgnore] public double DeltaSoilMineralN { get; set; }
        [JsonIgnore] public double SoilNitrogenContent { get; set; }
        
        [JsonIgnore] public double AccumEO { get; set; }
        [JsonIgnore] public double AccumEP { get; set; }
        [JsonIgnore] public double AccumES { get; set; }
        [JsonIgnore] public double AccumDrainage { get; set; }
        [JsonIgnore] public double AccumRunoff { get; set; }
        [JsonIgnore] public double AccumOutflowLat { get; set; }
        [JsonIgnore] public double AccumIrrigation { get; set; }
        [JsonIgnore] public double AccumRainfall { get; set; }
        [JsonIgnore] public double SoilWaterDeficit { get; set; }
    
        [JsonIgnore] public double  InitialSoilOMN { get; set; }
        [JsonIgnore] public double  InitialSurfaceOMN { get; set; }
        [JsonIgnore] public double  InitialMineralN { get; set; }
        
        [JsonIgnore] public double SWC { get; set; }
        [JsonIgnore] public double DUL { get; set; }
        [JsonIgnore] public double OutFlowLat { get; set; }

        [JsonIgnore] public double FomN { get; set; }
        [JsonIgnore] public double BiomN { get; set; }
        [JsonIgnore] public double HumN { get; set; }
        [JsonIgnore] public double OrganicN { get; set; }
        [JsonIgnore] public double NO3N { get; set; }
        [JsonIgnore] public double NH4N { get; set; }
        [JsonIgnore] public double UreaN { get; set; }
        [JsonIgnore] public double MineralN { get; set; }
        [JsonIgnore] public double DltNMinRes { get; set; }
        [JsonIgnore] public double DltNMinTot { get; set; }
        
        [JsonIgnore] public double LeafFraction { get; set; }
        [JsonIgnore] public double StemFraction { get; set; }
        [JsonIgnore] public double InflorescenceFraction { get; set; }
        
        [JsonIgnore] public double ShootRootRatio { get; set; }

        [JsonIgnore] public double Leaf_DMSupply { get; set; }
        [JsonIgnore] public double Stem_DMSupply { get; set; }
        [JsonIgnore] public double Inflorescence_DMSupply { get; set; }
        [JsonIgnore] public double Root_DMSupply { get; set; }
        [JsonIgnore] public double Taproot_DMSupply { get; set; }
        [JsonIgnore] public double Leaf_DMDemand { get; set; }
        [JsonIgnore] public double Stem_DMDemand { get; set; }
        [JsonIgnore] public double Inflorescence_DMDemand { get; set; }
        [JsonIgnore] public double Root_DMDemand { get; set; }
        [JsonIgnore] public double Taproot_DMDemand { get; set; }
        
        [JsonIgnore] public double Leaf_NSupply { get; set; }
        [JsonIgnore] public double Stem_NSupply { get; set; }
        [JsonIgnore] public double Inflorescence_NSupply { get; set; }
        [JsonIgnore] public double Taproot_NSupply { get; set; }
        [JsonIgnore] public double Root_NSupply { get; set; }
        [JsonIgnore] public double Leaf_NDemand { get; set; }
        [JsonIgnore] public double Stem_NDemand { get; set; }
        [JsonIgnore] public double Inflorescence_NDemand { get; set; }
        [JsonIgnore] public double Taproot_NDemand { get; set; }
        [JsonIgnore] public double Root_NDemand { get; set; }
        
        [JsonIgnore] public double Leaf_NSupplyReAllocation { get; set; }
        [JsonIgnore] public double Stem_NSupplyReAllocation { get; set; }
        [JsonIgnore] public double Root_NSupplyReAllocation { get; set; }
        
        [JsonIgnore] public double AccumHarvestedWt { get; set; }

    
        [EventSubscribe("StartOfSimulation")]
        private void OnSimulationCommencing(object sender, EventArgs e)
        {
            InitialDay = true;
        }
        
        [EventSubscribe("DoManagement")]
        private void OnDoManagement(object sender, EventArgs e)
        {
            //!!!!!! Nitrogen balance components !!!!!!
            //!!!!!!^^^^^^^^^^^^^^^^^^^^^^^^^^^^^!!!!!!
            FomN = MathUtilities.Sum(SoilNitrogen.FOM.N);
            HumN = MathUtilities.Sum(SoilNitrogen.Humic.N);
            BiomN = MathUtilities.Sum(SoilNitrogen.Microbial.N);
            OrganicN = FomN + HumN + BiomN;
            NO3N = MathUtilities.Sum(NO3.kgha);
            NH4N = MathUtilities.Sum(NH4.kgha);
            UreaN = MathUtilities.Sum(Urea.kgha);
            MineralN = NO3N + NH4N + UreaN; 
            DltNMinRes = MathUtilities.Sum(SurfaceDecomposition.MineralisedN);
            DltNMinTot = MathUtilities.Sum(SoilNitrogen.MineralisedN);
            int layers = soilPhysical.Thickness.Length;
            if (InitialDay == true)
            {
                InitialSurfaceOMN = SOM.N;
                InitialSoilOMN = OrganicN;
                InitialMineralN = MineralN;
                InitialDay = false;

                // check whether we're in the north or south hemisphere
                if (Met.Latitude >= 0.0)
                    YearStartDate = new DateTime(2000, 1, 1);
                else
                    YearStartDate = new DateTime(2000, 7, 1);
            }
            DeltaSurfaceOMN = SOM.N - InitialSurfaceOMN;
            AccumLeach = AccumLeach - waterBalance.LeachNH4 - waterBalance.LeachNO3 - waterBalance.LeachUrea; //Fails
            AccumMineralisation += MathUtilities.Sum(SoilNitrogen.MineralisedN);
            AccumDenit -= MathUtilities.Sum(SoilNitrogen.DenitrifiedN);
            AccumPlantN -= (double)zone.Get("Chicory.Root.NUptake");
            DeltaSoilOMN = OrganicN - InitialSoilOMN;
            DeltaSoilMineralN = MineralN - InitialMineralN;
            SoilNitrogenContent = MineralN;
            
            //!!!!!! Water balance components !!!!!!
            //!!!!!!^^^^^^^^^^^^^^^^^^^^^^^^^^!!!!!!

            AccumRainfall += Met.Rain;
            //AccumEP -= (double)zone.Get("[Chicory].Leaf.Transpiration");
            AccumEP -= (double)zone.Get("Chicory.Root.WaterUptake");
            SoilWaterDeficit = (SWC - DUL);
            double OutFlowLat = MathUtilities.Sum(waterBalance.LateralOutflow);
            AccumOutflowLat -= OutFlowLat;
            
            //!!!!!! Stem and leaf fraction !!!!!!
            if ((double)zone.Get("Chicory.AboveGround.Wt") > 0)
            {
                LeafFraction = (double)zone.Get("Chicory.Leaf.Wt") / (double)zone.Get("Chicory.AboveGround.Wt");
                StemFraction = (double)zone.Get("Chicory.Stem.Wt") / (double)zone.Get("Chicory.AboveGround.Wt");
                InflorescenceFraction = (double)zone.Get("Chicory.Inflorescence.Wt") / (double)zone.Get("Chicory.AboveGround.Wt");
            }
            else
            {
                LeafFraction = 0;
                StemFraction = 0;
            }
            
            //!!!!!! Plant DM components !!!!!!
            //!!!!!!^^^^^^^^^^^^^^^^^^^^^^^^^^!!!!!!
            ShootRootRatio = MathUtilities.Divide((double)zone.Get("Chicory.AboveGroundLive.Wt"), (double)zone.Get("Chicory.BelowGroundLive.Wt"), 0.0);
            PMF.Interfaces.BiomassSupplyType Leaf_DMSupplies = (PMF.Interfaces.BiomassSupplyType)zone.Get("Chicory.Leaf.DMSupply");
            PMF.Interfaces.BiomassSupplyType Stem_DMSupplies = (PMF.Interfaces.BiomassSupplyType)zone.Get("Chicory.Stem.DMSupply");
            PMF.Interfaces.BiomassSupplyType Inflorescence_DMSupplies = (PMF.Interfaces.BiomassSupplyType)zone.Get("Chicory.Inflorescence.DMSupply");
            PMF.Interfaces.BiomassSupplyType Root_DMSupplies = (PMF.Interfaces.BiomassSupplyType)zone.Get("Chicory.Root.DMSupply");
            PMF.Interfaces.BiomassSupplyType Taproot_DMSupplies = (PMF.Interfaces.BiomassSupplyType)zone.Get("Chicory.Taproot.DMSupply");
            PMF.Interfaces.BiomassPoolType Leaf_DMDemands = (PMF.Interfaces.BiomassPoolType)zone.Get("Chicory.Leaf.DMDemand");
            PMF.Interfaces.BiomassPoolType Stem_DMDemands = (PMF.Interfaces.BiomassPoolType)zone.Get("Chicory.Stem.DMDemand");
            PMF.Interfaces.BiomassPoolType Inflorescence_DMDemands = (PMF.Interfaces.BiomassPoolType)zone.Get("Chicory.Inflorescence.DMDemand");
            PMF.Interfaces.BiomassPoolType Root_DMDemands = (PMF.Interfaces.BiomassPoolType)zone.Get("Chicory.Root.DMDemand");
            PMF.Interfaces.BiomassPoolType Taproot_DMDemands = (PMF.Interfaces.BiomassPoolType)zone.Get("Chicory.Taproot.DMDemand");

            PMF.Interfaces.BiomassSupplyType Leaf_NSupplies = (PMF.Interfaces.BiomassSupplyType)zone.Get("Chicory.Leaf.NSupply");
            PMF.Interfaces.BiomassSupplyType Stem_NSupplies = (PMF.Interfaces.BiomassSupplyType)zone.Get("Chicory.Stem.NSupply");
            PMF.Interfaces.BiomassSupplyType Inflorescence_NSupplies = (PMF.Interfaces.BiomassSupplyType)zone.Get("Chicory.Inflorescence.NSupply");
            PMF.Interfaces.BiomassSupplyType Taproot_NSupplies = (PMF.Interfaces.BiomassSupplyType)zone.Get("Chicory.Taproot.NSupply");
            PMF.Interfaces.BiomassSupplyType Root_NSupplies = (PMF.Interfaces.BiomassSupplyType)zone.Get("Chicory.Root.NSupply");
            
            PMF.Interfaces.BiomassPoolType Leaf_NDemands = (PMF.Interfaces.BiomassPoolType)zone.Get("Chicory.Leaf.NDemand");
            PMF.Interfaces.BiomassPoolType Stem_NDemands = (PMF.Interfaces.BiomassPoolType)zone.Get("Chicory.Stem.NDemand");
            PMF.Interfaces.BiomassPoolType Inflorescence_NDemands = (PMF.Interfaces.BiomassPoolType)zone.Get("Chicory.Inflorescence.NDemand");
            PMF.Interfaces.BiomassPoolType Taproot_NDemands = (PMF.Interfaces.BiomassPoolType)zone.Get("Chicory.Taproot.NDemand");
            PMF.Interfaces.BiomassPoolType Root_NDemands = (PMF.Interfaces.BiomassPoolType)zone.Get("Chicory.Root.NDemand");
            
            Leaf_DMSupply = Leaf_DMSupplies.Fixation + Leaf_DMSupplies.Uptake + Leaf_DMSupplies.ReAllocation + Leaf_DMSupplies.ReTranslocation;
            Stem_DMSupply = Stem_DMSupplies.Fixation + Stem_DMSupplies.Uptake + Stem_DMSupplies.ReAllocation + Stem_DMSupplies.ReTranslocation;
            Inflorescence_DMSupply = Inflorescence_DMSupplies.Fixation + Inflorescence_DMSupplies.Uptake + Inflorescence_DMSupplies.ReAllocation + Inflorescence_DMSupplies.ReTranslocation;
            Root_DMSupply = Root_DMSupplies.Fixation + Root_DMSupplies.Uptake + Root_DMSupplies.ReAllocation + Root_DMSupplies.ReTranslocation;
            Taproot_DMSupply = Taproot_DMSupplies.Fixation + Taproot_DMSupplies.Uptake + Taproot_DMSupplies.ReAllocation + Taproot_DMSupplies.ReTranslocation;
            Leaf_DMDemand = Leaf_DMDemands.Structural + Leaf_DMDemands.Storage + Leaf_DMDemands.Metabolic;
            Stem_DMDemand = Stem_DMDemands.Structural + Stem_DMDemands.Storage + Stem_DMDemands.Metabolic;
            Inflorescence_DMDemand = Inflorescence_DMDemands.Structural + Inflorescence_DMDemands.Storage + Inflorescence_DMDemands.Metabolic;
            Root_DMDemand = Root_DMDemands.Structural + Root_DMDemands.Storage + Root_DMDemands.Metabolic;
            Taproot_DMDemand = Taproot_DMDemands.Structural + Taproot_DMDemands.Storage + Taproot_DMDemands.Metabolic;
            
            Leaf_NSupply = Leaf_NSupplies.Fixation + Leaf_NSupplies.Uptake + Leaf_NSupplies.ReAllocation + Leaf_NSupplies.ReTranslocation;
            Stem_NSupply = Stem_NSupplies.Fixation + Stem_NSupplies.Uptake + Stem_NSupplies.ReAllocation + Stem_NSupplies.ReTranslocation;
            Inflorescence_NSupply = Inflorescence_NSupplies.Fixation + Inflorescence_NSupplies.Uptake + Inflorescence_NSupplies.ReAllocation + Inflorescence_NSupplies.ReTranslocation;
            Taproot_NSupply = Taproot_NSupplies.Fixation + Taproot_NSupplies.Uptake + Taproot_NSupplies.ReAllocation + Taproot_NSupplies.ReTranslocation;
            Root_NSupply = Root_NSupplies.Fixation + Root_NSupplies.Uptake + Root_NSupplies.ReAllocation + Root_NSupplies.ReTranslocation;

            Leaf_NDemand = Leaf_NDemands.Structural + Leaf_NDemands.Storage + Leaf_NDemands.Metabolic;
            Stem_NDemand = Stem_NDemands.Structural + Stem_NDemands.Storage + Stem_NDemands.Metabolic;
            Inflorescence_NDemand = Inflorescence_NDemands.Structural + Inflorescence_NDemands.Storage + Inflorescence_NDemands.Metabolic;
            Taproot_NDemand = Taproot_NDemands.Structural + Taproot_NDemands.Storage + Taproot_NDemands.Metabolic;
            Root_NDemand = Root_NDemands.Structural + Root_NDemands.Storage + Root_NDemands.Metabolic;

            Leaf_NSupplyReAllocation = Leaf_NSupplies.ReAllocation;
            Stem_NSupplyReAllocation = Stem_NSupplies.ReAllocation;
            Root_NSupplyReAllocation = Root_NSupplies.ReAllocation;
        }
        
        [EventSubscribe("DoManagementCalculations")]
        private void OnDoManagementCalculations(object sender, EventArgs e)
        {
            FomN = MathUtilities.Sum(SoilNitrogen.FOM.N);
            HumN = MathUtilities.Sum(SoilNitrogen.Humic.N);
            BiomN = MathUtilities.Sum(SoilNitrogen.Microbial.N);
            AccumFert += Fert.NitrogenApplied;
            AccumIrrigation += Irrig.IrrigationApplied;
            
            
            AccumEO -= waterBalance.Eo;
            AccumES -= waterBalance.Es; 
            AccumDrainage -= waterBalance.Drainage;
            AccumRunoff -= waterBalance.Runoff;
            SWC = MathUtilities.Sum(waterBalance.SWmm);
            DUL = MathUtilities.Sum(soilPhysical.DULmm);
            
            //!!!!!! Plant Harvest !!!!!!
            if (Clock.Today.DayOfYear == YearStartDate.DayOfYear)
                AccumHarvestedWt = (double)zone.Get("[Defoliate].Script.DefoliatedDM");
            else
                AccumHarvestedWt += (double)zone.Get("[Defoliate].Script.DefoliatedDM");            
        }
    }
}
```
    Report: EventNames=[Clock].DoReport
      VariableNames:
        [Clock].Today as Date
        [Weather].Radn as SolarRadiation
        [Chicory].Leaf.RadiationIntercepted as InterceptedRadiation
        [Weather].Rain as Rainfall
        [Irrigation].IrrigationApplied as IrrigationApplied
        [Soil].SoilWater.Eo as Eo
        [Soil].SoilWater.Es as Evaporation
        [Chicory].Leaf.Transpiration as Transpiration
        [Soil].SoilWater.pond as PondedWater
        [Soil].SoilWater.Drainage as Drainage
        [Soil].SoilWater.Runoff as Runoff
        sum([Soil].SoilWater.LateralOutflow) as LateralFlow
        sum([Soil].Water.MM) as TotalSWC
        sum([Soil].Physical.DULmm) as TotalDUL
        sum([Soil].Physical.LL15mm) as TotalLL15
        [Fertiliser].NitrogenApplied as FertiliserN
        sum([Soil].Nutrient.DenitrifiedN) as DenitrifiedN
        ([Soil].SoilWater.LeachNH4 + [Soil].SoilWater.LeachNO3) as LeachedN
        (-1*[Chicory].Root.NUptake) as UptakeN
        sum([Soil].Nutrient.MineralisedN) as MineralisedSoilN
        sum([Soil].Nutrient.SurfaceResidue.Decomposition.MineralisedN) as MineralisedSurfOMN
        ([Chicory].Leaf.Detached.N+[Chicory].Stem.Detached.N+[Chicory].Inflorescence.Detached.N) as DetachedAGN
        ([Chicory].Taproot.Detached.N+[Chicory].Root.Detached.N) as DetachedBGN
        (sum([Soil].Urea.kgha) + sum([Soil].NH4.kgha) + sum([Soil].NO3.kgha)) as SoilNContent
        sum([Soil].Urea.kgha) as SoilUrea
        sum([Soil].NH4.kgha) as SoilNH4
        sum([Soil].NO3.kgha) as SoilNO3
        (sum([Soil].NH4.kgha[1:3])+sum([Soil].NO3.kgha[1:3])) as TopSoilN
        [SurfaceOrganicMatter].N as TotalSurfOMN
        sum([Soil].Nutrient.FOM.N) as TotalFOMN
        sum([Soil].Nutrient.Humic.N) as TotalHumicN
        sum([Soil].Nutrient.Microbial.N as TotalMicrobialN
        ([Chicory].Total.N) as TotalPlantN
        [Defoliate].Script.RotationHarvestingDM
        [Defoliate].Script.RotationHarvestedDM as RotationHarvestedWt
        [Defoliate].Script.PreHarvestDM
        [Defoliate].Script.PostHarvestDM
        [Defoliate].Script.DefoliatedDM
        [Defoliate].Script.HarvestedDM
        [Defoliate].Script.RemovedDM
        [Defoliate].Script.DefoliatedN
        [Defoliate].Script.HarvestedN
        [Defoliate].Script.RemovedN
        [Defoliate].Script.NReturnedInDung
        [Defoliate].Script.NReturnedInUrine
        [Defoliate].Script.DefoliatedDM as HarvestedWt
        [Defoliate].Script.DaysAfterCut
        [ExtraVariables].Script.AccumHarvestedWt as CumulativeHarvestedWt
        [Chicory].Phenology.ThermalTime
        [Chicory].Phenology.Photoperiod
        [Chicory].Phenology.Vernalisation.TodaysVernalisation
        [Chicory].Phenology.Vernalisation.DaysVernalised
        [Chicory].Population
        [Chicory].Phenology.CurrentPhase.Name
        [Chicory].Phenology.Stage
        [Chicory].Root.LengthDensity
        [Chicory].Leaf.ExtinctionCoefficient
        ([Chicory].Leaf.Live.Wt / ([Chicory].AboveGroundLive.Wt + 0.000001)) as Chicory.LeafFraction
        ([Chicory].Stem.Live.Wt / ([Chicory].AboveGroundLive.Wt + 0.000001)) as Chicory.StemFraction
        ([Chicory].Inflorescence.Live.Wt / ([Chicory].AboveGroundLive.Wt + 0.000001)) as FlowerFraction
        ([Chicory].Taproot.Live.Wt / ([Chicory].BelowGround.Wt + 0.000001)) as TaprootFraction
        ([Chicory].Root.Live.Wt / ([Chicory].BelowGround.Wt + 0.000001)) as RootFraction
        [Chicory].Arbitrator.DM.TotalFixationSupply
        [Chicory].Arbitrator.DM.TotalPlantDemand
        [Chicory].Arbitrator.DM.Allocated
        [Chicory].Arbitrator.DM.SinkLimitation
        [Chicory].Arbitrator.DM.NutrientLimitation
        [Chicory].Arbitrator.FDM
        [ExtraVariables].Script.Leaf_DMSupply
        [ExtraVariables].Script.Stem_DMSupply
        [ExtraVariables].Script.Inflorescence_DMSupply
        [ExtraVariables].Script.Root_DMSupply
        [ExtraVariables].Script.Taproot_DMSupply
        [ExtraVariables].Script.Leaf_DMDemand
        [ExtraVariables].Script.Stem_DMDemand
        [ExtraVariables].Script.Inflorescence_DMDemand
        [ExtraVariables].Script.Root_DMDemand
        [ExtraVariables].Script.Taproot_DMDemand
        [Chicory].Arbitrator.N.TotalPlantSupply
        [Chicory].Arbitrator.N.TotalPlantDemand
        [Chicory].Arbitrator.N.Allocated
        [Chicory].Arbitrator.FN
        [Chicory].Root.NTakenUp
        [Chicory].Root.NSupply.Uptake
        [Chicory].Root.NUptake
        [ExtraVariables].Script.Leaf_NSupply
        [ExtraVariables].Script.Stem_NSupply
        [ExtraVariables].Script.Inflorescence_NSupply
        [ExtraVariables].Script.Root_NSupply
        [ExtraVariables].Script.Taproot_NSupply
        [ExtraVariables].Script.Leaf_NDemand
        [ExtraVariables].Script.Stem_NDemand
        [ExtraVariables].Script.Inflorescence_NDemand
        [ExtraVariables].Script.Root_NDemand
        [ExtraVariables].Script.Taproot_NDemand
        [Chicory].ShootRootRatio
        [Chicory].TargetShootRootRatio
        [Chicory].Leaf.DMDemands.Structural.DMDemandFunction.PartitionFraction
        [Chicory].Stem.DMDemands.Structural.DMDemandFunction.PartitionFraction
        [Chicory].Inflorescence.DMDemands.Structural.DMDemandFunction.PartitionFraction
        [Chicory].Taproot.DMDemands.Structural.DMDemandFunction.PartitionFraction
        [Chicory].StemsLeafRatio
        [Chicory].FlowerStemRatio
        [Chicory].TaprootRootRatio
        [Chicory].TargetStemsLeafRatio
        [Chicory].TargetFlowerStemRatio
        [Chicory].TargetTaprootRootRatio
        [Chicory].Total.Wt
        [Chicory].Total.N
        [Chicory].Total.NConc
        [Chicory].AboveGround.Wt
        [Chicory].BelowGround.Wt
        [Chicory].AboveGround.N
        [Chicory].BelowGround.N
        [Chicory].AboveGround.NConc
        [Chicory].BelowGround.NConc
        [Chicory].AboveGroundLive.NConc
        [Chicory].BelowGroundLive.NConc
        [Chicory].Leaf.Wt
        [Chicory].Leaf.Live.Wt
        [Chicory].Leaf.Live.N
        [Chicory].Leaf.Live.NConc
        [Chicory].Leaf.Dead.Wt
        [Chicory].Leaf.Dead.NConc
        [Chicory].Leaf.CoverTotal
        [Chicory].Leaf.CoverGreen
        [Chicory].Leaf.CoverDead
        [Chicory].Leaf.LAITotal
        [Chicory].Leaf.LAI
        [Chicory].Leaf.LAIDead
        [Chicory].Leaf.Height
        [Chicory].Leaf.Transpiration
        [Chicory].Leaf.Fw
        [Chicory].Leaf.Fn
        [Chicory].Leaf.Photosynthesis.FCO2
        [Chicory].Leaf.Photosynthesis.FN
        [Chicory].Leaf.Photosynthesis.FT
        [Chicory].Leaf.Photosynthesis.FW
        [Chicory].Leaf.Photosynthesis.FVPD
        [Chicory].Leaf.FRGR
        [Chicory].Stem.Live.Wt
        [Chicory].Stem.Live.N
        [Chicory].Stem.Live.NConc
        [Chicory].Stem.Dead.Wt
        [Chicory].Stem.Dead.NConc
        [Chicory].Inflorescence.Live.Wt
        [Chicory].Inflorescence.Live.N
        [Chicory].Inflorescence.Live.NConc
        [Chicory].Inflorescence.Dead.Wt
        [Chicory].Inflorescence.Dead.NConc
        [Chicory].Taproot.Live.Wt
        [Chicory].Taproot.Live.N
        [Chicory].Taproot.Live.NConc
        [Chicory].Taproot.Dead.Wt
        [Chicory].Taproot.Dead.NConc
        [Chicory].Root.Live.Wt
        [Chicory].Root.Live.N
        [Chicory].Root.Live.NConc
        [Chicory].Root.Dead.Wt
        [Chicory].Root.Dead.NConc
        [Chicory].Root.Depth
        [Chicory].Root.WaterUptake
        [Chicory].Leaf.Live.StructuralWt
        [Chicory].Leaf.Live.StorageWt
        [Chicory].Leaf.Live.MetabolicWt
        [Chicory].Leaf.Live.StructuralN
        [Chicory].Leaf.Live.StorageN
        [Chicory].Leaf.Live.MetabolicN
        [Chicory].Leaf.Dead.StructuralWt
        [Chicory].Leaf.Dead.StorageWt
        [Chicory].Leaf.Dead.MetabolicWt
        [Chicory].Leaf.Dead.StructuralN
        [Chicory].Leaf.Dead.StorageN
        [Chicory].Leaf.Dead.MetabolicN
        [Chicory].Stem.Live.StructuralWt
        [Chicory].Stem.Live.StorageWt
        [Chicory].Stem.Live.MetabolicWt
        [Chicory].Stem.Live.StructuralN
        [Chicory].Stem.Live.StorageN
        [Chicory].Inflorescence.Live.StructuralWt
        [Chicory].Inflorescence.Live.StorageWt
        [Chicory].Inflorescence.Live.StructuralN
        [Chicory].Inflorescence.Live.StorageN
        [Chicory].Root.Live.StructuralWt
        [Chicory].Root.Live.StorageWt
        [Chicory].Root.Live.StructuralN
        [Chicory].Root.Live.StorageN
        [Chicory].Taproot.Live.StructuralWt
        [Chicory].Taproot.Live.StorageWt
        [Chicory].Taproot.Live.StructuralN
        [Chicory].Taproot.Live.StorageN
        [Chicory].Leaf.Live.StructuralNConc
        [Chicory].Leaf.Live.StorageNConc
        [Chicory].Root.Live.StructuralNConc
        [Chicory].Root.Live.StorageNConc
        [Chicory].Leaf.DMDemands.Structural.DMDemandFunction.PartitionFraction
        [Chicory].Stem.DMDemands.Structural.DMDemandFunction.PartitionFraction
        [Chicory].Inflorescence.DMDemands.Structural.DMDemandFunction.PartitionFraction
        [Chicory].Taproot.DMDemands.Structural.DMDemandFunction.PartitionFraction
        [Chicory].Leaf.Allocated.Wt
        [Chicory].Stem.Allocated.Wt
        [Chicory].Inflorescence.Allocated.Wt
        [Chicory].Taproot.Allocated.Wt
        [Chicory].Root.Allocated.Wt
        [Chicory].Leaf.Senesced.Wt
        [Chicory].Stem.Senesced.Wt
        [Chicory].Inflorescence.Senesced.Wt
        [Chicory].Taproot.Senesced.Wt
        [Chicory].Root.Senesced.Wt
        [Chicory].Leaf.Detached.Wt
        [Chicory].Stem.Detached.Wt
        [Chicory].Inflorescence.Detached.Wt
        [Chicory].Taproot.Detached.Wt
        [Chicory].Root.Detached.Wt
        [Chicory].Leaf.Removed.Wt
        [Chicory].Stem.Removed.Wt
        [Chicory].Inflorescence.Removed.Wt
        [Chicory].Taproot.Removed.Wt
        [Chicory].Root.Removed.Wt
  DataStore
    ExcelInput Observed: FileNames=[Observed.xlsx]; SheetNames=[Observed]
    PredictedObserved: PredictedTableName=Report; ObservedTableName=Observed; FieldNameUsedForMatch=SimulationName; FieldName2UsedForMatch=Date; AllColumns=false
      Tests: POName=PredictedObserved
        AcceptedStats:
          Name                           n     Slope     Intercept  SEslope    SEintercept  R2         RMSE       NSE        ME           MAE         RSR
          Chicory.AboveGround.Wt         1550  0.49338   62.5228    0.0144709  2.42959      0.428876   74.462     0.414293   -6.79793     52.3436     0.765068
          Chicory.AboveGroundLive.NConc  884   0.3141    0.019151   0.0409091  0.00146591   0.0626511  0.0118348  -1.33888   -0.00484725  0.00971209  1.52848
          Chicory.Leaf.LAI               72    0.207979  2.38496    0.0176286  0.122381     0.665374   4.34222    0.285632   -1.31301     2.48853     0.839313
          Chicory.LeafFraction           143   0.777547  0.213096   0.0536551  0.0497065    0.598297   0.0799978  0.539157   0.00868883   0.0413798   0.676476
          Chicory.Population             252   0.532909  88.3527    0.0355855  3.96326      0.472867   56.2209    -0.217167  42.0965      46.4832     1.10106
          Chicory.StemFraction           200   0.749513  0.0564801  0.078656   0.0113456    0.314409   0.129197   -0.378311  0.0331222    0.0819346   1.17108
          CumulativeHarvestedWt          1232  0.919771  30.8219    0.0162062  11.0333      0.72366    187.094    0.667708   -17.1922     137.96      0.576214
          HarvestedWt                    962   0.664138  50.6403    0.02245    3.53897      0.476883   69.5849    0.397105   7.08399      51.2488     0.776059
          RotationHarvestedWt            1117  0.565842  66.2384    0.0186359  3.17828      0.452603   74.1206    0.421127   5.46341      55.527      0.760497
        AcceptedStatsName=Name n Slope Intercept SEslope SEintercept R2 RMSE NSE ME MAE RSR
        Memo Note
          <br>
          __Where:__

           - n: The number of PO (predicted-observed) pairs for the given variable;
           - Slope: The slope of the straight line linear regression. A perfect fit would have a value of 1;
           - Intercept: The intercept of the straight line linear regression. A perfect fit would have a value of 0;
           - SEslope: Standard error in the slope;
           - SEintercept: Standard error in the intercept.;
           - R2: The value for the coefficient of determination. It varies between 0 and 1, where 1 is a perfect fit;
           - RMSE: Root Mean Squared Error. 0 is a perfect fit. Values less than half the standard deviation of the observed data are acceptable;
           - NSE: Nash-Sutcliffe Efficiency. Indicates how well the PO data fits the 1:1 line. Ranges from -∞ to 1 with 1 being the optimal value while values  between 0 and 1 are generally viewed as acceptable. Values < 0 indicate unacceptable model performance;
           - ME: Mean Error between predicted and observed values. 0 is a perfect fit;
           - MAE: Mean Absolute Error. 0 is a perfect fit. Values less than half the standard deviation of the observed data are acceptable;
           - RSR: Ratio between the RMSE and the standard deviation of observations. 0 is a perfect fit;
  Folder Validation
    Memo Note
      The performance of the chicory model is evaluated in simulations based on experiments conducted primarily in New Zealand.  Datasets from USA have been added, but they should be taken with caution as there was limited information about the experiments and published results corresponded to annual or seasonal aggregates only.  Values for population are included, but they were not explicitly simulated by the model; only a decrease in plant numbers as function of cuts or grazings is considered.  There is indication in the literature that severe defoliation may lead to higher death rate for chicory, but when the data from several publications were analysed together, no relationship could be found.  All experiments did show a decline in plant population over time.  It is likely that the timing of defoliation (soon before winter) and the severity of trampling (depending animal type and numbers, as well as soil conditions) are better indicators of plant mortality, but detailed information about this is lacking.
      The evaluation of the model with regards to plant N concentration is only superficial and currently the model should not be seen as a proper tested with respect to N concentration.  However, the values for a few of the experiments do show reasonable agreement for magnitude and seasonal trends.  The overall lack of agreement are mainly caused by experiments with low N inputs, in some of these weeds may (especially clovers) may have provided some N to chicory, as in general measurements are higher than the model predictions.  There are also uncertainties regarding whether some of the data refer to whole plant, whole sward, or only fresh leaves.
      So, the poor evaluation for N concentration can be attributed, on one hand, to the lack of data, in quantity and quality, for N content.   On the other hand, and more importatly, some of the underlying code don't seem to be able to describe some plant processes that are important under cut/grazing and re-growth conditions.  The PMF processes for computing N demand and supply (especially regarding remobilisation within living tissues) are still being developed.  One issue in particular is caused because the model attempts to keep all the plant tissues at maximum N concentration, which can lead to high N demands when the plant is in deficit.  The high demand and low supply end up restricting growth in the model beyond expectations. This may also reduce mobilisation of N (as well as DM) from storage organs (especially taproot in chicory) towards new growth.  Due to these issues, the current model cannot be considered fully fit for simulating N balance without expert judgment.  The model will be upgraded in the near future as the work on the code to improve the description of those specific processes is ongoing.
    Folder New Zealand
      Folder ScottFarm
        Folder ScottFarmC
          Experiment ScottFarmC
            Memo
              Simulation based on unpublished data from a field trial, part of SuperP farmlet, run at Scott farm, Hamilton, New Zealand, from 2008 to 2010.  Trial plots were sown with chicory only, cultivar '*Choice*'; seeds drilled (6 kg/ha) and broadcasted (2 kg/ha).  Sward was grazed by dairy cows.  Measurements taken comprise plant density (quadrat method) and yield (estimated assuming a fixed 5 cm residue).
              Data supplied by Julia Lee, DairyNZ.
            Factors
              Factor 17a: Specification=[Clock].StartDate = 2008-07-01
            Simulation ScottFarmC17a
              Clock: Start=2008-09-01; End=2010-05-30
              Weather: FileName=Ruakura.met
              Summary
              SoilArbitrator Soil Arbitrator
              Zone Field: Area=1; Slope=0; AspectAngle=0; Altitude=50
                Folder Management
                  Operations Sowing
                    2008-10-23  [Chicory].Sow(population: 200, cultivar: "Choice", depth: 10, rowSpacing: 150)
                    2008-10-23  [Fertiliser].Apply(Amount: 60, Type: Fertiliser.Types.UreaN, Depth: 10)
                  Operations DefoliationSchedule
                    2009-01-19  [Defoliate].Script.Defoliate(defoliationType: "Graze", amountDM: 50, amountType: "ResidualDM", duration: 1)
                    2009-02-23  [Defoliate].Script.Defoliate(defoliationType: "Graze", amountDM: 50, amountType: "ResidualDM", duration: 1)
                    2009-04-01  [Defoliate].Script.Defoliate(defoliationType: "Graze", amountDM: 50, amountType: "ResidualDM", duration: 1)
                    2009-05-08  [Defoliate].Script.Defoliate(defoliationType: "Graze", amountDM: 50, amountType: "ResidualDM", duration: 1)
                    2009-09-14  [Defoliate].Script.Defoliate(defoliationType: "Graze", amountDM: 50, amountType: "ResidualDM", duration: 1)
                    2009-10-22  [Defoliate].Script.Defoliate(defoliationType: "Graze", amountDM: 50, amountType: "ResidualDM", duration: 1)
                    2009-11-25  [Defoliate].Script.Defoliate(defoliationType: "Graze", amountDM: 50, amountType: "ResidualDM", duration: 1)
                    2009-12-21  [Defoliate].Script.Defoliate(defoliationType: "Graze", amountDM: 50, amountType: "ResidualDM", duration: 1)
                    2010-01-15  [Defoliate].Script.Defoliate(defoliationType: "Graze", amountDM: 50, amountType: "ResidualDM", duration: 1)
                    2010-02-12  [Defoliate].Script.Defoliate(defoliationType: "Graze", amountDM: 50, amountType: "ResidualDM", duration: 1)
                    2010-03-22  [Defoliate].Script.Defoliate(defoliationType: "Graze", amountDM: 50, amountType: "ResidualDM", duration: 1)
                  Operations ExcretaSchedule
                    2009-01-19  [SurfaceOrganicMatter].Add(mass: 67.0, N: 12.0, P: 0.0, type: "RuminantDung_PastureFed", name "dung")
                    2009-01-19  [Fertiliser].Apply(Amount: 18.0, Type: Fertiliser.Types.UreaN, Depth: 30)
                    2009-02-23  [SurfaceOrganicMatter].Add(mass: 67.0, N: 12.0, P: 0.0, type: "RuminantDung_PastureFed", name "dung")
                    2009-02-23  [Fertiliser].Apply(Amount: 18.0, Type: Fertiliser.Types.UreaN, Depth: 30)
                    2009-04-01  [SurfaceOrganicMatter].Add(mass: 67.0, N: 12.0, P: 0.0, type: "RuminantDung_PastureFed", name "dung")
                    2009-04-01  [Fertiliser].Apply(Amount: 18.0, Type: Fertiliser.Types.UreaN, Depth: 30)
                    2009-05-08  [SurfaceOrganicMatter].Add(mass: 67.0, N: 12.0, P: 0.0, type: "RuminantDung_PastureFed", name "dung")
                    2009-05-08  [Fertiliser].Apply(Amount: 18.0, Type: Fertiliser.Types.UreaN, Depth: 30)
                    2009-09-14  [SurfaceOrganicMatter].Add(mass: 67.0, N: 12.0, P: 0.0, type: "RuminantDung_PastureFed", name "dung")
                    2009-09-14  [Fertiliser].Apply(Amount: 18.0, Type: Fertiliser.Types.UreaN, Depth: 30)
                    2009-10-22  [SurfaceOrganicMatter].Add(mass: 67.0, N: 12.0, P: 0.0, type: "RuminantDung_PastureFed", name "dung")
                    2009-10-22  [Fertiliser].Apply(Amount: 18.0, Type: Fertiliser.Types.UreaN, Depth: 30)
                    2009-11-25  [SurfaceOrganicMatter].Add(mass: 67.0, N: 12.0, P: 0.0, type: "RuminantDung_PastureFed", name "dung")
                    2009-11-25  [Fertiliser].Apply(Amount: 18.0, Type: Fertiliser.Types.UreaN, Depth: 30)
                    2009-12-21  [SurfaceOrganicMatter].Add(mass: 32.2, N: 5.8, P: 0.0, type: "RuminantDung_PastureFed", name "dung")
                    2009-12-21  [Fertiliser].Apply(Amount: 8.6, Type: Fertiliser.Types.UreaN, Depth: 30)
                    2010-01-15  [SurfaceOrganicMatter].Add(mass: 32.2, N: 5.8, P: 0.0, type: "RuminantDung_PastureFed", name "dung")
                    2010-01-15  [Fertiliser].Apply(Amount: 8.6, Type: Fertiliser.Types.UreaN, Depth: 30)
                    2010-02-12  [SurfaceOrganicMatter].Add(mass: 32.2, N: 5.8, P: 0.0, type: "RuminantDung_PastureFed", name "dung")
                    2010-02-12  [Fertiliser].Apply(Amount: 8.6, Type: Fertiliser.Types.UreaN, Depth: 30)
                    2010-03-22  [SurfaceOrganicMatter].Add(mass: 32.2, N: 5.8, P: 0.0, type: "RuminantDung_PastureFed", name "dung")
                    2010-03-22  [Fertiliser].Apply(Amount: 8.6, Type: Fertiliser.Types.UreaN, Depth: 30)
                  Manager Defoliate
                    Message =
```csharp
using APSIM.Shared.Utilities;
using System.Xml.Serialization;
using Models.PMF;
using Models.Soils;
using Models;
using System.Text;
using System.Collections.Generic;
using Models.Core;
using System;

namespace Models
{
    [Serializable]
    public class Script : Model
    {
        [Description("This script is set in 'Replacements':")]
        public string Message { get; set; }
    }
}
```
                  Manager AutomaticIrrigation
                    allowIrrigation = yes
                    seasonStart = 15-Sep
                    seasonEnd = 30-Jul
                    seasonsAllocation = 10000
                    triggerDeficit = 75
                    targetDeficit = 90
                    returndays = 3
                    maximumAmount = 15
                    depthPAWC = 300
```csharp
using Newtonsoft.Json;
using Models.PMF.Phen;
using System;
using Models.Core;
using Models.PMF;
using Models.Soils;
using System.Xml.Serialization;
using APSIM.Shared.Utilities;
using Models.Interfaces;

        
namespace Models
{
    [Serializable] 
    [System.Xml.Serialization.XmlInclude(typeof(Model))]
    public class Script : Model
    {
        [Link] private ISummary summary;
        [Link] private Irrigation Irrigation;
        [Link] private Clock Clock;
        [Link] private Soil Soil;
        [Link(IsOptional = true)] private Plant existingCrop;
        private DateTime StartDate;
        private DateTime EndDate;
        private double TopDUL;
        private double TopLL;
        private int nLayers;
        [Link(IsOptional = true)]
        private Phenology phenology;
        [Link]
        private IPhysical soilPhysical;
        [Link]
        private ISoilWater waterBalance;
        //Communication to other modules
       
        //User inputs from properties tab
        [Description("Turn irrigation on?")]
        public answerType allowIrrigation { get; set; }
        [Description("Start of irrigation season (dd-MMM)")]
        public string seasonStart { get; set; }
        [Description("End of irrigation season (dd-MMM)")]
        public string seasonEnd { get; set; }
        [Description("Season allocation (mm)")]
        public double seasonsAllocation { get; set; }
        [Description("Deficit to trigger irrigation (% PAWC)")]
        public double triggerDeficit { get; set; }
        [Description("Deficit to stop irrigaton (% PAWC)")]
        public double targetDeficit { get; set; }
        [Description("Minimum days for irrigation to return")]
        public double returndays { get; set; }
        [Description("Maximum irrigation application (mm/day)")]
        public double maximumAmount { get; set; }
        [Description("Depth to calculate PAWC (mm)")]
        public double depthPAWC { get; set; }
       
        public enum answerType
        {
            /// <summary>a positive answer</summary>
            yes,
            /// <summary>a negative answer</summary>
            no
        }

        //Class members
        [JsonIgnore] public double TopSWdeficit { get; set; }
        [JsonIgnore] public double TopSWC { get; set; }
        [JsonIgnore] public double DaysSinceIrrigation { get; set; }
        [JsonIgnore] public double AmountToApply { get; set; }
        [JsonIgnore] public double SeasonAppliedAmount { get; set; }
        
        private bool IrrigationIsAllowed { get; set; }
        private bool SeasonIsOpen { get; set; }
        private bool CropIsActive { get; set; }
        private bool IrrigatorIsAvailable { get; set; }
        private bool SoilIsDry { get; set; }

    
        //Calculate static soil variables
        [EventSubscribe("StartOfSimulation")]
        private void OnStartOfSimulation(object sender, EventArgs e)
        {   
            //Set the season dates
            StartDate = DateTime.Parse(seasonStart + "-" + Clock.Today.Year.ToString());
            EndDate = DateTime.Parse(seasonEnd + "-" + Clock.Today.Year.ToString());
            
            //Can we irrigate at all?
            IrrigationIsAllowed = false; 
            if (allowIrrigation == answerType.yes)
                IrrigationIsAllowed = true; 

            //Calculate soil water variables
            double depthFromSurface = 0.0;
            double fracLayer = 0.0;
            nLayers = soilPhysical.Thickness.Length;
            for (int layer = 0; layer < nLayers; layer++)
            {
                fracLayer = Math.Min(1.0, (depthPAWC - depthFromSurface) / soilPhysical.Thickness[layer]);
                TopLL += soilPhysical.LL15mm[layer] * fracLayer;
                TopDUL += soilPhysical.DULmm[layer] * fracLayer;
                depthFromSurface += soilPhysical.Thickness[layer];
                if (depthFromSurface >= depthPAWC)
                    layer = nLayers;
            }
        }
             
        //Determine daily requirement for irrigation
        [EventSubscribe("StartOfDay")]
        private void OnStartOfDay(object sender, EventArgs e)
        {
            //Can we irrigate today?          
            SeasonIsOpen = isBetween(Clock.Today, StartDate, EndDate);

            //Is there a crop in the ground that needs irrigation?
            CropIsActive = false;
            if ((existingCrop != null) && (existingCrop.IsAlive))
                CropIsActive = true;
            //if ((phenology.Stage >= 3.0) && (phenology.Stage < 6.0))
          
            //Is the irrigator available?
            IrrigatorIsAvailable = false;
            DaysSinceIrrigation += 1;
            if (DaysSinceIrrigation >= returndays)
                IrrigatorIsAvailable = true;
          
            //Is the soil dry enough to require irrigation?
            SoilIsDry = false;
            double depthFromSurface = 0.0;
            double fracLayer = 0.0;
            TopSWC = 0.0;
            for (int layer = 0; layer < nLayers; layer++)
            {
                fracLayer = Math.Min(1.0, (depthPAWC - depthFromSurface) / soilPhysical.Thickness[layer]);
                TopSWC += waterBalance.SWmm[layer] * fracLayer;
                depthFromSurface += soilPhysical.Thickness[layer];
                if (depthFromSurface >= depthPAWC)
                    layer = nLayers;
            }
            
            TopSWdeficit = TopSWC - TopDUL;
            if (Math.Max(0.0, -TopSWdeficit) >= (TopDUL - TopLL) * (100 - triggerDeficit) / 100)
                SoilIsDry = true;
                
            //Are all the conditions ratifying irrigation
            if (IrrigationIsAllowed && SeasonIsOpen && CropIsActive && IrrigatorIsAvailable && SoilIsDry)
            {
                //Lets bloody well irrigate then!!!!
                AmountToApply = TopDUL * targetDeficit / 100 - TopSWC;
                //AmountToApply = Math.Max(0.0, Math.Min(AmountToApply, seasonsAllocation - SeasonAppliedAmount));
                AmountToApply = maximumAmount;
                Irrigation.Apply(AmountToApply);
                DaysSinceIrrigation = 0;
                SeasonAppliedAmount += AmountToApply;
            }
        }
        
        ///Checks whether theDate is between iniDate and endDate (non-year specific)
        private bool isBetween(DateTime theDay, DateTime iniDate, DateTime endDate)
        {
            bool result = false;
            if (iniDate.DayOfYear < endDate.DayOfYear)
            {
                // period is within one year, ex: summer in the northern hemisphere
                if ((theDay.DayOfYear >= iniDate.DayOfYear) && (theDay.DayOfYear <= endDate.DayOfYear))
                    result = true;
            }
            else
            {
                // period goes over the end of the year, ex: summer in the southern hemisphere
                if ((theDay.DayOfYear >= iniDate.DayOfYear) || (theDay.DayOfYear <= endDate.DayOfYear))
                    result = true;
            }
            
            return result;
        }
    }
}
```
                  Manager ExtraVariables
```csharp
// This will be replaced by the "ExtraVariables" section in "Replacements"

using Models.Soils;
using System;
using Models.Core;

namespace Models
{
    [Serializable] 
    public class Script : Model
    {
    }
}
```
                MicroClimate: a_interception=0; b_interception=1; c_interception=0; d_interception=0; SoilHeatFluxFraction=0.4; MinimumHeightDiffForNewLayer=0; NightInterceptionFraction=0.5; ReferenceHeight=2
                Irrigation
                Fertiliser
                SurfaceOrganicMatter surface organic matter: InitialResidueName=grass; InitialResidueType=grass; InitialResidueMass=500; InitialStandingFraction=0; InitialCPR=0; InitialCNR=40
                Soil HorotiuSoil: SoilType=Typic Udivitrand (US), Typic Orthic Allophanic Soil (NZ); LocalName=Horotiu silt loam; Site=Ruakura; NearestTown=Hamilton; Region=Waikato; Country=New Zealand; Latitude=0; Longitude=0; DataSource=Based primarily on data from Close et al, 2003
                  Chemical: Thickness=[200, 200, 130, 140, 380, 230, 220]; PH=[6, 6, 6, 6, 6, 6, 6]; PHUnits=Water
                  Physical
                    Thickness  ParticleSizeClay  ParticleSizeSand  ParticleSizeSilt  BD    AirDry  LL15   DUL    SAT    KS
                    200        20                47                33                0.88  0.114   0.228  0.373  0.581  553
                    200        19                65                17                0.85  0.1     0.22   0.34   0.609  5083
                    130        11                76                13                1.03  0.1     0.182  0.323  0.54   8353
                    140        7                 84                10                1.11  0.1     0.15   0.282  0.5    13589
                    380        5                 88                8                 1.11  0.1     0.142  0.2    0.5    38963
                    230        3                 91                6                 1.03  0.04    0.103  0.16   0.446  45280
                    220        1                 94                5                 1.03  0.04    0.084  0.13   0.37   53606
                    SoilCrop ChicorySoil: LL=[0.23, 0.22, 0.18, 0.15, 0.14, 0.1, 0.08]; KL=[0.1, 0.08, 0.05, 0.02, 0.01, 0.01, 0]; XF=[1, 1, 1, 1, 1, 1, 0.5]
                  WaterBalance SoilWater: SummerDate=21-Sep; SummerU=6; SummerCona=3.5; WinterDate=23-Mar; WinterU=6; WinterCona=2.5; DiffusConst=88; DiffusSlope=35; Salb=0.2; CN2Bare=0.7; CNRed=20; CNCov=0.8; PSIDul=-100; Thickness=[200, 200, 130, 140, 380, 230, 220]; SWCON=[0.55, 0.6, 0.7, 0.7, 0.75, 0.8, 0.8]
                  Nutrient
                  Organic: FOMCNRatio=40; CarbonUnits=Total
                    Thickness  Carbon  SoilCNRatio  FBiom  FInert  FOM
                    200        8       12.5         0.08   0.57    338.974
                    200        1.88    12.5         0.04   0.6     227.221
                    130        0.93    12.5         0.02   0.62    175.199
                    140        0.43    12.5         0.01   0.65    132.413
                    380        0.13    12.5         0.01   0.7     61.9249
                    230        0.1     12.5         0.01   0.8     39.0922
                    220        0.07    12.5         0.01   0.85    25.1768
                  Water: Thickness=[200, 200, 130, 140, 380, 230, 220]; InitialValues=[0.3585, 0.328, 0.3089, 0.2688, 0.1942, 0.1543, 0.1254]; InitialPAWmm=121.572; RelativeTo=LL15; FilledFromTop=false
                  CERESSoilTemperature Temperature
                  Solute NO3: Thickness=[200, 200, 130, 140, 380, 230, 220]; InitialValues=[15, 10, 5.00305, 5.00305, 4.47659, 1.00193, 1.00193]; InitialValuesUnits=ppm; WaterTableConcentration=0; D0=0; DepthConstant=0; MaxDepthSoluteAccessible=0; RunoffEffectivenessAtMovingSolute=0; MaxEffectiveRunoff=0
                  Solute NH4: Thickness=[200, 200, 130, 140, 380, 230, 220]; InitialValuesUnits=ppm; WaterTableConcentration=0; D0=0; DepthConstant=0; MaxDepthSoluteAccessible=0; RunoffEffectivenessAtMovingSolute=0; MaxEffectiveRunoff=0
                    InitialValues=[0.511364, 0.176471, 0.0915192, 0.0915192, 0.0921534, 0.0963391, 0.0963391]
                  Solute Urea: Thickness=[200, 200, 130, 140, 380, 230, 220]; InitialValues=[0, 0, 0, 0, 0, 0, 0]; InitialValuesUnits=kg/ha; WaterTableConcentration=0; D0=0; DepthConstant=0; MaxDepthSoluteAccessible=0; RunoffEffectivenessAtMovingSolute=0; MaxEffectiveRunoff=0
                Plant Chicory
                Report: EventNames=[Clock].DoReport
        Folder ScottFarmE
          Experiment ScottFarmE
            Memo
              Simulation based on unpublished data from a chicory establishment trial at Scott farm, Hamilton, New Zealand, run from 2009 to 2010.  Trial plots were sown with chicory, cultivar '*Choice*'; direct drilled after spraying existing pasture with herbicide.  Sward was mechanically mowned.  Measurements comprised of yield (plate meter technique) and population (quadrat method).
              Data supplied by Julia Lee, DairyNZ.
            Factors
              Factor stablishment: Specification=[Clock].StartDate = 2009-11-01
            Simulation ScottFarmEstablishment
              Memo
                Simulation based on unpublished data from a chicory establishment trial at Scott farm, Hamilton, New Zealand, run from 2009 to 2010.  Trial plots were sown with chicory, cultivar Choice; direct drilled after spraying existing pasture with herbicide.  Sward was mechanically mowned.  Measurements comprised of yield (plate meter technique) and population (quadrat method).
                Data supplied by Julia Lee, DairyNZ.
              Clock: Start=2009-11-01; End=2010-06-30
              Weather: FileName=Ruakura.met
              Summary
              SoilArbitrator Soil Arbitrator
              Zone Field: Area=1; Slope=0; AspectAngle=0; Altitude=50
                Folder Management
                  Operations Sowing
                    2009-11-14  [Chicory].Sow(population: 120, cultivar: "Choice", depth: 10, rowSpacing: 150)
                    2009-11-14  [Fertiliser].Apply(Amount: 40, Type: Fertiliser.Types.UreaN, Depth: 10)
                  Operations DefoliationSchedule
                    2010-01-07  [Defoliate].Script.Defoliate(defoliationType: "Cut", amountDM: 50, amountType: "ResidualDM", duration: 1)
                    2010-01-27  [Defoliate].Script.Defoliate(defoliationType: "Cut", amountDM: 50, amountType: "ResidualDM", duration: 1)
                    2010-02-17  [Defoliate].Script.Defoliate(defoliationType: "Cut", amountDM: 50, amountType: "ResidualDM", duration: 1)
                    2010-03-19  [Defoliate].Script.Defoliate(defoliationType: "Cut", amountDM: 50, amountType: "ResidualDM", duration: 1)
                    2010-06-03  [Defoliate].Script.Defoliate(defoliationType: "Cut", amountDM: 50, amountType: "ResidualDM", duration: 1)
                  Manager Defoliate: same as Validation.New Zealand.ScottFarm.ScottFarmC.ScottFarmC.ScottFarmC17a.Field.Management.Defoliate
                  Manager AutomaticIrrigation
                    allowIrrigation = yes
                    seasonStart = 01-Oct
                    seasonEnd = 30-Jul
                    seasonsAllocation = 10000
                    triggerDeficit = 75
                    targetDeficit = 90
                    returndays = 3
                    maximumAmount = 15
                    depthPAWC = 300
                    script: same as in Validation.New Zealand.ScottFarm.ScottFarmC.ScottFarmC.ScottFarmC17a.Field.Management.AutomaticIrrigation
                  Manager ExtraVariables
                    script: same as in Validation.New Zealand.ScottFarm.ScottFarmC.ScottFarmC.ScottFarmC17a.Field.Management.ExtraVariables
                MicroClimate: a_interception=0; b_interception=1; c_interception=0; d_interception=0; SoilHeatFluxFraction=0.4; MinimumHeightDiffForNewLayer=0; NightInterceptionFraction=0.5; ReferenceHeight=2
                Irrigation
                Fertiliser
                SurfaceOrganicMatter surface organic matter: InitialResidueName=grass; InitialResidueType=grass; InitialResidueMass=500; InitialStandingFraction=0; InitialCPR=0; InitialCNR=40
                Soil HorotiuSoil: SoilType=Typic Udivitrand (US), Typic Orthic Allophanic Soil (NZ); LocalName=Horotiu silt loam; Site=Ruakura; NearestTown=Hamilton; Region=Waikato; Country=New Zealand; Latitude=0; Longitude=0; DataSource=Based primarily on data from Close et al, 2003
                  Chemical: Thickness=[200, 200, 130, 140, 380, 230, 220]; PH=[6, 6, 6, 6, 6, 6, 6]; PHUnits=Water
                  Physical
                    Thickness  ParticleSizeClay  ParticleSizeSand  ParticleSizeSilt  BD    AirDry  LL15   DUL    SAT    KS
                    200        20                47                33                0.88  0.114   0.228  0.373  0.581  553
                    200        19                65                17                0.85  0.04    0.22   0.34   0.609  5083
                    130        11                76                13                1.03  0.05    0.182  0.323  0.54   8353
                    140        7                 84                10                1.11  0.04    0.15   0.282  0.5    13589
                    380        5                 88                8                 1.11  0.05    0.142  0.2    0.5    38963
                    230        3                 91                6                 1.03  0.04    0.103  0.16   0.446  45280
                    220        1                 94                5                 1.03  0.05    0.084  0.13   0.37   53606
                    SoilCrop ChicorySoil: LL=[0.23, 0.22, 0.18, 0.15, 0.14, 0.1, 0.08]; KL=[0.1, 0.08, 0.05, 0.02, 0.01, 0.01, 0]; XF=[1, 1, 1, 1, 1, 1, 0.5]
                  WaterBalance SoilWater: same as Validation.New Zealand.ScottFarm.ScottFarmC.ScottFarmC.ScottFarmC17a.Field.HorotiuSoil.SoilWater
                  Nutrient
                  Organic: same as Validation.New Zealand.ScottFarm.ScottFarmC.ScottFarmC.ScottFarmC17a.Field.HorotiuSoil.Organic
                  Water: Thickness=[200, 200, 130, 140, 380, 230, 220]; InitialValues=[0.3585, 0.328, 0.3089, 0.2688, 0.1942, 0.1543, 0.1254]; InitialPAWmm=121.572; RelativeTo=LL15; FilledFromTop=false
                  CERESSoilTemperature Temperature
                  Solute NO3: Thickness=[200, 200, 130, 140, 380, 230, 220]; InitialValues=[15, 10, 5, 5, 4.47368, 1, 1]; InitialValuesUnits=ppm; WaterTableConcentration=0; D0=0; DepthConstant=0; MaxDepthSoluteAccessible=0; RunoffEffectivenessAtMovingSolute=0; MaxEffectiveRunoff=0
                  Solute NH4: Thickness=[200, 200, 130, 140, 380, 230, 220]; InitialValues=[0.5, 0.2, 0.093, 0.093, 0.093, 0.093, 0.093]; InitialValuesUnits=ppm; WaterTableConcentration=0; D0=0; DepthConstant=0; MaxDepthSoluteAccessible=0; RunoffEffectivenessAtMovingSolute=0; MaxEffectiveRunoff=0
                  Solute Urea: same as Validation.New Zealand.ScottFarm.ScottFarmC.ScottFarmC.ScottFarmC17a.Field.HorotiuSoil.Urea
                Plant Chicory
                Report: EventNames=[Clock].DoReport
        Folder ScottFarmD
          Experiment ScottFarmD
            Memo
              Simulation based on a field trial, part of ESP farmlet, run at Scott farm, Hamilton, New Zealand, from 2010 to 2011.  Trial plots were sown with chicory, cultivar '*Choice*'; seeds drilled (6 kg/ha) and broadcasted (2 kg/ha).  Measurements taken comprised plant density (quadrat method) and yield (raising plate techinique).  Sward was grazed by dairy cows.  The trial was similar to that of C17a, but is noted that yields here were much lower due to the dry period after sowing which reduced plant establishment and hence density.
              Data supplied by Julia Lee, DairyNZ.
            Factors
              Factor 9a: Specification=[Clock].StartDate = 2010-10-01
            Simulation ScottFarmD9a
              Clock: Start=2010-10-01; End=2011-04-30
              Weather: FileName=Ruakura.met
              Summary
              SoilArbitrator Soil Arbitrator
              Zone Field: Area=1; Slope=0; AspectAngle=0; Altitude=50
                Folder Management
                  Operations Sowing
                    2010-10-30  [Chicory].Sow(population: 75, cultivar: "Choice", depth: 10, rowSpacing: 150)
                  Operations DefoliationSchedule
                    2011-01-18  [Defoliate].Script.Defoliate(defoliationType: "Graze", amountDM: 50, amountType: "ResidualDM", duration: 3)
                    2011-03-02  [Defoliate].Script.Defoliate(defoliationType: "Graze", amountDM: 50, amountType: "ResidualDM", duration: 3)
                    2011-04-01  [Defoliate].Script.Defoliate(defoliationType: "Graze", amountDM: 50, amountType: "ResidualDM", duration: 3)
                  Operations ExcretaSchedule
                    2011-01-18  [SurfaceOrganicMatter].Add(mass: 84.6, N: 15.1, P: 0.0, type: "RuminantDung_PastureFed", name "dung")
                    2011-01-18  [Fertiliser].Apply(Amount: 22.7, Type: Fertiliser.Types.UreaN, Depth: 30)
                    2011-03-02  [SurfaceOrganicMatter].Add(mass: 84.6, N: 15.1, P: 0.0, type: "RuminantDung_PastureFed", name "dung")
                    2011-03-02  [Fertiliser].Apply(Amount: 22.7, Type: Fertiliser.Types.UreaN, Depth: 30)
                    2011-04-01  [SurfaceOrganicMatter].Add(mass: 84.6, N: 15.1, P: 0.0, type: "RuminantDung_PastureFed", name "dung")
                    2011-04-01  [Fertiliser].Apply(Amount: 22.7, Type: Fertiliser.Types.UreaN, Depth: 30)
                  Manager Defoliate: same as Validation.New Zealand.ScottFarm.ScottFarmC.ScottFarmC.ScottFarmC17a.Field.Management.Defoliate
                  Manager AutomaticIrrigation: same as Validation.New Zealand.ScottFarm.ScottFarmE.ScottFarmE.ScottFarmEstablishment.Field.Management.AutomaticIrrigation
                  Manager ExtraVariables
                    script: same as in Validation.New Zealand.ScottFarm.ScottFarmC.ScottFarmC.ScottFarmC17a.Field.Management.ExtraVariables
                MicroClimate: a_interception=0; b_interception=1; c_interception=0; d_interception=0; SoilHeatFluxFraction=0.4; MinimumHeightDiffForNewLayer=0; NightInterceptionFraction=0.5; ReferenceHeight=2
                Irrigation
                Fertiliser
                SurfaceOrganicMatter surface organic matter: InitialResidueName=grass; InitialResidueType=grass; InitialResidueMass=500; InitialStandingFraction=0; InitialCPR=0; InitialCNR=40
                Soil HorotiuSoil: SoilType=Typic Udivitrand (US), Typic Orthic Allophanic Soil (NZ); LocalName=Horotiu silt loam; Site=Ruakura; NearestTown=Hamilton; Region=Waikato; Country=New Zealand; Latitude=0; Longitude=0; DataSource=Based primarily on data from Close et al, 2003
                  Chemical: Thickness=[200, 200, 130, 140, 380, 230, 220]; PH=[6, 6, 6, 6, 6, 6, 6]; PHUnits=Water
                  Physical
                    Thickness  ParticleSizeClay  ParticleSizeSand  ParticleSizeSilt  BD    AirDry  LL15   DUL    SAT    KS
                    200        20                47                33                0.88  0.114   0.228  0.373  0.581  553
                    200        19                65                17                0.85  0.209   0.22   0.34   0.609  5083
                    130        11                76                13                1.03  0.08    0.182  0.323  0.54   8353
                    140        7                 84                10                1.11  0.04    0.15   0.282  0.5    13589
                    380        5                 88                8                 1.11  0.1     0.142  0.2    0.5    38963
                    230        3                 91                6                 1.03  0.04    0.103  0.16   0.446  45280
                    220        1                 94                5                 1.03  0.04    0.084  0.13   0.37   53606
                    SoilCrop ChicorySoil: LL=[0.23, 0.22, 0.18, 0.15, 0.14, 0.1, 0.08]; KL=[0.1, 0.08, 0.05, 0.02, 0.01, 0.01, 0]; XF=[1, 1, 1, 1, 1, 1, 0.5]
                  WaterBalance SoilWater: same as Validation.New Zealand.ScottFarm.ScottFarmC.ScottFarmC.ScottFarmC17a.Field.HorotiuSoil.SoilWater
                  Nutrient
                  Organic: same as Validation.New Zealand.ScottFarm.ScottFarmC.ScottFarmC.ScottFarmC17a.Field.HorotiuSoil.Organic
                  Water: Thickness=[200, 200, 130, 140, 380, 230, 220]; InitialValues=[0.3585, 0.328, 0.3089, 0.2688, 0.1942, 0.1543, 0.1254]; InitialPAWmm=121.572; RelativeTo=LL15; FilledFromTop=false
                  CERESSoilTemperature Temperature
                  Solute NO3: same as Validation.New Zealand.ScottFarm.ScottFarmE.ScottFarmE.ScottFarmEstablishment.Field.HorotiuSoil.NO3
                  Solute NH4: same as Validation.New Zealand.ScottFarm.ScottFarmE.ScottFarmE.ScottFarmEstablishment.Field.HorotiuSoil.NH4
                  Solute Urea: same as Validation.New Zealand.ScottFarm.ScottFarmC.ScottFarmC.ScottFarmC17a.Field.HorotiuSoil.Urea
                Plant Chicory
                Report: EventNames=[Clock].DoReport
        Folder ScottFarmFD902
          Experiment ScottFarmFD902
            Memo
              This simulation was setup based on observed data from a defoliation trial at Scott farm, Hamilton, New Zealand, run from 2010 to 2012.  The study investigated the effect of cut height (i.e. rotation length) and residual height on chicory growth.  The treatments consisted of trigerring cuts when the sward reached heights of 150, 250, 350, and 500 mm, in factorial combination with two residual heights, 30-50 or 60-80 mm.  Harvest was avoided over winter.
              Trial plots were sown with chicory, cultivar '*Choice*' (6.7 kg/ha), after previous pasture was sprayed with herbicide and conventionally drilled.  Irrigation was applied in the first year and fertiliser was applied over summer.  Results reported include yield, botanical composition, plant density, leaf area and light interception (the later two only during one growing period - between two cuts).

              References:
              Lee, J.M.;  Hemmingson, N.R.; Minnee, E.M.K.; Clark, C.E.F. 2015. Management strategies for chicory (Cichorium intybus) and plantain (Plantago lanceolata): impact on dry matter yield, nutritive characteristics and plant density. Crop and Pasture Science, 66, 168–183.
            Factors
              Factor Defoliation: Specification=[DefoliationSchedule]
                Operations 15To4
                  2010-12-20  [Defoliate].Script.Defoliate(defoliationType: "Cut", amountDM: 35, amountType: "ResidualDM", duration: 1)
                  2011-01-13  [Defoliate].Script.Defoliate(defoliationType: "Cut", amountDM: 35, amountType: "ResidualDM", duration: 1)
                  2011-01-20  [Defoliate].Script.Defoliate(defoliationType: "Cut", amountDM: 35, amountType: "ResidualDM", duration: 1)
                  2011-01-27  [Defoliate].Script.Defoliate(defoliationType: "Cut", amountDM: 35, amountType: "ResidualDM", duration: 1)
                  2011-02-10  [Defoliate].Script.Defoliate(defoliationType: "Cut", amountDM: 35, amountType: "ResidualDM", duration: 1)
                  2011-02-16  [Defoliate].Script.Defoliate(defoliationType: "Cut", amountDM: 35, amountType: "ResidualDM", duration: 1)
                  2011-03-03  [Defoliate].Script.Defoliate(defoliationType: "Cut", amountDM: 35, amountType: "ResidualDM", duration: 1)
                  2011-03-17  [Defoliate].Script.Defoliate(defoliationType: "Cut", amountDM: 35, amountType: "ResidualDM", duration: 1)
                  2011-03-24  [Defoliate].Script.Defoliate(defoliationType: "Cut", amountDM: 45, amountType: "ResidualDM", duration: 1)
                  2011-04-07  [Defoliate].Script.Defoliate(defoliationType: "Cut", amountDM: 45, amountType: "ResidualDM", duration: 1)
                  2011-04-21  [Defoliate].Script.Defoliate(defoliationType: "Cut", amountDM: 45, amountType: "ResidualDM", duration: 1)
                  2011-05-05  [Defoliate].Script.Defoliate(defoliationType: "Cut", amountDM: 45, amountType: "ResidualDM", duration: 1)
                  2011-05-18  [Defoliate].Script.Defoliate(defoliationType: "Cut", amountDM: 45, amountType: "ResidualDM", duration: 1)
                  2011-10-06  [Defoliate].Script.Defoliate(defoliationType: "Cut", amountDM: 45, amountType: "ResidualDM", duration: 1)
                  2011-10-20  [Defoliate].Script.Defoliate(defoliationType: "Cut", amountDM: 45, amountType: "ResidualDM", duration: 1)
                  2011-11-03  [Defoliate].Script.Defoliate(defoliationType: "Cut", amountDM: 45, amountType: "ResidualDM", duration: 1)
                  2011-11-17  [Defoliate].Script.Defoliate(defoliationType: "Cut", amountDM: 45, amountType: "ResidualDM", duration: 1)
                  2011-12-08  [Defoliate].Script.Defoliate(defoliationType: "Cut", amountDM: 45, amountType: "ResidualDM", duration: 1)
                  2011-12-22  [Defoliate].Script.Defoliate(defoliationType: "Cut", amountDM: 45, amountType: "ResidualDM", duration: 1)
                  2012-01-12  [Defoliate].Script.Defoliate(defoliationType: "Cut", amountDM: 45, amountType: "ResidualDM", duration: 1)
                  2012-01-26  [Defoliate].Script.Defoliate(defoliationType: "Cut", amountDM: 45, amountType: "ResidualDM", duration: 1)
                  2012-02-16  [Defoliate].Script.Defoliate(defoliationType: "Cut", amountDM: 45, amountType: "ResidualDM", duration: 1)
                  2012-03-09  [Defoliate].Script.Defoliate(defoliationType: "Cut", amountDM: 45, amountType: "ResidualDM", duration: 1)
                  2012-03-29  [Defoliate].Script.Defoliate(defoliationType: "Cut", amountDM: 45, amountType: "ResidualDM", duration: 1)
                  2012-04-19  [Defoliate].Script.Defoliate(defoliationType: "Cut", amountDM: 45, amountType: "ResidualDM", duration: 1)
                  2012-05-17  [Defoliate].Script.Defoliate(defoliationType: "Cut", amountDM: 45, amountType: "ResidualDM", duration: 1)
                Operations 15To7
                  2010-12-20  [Defoliate].Script.Defoliate(defoliationType: "Cut", amountDM: 50, amountType: "ResidualDM", duration: 1)
                  2011-01-13  [Defoliate].Script.Defoliate(defoliationType: "Cut", amountDM: 50, amountType: "ResidualDM", duration: 1)
                  2011-01-20  [Defoliate].Script.Defoliate(defoliationType: "Cut", amountDM: 50, amountType: "ResidualDM", duration: 1)
                  2011-01-27  [Defoliate].Script.Defoliate(defoliationType: "Cut", amountDM: 50, amountType: "ResidualDM", duration: 1)
                  2011-02-03  [Defoliate].Script.Defoliate(defoliationType: "Cut", amountDM: 50, amountType: "ResidualDM", duration: 1)
                  2011-02-10  [Defoliate].Script.Defoliate(defoliationType: "Cut", amountDM: 50, amountType: "ResidualDM", duration: 1)
                  2011-02-16  [Defoliate].Script.Defoliate(defoliationType: "Cut", amountDM: 50, amountType: "ResidualDM", duration: 1)
                  2011-03-03  [Defoliate].Script.Defoliate(defoliationType: "Cut", amountDM: 50, amountType: "ResidualDM", duration: 1)
                  2011-03-17  [Defoliate].Script.Defoliate(defoliationType: "Cut", amountDM: 50, amountType: "ResidualDM", duration: 1)
                  2011-03-24  [Defoliate].Script.Defoliate(defoliationType: "Cut", amountDM: 60, amountType: "ResidualDM", duration: 1)
                  2011-04-07  [Defoliate].Script.Defoliate(defoliationType: "Cut", amountDM: 60, amountType: "ResidualDM", duration: 1)
                  2011-04-21  [Defoliate].Script.Defoliate(defoliationType: "Cut", amountDM: 60, amountType: "ResidualDM", duration: 1)
                  2011-05-05  [Defoliate].Script.Defoliate(defoliationType: "Cut", amountDM: 60, amountType: "ResidualDM", duration: 1)
                  2011-05-18  [Defoliate].Script.Defoliate(defoliationType: "Cut", amountDM: 60, amountType: "ResidualDM", duration: 1)
                  2011-10-06  [Defoliate].Script.Defoliate(defoliationType: "Cut", amountDM: 60, amountType: "ResidualDM", duration: 1)
                  2011-10-20  [Defoliate].Script.Defoliate(defoliationType: "Cut", amountDM: 60, amountType: "ResidualDM", duration: 1)
                  2011-11-03  [Defoliate].Script.Defoliate(defoliationType: "Cut", amountDM: 60, amountType: "ResidualDM", duration: 1)
                  2011-11-17  [Defoliate].Script.Defoliate(defoliationType: "Cut", amountDM: 60, amountType: "ResidualDM", duration: 1)
                  2011-12-08  [Defoliate].Script.Defoliate(defoliationType: "Cut", amountDM: 60, amountType: "ResidualDM", duration: 1)
                  2011-12-22  [Defoliate].Script.Defoliate(defoliationType: "Cut", amountDM: 60, amountType: "ResidualDM", duration: 1)
                  2012-01-12  [Defoliate].Script.Defoliate(defoliationType: "Cut", amountDM: 60, amountType: "ResidualDM", duration: 1)
                  2012-01-26  [Defoliate].Script.Defoliate(defoliationType: "Cut", amountDM: 60, amountType: "ResidualDM", duration: 1)
                  2012-02-16  [Defoliate].Script.Defoliate(defoliationType: "Cut", amountDM: 60, amountType: "ResidualDM", duration: 1)
                  2012-03-09  [Defoliate].Script.Defoliate(defoliationType: "Cut", amountDM: 60, amountType: "ResidualDM", duration: 1)
                  2012-03-29  [Defoliate].Script.Defoliate(defoliationType: "Cut", amountDM: 60, amountType: "ResidualDM", duration: 1)
                  2012-04-19  [Defoliate].Script.Defoliate(defoliationType: "Cut", amountDM: 60, amountType: "ResidualDM", duration: 1)
                  2012-05-17  [Defoliate].Script.Defoliate(defoliationType: "Cut", amountDM: 60, amountType: "ResidualDM", duration: 1)
                Operations 25To4
                  2010-12-20  [Defoliate].Script.Defoliate(defoliationType: "Cut", amountDM: 35, amountType: "ResidualDM", duration: 1)
                  2011-01-13  [Defoliate].Script.Defoliate(defoliationType: "Cut", amountDM: 35, amountType: "ResidualDM", duration: 1)
                  2011-01-27  [Defoliate].Script.Defoliate(defoliationType: "Cut", amountDM: 35, amountType: "ResidualDM", duration: 1)
                  2011-02-10  [Defoliate].Script.Defoliate(defoliationType: "Cut", amountDM: 35, amountType: "ResidualDM", duration: 1)
                  2011-02-24  [Defoliate].Script.Defoliate(defoliationType: "Cut", amountDM: 35, amountType: "ResidualDM", duration: 1)
                  2011-03-10  [Defoliate].Script.Defoliate(defoliationType: "Cut", amountDM: 35, amountType: "ResidualDM", duration: 1)
                  2011-03-24  [Defoliate].Script.Defoliate(defoliationType: "Cut", amountDM: 45, amountType: "ResidualDM", duration: 1)
                  2011-04-14  [Defoliate].Script.Defoliate(defoliationType: "Cut", amountDM: 45, amountType: "ResidualDM", duration: 1)
                  2011-05-18  [Defoliate].Script.Defoliate(defoliationType: "Cut", amountDM: 45, amountType: "ResidualDM", duration: 1)
                  2011-10-13  [Defoliate].Script.Defoliate(defoliationType: "Cut", amountDM: 45, amountType: "ResidualDM", duration: 1)
                  2011-10-27  [Defoliate].Script.Defoliate(defoliationType: "Cut", amountDM: 45, amountType: "ResidualDM", duration: 1)
                  2011-11-10  [Defoliate].Script.Defoliate(defoliationType: "Cut", amountDM: 45, amountType: "ResidualDM", duration: 1)
                  2011-12-08  [Defoliate].Script.Defoliate(defoliationType: "Cut", amountDM: 45, amountType: "ResidualDM", duration: 1)
                  2012-01-05  [Defoliate].Script.Defoliate(defoliationType: "Cut", amountDM: 45, amountType: "ResidualDM", duration: 1)
                  2012-01-26  [Defoliate].Script.Defoliate(defoliationType: "Cut", amountDM: 45, amountType: "ResidualDM", duration: 1)
                  2012-02-16  [Defoliate].Script.Defoliate(defoliationType: "Cut", amountDM: 45, amountType: "ResidualDM", duration: 1)
                  2012-03-09  [Defoliate].Script.Defoliate(defoliationType: "Cut", amountDM: 45, amountType: "ResidualDM", duration: 1)
                  2012-03-29  [Defoliate].Script.Defoliate(defoliationType: "Cut", amountDM: 45, amountType: "ResidualDM", duration: 1)
                  2012-05-03  [Defoliate].Script.Defoliate(defoliationType: "Cut", amountDM: 45, amountType: "ResidualDM", duration: 1)
                  2012-05-24  [Defoliate].Script.Defoliate(defoliationType: "Cut", amountDM: 45, amountType: "ResidualDM", duration: 1)
                Operations 25To7
                  2010-12-20  [Defoliate].Script.Defoliate(defoliationType: "Cut", amountDM: 50, amountType:"ResidualDM", duration: 1)
                  2011-01-13  [Defoliate].Script.Defoliate(defoliationType: "Cut", amountDM: 50, amountType:"ResidualDM", duration: 1)
                  2011-01-27  [Defoliate].Script.Defoliate(defoliationType: "Cut", amountDM: 50, amountType:"ResidualDM", duration: 1)
                  2011-02-10  [Defoliate].Script.Defoliate(defoliationType: "Cut", amountDM: 50, amountType:"ResidualDM", duration: 1)
                  2011-02-24  [Defoliate].Script.Defoliate(defoliationType: "Cut", amountDM: 50, amountType:"ResidualDM", duration: 1)
                  2011-03-10  [Defoliate].Script.Defoliate(defoliationType: "Cut", amountDM: 50, amountType:"ResidualDM", duration: 1)
                  2011-03-24  [Defoliate].Script.Defoliate(defoliationType: "Cut", amountDM: 60, amountType:"ResidualDM", duration: 1)
                  2011-04-14  [Defoliate].Script.Defoliate(defoliationType: "Cut", amountDM: 60, amountType:"ResidualDM", duration: 1)
                  2011-05-18  [Defoliate].Script.Defoliate(defoliationType: "Cut", amountDM: 60, amountType:"ResidualDM", duration: 1)
                  2011-10-13  [Defoliate].Script.Defoliate(defoliationType: "Cut", amountDM: 60, amountType:"ResidualDM", duration: 1)
                  2011-10-27  [Defoliate].Script.Defoliate(defoliationType: "Cut", amountDM: 60, amountType:"ResidualDM", duration: 1)
                  2011-11-10  [Defoliate].Script.Defoliate(defoliationType: "Cut", amountDM: 60, amountType:"ResidualDM", duration: 1)
                  2011-12-08  [Defoliate].Script.Defoliate(defoliationType: "Cut", amountDM: 60, amountType:"ResidualDM", duration: 1)
                  2012-01-05  [Defoliate].Script.Defoliate(defoliationType: "Cut", amountDM: 60, amountType:"ResidualDM", duration: 1)
                  2012-01-26  [Defoliate].Script.Defoliate(defoliationType: "Cut", amountDM: 60, amountType:"ResidualDM", duration: 1)
                  2012-02-16  [Defoliate].Script.Defoliate(defoliationType: "Cut", amountDM: 60, amountType:"ResidualDM", duration: 1)
                  2012-03-09  [Defoliate].Script.Defoliate(defoliationType: "Cut", amountDM: 60, amountType:"ResidualDM", duration: 1)
                  2012-03-29  [Defoliate].Script.Defoliate(defoliationType: "Cut", amountDM: 60, amountType:"ResidualDM", duration: 1)
                  2012-05-03  [Defoliate].Script.Defoliate(defoliationType: "Cut", amountDM: 60, amountType:"ResidualDM", duration: 1)
                  2012-05-24  [Defoliate].Script.Defoliate(defoliationType: "Cut", amountDM: 60, amountType:"ResidualDM", duration: 1)
                Operations 35To4
                  2010-12-20  [Defoliate].Script.Defoliate(defoliationType: "Cut", amountDM: 35, amountType: "ResidualDM", duration: 1)
                  2011-01-13  [Defoliate].Script.Defoliate(defoliationType: "Cut", amountDM: 35, amountType: "ResidualDM", duration: 1)
                  2011-02-03  [Defoliate].Script.Defoliate(defoliationType: "Cut", amountDM: 35, amountType: "ResidualDM", duration: 1)
                  2011-02-24  [Defoliate].Script.Defoliate(defoliationType: "Cut", amountDM: 35, amountType: "ResidualDM", duration: 1)
                  2011-03-17  [Defoliate].Script.Defoliate(defoliationType: "Cut", amountDM: 35, amountType: "ResidualDM", duration: 1)
                  2011-04-14  [Defoliate].Script.Defoliate(defoliationType: "Cut", amountDM: 45, amountType: "ResidualDM", duration: 1)
                  2011-05-18  [Defoliate].Script.Defoliate(defoliationType: "Cut", amountDM: 45, amountType: "ResidualDM", duration: 1)
                  2011-10-20  [Defoliate].Script.Defoliate(defoliationType: "Cut", amountDM: 45, amountType: "ResidualDM", duration: 1)
                  2011-11-10  [Defoliate].Script.Defoliate(defoliationType: "Cut", amountDM: 45, amountType: "ResidualDM", duration: 1)
                  2011-12-15  [Defoliate].Script.Defoliate(defoliationType: "Cut", amountDM: 45, amountType: "ResidualDM", duration: 1)
                  2012-01-19  [Defoliate].Script.Defoliate(defoliationType: "Cut", amountDM: 45, amountType: "ResidualDM", duration: 1)
                  2012-02-24  [Defoliate].Script.Defoliate(defoliationType: "Cut", amountDM: 45, amountType: "ResidualDM", duration: 1)
                  2012-04-05  [Defoliate].Script.Defoliate(defoliationType: "Cut", amountDM: 45, amountType: "ResidualDM", duration: 1)
                  2012-05-24  [Defoliate].Script.Defoliate(defoliationType: "Cut", amountDM: 45, amountType: "ResidualDM", duration: 1)
                Operations 35To7
                  2010-12-20  [Defoliate].Script.Defoliate(defoliationType: "Cut", amountDM: 50, amountType: "ResidualDM", duration: 1)
                  2011-01-13  [Defoliate].Script.Defoliate(defoliationType: "Cut", amountDM: 50, amountType: "ResidualDM", duration: 1)
                  2011-02-03  [Defoliate].Script.Defoliate(defoliationType: "Cut", amountDM: 50, amountType: "ResidualDM", duration: 1)
                  2011-02-24  [Defoliate].Script.Defoliate(defoliationType: "Cut", amountDM: 50, amountType: "ResidualDM", duration: 1)
                  2011-03-17  [Defoliate].Script.Defoliate(defoliationType: "Cut", amountDM: 50, amountType: "ResidualDM", duration: 1)
                  2011-04-14  [Defoliate].Script.Defoliate(defoliationType: "Cut", amountDM: 60, amountType: "ResidualDM", duration: 1)
                  2011-05-18  [Defoliate].Script.Defoliate(defoliationType: "Cut", amountDM: 60, amountType: "ResidualDM", duration: 1)
                  2011-10-20  [Defoliate].Script.Defoliate(defoliationType: "Cut", amountDM: 60, amountType: "ResidualDM", duration: 1)
                  2011-11-10  [Defoliate].Script.Defoliate(defoliationType: "Cut", amountDM: 60, amountType: "ResidualDM", duration: 1)
                  2011-12-15  [Defoliate].Script.Defoliate(defoliationType: "Cut", amountDM: 60, amountType: "ResidualDM", duration: 1)
                  2012-01-19  [Defoliate].Script.Defoliate(defoliationType: "Cut", amountDM: 60, amountType: "ResidualDM", duration: 1)
                  2012-02-24  [Defoliate].Script.Defoliate(defoliationType: "Cut", amountDM: 60, amountType: "ResidualDM", duration: 1)
                  2012-04-05  [Defoliate].Script.Defoliate(defoliationType: "Cut", amountDM: 60, amountType: "ResidualDM", duration: 1)
                  2012-05-24  [Defoliate].Script.Defoliate(defoliationType: "Cut", amountDM: 60, amountType: "ResidualDM", duration: 1)
                Operations 55To4
                  2010-12-20  [Defoliate].Script.Defoliate(defoliationType: "Cut", amountDM: 35, amountType: "ResidualDM", duration: 1)
                  2011-01-13  [Defoliate].Script.Defoliate(defoliationType: "Cut", amountDM: 35, amountType: "ResidualDM", duration: 1)
                  2011-02-16  [Defoliate].Script.Defoliate(defoliationType: "Cut", amountDM: 35, amountType: "ResidualDM", duration: 1)
                  2011-03-31  [Defoliate].Script.Defoliate(defoliationType: "Cut", amountDM: 45, amountType: "ResidualDM", duration: 1)
                  2011-05-18  [Defoliate].Script.Defoliate(defoliationType: "Cut", amountDM: 45, amountType: "ResidualDM", duration: 1)
                  2011-10-27  [Defoliate].Script.Defoliate(defoliationType: "Cut", amountDM: 45, amountType: "ResidualDM", duration: 1)
                  2011-12-15  [Defoliate].Script.Defoliate(defoliationType: "Cut", amountDM: 45, amountType: "ResidualDM", duration: 1)
                  2012-01-19  [Defoliate].Script.Defoliate(defoliationType: "Cut", amountDM: 45, amountType: "ResidualDM", duration: 1)
                  2012-02-24  [Defoliate].Script.Defoliate(defoliationType: "Cut", amountDM: 45, amountType: "ResidualDM", duration: 1)
                  2012-04-12  [Defoliate].Script.Defoliate(defoliationType: "Cut", amountDM: 45, amountType: "ResidualDM", duration: 1)
                  2012-05-24  [Defoliate].Script.Defoliate(defoliationType: "Cut", amountDM: 45, amountType: "ResidualDM", duration: 1)
                Operations 55To7
                  2010-12-20  [Defoliate].Script.Defoliate(defoliationType: "Cut", amountDM: 50, amountType: "ResidualDM", duration: 1)
                  2011-01-13  [Defoliate].Script.Defoliate(defoliationType: "Cut", amountDM: 50, amountType: "ResidualDM", duration: 1)
                  2011-02-16  [Defoliate].Script.Defoliate(defoliationType: "Cut", amountDM: 50, amountType: "ResidualDM", duration: 1)
                  2011-03-31  [Defoliate].Script.Defoliate(defoliationType: "Cut", amountDM: 60, amountType: "ResidualDM", duration: 1)
                  2011-05-18  [Defoliate].Script.Defoliate(defoliationType: "Cut", amountDM: 60, amountType: "ResidualDM", duration: 1)
                  2011-10-27  [Defoliate].Script.Defoliate(defoliationType: "Cut", amountDM: 60, amountType: "ResidualDM", duration: 1)
                  2011-12-15  [Defoliate].Script.Defoliate(defoliationType: "Cut", amountDM: 60, amountType: "ResidualDM", duration: 1)
                  2012-01-19  [Defoliate].Script.Defoliate(defoliationType: "Cut", amountDM: 60, amountType: "ResidualDM", duration: 1)
                  2012-02-24  [Defoliate].Script.Defoliate(defoliationType: "Cut", amountDM: 60, amountType: "ResidualDM", duration: 1)
                  2012-04-12  [Defoliate].Script.Defoliate(defoliationType: "Cut", amountDM: 60, amountType: "ResidualDM", duration: 1)
                  2012-05-24  [Defoliate].Script.Defoliate(defoliationType: "Cut", amountDM: 60, amountType: "ResidualDM", duration: 1)
            Simulation FD902
              Clock: Start=2010-10-01; End=2012-06-30
              Weather: FileName=Ruakura.met
              Summary summaryfile
              SoilArbitrator Soil Arbitrator
              Zone Field: Area=1; Slope=0; AspectAngle=0; Altitude=50
                Folder Management
                  Operations Sowing
                    2010-10-13  [Chicory].Sow(population: 200, cultivar: "Choice", depth: 10, rowSpacing: 150)
                  Operations DefoliationSchedule
                  Operations FertiliserSchedule
                    2010-10-05  [Fertiliser].Apply(Amount: 30, Type: Fertiliser.Types.UreaN, Depth: 50)
                    2011-12-15  [Fertiliser].Apply(Amount: 39, Type: Fertiliser.Types.UreaN, Depth: 10)
                    2012-01-19  [Fertiliser].Apply(Amount: 39, Type: Fertiliser.Types.UreaN, Depth: 10)
                    2012-02-23  [Fertiliser].Apply(Amount: 39, Type: Fertiliser.Types.UreaN, Depth: 10)
                    2012-03-29  [Fertiliser].Apply(Amount: 39, Type: Fertiliser.Types.UreaN, Depth: 10)
                    2012-05-03  [Fertiliser].Apply(Amount: 39, Type: Fertiliser.Types.UreaN, Depth: 10)
                    2012-11-15  [Fertiliser].Apply(Amount: 28, Type: Fertiliser.Types.UreaN, Depth: 10)
                    2012-12-20  [Fertiliser].Apply(Amount: 28, Type: Fertiliser.Types.UreaN, Depth: 10)
                    2013-01-27  [Fertiliser].Apply(Amount: 28, Type: Fertiliser.Types.UreaN, Depth: 10)
                    2013-03-10  [Fertiliser].Apply(Amount: 28, Type: Fertiliser.Types.UreaN, Depth: 10)
                  Operations IrrigationSchedule
                    2010-11-30  [Irrigation].Apply(amount: 25.4)
                    2010-12-10  [Irrigation].Apply(amount: 25.2)
                    2010-12-14  [Irrigation].Apply(amount: 9.2)
                    2010-12-15  [Irrigation].Apply(amount: 29.8)
                    2011-01-05  [Irrigation].Apply(amount: 41.2)
                    2011-02-01  [Irrigation].Apply(amount: 55)
                    2011-02-04  [Irrigation].Apply(amount: 13.7)
                    2011-02-11  [Irrigation].Apply(amount: 36.6)
                    2011-02-23  [Irrigation].Apply(amount: 18.3)
                    2011-03-04  [Irrigation].Apply(amount: 36.6)
                    2011-03-13  [Irrigation].Apply(amount: 4.6)
                    2011-03-17  [Irrigation].Apply(amount: 36.6)
                    2011-11-30  [Irrigation].Apply(amount: 36.6)
                  Manager Defoliate: same as Validation.New Zealand.ScottFarm.ScottFarmC.ScottFarmC.ScottFarmC17a.Field.Management.Defoliate
                  Manager ExtraVariables
                    script: same as in Validation.New Zealand.ScottFarm.ScottFarmC.ScottFarmC.ScottFarmC17a.Field.Management.ExtraVariables
                MicroClimate: a_interception=0; b_interception=1; c_interception=0; d_interception=0; SoilHeatFluxFraction=0.4; MinimumHeightDiffForNewLayer=0; NightInterceptionFraction=0.5; ReferenceHeight=2
                Irrigation
                Fertiliser
                SurfaceOrganicMatter: InitialResidueName=grass; InitialResidueType=grass; InitialResidueMass=500; InitialStandingFraction=0; InitialCPR=0; InitialCNR=40
                Soil HorotiuSoil: SoilType=Typic Udivitrand (US), Typic Orthic Allophanic Soil (NZ); LocalName=Horotiu silt loam; Site=Ruakura; NearestTown=Hamilton; Region=Waikato; Country=New Zealand; Latitude=0; Longitude=0; DataSource=Based primarily on data from Close et al, 2003
                  Chemical: Thickness=[200, 200, 130, 140, 380, 230, 220]; PH=[6, 6, 6, 6, 6, 6, 6]; PHUnits=Water
                  Physical
                    Thickness  ParticleSizeClay  ParticleSizeSand  ParticleSizeSilt  BD    AirDry  LL15   DUL    SAT    KS
                    200        20                47                33                0.88  0.114   0.228  0.373  0.581  553
                    200        19                65                17                0.85  0.209   0.22   0.34   0.609  5083
                    130        11                76                13                1.03  0.14    0.182  0.323  0.54   8353
                    140        7                 84                10                1.11  0.125   0.15   0.282  0.5    13589
                    380        5                 88                8                 1.11  0.1     0.142  0.2    0.5    38963
                    230        3                 91                6                 1.03  0.07    0.103  0.16   0.446  45280
                    220        1                 94                5                 1.03  0.05    0.084  0.13   0.37   53606
                    SoilCrop ChicorySoil: LL=[0.23, 0.22, 0.18, 0.15, 0.14, 0.1, 0.08]; KL=[0.1, 0.08, 0.05, 0.02, 0.01, 0.01, 0]; XF=[1, 1, 1, 1, 1, 1, 0.5]
                  WaterBalance SoilWater: same as Validation.New Zealand.ScottFarm.ScottFarmC.ScottFarmC.ScottFarmC17a.Field.HorotiuSoil.SoilWater
                  Nutrient
                  Organic: same as Validation.New Zealand.ScottFarm.ScottFarmC.ScottFarmC.ScottFarmC17a.Field.HorotiuSoil.Organic
                  Water: Thickness=[200, 200, 130, 140, 380, 230, 220]; InitialValues=[0.3585, 0.328, 0.3089, 0.2688, 0.1942, 0.1543, 0.1254]; InitialPAWmm=121.572; RelativeTo=LL15; FilledFromTop=false
                  CERESSoilTemperature Temperature
                  Solute NO3: same as Validation.New Zealand.ScottFarm.ScottFarmE.ScottFarmE.ScottFarmEstablishment.Field.HorotiuSoil.NO3
                  Solute NH4: same as Validation.New Zealand.ScottFarm.ScottFarmE.ScottFarmE.ScottFarmEstablishment.Field.HorotiuSoil.NH4
                  Solute Urea: same as Validation.New Zealand.ScottFarm.ScottFarmC.ScottFarmC.ScottFarmC17a.Field.HorotiuSoil.Urea
                Plant Chicory
                Report: EventNames=[Clock].DoReport
        Memo SubTitle
          <br>
          ### All data from Scott Farm
      Folder Iversen
        Experiment Iversen
          Memo
            This simulation setup was based on a dataset supplied by Hamish Brown, which was collected for his PhD thesis.  The trial was conducted at the Iversen field of Lincoln University, in Lincoln, New Zealand between 1996 and 2002.  The work was focused on understanding water use and its interaction with yield of dryland and irrigated forage crops (lucerne, chicory and red clover were used).
            The trial was implemented in spring of 1996, after conventional cultivation, including subsoiling and liming.  Chicory (cultivar '*Puna*') was sown at a rate of 3.5 kg/ha and was grazed regularly by sheep.  There were annual applications of superphosphate but no N fertilisation (except excreta from grazing sheep).  The treatments consisted of  irrigation versus dryland conditions.  The major parameters analysed were herbage growth and yield, population, nutritive characteristics, and water utilisation.
            Soil data was obtained from measurements presented by Brown (2004) and complemented by S-MAP database from Landcare Research Limited. Weather data was obtained from the nearby Broadfields met station in Lincoln.

            References:
            Brown, H.E. 2004. Understanding yield and water use of dryland forage crops in New Zealand. PhD thesis, Lincoln University, Lincoln, NZ. 288 p.
            Brown, H.E.; Moot, D.J.; & Pollock, K.M. 2003. Long term growth rates and water extraction patterns of dryland chicory, lucerne and red clover. Legumes for dryland pastures. New Zealand Grassland Association, Research Practice Series, 11:91-99.
            Brown, H.E.; Moot, D.J.; & Pollock, K.M. 2005. Herbage production, persistence, nutritive characteristics and water use of perennial forages grown over 6 years on a Wakanui silt loam. New Zealand Journal of Agricultural Research, 48(4):423-439.
          Factors
            Factor Irrigation: Specification=[IrrigationSchedule]
              Operations Full
                1996-10-21  [Irrigation].Apply(amount: 40)
                1996-12-04  [Irrigation].Apply(amount: 40)
                1997-10-31  [Irrigation].Apply(amount: 30)
                1997-12-03  [Irrigation].Apply(amount: 50)
                1997-12-17  [Irrigation].Apply(amount: 40)
                1998-01-16  [Irrigation].Apply(amount: 30)
                1998-01-23  [Irrigation].Apply(amount: 26)
                1998-02-19  [Irrigation].Apply(amount: 62)
                1998-03-06  [Irrigation].Apply(amount: 23)
                1998-03-31  [Irrigation].Apply(amount: 31)
                1998-09-12  [Irrigation].Apply(amount: 90)
                1998-11-16  [Irrigation].Apply(amount: 150)
                1999-01-23  [Irrigation].Apply(amount: 127)
                1999-02-27  [Irrigation].Apply(amount: 70)
                1999-12-12  [Irrigation].Apply(amount: 30)
                2000-01-23  [Irrigation].Apply(amount: 50)
                2000-12-29  [Irrigation].Apply(amount: 75)
                2001-02-03  [Irrigation].Apply(amount: 95)
                2001-03-21  [Irrigation].Apply(amount: 65)
                2001-04-27  [Irrigation].Apply(amount: 45)
                2001-12-21  [Irrigation].Apply(amount: 65)
              Operations Nil
                1998-09-15  [Irrigation].Apply(amount: 150)
          Simulation Iversen
            Weather: FileName=Lincoln-Broadfields.met
            Clock: Start=1996-09-20; End=2002-07-05
            Summary summaryfile
            SoilArbitrator Soil Arbitrator
            Zone Field: Area=1; Slope=0; AspectAngle=0; Altitude=50
              Folder Management
                Operations Sowing
                  1996-11-01  [Chicory].Sow(population: 115, cultivar: "Puna", depth: 10, rowSpacing: 150)
                Operations DefoliationSchedule
                  1997-02-21  [Defoliate].Script.Defoliate(defoliationType: "Graze", amountDM: 20, amountType: "ResidualDM", duration: 10)
                  1997-06-05  [Defoliate].Script.Defoliate(defoliationType: "Graze", amountDM: 10, amountType: "ResidualDM", duration: 6)
                  1997-10-06  [Defoliate].Script.Defoliate(defoliationType: "Graze", amountDM: 20, amountType: "ResidualDM", duration: 7)
                  1997-11-19  [Defoliate].Script.Defoliate(defoliationType: "Graze", amountDM: 50, amountType: "ResidualDM", duration: 7)
                  1997-12-23  [Defoliate].Script.Defoliate(defoliationType: "Graze", amountDM: 45, amountType: "ResidualDM", duration: 7)
                  1998-02-03  [Defoliate].Script.Defoliate(defoliationType: "Graze", amountDM: 50, amountType: "ResidualDM", duration: 6)
                  1998-03-12  [Defoliate].Script.Defoliate(defoliationType: "Graze", amountDM: 20, amountType: "ResidualDM", duration: 6)
                  1998-05-29  [Defoliate].Script.Defoliate(defoliationType: "Graze", amountDM: 10, amountType: "ResidualDM", duration: 6)
                  1998-09-29  [Defoliate].Script.Defoliate(defoliationType: "Graze", amountDM: 20, amountType: "ResidualDM", duration: 11)
                  1998-11-11  [Defoliate].Script.Defoliate(defoliationType: "Graze", amountDM: 30, amountType: "ResidualDM", duration: 6)
                  1998-12-15  [Defoliate].Script.Defoliate(defoliationType: "Graze", amountDM: 35, amountType: "ResidualDM", duration: 8)
                  1999-01-11  [Defoliate].Script.Defoliate(defoliationType: "Graze", amountDM: 35, amountType: "ResidualDM", duration: 9)
                  1999-02-17  [Defoliate].Script.Defoliate(defoliationType: "Graze", amountDM: 30, amountType: "ResidualDM", duration: 8)
                  1999-04-09  [Defoliate].Script.Defoliate(defoliationType: "Graze", amountDM: 25, amountType: "ResidualDM", duration: 14)
                  1999-06-24  [Defoliate].Script.Defoliate(defoliationType: "Graze", amountDM: 8, amountType: "ResidualDM", duration: 4)
                  1999-09-29  [Defoliate].Script.Defoliate(defoliationType: "Graze", amountDM: 20, amountType: "ResidualDM", duration: 8)
                  1999-11-09  [Defoliate].Script.Defoliate(defoliationType: "Graze", amountDM: 40, amountType: "ResidualDM", duration: 9)
                  1999-12-20  [Defoliate].Script.Defoliate(defoliationType: "Graze", amountDM: 45, amountType: "ResidualDM", duration: 7)
                  2000-01-21  [Defoliate].Script.Defoliate(defoliationType: "Graze", amountDM: 40, amountType: "ResidualDM", duration: 6)
                  2000-03-13  [Defoliate].Script.Defoliate(defoliationType: "Graze", amountDM: 30, amountType: "ResidualDM", duration: 6)
                  2000-05-25  [Defoliate].Script.Defoliate(defoliationType: "Graze", amountDM: 10, amountType: "ResidualDM", duration: 5)
                  2000-09-22  [Defoliate].Script.Defoliate(defoliationType: "Graze", amountDM: 30, amountType: "ResidualDM", duration: 10)
                  2000-11-10  [Defoliate].Script.Defoliate(defoliationType: "Graze", amountDM: 40, amountType: "ResidualDM", duration: 7)
                  2000-12-19  [Defoliate].Script.Defoliate(defoliationType: "Graze", amountDM: 30, amountType: "ResidualDM", duration: 9)
                  2001-01-24  [Defoliate].Script.Defoliate(defoliationType: "Graze", amountDM: 30, amountType: "ResidualDM", duration: 7)
                  2001-03-11  [Defoliate].Script.Defoliate(defoliationType: "Graze", amountDM: 30, amountType: "ResidualDM", duration: 7)
                  2001-05-02  [Defoliate].Script.Defoliate(defoliationType: "Graze", amountDM: 15, amountType: "ResidualDM", duration: 5)
                  2001-06-24  [Defoliate].Script.Defoliate(defoliationType: "Graze", amountDM: 10, amountType: "ResidualDM", duration: 11)
                  2001-10-03  [Defoliate].Script.Defoliate(defoliationType: "Graze", amountDM: 20, amountType: "ResidualDM", duration: 8)
                  2001-11-21  [Defoliate].Script.Defoliate(defoliationType: "Graze", amountDM: 40, amountType: "ResidualDM", duration: 6)
                  2001-12-22  [Defoliate].Script.Defoliate(defoliationType: "Graze", amountDM: 45, amountType: "ResidualDM", duration: 9)
                  2002-02-06  [Defoliate].Script.Defoliate(defoliationType: "Graze", amountDM: 30, amountType: "ResidualDM", duration: 10)
                  2002-04-03  [Defoliate].Script.Defoliate(defoliationType: "Graze", amountDM: 20, amountType: "ResidualDM", duration: 15)
                  2002-06-24  [Defoliate].Script.Defoliate(defoliationType: "Graze", amountDM: 10, amountType: "ResidualDM", duration: 12)
                Operations IrrigationSchedule
                Manager Defoliate: same as Validation.New Zealand.ScottFarm.ScottFarmC.ScottFarmC.ScottFarmC17a.Field.Management.Defoliate
                Operations ExcretaSchedule
                  1997-02-25  [SurfaceOrganicMatter].Add(mass: 107.4, N: 19.2, P: 0.0, type: "RuminantDung_PastureFed", name "dung")
                  1997-02-25  [Fertiliser].Apply(Amount: 28.8, Type: Fertiliser.Types.UreaN, Depth: 30)
                  1997-06-07  [SurfaceOrganicMatter].Add(mass: 163.2, N: 29.1, P: 0.0, type: "RuminantDung_PastureFed", name "dung")
                  1997-06-07  [Fertiliser].Apply(Amount: 43.7, Type: Fertiliser.Types.UreaN, Depth: 30)
                  1997-10-09  [SurfaceOrganicMatter].Add(mass: 98.5, N: 17.6, P: 0.0, type: "RuminantDung_PastureFed", name "dung")
                  1997-10-09  [Fertiliser].Apply(Amount: 26.4, Type: Fertiliser.Types.UreaN, Depth: 30)
                  1997-11-22  [SurfaceOrganicMatter].Add(mass: 150.1, N: 26.8, P: 0.0, type: "RuminantDung_PastureFed", name "dung")
                  1997-11-22  [Fertiliser].Apply(Amount: 40.2, Type: Fertiliser.Types.UreaN, Depth: 30)
                  1997-12-26  [SurfaceOrganicMatter].Add(mass: 69.8, N: 12.5, P: 0.0, type: "RuminantDung_PastureFed", name "dung")
                  1997-12-26  [Fertiliser].Apply(Amount: 18.7, Type: Fertiliser.Types.UreaN, Depth: 30)
                  1998-02-05  [SurfaceOrganicMatter].Add(mass: 65.3, N: 11.7, P: 0.0, type: "RuminantDung_PastureFed", name "dung")
                  1998-02-05  [Fertiliser].Apply(Amount: 17.5, Type: Fertiliser.Types.UreaN, Depth: 30)
                  1998-03-14  [SurfaceOrganicMatter].Add(mass: 35.1, N: 6.3, P: 0.0, type: "RuminantDung_PastureFed", name "dung")
                  1998-03-14  [Fertiliser].Apply(Amount: 9.4, Type: Fertiliser.Types.UreaN, Depth: 30)
                  1998-05-31  [SurfaceOrganicMatter].Add(mass: 48.3, N: 8.6, P: 0.0, type: "RuminantDung_PastureFed", name "dung")
                  1998-05-31  [Fertiliser].Apply(Amount: 12.9, Type: Fertiliser.Types.UreaN, Depth: 30)
                  1998-10-04  [SurfaceOrganicMatter].Add(mass: 97.0, N: 17.3, P: 0.0, type: "RuminantDung_PastureFed", name "dung")
                  1998-10-04  [Fertiliser].Apply(Amount: 26.0, Type: Fertiliser.Types.UreaN, Depth: 30)
                  1998-11-13  [SurfaceOrganicMatter].Add(mass: 119.0, N: 21.2, P: 0.0, type: "RuminantDung_PastureFed", name "dung")
                  1998-11-13  [Fertiliser].Apply(Amount: 31.9, Type: Fertiliser.Types.UreaN, Depth: 30)
                  1998-12-18  [SurfaceOrganicMatter].Add(mass: 52.7, N: 9.4, P: 0.0, type: "RuminantDung_PastureFed", name "dung")
                  1998-12-18  [Fertiliser].Apply(Amount: 14.1, Type: Fertiliser.Types.UreaN, Depth: 30)
                  1999-01-15  [SurfaceOrganicMatter].Add(mass: 57.5, N: 10.3, P: 0.0, type: "RuminantDung_PastureFed", name "dung")
                  1999-01-15  [Fertiliser].Apply(Amount: 15.4, Type: Fertiliser.Types.UreaN, Depth: 30)
                  1999-02-20  [SurfaceOrganicMatter].Add(mass: 23.1, N: 4.1, P: 0.0, type: "RuminantDung_PastureFed", name "dung")
                  1999-02-20  [Fertiliser].Apply(Amount: 6.2, Type: Fertiliser.Types.UreaN, Depth: 30)
                  1999-04-15  [SurfaceOrganicMatter].Add(mass: 72.3, N: 12.9, P: 0.0, type: "RuminantDung_PastureFed", name "dung")
                  1999-04-15  [Fertiliser].Apply(Amount: 19.4, Type: Fertiliser.Types.UreaN, Depth: 30)
                  1999-06-25  [SurfaceOrganicMatter].Add(mass: 38.9, N: 6.9, P: 0.0, type: "RuminantDung_PastureFed", name "dung")
                  1999-06-25  [Fertiliser].Apply(Amount: 10.4, Type: Fertiliser.Types.UreaN, Depth: 30)
                  1999-10-02  [SurfaceOrganicMatter].Add(mass: 126.2, N: 22.5, P: 0.0, type: "RuminantDung_PastureFed", name "dung")
                  1999-10-02  [Fertiliser].Apply(Amount: 33.8, Type: Fertiliser.Types.UreaN, Depth: 30)
                  1999-11-13  [SurfaceOrganicMatter].Add(mass: 156.4, N: 27.9, P: 0.0, type: "RuminantDung_PastureFed", name "dung")
                  1999-11-13  [Fertiliser].Apply(Amount: 41.9, Type: Fertiliser.Types.UreaN, Depth: 30)
                  1999-12-23  [SurfaceOrganicMatter].Add(mass: 67.8, N: 12.1, P: 0.0, type: "RuminantDung_PastureFed", name "dung")
                  1999-12-23  [Fertiliser].Apply(Amount: 18.2, Type: Fertiliser.Types.UreaN, Depth: 30)
                  2000-01-23  [SurfaceOrganicMatter].Add(mass: 53.4, N: 9.5, P: 0.0, type: "RuminantDung_PastureFed", name "dung")
                  2000-01-23  [Fertiliser].Apply(Amount: 14.3, Type: Fertiliser.Types.UreaN, Depth: 30)
                  2000-03-15  [SurfaceOrganicMatter].Add(mass: 91.6, N: 16.4, P: 0.0, type: "RuminantDung_PastureFed", name "dung")
                  2000-03-15  [Fertiliser].Apply(Amount: 24.5, Type: Fertiliser.Types.UreaN, Depth: 30)
                  2000-05-27  [SurfaceOrganicMatter].Add(mass: 65.7, N: 11.7, P: 0.0, type: "RuminantDung_PastureFed", name "dung")
                  2000-05-27  [Fertiliser].Apply(Amount: 17.6, Type: Fertiliser.Types.UreaN, Depth: 30)
                  2000-09-26  [SurfaceOrganicMatter].Add(mass: 95.5, N: 17.1, P: 0.0, type: "RuminantDung_PastureFed", name "dung")
                  2000-09-26  [Fertiliser].Apply(Amount: 25.6, Type: Fertiliser.Types.UreaN, Depth: 30)
                  2000-11-13  [SurfaceOrganicMatter].Add(mass: 99.0, N: 17.7, P: 0.0, type: "RuminantDung_PastureFed", name "dung")
                  2000-11-13  [Fertiliser].Apply(Amount: 26.5, Type: Fertiliser.Types.UreaN, Depth: 30)
                  2000-12-23  [SurfaceOrganicMatter].Add(mass: 88.3, N: 15.8, P: 0.0, type: "RuminantDung_PastureFed", name "dung")
                  2000-12-23  [Fertiliser].Apply(Amount: 23.7, Type: Fertiliser.Types.UreaN, Depth: 30)
                  2001-01-27  [SurfaceOrganicMatter].Add(mass: 53.3, N: 9.5, P: 0.0, type: "RuminantDung_PastureFed", name "dung")
                  2001-01-27  [Fertiliser].Apply(Amount: 14.3, Type: Fertiliser.Types.UreaN, Depth: 30)
                  2001-03-14  [SurfaceOrganicMatter].Add(mass: 39.7, N: 7.1, P: 0.0, type: "RuminantDung_PastureFed", name "dung")
                  2001-03-14  [Fertiliser].Apply(Amount: 10.6, Type: Fertiliser.Types.UreaN, Depth: 30)
                  2001-05-04  [SurfaceOrganicMatter].Add(mass: 33.1, N: 5.9, P: 0.0, type: "RuminantDung_PastureFed", name "dung")
                  2001-05-04  [Fertiliser].Apply(Amount: 8.9, Type: Fertiliser.Types.UreaN, Depth: 30)
                  2001-06-29  [SurfaceOrganicMatter].Add(mass: 11.0, N: 2.0, P: 0.0, type: "RuminantDung_PastureFed", name "dung")
                  2001-06-29  [Fertiliser].Apply(Amount: 3.0, Type: Fertiliser.Types.UreaN, Depth: 30)
                  2001-10-06  [SurfaceOrganicMatter].Add(mass: 103.5, N: 18.5, P: 0.0, type: "RuminantDung_PastureFed", name "dung")
                  2001-10-06  [Fertiliser].Apply(Amount: 27.7, Type: Fertiliser.Types.UreaN, Depth: 30)
                  2001-11-23  [SurfaceOrganicMatter].Add(mass: 100.6, N: 18.0, P: 0.0, type: "RuminantDung_PastureFed", name "dung")
                  2001-11-23  [Fertiliser].Apply(Amount: 26.9, Type: Fertiliser.Types.UreaN, Depth: 30)
                  2001-12-26  [SurfaceOrganicMatter].Add(mass: 61.1, N: 10.9, P: 0.0, type: "RuminantDung_PastureFed", name "dung")
                  2001-12-26  [Fertiliser].Apply(Amount: 16.4, Type: Fertiliser.Types.UreaN, Depth: 30)
                  2002-02-10  [SurfaceOrganicMatter].Add(mass: 51.1, N: 9.1, P: 0.0, type: "RuminantDung_PastureFed", name "dung")
                  2002-02-10  [Fertiliser].Apply(Amount: 13.7, Type: Fertiliser.Types.UreaN, Depth: 30)
                  2002-04-10  [SurfaceOrganicMatter].Add(mass: 28.6, N: 5.1, P: 0.0, type: "RuminantDung_PastureFed", name "dung")
                  2002-04-10  [Fertiliser].Apply(Amount: 7.7, Type: Fertiliser.Types.UreaN, Depth: 30)
                  2002-06-29  [SurfaceOrganicMatter].Add(mass: 25.2, N: 4.5, P: 0.0, type: "RuminantDung_PastureFed", name "dung")
                  2002-06-29  [Fertiliser].Apply(Amount: 6.8, Type: Fertiliser.Types.UreaN, Depth: 30)
                Manager ExtraVariables
                  script: same as in Validation.New Zealand.ScottFarm.ScottFarmC.ScottFarmC.ScottFarmC17a.Field.Management.ExtraVariables
              MicroClimate: a_interception=0; b_interception=1; c_interception=0; d_interception=0; SoilHeatFluxFraction=0.4; MinimumHeightDiffForNewLayer=0; NightInterceptionFraction=0.5; ReferenceHeight=2
              Irrigation
              Fertiliser
              SurfaceOrganicMatter: InitialResidueName=maize; InitialResidueType=maize; InitialResidueMass=500; InitialStandingFraction=0; InitialCPR=0; InitialCNR=65
              Soil Wakanui-Iverseen: SoilType=Udic Ustochrept (US),  Immature Pallic Soil (NZ); LocalName=Wakanui Silt Loam; Site=Iverseen field; NearestTown=Lincoln; Region=Canterbury; Country=New Zealand; Latitude=0; Longitude=0; DataSource=Hamish Brown PhD Thesis
                Comments=The physical properties are averages from Hamish's Thesis, Ks and biochemical data from similar soils (from NZ-NSD), texture is a rough estimate only
                Chemical: Thickness=[150, 150, 400, 200, 150, 450, 150, 350, 300]; PH=[6, 6, 6, 6, 6, 6, 6, 6, 6]; PHUnits=Water
                Physical
                  Thickness  ParticleSizeClay  ParticleSizeSand  ParticleSizeSilt  BD    AirDry  LL15  DUL   SAT    KS
                  150        30                10                60                1.33  0.12    0.29  0.4   0.498  183.9
                  150        30                10                60                1.37  0.01    0.25  0.38  0.48   95.1
                  400        30                10                60                1.45  0.01    0.15  0.32  0.45   6.2
                  200        30                15                55                1.42  0.01    0.13  0.36  0.464  1.1
                  150        15                40                45                1.29  0.01    0.13  0.35  0.51   1.1
                  450        20                35                45                1.49  0.01    0.25  0.38  0.438  0.7
                  150        20                30                50                1.61  0.01    0.33  0.36  0.39   0.5
                  350        20                30                50                1.61  0.01    0.3   0.36  0.39   0.6
                  300        20                30                50                1.68  0.01    0.28  0.34  0.366  0.6
                  SoilCrop AgPastureSoil
                    LL=[0.293, 0.246, 0.152, 0.131, 0.134, 0.247, 0.327, 0.3, 0.283]
                    KL=[0.12, 0.12, 0.09, 0.04, 0.01, 0.01, 0, 0, 0]
                    XF=[1, 1, 0.8, 0.7, 0.85, 0.3, 0, 0, 0]
                  SoilCrop ChicorySoil
                    LL=[0.293, 0.246, 0.152, 0.131, 0.134, 0.25, 0.327, 0.3, 0.283]
                    KL=[0.12, 0.12, 0.09, 0.04, 0.01, 0.01, 0, 0, 0]
                    XF=[1, 1, 0.8, 0.7, 0.85, 0.3, 0, 0, 0]
                  SoilCrop WheatSoil
                    LL=[0.293, 0.246, 0.152, 0.131, 0.134, 0.247, 0.327, 0.3, 0.283]
                    KL=[0.12, 0.12, 0.09, 0.04, 0.01, 0.01, 0, 0, 0]
                    XF=[1, 1, 0.8, 0.7, 0.85, 0.3, 0, 0, 0]
                  SoilCrop SlurpSoil
                    LL=[0.293, 0.246, 0.152, 0.131, 0.134, 0.247, 0.327, 0.3, 0.283]
                    KL=[0.12, 0.12, 0.09, 0.04, 0.01, 0.01, 0, 0, 0]
                    XF=[1, 1, 0.8, 0.7, 0.85, 0.3, 0, 0, 0]
                WaterBalance SoilWater: SummerDate=1-Nov; SummerU=6; SummerCona=3.5; WinterDate=1-apr; WinterU=2; WinterCona=2; DiffusConst=88; DiffusSlope=35; Salb=0.13; CN2Bare=73; CNRed=20; CNCov=0.8; PSIDul=-100; Thickness=[150, 150, 400, 200, 150, 450, 150, 350, 300]; SWCON=[0.5, 0.45, 0.25, 0.25, 0.4, 0.1, 0.15, 0.1, 0.1]
                Nutrient
                Organic: FOMCNRatio=40; CarbonUnits=Total
                  Thickness  Carbon  SoilCNRatio  FBiom  FInert  FOM
                  150        4.25    11.3         0.085  0.55    309.801
                  150        3.13    11.3         0.05   0.67    254.748
                  400        0.88    11.3         0.02   0.8     151.19
                  200        0.32    11.3         0.01   0.9     116.474
                  150        0.25    11.3         0.008  0.95    95.7764
                  450        0.17    11.3         0.005  0.99    53.2533
                  800        0.1     11.3         0.005  0.99    18.7573
                Water: Thickness=[150, 150, 400, 200, 150, 450, 150, 350, 300]; InitialValues=[0.4, 0.38, 0.32, 0.36, 0.35, 0.38, 0.36, 0.36, 0.3305]; InitialPAWmm=282.15; RelativeTo=LL15; FilledFromTop=true
                CERESSoilTemperature Temperature
                Solute NO3: Thickness=[150, 150, 400, 200, 150, 450, 150, 350, 300]; InitialValuesUnits=ppm; WaterTableConcentration=0; D0=0; DepthConstant=0; MaxDepthSoluteAccessible=0; RunoffEffectivenessAtMovingSolute=0; MaxEffectiveRunoff=0
                  InitialValues=[7.5188, 7.29927, 3.44828, 2.42131, 1.77728, 0.489237, 0.489237, 0.489237, 0.489237]
                Solute NH4: Thickness=[150, 150, 400, 200, 150, 450, 150, 350, 300]; InitialValuesUnits=ppm; WaterTableConcentration=0; D0=0; DepthConstant=0; MaxDepthSoluteAccessible=0; RunoffEffectivenessAtMovingSolute=0; MaxEffectiveRunoff=0
                  InitialValues=[0.501253, 0.486618, 0.172414, 0.242131, 0.177728, 0.0489237, 0.0489237, 0.0489237, 0.0489237]
                Solute Urea: Thickness=[150, 150, 400, 200, 150, 450, 150, 350, 300]; InitialValues=[0, 0, 0, 0, 0, 0, 0, 0, 0]; InitialValuesUnits=kg/ha; WaterTableConcentration=0; D0=0; DepthConstant=0; MaxDepthSoluteAccessible=0; RunoffEffectivenessAtMovingSolute=0; MaxEffectiveRunoff=0
              Plant Chicory
              Report: EventNames=[Clock].DoReport
      Folder FRNLLincoln
        Experiment FRNLLincoln
          Memo
            Simulation setup based on field trial performed at Lincoln University Research Dairy Farm, New Zealand, between 2014 and 2016.  The experiment was part of the FRNL (Forages for Reduced Nitrogen Leaching) program and the data is basically unpublished (references will be added when they become available).
            The experiment consisted of six fertiliser treatments (N rates of 0, 50, 100, 200, 350 and 500 kg/ha/yr) in three replicates, and measurements comprised yield and quality indicators (here N content is used).
            Data supplied by Grant Edwards, Lincoln University.

            The soil at the experimental site was a Templeton fine sandy loam (an Immature Pallic soil, USDA: Udic Haplustept), the required parameters were inferred based on data from the New Zealand National Soils Database (Landcare Research).
            Weather data was obtained from nearby Broadfields weather station (NIWA).
          Factors
            Factor NRate: Specification=[NRate]
              Operations 0
              Operations 50
                2014-10-08  [Fertiliser].Apply(Amount: 5, Type: Fertiliser.Types.UreaN, Depth: 10)
                2014-10-30  [Fertiliser].Apply(Amount: 5, Type: Fertiliser.Types.UreaN, Depth: 10)
                2014-11-25  [Fertiliser].Apply(Amount: 5, Type: Fertiliser.Types.UreaN, Depth: 10)
                2014-12-17  [Fertiliser].Apply(Amount: 5, Type: Fertiliser.Types.UreaN, Depth: 10)
                2015-01-15  [Fertiliser].Apply(Amount: 5, Type: Fertiliser.Types.UreaN, Depth: 10)
                2015-02-11  [Fertiliser].Apply(Amount: 5, Type: Fertiliser.Types.UreaN, Depth: 10)
                2015-03-10  [Fertiliser].Apply(Amount: 5, Type: Fertiliser.Types.UreaN, Depth: 10)
                2015-04-10  [Fertiliser].Apply(Amount: 5, Type: Fertiliser.Types.UreaN, Depth: 10)
                2015-05-19  [Fertiliser].Apply(Amount: 5, Type: Fertiliser.Types.UreaN, Depth: 10)
                2015-09-02  [Fertiliser].Apply(Amount: 5, Type: Fertiliser.Types.UreaN, Depth: 10)
                2015-10-06  [Fertiliser].Apply(Amount: 5, Type: Fertiliser.Types.UreaN, Depth: 10)
                2015-11-06  [Fertiliser].Apply(Amount: 5, Type: Fertiliser.Types.UreaN, Depth: 10)
                2015-12-07  [Fertiliser].Apply(Amount: 5, Type: Fertiliser.Types.UreaN, Depth: 10)
                2016-01-07  [Fertiliser].Apply(Amount: 5, Type: Fertiliser.Types.UreaN, Depth: 10)
                2016-02-04  [Fertiliser].Apply(Amount: 5, Type: Fertiliser.Types.UreaN, Depth: 10)
                2016-03-04  [Fertiliser].Apply(Amount: 5, Type: Fertiliser.Types.UreaN, Depth: 10)
                2016-03-31  [Fertiliser].Apply(Amount: 5, Type: Fertiliser.Types.UreaN, Depth: 10)
                2016-05-04  [Fertiliser].Apply(Amount: 5, Type: Fertiliser.Types.UreaN, Depth: 10)
                2016-08-30  [Fertiliser].Apply(Amount: 5, Type: Fertiliser.Types.UreaN, Depth: 10)
                2016-10-03  [Fertiliser].Apply(Amount: 5, Type: Fertiliser.Types.UreaN, Depth: 10)
                2016-10-28  [Fertiliser].Apply(Amount: 5, Type: Fertiliser.Types.UreaN, Depth: 10)
              Operations 100
                2014-10-08  [Fertiliser].Apply(Amount: 10, Type: Fertiliser.Types.UreaN, Depth: 10)
                2014-10-30  [Fertiliser].Apply(Amount: 10, Type: Fertiliser.Types.UreaN, Depth: 10)
                2014-11-25  [Fertiliser].Apply(Amount: 10, Type: Fertiliser.Types.UreaN, Depth: 10)
                2014-12-17  [Fertiliser].Apply(Amount: 10, Type: Fertiliser.Types.UreaN, Depth: 10)
                2015-01-15  [Fertiliser].Apply(Amount: 10, Type: Fertiliser.Types.UreaN, Depth: 10)
                2015-02-11  [Fertiliser].Apply(Amount: 10, Type: Fertiliser.Types.UreaN, Depth: 10)
                2015-03-10  [Fertiliser].Apply(Amount: 10, Type: Fertiliser.Types.UreaN, Depth: 10)
                2015-04-10  [Fertiliser].Apply(Amount: 10, Type: Fertiliser.Types.UreaN, Depth: 10)
                2015-05-19  [Fertiliser].Apply(Amount: 10, Type: Fertiliser.Types.UreaN, Depth: 10)
                2015-09-02  [Fertiliser].Apply(Amount: 10, Type: Fertiliser.Types.UreaN, Depth: 10)
                2015-10-06  [Fertiliser].Apply(Amount: 10, Type: Fertiliser.Types.UreaN, Depth: 10)
                2015-11-06  [Fertiliser].Apply(Amount: 10, Type: Fertiliser.Types.UreaN, Depth: 10)
                2015-12-07  [Fertiliser].Apply(Amount: 10, Type: Fertiliser.Types.UreaN, Depth: 10)
                2016-01-07  [Fertiliser].Apply(Amount: 10, Type: Fertiliser.Types.UreaN, Depth: 10)
                2016-02-04  [Fertiliser].Apply(Amount: 10, Type: Fertiliser.Types.UreaN, Depth: 10)
                2016-03-04  [Fertiliser].Apply(Amount: 10, Type: Fertiliser.Types.UreaN, Depth: 10)
                2016-03-31  [Fertiliser].Apply(Amount: 10, Type: Fertiliser.Types.UreaN, Depth: 10)
                2016-05-04  [Fertiliser].Apply(Amount: 10, Type: Fertiliser.Types.UreaN, Depth: 10)
                2016-08-30  [Fertiliser].Apply(Amount: 10, Type: Fertiliser.Types.UreaN, Depth: 10)
                2016-10-03  [Fertiliser].Apply(Amount: 10, Type: Fertiliser.Types.UreaN, Depth: 10)
                2016-10-28  [Fertiliser].Apply(Amount: 10, Type: Fertiliser.Types.UreaN, Depth: 10)
              Operations 200
                2014-10-08  [Fertiliser].Apply(Amount: 20, Type: Fertiliser.Types.UreaN, Depth: 10)
                2014-10-30  [Fertiliser].Apply(Amount: 20, Type: Fertiliser.Types.UreaN, Depth: 10)
                2014-11-25  [Fertiliser].Apply(Amount: 20, Type: Fertiliser.Types.UreaN, Depth: 10)
                2014-12-17  [Fertiliser].Apply(Amount: 20, Type: Fertiliser.Types.UreaN, Depth: 10)
                2015-01-15  [Fertiliser].Apply(Amount: 20, Type: Fertiliser.Types.UreaN, Depth: 10)
                2015-02-11  [Fertiliser].Apply(Amount: 20, Type: Fertiliser.Types.UreaN, Depth: 10)
                2015-03-10  [Fertiliser].Apply(Amount: 20, Type: Fertiliser.Types.UreaN, Depth: 10)
                2015-04-10  [Fertiliser].Apply(Amount: 20, Type: Fertiliser.Types.UreaN, Depth: 10)
                2015-05-19  [Fertiliser].Apply(Amount: 20, Type: Fertiliser.Types.UreaN, Depth: 10)
                2015-09-02  [Fertiliser].Apply(Amount: 20, Type: Fertiliser.Types.UreaN, Depth: 10)
                2015-10-06  [Fertiliser].Apply(Amount: 20, Type: Fertiliser.Types.UreaN, Depth: 10)
                2015-11-06  [Fertiliser].Apply(Amount: 20, Type: Fertiliser.Types.UreaN, Depth: 10)
                2015-12-07  [Fertiliser].Apply(Amount: 20, Type: Fertiliser.Types.UreaN, Depth: 10)
                2016-01-07  [Fertiliser].Apply(Amount: 20, Type: Fertiliser.Types.UreaN, Depth: 10)
                2016-02-04  [Fertiliser].Apply(Amount: 20, Type: Fertiliser.Types.UreaN, Depth: 10)
                2016-03-04  [Fertiliser].Apply(Amount: 20, Type: Fertiliser.Types.UreaN, Depth: 10)
                2016-03-31  [Fertiliser].Apply(Amount: 20, Type: Fertiliser.Types.UreaN, Depth: 10)
                2016-05-04  [Fertiliser].Apply(Amount: 20, Type: Fertiliser.Types.UreaN, Depth: 10)
                2016-08-30  [Fertiliser].Apply(Amount: 20, Type: Fertiliser.Types.UreaN, Depth: 10)
                2016-10-03  [Fertiliser].Apply(Amount: 20, Type: Fertiliser.Types.UreaN, Depth: 10)
                2016-10-28  [Fertiliser].Apply(Amount: 20, Type: Fertiliser.Types.UreaN, Depth: 10)
              Operations 350
                2014-10-08  [Fertiliser].Apply(Amount: 35, Type: Fertiliser.Types.UreaN, Depth: 10)
                2014-10-30  [Fertiliser].Apply(Amount: 35, Type: Fertiliser.Types.UreaN, Depth: 10)
                2014-11-25  [Fertiliser].Apply(Amount: 35, Type: Fertiliser.Types.UreaN, Depth: 10)
                2014-12-17  [Fertiliser].Apply(Amount: 35, Type: Fertiliser.Types.UreaN, Depth: 10)
                2015-01-15  [Fertiliser].Apply(Amount: 35, Type: Fertiliser.Types.UreaN, Depth: 10)
                2015-02-11  [Fertiliser].Apply(Amount: 35, Type: Fertiliser.Types.UreaN, Depth: 10)
                2015-03-10  [Fertiliser].Apply(Amount: 35, Type: Fertiliser.Types.UreaN, Depth: 10)
                2015-04-10  [Fertiliser].Apply(Amount: 35, Type: Fertiliser.Types.UreaN, Depth: 10)
                2015-05-19  [Fertiliser].Apply(Amount: 35, Type: Fertiliser.Types.UreaN, Depth: 10)
                2015-09-02  [Fertiliser].Apply(Amount: 35, Type: Fertiliser.Types.UreaN, Depth: 10)
                2015-10-06  [Fertiliser].Apply(Amount: 35, Type: Fertiliser.Types.UreaN, Depth: 10)
                2015-11-06  [Fertiliser].Apply(Amount: 35, Type: Fertiliser.Types.UreaN, Depth: 10)
                2015-12-07  [Fertiliser].Apply(Amount: 35, Type: Fertiliser.Types.UreaN, Depth: 10)
                2016-01-07  [Fertiliser].Apply(Amount: 35, Type: Fertiliser.Types.UreaN, Depth: 10)
                2016-02-04  [Fertiliser].Apply(Amount: 35, Type: Fertiliser.Types.UreaN, Depth: 10)
                2016-03-04  [Fertiliser].Apply(Amount: 35, Type: Fertiliser.Types.UreaN, Depth: 10)
                2016-03-31  [Fertiliser].Apply(Amount: 35, Type: Fertiliser.Types.UreaN, Depth: 10)
                2016-05-04  [Fertiliser].Apply(Amount: 35, Type: Fertiliser.Types.UreaN, Depth: 10)
                2016-08-30  [Fertiliser].Apply(Amount: 35, Type: Fertiliser.Types.UreaN, Depth: 10)
                2016-10-03  [Fertiliser].Apply(Amount: 35, Type: Fertiliser.Types.UreaN, Depth: 10)
                2016-10-28  [Fertiliser].Apply(Amount: 35, Type: Fertiliser.Types.UreaN, Depth: 10)
              Operations 500
                2014-10-08  [Fertiliser].Apply(Amount: 50, Type: Fertiliser.Types.UreaN, Depth: 10)
                2014-10-30  [Fertiliser].Apply(Amount: 50, Type: Fertiliser.Types.UreaN, Depth: 10)
                2014-11-25  [Fertiliser].Apply(Amount: 50, Type: Fertiliser.Types.UreaN, Depth: 10)
                2014-12-17  [Fertiliser].Apply(Amount: 50, Type: Fertiliser.Types.UreaN, Depth: 10)
                2015-01-15  [Fertiliser].Apply(Amount: 50, Type: Fertiliser.Types.UreaN, Depth: 10)
                2015-02-11  [Fertiliser].Apply(Amount: 50, Type: Fertiliser.Types.UreaN, Depth: 10)
                2015-03-10  [Fertiliser].Apply(Amount: 50, Type: Fertiliser.Types.UreaN, Depth: 10)
                2015-04-10  [Fertiliser].Apply(Amount: 50, Type: Fertiliser.Types.UreaN, Depth: 10)
                2015-05-19  [Fertiliser].Apply(Amount: 50, Type: Fertiliser.Types.UreaN, Depth: 10)
                2015-09-02  [Fertiliser].Apply(Amount: 50, Type: Fertiliser.Types.UreaN, Depth: 10)
                2015-10-06  [Fertiliser].Apply(Amount: 50, Type: Fertiliser.Types.UreaN, Depth: 10)
                2015-11-06  [Fertiliser].Apply(Amount: 50, Type: Fertiliser.Types.UreaN, Depth: 10)
                2015-12-07  [Fertiliser].Apply(Amount: 50, Type: Fertiliser.Types.UreaN, Depth: 10)
                2016-01-07  [Fertiliser].Apply(Amount: 50, Type: Fertiliser.Types.UreaN, Depth: 10)
                2016-02-04  [Fertiliser].Apply(Amount: 50, Type: Fertiliser.Types.UreaN, Depth: 10)
                2016-03-04  [Fertiliser].Apply(Amount: 50, Type: Fertiliser.Types.UreaN, Depth: 10)
                2016-03-31  [Fertiliser].Apply(Amount: 50, Type: Fertiliser.Types.UreaN, Depth: 10)
                2016-05-04  [Fertiliser].Apply(Amount: 50, Type: Fertiliser.Types.UreaN, Depth: 10)
                2016-08-30  [Fertiliser].Apply(Amount: 50, Type: Fertiliser.Types.UreaN, Depth: 10)
                2016-10-03  [Fertiliser].Apply(Amount: 50, Type: Fertiliser.Types.UreaN, Depth: 10)
                2016-10-28  [Fertiliser].Apply(Amount: 50, Type: Fertiliser.Types.UreaN, Depth: 10)
          Simulation FRNLLincoln
            Clock: Start=2014-03-01; End=2016-05-31
            Weather: FileName=Lincoln-Broadfields.met
            Summary summaryfile
            SoilArbitrator Soil Arbitrator
            Zone Field: Area=1; Slope=0; AspectAngle=0; Altitude=50
              Folder Management
                Operations Sowing
                  2014-03-20  [Chicory].Sow(population: 200, cultivar: "Puna", depth: 10, rowSpacing: 150)
                Operations IrrigationSchedule
                  2014-10-31  [Irrigation].Apply(amount: 7)
                  2014-11-03  [Irrigation].Apply(amount: 7)
                  2014-11-05  [Irrigation].Apply(amount: 8)
                  2014-11-07  [Irrigation].Apply(amount: 8)
                  2014-11-10  [Irrigation].Apply(amount: 7)
                  2014-11-11  [Irrigation].Apply(amount: 7)
                  2014-11-12  [Irrigation].Apply(amount: 8)
                  2014-11-17  [Irrigation].Apply(amount: 9)
                  2014-11-18  [Irrigation].Apply(amount: 7)
                  2014-11-19  [Irrigation].Apply(amount: 7)
                  2014-11-24  [Irrigation].Apply(amount: 8)
                  2014-11-25  [Irrigation].Apply(amount: 9)
                  2014-11-27  [Irrigation].Apply(amount: 10)
                  2014-12-01  [Irrigation].Apply(amount: 8)
                  2014-12-02  [Irrigation].Apply(amount: 8)
                  2014-12-04  [Irrigation].Apply(amount: 7)
                  2014-12-08  [Irrigation].Apply(amount: 7)
                  2014-12-09  [Irrigation].Apply(amount: 7)
                  2014-12-12  [Irrigation].Apply(amount: 8)
                  2014-12-15  [Irrigation].Apply(amount: 10)
                  2014-12-17  [Irrigation].Apply(amount: 10)
                  2014-12-19  [Irrigation].Apply(amount: 7)
                  2014-12-20  [Irrigation].Apply(amount: 7)
                  2014-12-21  [Irrigation].Apply(amount: 8)
                  2014-12-22  [Irrigation].Apply(amount: 10)
                  2014-12-25  [Irrigation].Apply(amount: 8)
                  2014-12-26  [Irrigation].Apply(amount: 8)
                  2014-12-27  [Irrigation].Apply(amount: 7)
                  2014-12-28  [Irrigation].Apply(amount: 10)
                  2014-12-29  [Irrigation].Apply(amount: 8)
                  2014-12-30  [Irrigation].Apply(amount: 8)
                  2015-01-02  [Irrigation].Apply(amount: 7)
                  2015-01-05  [Irrigation].Apply(amount: 10)
                  2015-01-08  [Irrigation].Apply(amount: 8)
                  2015-01-09  [Irrigation].Apply(amount: 9)
                  2015-01-12  [Irrigation].Apply(amount: 7)
                  2015-01-13  [Irrigation].Apply(amount: 7)
                  2015-01-16  [Irrigation].Apply(amount: 8)
                  2015-01-19  [Irrigation].Apply(amount: 7)
                  2015-01-20  [Irrigation].Apply(amount: 7)
                  2015-01-21  [Irrigation].Apply(amount: 8)
                  2015-01-26  [Irrigation].Apply(amount: 10)
                  2015-01-27  [Irrigation].Apply(amount: 10)
                  2015-01-29  [Irrigation].Apply(amount: 8)
                  2015-02-02  [Irrigation].Apply(amount: 10)
                  2015-02-04  [Irrigation].Apply(amount: 8)
                  2015-02-05  [Irrigation].Apply(amount: 7)
                  2015-02-09  [Irrigation].Apply(amount: 8)
                  2015-02-11  [Irrigation].Apply(amount: 7)
                  2015-02-12  [Irrigation].Apply(amount: 10)
                  2015-02-16  [Irrigation].Apply(amount: 10)
                  2015-02-17  [Irrigation].Apply(amount: 10)
                  2015-02-18  [Irrigation].Apply(amount: 8)
                  2015-02-24  [Irrigation].Apply(amount: 10)
                  2015-02-26  [Irrigation].Apply(amount: 7)
                  2015-02-27  [Irrigation].Apply(amount: 8)
                  2015-03-02  [Irrigation].Apply(amount: 7)
                  2015-03-03  [Irrigation].Apply(amount: 7)
                  2015-03-05  [Irrigation].Apply(amount: 8)
                  2015-03-10  [Irrigation].Apply(amount: 8)
                  2015-03-12  [Irrigation].Apply(amount: 9)
                  2015-03-13  [Irrigation].Apply(amount: 7)
                  2015-03-16  [Irrigation].Apply(amount: 10)
                  2015-03-19  [Irrigation].Apply(amount: 9)
                  2015-03-20  [Irrigation].Apply(amount: 8)
                  2015-03-23  [Irrigation].Apply(amount: 9)
                  2015-03-24  [Irrigation].Apply(amount: 7)
                  2015-03-26  [Irrigation].Apply(amount: 10)
                  2015-03-30  [Irrigation].Apply(amount: 7)
                  2015-04-02  [Irrigation].Apply(amount: 10)
                  2015-04-03  [Irrigation].Apply(amount: 8)
                  2015-04-06  [Irrigation].Apply(amount: 7)
                  2015-04-08  [Irrigation].Apply(amount: 10)
                  2015-04-17  [Irrigation].Apply(amount: 10)
                  2015-05-20  [Irrigation].Apply(amount: 10)
                  2015-06-09  [Irrigation].Apply(amount: 10)
                  2015-09-09  [Irrigation].Apply(amount: 10)
                  2015-09-30  [Irrigation].Apply(amount: 10)
                  2015-10-02  [Irrigation].Apply(amount: 8)
                  2015-10-06  [Irrigation].Apply(amount: 10)
                  2015-10-09  [Irrigation].Apply(amount: 10)
                  2015-10-12  [Irrigation].Apply(amount: 8)
                  2015-10-13  [Irrigation].Apply(amount: 7)
                  2015-10-16  [Irrigation].Apply(amount: 10)
                  2015-10-20  [Irrigation].Apply(amount: 10)
                  2015-10-21  [Irrigation].Apply(amount: 8)
                  2015-10-23  [Irrigation].Apply(amount: 7)
                  2015-10-26  [Irrigation].Apply(amount: 7)
                  2015-10-27  [Irrigation].Apply(amount: 9)
                  2015-11-02  [Irrigation].Apply(amount: 10)
                  2015-11-03  [Irrigation].Apply(amount: 8)
                  2015-11-04  [Irrigation].Apply(amount: 9)
                  2015-11-06  [Irrigation].Apply(amount: 9)
                  2015-11-09  [Irrigation].Apply(amount: 10)
                  2015-11-11  [Irrigation].Apply(amount: 7)
                  2015-11-16  [Irrigation].Apply(amount: 10)
                  2015-11-18  [Irrigation].Apply(amount: 9)
                  2015-11-20  [Irrigation].Apply(amount: 7)
                  2015-11-23  [Irrigation].Apply(amount: 10)
                  2015-11-24  [Irrigation].Apply(amount: 8)
                  2015-11-25  [Irrigation].Apply(amount: 7)
                  2015-11-27  [Irrigation].Apply(amount: 9)
                  2015-11-30  [Irrigation].Apply(amount: 7)
                  2015-12-01  [Irrigation].Apply(amount: 7)
                  2015-12-04  [Irrigation].Apply(amount: 9)
                  2015-12-07  [Irrigation].Apply(amount: 10)
                  2015-12-09  [Irrigation].Apply(amount: 9)
                  2015-12-10  [Irrigation].Apply(amount: 9)
                  2015-12-22  [Irrigation].Apply(amount: 8)
                  2015-12-24  [Irrigation].Apply(amount: 9)
                  2015-12-26  [Irrigation].Apply(amount: 8)
                  2015-12-29  [Irrigation].Apply(amount: 7)
                  2015-12-31  [Irrigation].Apply(amount: 7)
                  2016-01-01  [Irrigation].Apply(amount: 10)
                  2016-01-07  [Irrigation].Apply(amount: 10)
                  2016-01-09  [Irrigation].Apply(amount: 7)
                  2016-01-11  [Irrigation].Apply(amount: 7)
                  2016-01-12  [Irrigation].Apply(amount: 7)
                  2016-01-13  [Irrigation].Apply(amount: 9)
                  2016-01-15  [Irrigation].Apply(amount: 10)
                  2016-01-21  [Irrigation].Apply(amount: 7)
                  2016-01-25  [Irrigation].Apply(amount: 8)
                  2016-01-30  [Irrigation].Apply(amount: 7)
                  2016-02-02  [Irrigation].Apply(amount: 10)
                  2016-02-03  [Irrigation].Apply(amount: 10)
                  2016-02-05  [Irrigation].Apply(amount: 9)
                  2016-02-08  [Irrigation].Apply(amount: 10)
                  2016-02-11  [Irrigation].Apply(amount: 10)
                  2016-02-12  [Irrigation].Apply(amount: 7)
                  2016-02-15  [Irrigation].Apply(amount: 8)
                  2016-02-16  [Irrigation].Apply(amount: 8)
                  2016-02-22  [Irrigation].Apply(amount: 7)
                  2016-02-23  [Irrigation].Apply(amount: 7)
                  2016-02-25  [Irrigation].Apply(amount: 7)
                  2016-02-26  [Irrigation].Apply(amount: 7)
                  2016-03-01  [Irrigation].Apply(amount: 7)
                  2016-03-02  [Irrigation].Apply(amount: 8)
                  2016-03-04  [Irrigation].Apply(amount: 10)
                  2016-03-07  [Irrigation].Apply(amount: 9)
                  2016-03-08  [Irrigation].Apply(amount: 4)
                  2016-03-10  [Irrigation].Apply(amount: 8)
                  2016-03-14  [Irrigation].Apply(amount: 8)
                  2016-03-15  [Irrigation].Apply(amount: 10)
                  2016-03-18  [Irrigation].Apply(amount: 9)
                  2016-03-21  [Irrigation].Apply(amount: 10)
                  2016-03-22  [Irrigation].Apply(amount: 9)
                  2016-03-23  [Irrigation].Apply(amount: 9)
                  2016-03-28  [Irrigation].Apply(amount: 8)
                  2016-04-02  [Irrigation].Apply(amount: 10)
                  2016-04-08  [Irrigation].Apply(amount: 10)
                  2016-05-04  [Irrigation].Apply(amount: 10)
                  2016-08-31  [Irrigation].Apply(amount: 10)
                  2016-10-05  [Irrigation].Apply(amount: 10)
                  2016-10-18  [Irrigation].Apply(amount: 10)
                  2016-10-26  [Irrigation].Apply(amount: 10)
                Operations NRate
                Manager Defoliate: same as Validation.New Zealand.ScottFarm.ScottFarmC.ScottFarmC.ScottFarmC17a.Field.Management.Defoliate
                Operations DefoliationSchedule
                  2014-10-08  [Defoliate].Script.Defoliate(defoliationType: "Cut", amountDM: 60, amountType: "ResidualDM", duration: 1)
                  2014-10-30  [Defoliate].Script.Defoliate(defoliationType: "Cut", amountDM: 40, amountType: "ResidualDM", duration: 1)
                  2014-11-25  [Defoliate].Script.Defoliate(defoliationType: "Cut", amountDM: 40, amountType: "ResidualDM", duration: 1)
                  2014-12-17  [Defoliate].Script.Defoliate(defoliationType: "Cut", amountDM: 40, amountType: "ResidualDM", duration: 1)
                  2015-01-15  [Defoliate].Script.Defoliate(defoliationType: "Cut", amountDM: 40, amountType: "ResidualDM", duration: 1)
                  2015-02-11  [Defoliate].Script.Defoliate(defoliationType: "Cut", amountDM: 40, amountType: "ResidualDM", duration: 1)
                  2015-03-10  [Defoliate].Script.Defoliate(defoliationType: "Cut", amountDM: 40, amountType: "ResidualDM", duration: 1)
                  2015-04-13  [Defoliate].Script.Defoliate(defoliationType: "Cut", amountDM: 40, amountType: "ResidualDM", duration: 1)
                  2015-05-19  [Defoliate].Script.Defoliate(defoliationType: "Cut", amountDM: 40, amountType: "ResidualDM", duration: 1)
                  2015-09-02  [Defoliate].Script.Defoliate(defoliationType: "Cut", amountDM: 40, amountType: "ResidualDM", duration: 1)
                  2015-10-06  [Defoliate].Script.Defoliate(defoliationType: "Cut", amountDM: 40, amountType: "ResidualDM", duration: 1)
                  2015-11-06  [Defoliate].Script.Defoliate(defoliationType: "Cut", amountDM: 40, amountType: "ResidualDM", duration: 1)
                  2015-12-07  [Defoliate].Script.Defoliate(defoliationType: "Cut", amountDM: 40, amountType: "ResidualDM", duration: 1)
                  2016-01-07  [Defoliate].Script.Defoliate(defoliationType: "Cut", amountDM: 40, amountType: "ResidualDM", duration: 1)
                  2016-02-04  [Defoliate].Script.Defoliate(defoliationType: "Cut", amountDM: 40, amountType: "ResidualDM", duration: 1)
                  2016-03-04  [Defoliate].Script.Defoliate(defoliationType: "Cut", amountDM: 40, amountType: "ResidualDM", duration: 1)
                  2016-03-31  [Defoliate].Script.Defoliate(defoliationType: "Cut", amountDM: 40, amountType: "ResidualDM", duration: 1)
                  2016-05-04  [Defoliate].Script.Defoliate(defoliationType: "Cut", amountDM: 40, amountType: "ResidualDM", duration: 1)
                  2016-08-30  [Defoliate].Script.Defoliate(defoliationType: "Cut", amountDM: 40, amountType: "ResidualDM", duration: 1)
                  2016-10-03  [Defoliate].Script.Defoliate(defoliationType: "Cut", amountDM: 40, amountType: "ResidualDM", duration: 1)
                  2016-10-28  [Defoliate].Script.Defoliate(defoliationType: "Cut", amountDM: 40, amountType: "ResidualDM", duration: 1)
                Manager ExtraVariables
                  script: same as in Validation.New Zealand.ScottFarm.ScottFarmC.ScottFarmC.ScottFarmC17a.Field.Management.ExtraVariables
              MicroClimate: a_interception=0; b_interception=1; c_interception=0; d_interception=0; SoilHeatFluxFraction=0.4; MinimumHeightDiffForNewLayer=0; NightInterceptionFraction=0.5; ReferenceHeight=2
              Irrigation
              Fertiliser
              SurfaceOrganicMatter: InitialResidueName=grass; InitialResidueType=grass; InitialResidueMass=500; InitialStandingFraction=0; InitialCPR=0; InitialCNR=40
              Soil TempletonPaparua: SoilType=Udic Haplustept (US),  Immature Pallic Soil (NZ); LocalName=Templeton Fine Sandy Loam; Site=LURDF; NearestTown=Lincoln; Region=Canterbury; Country=New Zealand; Latitude=0; Longitude=0; DataSource=Adapted based on data from the NZ Natioanl Soils Database
                Comments=Different references name the soil at the site as either Templeton or Paparua (very similar soils)
                Chemical: Thickness=[150, 150, 200, 250, 250, 500]; PH=[6, 6, 6, 6, 6, 6]; PHUnits=Water
                Physical
                  Thickness  ParticleSizeClay  ParticleSizeSand  ParticleSizeSilt  BD    AirDry  LL15   DUL    SAT    KS
                  150        21.8              17.4              60.9              1.35  0.057   0.17   0.351  0.439  4641.312
                  150        16                30.3              53.7              1.43  0.141   0.177  0.325  0.409  1594.057
                  200        19.5              21                59.5              1.63  0.186   0.186  0.328  0.362  75.525
                  250        8.3               37                54.6              1.57  0.132   0.132  0.257  0.358  2914.115
                  250        9.5               43.6              46.9              1.52  0.116   0.116  0.242  0.365  2476.033
                  500        16.6              24.2              59.3              1.41  0.138   0.138  0.276  0.39   2859.216
                  SoilCrop ChicorySoil: LL=[0.17, 0.177, 0.186, 0.132, 0.116, 0.138]; KL=[0.12, 0.11, 0.08, 0.03, 0.01, 0.01]; XF=[1, 1, 1, 1, 1, 1]
                WaterBalance SoilWater: SummerDate=1-Nov; SummerU=6; SummerCona=3.5; WinterDate=1-apr; WinterU=2; WinterCona=2; DiffusConst=88; DiffusSlope=35; Salb=0.13; CN2Bare=73; CNRed=20; CNCov=0.8; PSIDul=-100; Thickness=[150, 150, 200, 250, 250, 500]; SWCON=[0.5, 0.46, 0.27, 0.5, 0.49, 0.48]
                Nutrient
                Organic: FOMCNRatio=40; CarbonUnits=Total
                  Thickness  Carbon  SoilCNRatio  FBiom  FInert  FOM
                  150        2.6     11.3         0.085  0.4     358.617
                  150        1.01    11.3         0.05   0.65    265.67
                  200        0.4     11.3         0.02   0.81    178.084
                  250        0.19    11.3         0.01   0.87    108.013
                  250        0.22    11.3         0.008  0.95    65.5135
                  500        0.18    11.3         0.005  0.99    24.1011
                Water: Thickness=[150, 150, 200, 250, 250, 500]; InitialValues=[0.351, 0.325, 0.328, 0.257, 0.242, 0.27181]; InitialPAWmm=207.405; RelativeTo=LL15; FilledFromTop=true
                CERESSoilTemperature Temperature
                Solute NO3: Thickness=[150, 150, 200, 250, 250, 500]; InitialValues=[5.4321, 0.932401, 0.139179, 0.139179, 0.131579, 0.070922]; InitialValuesUnits=ppm; WaterTableConcentration=0; D0=0; DepthConstant=0; MaxDepthSoluteAccessible=0; RunoffEffectivenessAtMovingSolute=0; MaxEffectiveRunoff=0
                Solute NH4: Thickness=[150, 150, 200, 250, 250, 500]; InitialValuesUnits=ppm; WaterTableConcentration=0; D0=0; DepthConstant=0; MaxDepthSoluteAccessible=0; RunoffEffectivenessAtMovingSolute=0; MaxEffectiveRunoff=0
                  InitialValues=[0.493827, 0.2331, 0.0417537, 0.0417537, 0.0526316, 0.0141844]
                Solute Urea: Thickness=[150, 150, 200, 250, 250, 500]; InitialValues=[0, 0, 0, 0, 0, 0]; InitialValuesUnits=kg/ha; WaterTableConcentration=0; D0=0; DepthConstant=0; MaxDepthSoluteAccessible=0; RunoffEffectivenessAtMovingSolute=0; MaxEffectiveRunoff=0
              Plant Chicory
              Report: EventNames=[Clock].DoReport
      Folder FRNLRuakura
        Experiment FRNLRuakura
          Memo
            This simulation setup was based on field trials performed at DairyNZ's Scott Farm, in Ruakura, New Zealand, between 2014 and 2016.  The experiment was part of the FRNL (Forages for Reduced Nitrogen Leaching) program and the data is basically unpublished (references will be added when they become available).
            The experiment consisted of six fertiliser treatments (N rates of 0, 50, 100, 200, 350 and 500 kg/ha/yr) in three replicates, and measurements comprised yield and quality indicators (here N content is used).
            Observed data supplied by Grant Edwards, Lincoln University.

            The soil at the experimental site was a Horotiu silt loam (an Orthic Allophanic soil; USDA: Typic Udivitrand), the parameters required were inferred using data from the New Zealand National Soils Database (Landcare Research).
            Weather data was obtained from nearby Ruakura weather station (NIWA).
          Factors
            Factor NRate: Specification=[NRate]
              Operations 0
                2014-10-13  [Fertiliser].Apply(Amount: 26.4, Type: Fertiliser.Types.UreaN, Depth: 10)
              Operations 50
                2014-10-13  [Fertiliser].Apply(Amount: 26.4, Type: Fertiliser.Types.UreaN, Depth: 10)
                2014-12-23  [Fertiliser].Apply(Amount: 5, Type: Fertiliser.Types.UreaN, Depth: 10)
                2015-01-19  [Fertiliser].Apply(Amount: 5, Type: Fertiliser.Types.UreaN, Depth: 10)
                2015-02-04  [Fertiliser].Apply(Amount: 5, Type: Fertiliser.Types.UreaN, Depth: 10)
                2015-03-03  [Fertiliser].Apply(Amount: 5, Type: Fertiliser.Types.UreaN, Depth: 10)
                2015-03-31  [Fertiliser].Apply(Amount: 5, Type: Fertiliser.Types.UreaN, Depth: 10)
                2015-05-14  [Fertiliser].Apply(Amount: 5, Type: Fertiliser.Types.UreaN, Depth: 10)
                2015-10-09  [Fertiliser].Apply(Amount: 5, Type: Fertiliser.Types.UreaN, Depth: 10)
                2015-10-19  [Fertiliser].Apply(Amount: 10, Type: Fertiliser.Types.UreaN, Depth: 10)
                2015-11-13  [Fertiliser].Apply(Amount: 5, Type: Fertiliser.Types.UreaN, Depth: 10)
                2015-12-10  [Fertiliser].Apply(Amount: 5, Type: Fertiliser.Types.UreaN, Depth: 10)
                2016-01-14  [Fertiliser].Apply(Amount: 5, Type: Fertiliser.Types.UreaN, Depth: 10)
                2016-02-23  [Fertiliser].Apply(Amount: 5, Type: Fertiliser.Types.UreaN, Depth: 10)
                2016-04-01  [Fertiliser].Apply(Amount: 5, Type: Fertiliser.Types.UreaN, Depth: 10)
                2016-05-06  [Fertiliser].Apply(Amount: 5, Type: Fertiliser.Types.UreaN, Depth: 10)
              Operations 100
                2014-10-13  [Fertiliser].Apply(Amount: 26.4, Type: Fertiliser.Types.UreaN, Depth: 10)
                2014-12-23  [Fertiliser].Apply(Amount: 10, Type: Fertiliser.Types.UreaN, Depth: 10)
                2015-01-19  [Fertiliser].Apply(Amount: 10, Type: Fertiliser.Types.UreaN, Depth: 10)
                2015-02-04  [Fertiliser].Apply(Amount: 10, Type: Fertiliser.Types.UreaN, Depth: 10)
                2015-03-03  [Fertiliser].Apply(Amount: 10, Type: Fertiliser.Types.UreaN, Depth: 10)
                2015-03-31  [Fertiliser].Apply(Amount: 10, Type: Fertiliser.Types.UreaN, Depth: 10)
                2015-05-14  [Fertiliser].Apply(Amount: 10, Type: Fertiliser.Types.UreaN, Depth: 10)
                2015-10-09  [Fertiliser].Apply(Amount: 10, Type: Fertiliser.Types.UreaN, Depth: 10)
                2015-10-19  [Fertiliser].Apply(Amount: 20, Type: Fertiliser.Types.UreaN, Depth: 10)
                2015-11-13  [Fertiliser].Apply(Amount: 10, Type: Fertiliser.Types.UreaN, Depth: 10)
                2015-12-10  [Fertiliser].Apply(Amount: 10, Type: Fertiliser.Types.UreaN, Depth: 10)
                2016-01-14  [Fertiliser].Apply(Amount: 10, Type: Fertiliser.Types.UreaN, Depth: 10)
                2016-02-23  [Fertiliser].Apply(Amount: 10, Type: Fertiliser.Types.UreaN, Depth: 10)
                2016-04-01  [Fertiliser].Apply(Amount: 10, Type: Fertiliser.Types.UreaN, Depth: 10)
                2016-05-06  [Fertiliser].Apply(Amount: 10, Type: Fertiliser.Types.UreaN, Depth: 10)
              Operations 200
                2014-10-13  [Fertiliser].Apply(Amount: 26.4, Type: Fertiliser.Types.UreaN, Depth: 10)
                2014-12-23  [Fertiliser].Apply(Amount: 20, Type: Fertiliser.Types.UreaN, Depth: 10)
                2015-01-19  [Fertiliser].Apply(Amount: 20, Type: Fertiliser.Types.UreaN, Depth: 10)
                2015-02-04  [Fertiliser].Apply(Amount: 20, Type: Fertiliser.Types.UreaN, Depth: 10)
                2015-03-03  [Fertiliser].Apply(Amount: 20, Type: Fertiliser.Types.UreaN, Depth: 10)
                2015-03-31  [Fertiliser].Apply(Amount: 20, Type: Fertiliser.Types.UreaN, Depth: 10)
                2015-05-14  [Fertiliser].Apply(Amount: 20, Type: Fertiliser.Types.UreaN, Depth: 10)
                2015-10-09  [Fertiliser].Apply(Amount: 20, Type: Fertiliser.Types.UreaN, Depth: 10)
                2015-10-19  [Fertiliser].Apply(Amount: 40, Type: Fertiliser.Types.UreaN, Depth: 10)
                2015-11-13  [Fertiliser].Apply(Amount: 20, Type: Fertiliser.Types.UreaN, Depth: 10)
                2015-12-10  [Fertiliser].Apply(Amount: 20, Type: Fertiliser.Types.UreaN, Depth: 10)
                2016-01-14  [Fertiliser].Apply(Amount: 20, Type: Fertiliser.Types.UreaN, Depth: 10)
                2016-02-23  [Fertiliser].Apply(Amount: 20, Type: Fertiliser.Types.UreaN, Depth: 10)
                2016-04-01  [Fertiliser].Apply(Amount: 20, Type: Fertiliser.Types.UreaN, Depth: 10)
                2016-05-06  [Fertiliser].Apply(Amount: 20, Type: Fertiliser.Types.UreaN, Depth: 10)
              Operations 350
                2014-10-13  [Fertiliser].Apply(Amount: 26.4, Type: Fertiliser.Types.UreaN, Depth: 10)
                2014-12-23  [Fertiliser].Apply(Amount: 35, Type: Fertiliser.Types.UreaN, Depth: 10)
                2015-01-19  [Fertiliser].Apply(Amount: 35, Type: Fertiliser.Types.UreaN, Depth: 10)
                2015-02-04  [Fertiliser].Apply(Amount: 35, Type: Fertiliser.Types.UreaN, Depth: 10)
                2015-03-03  [Fertiliser].Apply(Amount: 35, Type: Fertiliser.Types.UreaN, Depth: 10)
                2015-03-31  [Fertiliser].Apply(Amount: 35, Type: Fertiliser.Types.UreaN, Depth: 10)
                2015-05-14  [Fertiliser].Apply(Amount: 35, Type: Fertiliser.Types.UreaN, Depth: 10)
                2015-10-09  [Fertiliser].Apply(Amount: 35, Type: Fertiliser.Types.UreaN, Depth: 10)
                2015-10-19  [Fertiliser].Apply(Amount: 70, Type: Fertiliser.Types.UreaN, Depth: 10)
                2015-11-13  [Fertiliser].Apply(Amount: 35, Type: Fertiliser.Types.UreaN, Depth: 10)
                2015-12-10  [Fertiliser].Apply(Amount: 35, Type: Fertiliser.Types.UreaN, Depth: 10)
                2016-01-14  [Fertiliser].Apply(Amount: 35, Type: Fertiliser.Types.UreaN, Depth: 10)
                2016-02-23  [Fertiliser].Apply(Amount: 35, Type: Fertiliser.Types.UreaN, Depth: 10)
                2016-04-01  [Fertiliser].Apply(Amount: 35, Type: Fertiliser.Types.UreaN, Depth: 10)
                2016-05-06  [Fertiliser].Apply(Amount: 35, Type: Fertiliser.Types.UreaN, Depth: 10)
              Operations 500
                2014-10-13  [Fertiliser].Apply(Amount: 26.4, Type: Fertiliser.Types.UreaN, Depth: 10)
                2014-12-23  [Fertiliser].Apply(Amount: 50, Type: Fertiliser.Types.UreaN, Depth: 10)
                2015-01-19  [Fertiliser].Apply(Amount: 50, Type: Fertiliser.Types.UreaN, Depth: 10)
                2015-02-04  [Fertiliser].Apply(Amount: 50, Type: Fertiliser.Types.UreaN, Depth: 10)
                2015-03-03  [Fertiliser].Apply(Amount: 50, Type: Fertiliser.Types.UreaN, Depth: 10)
                2015-03-31  [Fertiliser].Apply(Amount: 50, Type: Fertiliser.Types.UreaN, Depth: 10)
                2015-05-14  [Fertiliser].Apply(Amount: 50, Type: Fertiliser.Types.UreaN, Depth: 10)
                2015-10-09  [Fertiliser].Apply(Amount: 50, Type: Fertiliser.Types.UreaN, Depth: 10)
                2015-10-19  [Fertiliser].Apply(Amount: 100, Type: Fertiliser.Types.UreaN, Depth: 10)
                2015-11-13  [Fertiliser].Apply(Amount: 50, Type: Fertiliser.Types.UreaN, Depth: 10)
                2015-12-10  [Fertiliser].Apply(Amount: 50, Type: Fertiliser.Types.UreaN, Depth: 10)
                2016-01-14  [Fertiliser].Apply(Amount: 50, Type: Fertiliser.Types.UreaN, Depth: 10)
                2016-02-23  [Fertiliser].Apply(Amount: 50, Type: Fertiliser.Types.UreaN, Depth: 10)
                2016-04-01  [Fertiliser].Apply(Amount: 50, Type: Fertiliser.Types.UreaN, Depth: 10)
                2016-05-06  [Fertiliser].Apply(Amount: 50, Type: Fertiliser.Types.UreaN, Depth: 10)
          Simulation FRNLRuakura
            Clock: Start=2014-06-01; End=2016-05-31
            Weather: FileName=Ruakura.met
            Summary summaryfile
            SoilArbitrator Soil Arbitrator
            Zone Field: Area=1; Slope=0; AspectAngle=0; Altitude=50
              Folder Management
                Operations Sowing
                  2014-10-24  [Chicory].Sow(population: 200, cultivar: "Puna", depth: 10, rowSpacing: 150)
                Operations NRate
                Manager Defoliate: same as Validation.New Zealand.ScottFarm.ScottFarmC.ScottFarmC.ScottFarmC17a.Field.Management.Defoliate
                Operations DefoliationSchedule
                  2015-01-13  [Defoliate].Script.Defoliate(defoliationType: "Cut", amountDM: 40, amountType: "ResidualDM", duration: 1)
                  2015-02-03  [Defoliate].Script.Defoliate(defoliationType: "Cut", amountDM: 40, amountType: "ResidualDM", duration: 1)
                  2015-03-02  [Defoliate].Script.Defoliate(defoliationType: "Cut", amountDM: 40, amountType: "ResidualDM", duration: 1)
                  2015-03-30  [Defoliate].Script.Defoliate(defoliationType: "Cut", amountDM: 40, amountType: "ResidualDM", duration: 1)
                  2015-05-13  [Defoliate].Script.Defoliate(defoliationType: "Cut", amountDM: 40, amountType: "ResidualDM", duration: 1)
                  2015-10-07  [Defoliate].Script.Defoliate(defoliationType: "Cut", amountDM: 40, amountType: "ResidualDM", duration: 1)
                  2015-11-09  [Defoliate].Script.Defoliate(defoliationType: "Cut", amountDM: 40, amountType: "ResidualDM", duration: 1)
                  2015-12-09  [Defoliate].Script.Defoliate(defoliationType: "Cut", amountDM: 40, amountType: "ResidualDM", duration: 1)
                  2016-01-13  [Defoliate].Script.Defoliate(defoliationType: "Cut", amountDM: 40, amountType: "ResidualDM", duration: 1)
                  2016-02-22  [Defoliate].Script.Defoliate(defoliationType: "Cut", amountDM: 25, amountType: "ResidualDM", duration: 1)
                  2016-03-30  [Defoliate].Script.Defoliate(defoliationType: "Cut", amountDM: 40, amountType: "ResidualDM", duration: 1)
                  2016-05-04  [Defoliate].Script.Defoliate(defoliationType: "Cut", amountDM: 40, amountType: "ResidualDM", duration: 1)
                Manager ExtraVariables
                  script: same as in Validation.New Zealand.ScottFarm.ScottFarmC.ScottFarmC.ScottFarmC17a.Field.Management.ExtraVariables
              MicroClimate: a_interception=0; b_interception=1; c_interception=0; d_interception=0; SoilHeatFluxFraction=0.4; MinimumHeightDiffForNewLayer=0; NightInterceptionFraction=0.5; ReferenceHeight=2
              Irrigation
              Fertiliser
              SurfaceOrganicMatter: InitialResidueName=grass; InitialResidueType=grass; InitialResidueMass=500; InitialStandingFraction=0; InitialCPR=0; InitialCNR=40
              Soil HorotiuSoil: SoilType=Typic Udivitrand (US), Typic Orthic Allophanic Soil (NZ); LocalName=Horotiu silt loam; Site=Ruakura; NearestTown=Hamilton; Region=Waikato; Country=New Zealand; Latitude=0; Longitude=0; DataSource=Based primarily on data from Close et al, 2003
                Chemical: Thickness=[200, 200, 130, 140, 380, 230, 220]; PH=[6, 6, 6, 6, 6, 6, 6]; PHUnits=Water
                Physical
                  Thickness  ParticleSizeClay  ParticleSizeSand  ParticleSizeSilt  BD    AirDry  LL15   DUL    SAT    KS
                  200        20                47                33                0.88  0.114   0.228  0.373  0.581  553
                  200        19                65                17                0.85  0.209   0.22   0.34   0.609  5083
                  130        11                76                13                1.03  0.01    0.182  0.323  0.54   8353
                  140        7                 84                10                1.11  0.01    0.15   0.282  0.5    13589
                  380        5                 88                8                 1.11  0.01    0.142  0.2    0.5    38963
                  230        3                 91                6                 1.03  0.01    0.103  0.16   0.446  45280
                  SoilCrop ChicorySoil: LL=[0.23, 0.22, 0.18, 0.15, 0.14, 0.1]; KL=[0.1, 0.08, 0.05, 0.02, 0.01, 0.01]; XF=[1, 1, 1, 1, 1, 1]
                WaterBalance SoilWater: same as Validation.New Zealand.ScottFarm.ScottFarmC.ScottFarmC.ScottFarmC17a.Field.HorotiuSoil.SoilWater
                Nutrient
                Organic: same as Validation.New Zealand.ScottFarm.ScottFarmC.ScottFarmC.ScottFarmC17a.Field.HorotiuSoil.Organic
                Water: Thickness=[200, 200, 130, 140, 380, 230]; InitialValues=[0.3585, 0.328, 0.3089, 0.2688, 0.1942, 0.1543]; InitialPAWmm=112.464; RelativeTo=LL15; FilledFromTop=false
                CERESSoilTemperature Temperature
                Solute NO3: Thickness=[200, 200, 130, 140, 380, 230, 220]; InitialValuesUnits=ppm; WaterTableConcentration=0; D0=0; DepthConstant=0; MaxDepthSoluteAccessible=0; RunoffEffectivenessAtMovingSolute=0; MaxEffectiveRunoff=0
                  InitialValues=[8.52273, 4.11765, 0.76266, 0.76266, 0.743438, 0.61657, 0.61657]
                Solute NH4: same as Validation.New Zealand.ScottFarm.ScottFarmE.ScottFarmE.ScottFarmEstablishment.Field.HorotiuSoil.NH4
                Solute Urea: same as Validation.New Zealand.ScottFarm.ScottFarmC.ScottFarmC.ScottFarmC17a.Field.HorotiuSoil.Urea
              Plant Chicory
              Report: EventNames=[Clock].DoReport
      Memo SubTitle
        <br>
        ### All data from New Zealand
        <br>
    Folder USA
      Folder AFSRC_01
        Experiment AFSRC_01
          Memo
            This simulation was adapted from a defoliation trial in West Virginia, USA, conducted from 1994 to 1996 at the Appalachian Farming Systems Research Center.  The study investigated production and the nutritive value of chicory swards (cultivar '*Puna*' - among other species) as a function of clipping frequency (3- and 6-wk intervals).  Each treatment was replicated three times on an upland site of Dekalb soil series (loamy-skeletal, mixed, subactive, mesic Typic Dystrochrept).  Modest rates of N, P, and K were applied annually.  Herbage mass, botanical composition, in vitro organic matter disappearance (IVOMD), and crude protein (CP) were determined.
            Met data for nearby location was obtained from NOAA.  The data set was largely complete except for solar radiation, which was added from an alternative interpolated set for this location, also from NOAA.
            Information to assemble the soil data was based on a Ramsey series obtained from USGS.

            References:
            Belesky, D.P.; Fedders, J.M.; Turner, K.E.; Ruckle, J.M. 1999. Productivity, botanical composition, and nutritive value of swards including forage chicory. Agronomy Journal, 91(3): 450-456.
          Factors
            Factor CutFrequency: Specification=[Cuttings]
              Operations 3wks
                1994-04-20  [Defoliate].Script.Defoliate(defoliationType: "Cut", amountDM: 35, amountType: "ResidualDM", duration: 1)
                1994-05-12  [Defoliate].Script.Defoliate(defoliationType: "Cut", amountDM: 35, amountType: "ResidualDM", duration: 1)
                1994-06-03  [Defoliate].Script.Defoliate(defoliationType: "Cut", amountDM: 35, amountType: "ResidualDM", duration: 1)
                1994-06-23  [Defoliate].Script.Defoliate(defoliationType: "Cut", amountDM: 35, amountType: "ResidualDM", duration: 1)
                1994-07-15  [Defoliate].Script.Defoliate(defoliationType: "Cut", amountDM: 35, amountType: "ResidualDM", duration: 1)
                1994-08-06  [Defoliate].Script.Defoliate(defoliationType: "Cut", amountDM: 35, amountType: "ResidualDM", duration: 1)
                1994-08-29  [Defoliate].Script.Defoliate(defoliationType: "Cut", amountDM: 35, amountType: "ResidualDM", duration: 1)
                1994-09-23  [Defoliate].Script.Defoliate(defoliationType: "Cut", amountDM: 35, amountType: "ResidualDM", duration: 1)
                1995-04-20  [Defoliate].Script.Defoliate(defoliationType: "Cut", amountDM: 35, amountType: "ResidualDM", duration: 1)
                1995-05-12  [Defoliate].Script.Defoliate(defoliationType: "Cut", amountDM: 35, amountType: "ResidualDM", duration: 1)
                1995-06-03  [Defoliate].Script.Defoliate(defoliationType: "Cut", amountDM: 35, amountType: "ResidualDM", duration: 1)
                1995-06-23  [Defoliate].Script.Defoliate(defoliationType: "Cut", amountDM: 35, amountType: "ResidualDM", duration: 1)
                1995-07-15  [Defoliate].Script.Defoliate(defoliationType: "Cut", amountDM: 35, amountType: "ResidualDM", duration: 1)
                1995-08-06  [Defoliate].Script.Defoliate(defoliationType: "Cut", amountDM: 35, amountType: "ResidualDM", duration: 1)
                1995-08-29  [Defoliate].Script.Defoliate(defoliationType: "Cut", amountDM: 35, amountType: "ResidualDM", duration: 1)
                1995-09-23  [Defoliate].Script.Defoliate(defoliationType: "Cut", amountDM: 35, amountType: "ResidualDM", duration: 1)
              Operations 6wks
                1994-06-01  [Defoliate].Script.Defoliate(defoliationType: "Cut", amountDM: 40, amountType: "ResidualDM", duration: 1)
                1994-07-06  [Defoliate].Script.Defoliate(defoliationType: "Cut", amountDM: 40, amountType: "ResidualDM", duration: 1)
                1994-08-17  [Defoliate].Script.Defoliate(defoliationType: "Cut", amountDM: 40, amountType: "ResidualDM", duration: 1)
                1994-09-27  [Defoliate].Script.Defoliate(defoliationType: "Cut", amountDM: 40, amountType: "ResidualDM", duration: 1)
                1995-06-01  [Defoliate].Script.Defoliate(defoliationType: "Cut", amountDM: 40, amountType: "ResidualDM", duration: 1)
                1995-07-06  [Defoliate].Script.Defoliate(defoliationType: "Cut", amountDM: 40, amountType: "ResidualDM", duration: 1)
                1995-08-17  [Defoliate].Script.Defoliate(defoliationType: "Cut", amountDM: 40, amountType: "ResidualDM", duration: 1)
                1995-09-27  [Defoliate].Script.Defoliate(defoliationType: "Cut", amountDM: 40, amountType: "ResidualDM", duration: 1)
          Simulation AFSRC_01
            Clock: Start=1993-05-01; End=1995-12-31
            Weather: FileName=Beckley.met
            Summary
            SoilArbitrator Soil Arbitrator
            Zone Field: Area=1; Slope=0; AspectAngle=0; Altitude=50
              Folder Management
                Manager ExtraVariables
                  script: same as in Validation.New Zealand.ScottFarm.ScottFarmC.ScottFarmC.ScottFarmC17a.Field.Management.ExtraVariables
                Operations SowAndMaintenance
                  1993-06-05  [Chicory].Sow(population: 200, cultivar: "Puna", depth: 10, rowSpacing: 150);
                  1993-07-15  [Fertiliser].Apply(Amount: 35, Type: Fertiliser.Types.NH4NO3N, Depth: 10)
                  1993-09-15  [Defoliate].Script.Defoliate(defoliationType: "Cut", amountDM: 50, amountType: "ResidualDM", duration: 1)
                  1994-04-22  [Fertiliser].Apply(Amount: 35, Type: Fertiliser.Types.NH4NO3N, Depth: 10)
                  1995-04-22  [Fertiliser].Apply(Amount: 35, Type: Fertiliser.Types.NH4NO3N, Depth: 10)
                Operations Cuttings
                Manager Defoliate: same as Validation.New Zealand.ScottFarm.ScottFarmC.ScottFarmC.ScottFarmC17a.Field.Management.Defoliate
              MicroClimate: a_interception=0; b_interception=1; c_interception=0; d_interception=0; SoilHeatFluxFraction=0.4; MinimumHeightDiffForNewLayer=0; NightInterceptionFraction=0.5; ReferenceHeight=2
              SurfaceOrganicMatter: InitialResidueName=grass; InitialResidueType=grass; InitialResidueMass=500; InitialStandingFraction=0; InitialCPR=0; InitialCNR=40
              Irrigation
              Fertiliser
              Soil Ramsey: SoilType=Typic Hapludult (US); LocalName=Ramsey fine-loam; State=West Virginia; Country=USA; NaturalVegetation=Forest; Latitude=0; Longitude=0; DataSource=National Cooperative Soil Survey, US
                Comments=Generic soil description based on data of the same sol type from different locations
                Chemical: Thickness=[130, 240, 280, 250, 600]; PH=[6, 6, 6, 6, 6]; PHUnits=Water
                Physical
                  Thickness  ParticleSizeClay  ParticleSizeSand  ParticleSizeSilt  BD    AirDry  LL15   DUL    SAT    KS
                  130        15                45                40                1.21  0.016   0.04   0.249  0.499  4800
                  240        10                60                30                1.43  0.05    0.056  0.25   0.43   2400
                  280        5                 75                20                1.33  0.04    0.04   0.248  0.469  840
                  250        5                 80                15                1.5   0.045   0.045  0.212  0.354  1200
                  600        10                80                10                1.5   0.045   0.045  0.212  0.354  2400
                  SoilCrop ChicorySoil: LL=[0.04, 0.056, 0.04, 0.045, 0.045]; KL=[0.1, 0.1, 0.08, 0.06, 0.04]; XF=[1, 1, 1, 1, 1]
                WaterBalance SoilWater: SummerDate=21-Mar; SummerU=6; SummerCona=3.5; WinterDate=23-Sep; WinterU=6; WinterCona=2.5; DiffusConst=88; DiffusSlope=35; Salb=0.13; CN2Bare=73; CNRed=20; CNCov=0.8; PSIDul=-100; Thickness=[130, 240, 280, 250, 600]; SWCON=[0.6, 0.5, 0.3, 0.5, 0.5]
                Nutrient
                Organic: FOMCNRatio=40; CarbonUnits=Total
                  Thickness  Carbon  SoilCNRatio  FBiom  FInert  FOM
                  130        3.5     11           0.03   0.4     444.21
                  240        1       11           0.02   0.6     274.87
                  280        0.5     11           0.01   0.75    157.008
                  250        0.3     11           0.01   0.9     95.2301
                  600        0.1     11           0.01   0.99    28.6828
                Water: Thickness=[130, 240, 280, 250, 600]; InitialValues=[0.23855, 0.2403, 0.2376, 0.20365, 0.20365]; InitialPAWmm=260.224; RelativeTo=LL15; FilledFromTop=false
                CERESSoilTemperature Temperature
                Solute NO3: Thickness=[130, 240, 280, 250, 600]; InitialValues=[12.7146, 4.37063, 2.68528, 0.392157, 0.392157]; InitialValuesUnits=ppm; WaterTableConcentration=0; D0=0; DepthConstant=0; MaxDepthSoluteAccessible=0; RunoffEffectivenessAtMovingSolute=0; MaxEffectiveRunoff=0
                Solute NH4: Thickness=[130, 240, 280, 250, 600]; InitialValues=[1.27146, 0.582751, 0.268528, 0.0392157, 0.0392157]; InitialValuesUnits=ppm; WaterTableConcentration=0; D0=0; DepthConstant=0; MaxDepthSoluteAccessible=0; RunoffEffectivenessAtMovingSolute=0; MaxEffectiveRunoff=0
                Solute Urea: Thickness=[130, 240, 280, 250, 600]; InitialValues=[0, 0, 0, 0, 0]; InitialValuesUnits=kg/ha; WaterTableConcentration=0; D0=0; DepthConstant=0; MaxDepthSoluteAccessible=0; RunoffEffectivenessAtMovingSolute=0; MaxEffectiveRunoff=0
              Plant Chicory
              Report: EventNames=[Clock].DoReport
      Folder AFSRC_02
        Experiment AFSRC_02
          Memo
            This simulation setup was based on a field experiment run for 3 years at the Appalachian Farming Systems Research Center in southern West Virginia, USA.  The sol at this location was a Ramsey soil (loamy, siliceous, subactive, mesic Lithic Dystrudept).  The study aimed to determine whether fertilizer N would influence forage chicory (cultivar '*Puna*') nutritive value and NO3-N concentration.  The treatments consisted of five N rates (0, 80, 160, 240, or 480 kg N/ha) replicated three times in a randomized block design. Swards were clipped at 6-wk intervals during the growing season.  Yield was reported either as annual totals or seasonal, using these the values for each harvest event were arbitrarily inferred (treat this data as rough approximation).
            Met data was based on nearby location obtained from NOAA.  The data set was largely complete except for solar radiation, which was added from an alternative interpolated set for this location, also from NOAA.
            Information to assemble the soil data was obtained from USGS.

            References:
            Belesky, D.P.; Turner, K.E.; Ruckle, J.M. 2000. Influence of nitrogen on productivity and nutritive value of forage chicory. Agronomy Journal, 92(3): 472-478.
          Factors
            Factor NRate: Specification=[FertiliserSchedule]
              Operations 0N
              Operations 80N
                1994-04-15  [Fertiliser].Apply(Amount: 80, Type: Fertiliser.Types.NH4NO3N, Depth: 10)
                1995-04-15  [Fertiliser].Apply(Amount: 80, Type: Fertiliser.Types.NH4NO3N, Depth: 10)
              Operations 160N
                1994-04-15  [Fertiliser].Apply(Amount: 160, Type: Fertiliser.Types.NH4NO3N, Depth: 10)
                1995-04-15  [Fertiliser].Apply(Amount: 160, Type: Fertiliser.Types.NH4NO3N, Depth: 10)
              Operations 240N
                1994-04-15  [Fertiliser].Apply(Amount: 240, Type: Fertiliser.Types.NH4NO3N, Depth: 10)
                1995-04-15  [Fertiliser].Apply(Amount: 240, Type: Fertiliser.Types.NH4NO3N, Depth: 10)
              Operations 480N
                1994-04-15  [Fertiliser].Apply(Amount: 480, Type: Fertiliser.Types.NH4NO3N, Depth: 10)
                1995-04-15  [Fertiliser].Apply(Amount: 480, Type: Fertiliser.Types.NH4NO3N, Depth: 10)
          Simulation AFSRC_02
            Clock: Start=1993-05-01; End=1995-12-31
            Weather: FileName=Beckley.met
            Summary
            SoilArbitrator Soil Arbitrator
            Zone Field: Area=1; Slope=0; AspectAngle=0; Altitude=50
              Folder Management
                Manager ExtraVariables
                  script: same as in Validation.New Zealand.ScottFarm.ScottFarmC.ScottFarmC.ScottFarmC17a.Field.Management.ExtraVariables
                Operations Establishment
                  1993-06-10  [Chicory].Sow(population: 200, cultivar: "Puna", depth: 10, rowSpacing: 150);
                  1993-07-20  [Fertiliser].Apply(Amount: 35, Type: Fertiliser.Types.NH4NO3N, Depth: 10)
                  1993-09-25  [Defoliate].Script.Defoliate(defoliationType: "Cut", amountDM: 50, amountType: "ResidualDM", duration: 1)
                Operations Cuttings
                  1994-05-27  [Defoliate].Script.Defoliate(defoliationType: "Cut", amountDM: 40, amountType: "ResidualDM", duration: 1)
                  1994-07-02  [Defoliate].Script.Defoliate(defoliationType: "Cut", amountDM: 40, amountType: "ResidualDM", duration: 1)
                  1994-08-08  [Defoliate].Script.Defoliate(defoliationType: "Cut", amountDM: 40, amountType: "ResidualDM", duration: 1)
                  1994-09-25  [Defoliate].Script.Defoliate(defoliationType: "Cut", amountDM: 40, amountType: "ResidualDM", duration: 1)
                  1995-05-27  [Defoliate].Script.Defoliate(defoliationType: "Cut", amountDM: 40, amountType: "ResidualDM", duration: 1)
                  1995-07-02  [Defoliate].Script.Defoliate(defoliationType: "Cut", amountDM: 40, amountType: "ResidualDM", duration: 1)
                  1995-08-08  [Defoliate].Script.Defoliate(defoliationType: "Cut", amountDM: 40, amountType: "ResidualDM", duration: 1)
                  1995-09-25  [Defoliate].Script.Defoliate(defoliationType: "Cut", amountDM: 40, amountType: "ResidualDM", duration: 1)
                Operations FertiliserSchedule
                Manager Defoliate: same as Validation.New Zealand.ScottFarm.ScottFarmC.ScottFarmC.ScottFarmC17a.Field.Management.Defoliate
              MicroClimate: a_interception=0; b_interception=1; c_interception=0; d_interception=0; SoilHeatFluxFraction=0.4; MinimumHeightDiffForNewLayer=0; NightInterceptionFraction=0.5; ReferenceHeight=2
              SurfaceOrganicMatter: InitialResidueName=grass; InitialResidueType=grass; InitialResidueMass=500; InitialStandingFraction=0; InitialCPR=0; InitialCNR=40
              Irrigation
              Fertiliser
              Soil Ramsey: same as Validation.USA.AFSRC_01.AFSRC_01.AFSRC_01.Field.Ramsey
              Plant Chicory
              Report: EventNames=[Clock].DoReport
      Folder RELARC_01
        Experiment RELARC_01
          Memo
            This simulation was adapted from a defoliation trial conducted in 1998-1999, at Russell E. Larson Agricultural Research Center, Pennsylvania, USA.  The trial consisted of small plots where two chicory cultivars ('*Puna*' and '*Feast*') were sown separately in May-1997 (at 4.5 kg seed/ha).  Plots were fertilized with 27 kgP and 72 kgK/ha in October 1997 and April 1999. Fertilizer N was applied at 56 kg/ha in June and July of 1998 and 1999.  Treatments were replicated five times and the soil at the site was a Hagerstown silt loam (fine, mixed, semiactive mesic Typic Hapludalfs).
            Each plot was divided in two, one-half was harvested every 3 wk and the other half every 5 wk. Each strip was cut to a 7-cm height with a rotary mower.  Dates for each cut were given, but only annual and treatment yields are reported;  population numbers were provided for few specific dates.  Yield for each harvest were arbitrarily inferred, therefore they should be seen as rough indication only.
            Met file was built using data obtained from NOAA website.  The data set was largely complete except for solar radiation, which was added from an alternative interpolated set for this location, also from NOAA.
            Information to assemble the soil data was obtained from USGS.

            References:
            Sanderson, M.A.; Labreveux, M.; Hall, M.H.; Elwinger, G.F. 2003. Forage yield and persistence of chicory and english plantain. Crop Science, 43: 995-1000.
          Factors
            Permutation
              Factor Cultivar: Specification=[Sowing]
                Operations Puna
                  1997-05-16  [Chicory].Sow(population: 250, cultivar: "Puna", depth: 10, rowSpacing: 150)
                Operations Feast
                  1997-05-16  [Chicory].Sow(population: 250, cultivar: "Puna", depth: 10, rowSpacing: 150)
              Factor CutFrequency: Specification=[Cuttings]
                Operations 3wks
                  1998-05-19  [Defoliate].Script.Defoliate(defoliationType: "Cut", amountDM: 40, amountType: "ResidualDM", duration: 1)
                  1998-06-10  [Defoliate].Script.Defoliate(defoliationType: "Cut", amountDM: 40, amountType: "ResidualDM", duration: 1)
                  1998-06-30  [Defoliate].Script.Defoliate(defoliationType: "Cut", amountDM: 40, amountType: "ResidualDM", duration: 1)
                  1998-07-21  [Defoliate].Script.Defoliate(defoliationType: "Cut", amountDM: 40, amountType: "ResidualDM", duration: 1)
                  1998-08-11  [Defoliate].Script.Defoliate(defoliationType: "Cut", amountDM: 40, amountType: "ResidualDM", duration: 1)
                  1998-09-02  [Defoliate].Script.Defoliate(defoliationType: "Cut", amountDM: 40, amountType: "ResidualDM", duration: 1)
                  1998-09-23  [Defoliate].Script.Defoliate(defoliationType: "Cut", amountDM: 40, amountType: "ResidualDM", duration: 1)
                  1999-05-20  [Defoliate].Script.Defoliate(defoliationType: "Cut", amountDM: 40, amountType: "ResidualDM", duration: 1)
                  1999-06-10  [Defoliate].Script.Defoliate(defoliationType: "Cut", amountDM: 40, amountType: "ResidualDM", duration: 1)
                  1999-07-01  [Defoliate].Script.Defoliate(defoliationType: "Cut", amountDM: 40, amountType: "ResidualDM", duration: 1)
                  1999-07-22  [Defoliate].Script.Defoliate(defoliationType: "Cut", amountDM: 40, amountType: "ResidualDM", duration: 1)
                  1999-08-12  [Defoliate].Script.Defoliate(defoliationType: "Cut", amountDM: 40, amountType: "ResidualDM", duration: 1)
                  1999-09-02  [Defoliate].Script.Defoliate(defoliationType: "Cut", amountDM: 40, amountType: "ResidualDM", duration: 1)
                  1999-09-23  [Defoliate].Script.Defoliate(defoliationType: "Cut", amountDM: 40, amountType: "ResidualDM", duration: 1)
                Operations 5wks
                  1998-05-19  [Defoliate].Script.Defoliate(defoliationType: "Cut", amountDM: 40, amountType: "ResidualDM", duration: 1)
                  1998-06-24  [Defoliate].Script.Defoliate(defoliationType: "Cut", amountDM: 40, amountType: "ResidualDM", duration: 1)
                  1998-07-29  [Defoliate].Script.Defoliate(defoliationType: "Cut", amountDM: 40, amountType: "ResidualDM", duration: 1)
                  1998-09-02  [Defoliate].Script.Defoliate(defoliationType: "Cut", amountDM: 40, amountType: "ResidualDM", duration: 1)
                  1998-10-07  [Defoliate].Script.Defoliate(defoliationType: "Cut", amountDM: 40, amountType: "ResidualDM", duration: 1)
                  1999-05-20  [Defoliate].Script.Defoliate(defoliationType: "Cut", amountDM: 40, amountType: "ResidualDM", duration: 1)
                  1999-06-24  [Defoliate].Script.Defoliate(defoliationType: "Cut", amountDM: 40, amountType: "ResidualDM", duration: 1)
                  1999-07-29  [Defoliate].Script.Defoliate(defoliationType: "Cut", amountDM: 40, amountType: "ResidualDM", duration: 1)
                  1999-09-02  [Defoliate].Script.Defoliate(defoliationType: "Cut", amountDM: 40, amountType: "ResidualDM", duration: 1)
                  1999-10-07  [Defoliate].Script.Defoliate(defoliationType: "Cut", amountDM: 40, amountType: "ResidualDM", duration: 1)
          Simulation TPASU_01
            Clock: Start=1997-05-01; End=1999-10-31
            Weather: FileName=StateCollege.met
            Summary
            SoilArbitrator Soil Arbitrator
            Zone Field: Area=1; Slope=0; AspectAngle=0; Altitude=50
              Folder Management
                Manager ExtraVariables
                  script: same as in Validation.New Zealand.ScottFarm.ScottFarmC.ScottFarmC.ScottFarmC17a.Field.Management.ExtraVariables
                Operations Sowing
                  1997-09-15  [Defoliate].Script.Defoliate(defoliationType: "Cut", amountDM: 50, amountType: "ResidualDM", duration: 1)
                  1998-06-11  [Fertiliser].Apply(Amount: 56, Type: Fertiliser.Types.NH4NO3N, Depth: 10)
                  1998-07-30  [Fertiliser].Apply(Amount: 56, Type: Fertiliser.Types.NH4NO3N, Depth: 10)
                  1999-06-11  [Fertiliser].Apply(Amount: 56, Type: Fertiliser.Types.NH4NO3N, Depth: 10)
                  1999-07-30  [Fertiliser].Apply(Amount: 56, Type: Fertiliser.Types.NH4NO3N, Depth: 10)
                Operations FertiliserSchedule: same as Validation.USA.RELARC_01.RELARC_01.TPASU_01.Field.Management.Sowing
                Operations Cuttings
                Manager Defoliate: same as Validation.New Zealand.ScottFarm.ScottFarmC.ScottFarmC.ScottFarmC17a.Field.Management.Defoliate
              MicroClimate: a_interception=0; b_interception=1; c_interception=0; d_interception=0; SoilHeatFluxFraction=0.4; MinimumHeightDiffForNewLayer=0; NightInterceptionFraction=0.5; ReferenceHeight=2
              SurfaceOrganicMatter: InitialResidueName=grass; InitialResidueType=grass; InitialResidueMass=500; InitialStandingFraction=0; InitialCPR=0; InitialCNR=40
              Irrigation
              Fertiliser
              Soil HagerstownSoil: SoilType=Typic Hapludult (US); LocalName=Ramsey fine-loam; State=West Virginia; Country=USA; NaturalVegetation=Forest; Latitude=0; Longitude=0; DataSource=National Cooperative Soil Survey, US
                Comments=Generic soil description based on data of the same sol type from different locations
                Chemical: Thickness=[100, 120, 130, 200, 300, 300, 350]; PH=[6, 6, 6, 6, 6, 6, 6]; PHUnits=Water
                Physical
                  Thickness  ParticleSizeClay  ParticleSizeSand  ParticleSizeSilt  BD    AirDry  LL15   DUL    SAT    KS
                  100        21.7              11.4              66.9              1.3   0.048   0.12   0.277  0.465  1200
                  120        22.4              10.9              66.7              1.38  0.085   0.094  0.264  0.421  420
                  130        23.8              11.9              64.3              1.37  0.079   0.079  0.238  0.381  275
                  200        25.5              13.7              60.8              1.41  0.01    0.094  0.222  0.381  200
                  300        43.3              11.1              45.6              1.47  0.01    0.141  0.255  0.338  80
                  300        51.4              8.7               39.9              1.48  0.155   0.155  0.28   0.359  40
                  350        48                9.3               42.7              1.52  0.166   0.166  0.296  0.409  80
                  SoilCrop ChicorySoil: LL=[0.12, 0.09, 0.08, 0.09, 0.14, 0.16, 0.17]; KL=[0.1, 0.09, 0.08, 0.05, 0.03, 0.02, 0.02]; XF=[1, 1, 1, 1, 1, 1, 1]
                WaterBalance SoilWater: SummerDate=21-Mar; SummerU=6; SummerCona=3.5; WinterDate=23-Sep; WinterU=6; WinterCona=2.5; DiffusConst=88; DiffusSlope=35; Salb=0.13; CN2Bare=73; CNRed=20; CNCov=0.8; PSIDul=-100; Thickness=[100, 120, 130, 200, 300, 300, 350]; SWCON=[0.6, 0.5, 0.3, 0.3, 0.25, 0.2, 0.3]
                Nutrient
                Organic: FOMCNRatio=40; CarbonUnits=Total
                  Thickness  Carbon  SoilCNRatio  FBiom  FInert  FOM
                  100        3.26    11           0.03   0.4     311.903
                  120        1.17    11           0.02   0.6     245.352
                  130        0.39    11           0.01   0.75    189.179
                  200        0.4     11           0.01   0.875   126.81
                  300        0.25    11           0.01   0.95    69.595
                  300        0.2     11           0.01   0.99    38.1945
                  350        0.15    11           0.01   0.99    18.9668
                Water: Thickness=[100, 120, 130, 200, 300, 300, 350]; InitialValues=[0.26915, 0.2555, 0.23005, 0.2156, 0.2493, 0.27375, 0.2895]; InitialPAWmm=189.592; RelativeTo=LL15; FilledFromTop=false
                CERESSoilTemperature Temperature
                Solute NO3: Thickness=[100, 120, 130, 200, 300, 300, 350]; InitialValuesUnits=ppm; WaterTableConcentration=0; D0=0; DepthConstant=0; MaxDepthSoluteAccessible=0; RunoffEffectivenessAtMovingSolute=0; MaxEffectiveRunoff=0
                  InitialValues=[15.3846, 9.05797, 2.17344, 2.17344, 0.352858, 0.352858, 0.352858]
                Solute NH4: Thickness=[100, 120, 130, 200, 300, 300, 350]; InitialValuesUnits=ppm; WaterTableConcentration=0; D0=0; DepthConstant=0; MaxDepthSoluteAccessible=0; RunoffEffectivenessAtMovingSolute=0; MaxEffectiveRunoff=0
                  InitialValues=[1.53846, 1.20773, 0.217344, 0.217344, 0.0352858, 0.0352858, 0.0352858]
                Solute Urea: Thickness=[100, 120, 130, 200, 300, 300, 350]; InitialValues=[0, 0, 0, 0, 0, 0, 0]; InitialValuesUnits=kg/ha; WaterTableConcentration=0; D0=0; DepthConstant=0; MaxDepthSoluteAccessible=0; RunoffEffectivenessAtMovingSolute=0; MaxEffectiveRunoff=0
              Plant Chicory
              Report: EventNames=[Clock].DoReport
      Folder RELARC_02
        Experiment RELARC_02
          Memo
            This simulation was adapted from a defoliation trial conducted in 2000-2001, at Russell E. Larson Agricultural Research Center, Pennsylvania, USA.  The trial was established in small plots, replicated five times, with chicory sown in April-1999 (Cultivars '*Puna*', '*Feast*' and '*La Certa*'.  All plots received 4.5 t/ha of limestone and were fertilized with 56 kg N/ha in April, June and July of 2000 and 2001.  The soil at the site was a Hagerstown silt loam (fine, mixed, semiactive mesic Typic Hapludalfs).
            Each plot was mechanically mowed to height of 7cm every 4 weeks.  Only annual and treatment yields are reported, however population was given for specific dates.  Dates for each harvest were reported.  From these data, yield was arbitrarily inferred for each harvest, therefore they should be seen as rough approximation only (N variation between cultivars were considered here).
            Met file was built using data obtained from NOAA website.  The data set was largely complete except for solar radiation, which was added from an alternative interpolated set for this location, also from NOAA.
            Information to assemble the soil data was obtained from USGS.

            References:
            Sanderson, M.A.; Labreveux, M.; Hall, M.H.; Elwinger, G.F. 2003. Forage yield and persistence of chicory and english plantain. Crop Science, 43: 995-1000.
          Factors
            Factor Cultivars: Specification=[Sowing]
              Operations Puna
                1999-04-28  [Chicory].Sow(population: 250, cultivar: "Puna", depth: 10, rowSpacing: 150)
              Operations Feast
                1999-04-28  [Chicory].Sow(population: 250, cultivar: "Puna", depth: 10, rowSpacing: 150)
              Operations LaCerta
                1999-04-28  [Chicory].Sow(population: 250, cultivar: "Puna", depth: 10, rowSpacing: 150)
          Simulation TPASU_02
            Clock: Start=1999-04-01; End=2001-10-31
            Weather: FileName=StateCollege.met
            Summary
            SoilArbitrator Soil Arbitrator
            Zone Field: Area=1; Slope=0; AspectAngle=0; Altitude=50
              Folder Management
                Manager ExtraVariables
                  script: same as in Validation.New Zealand.ScottFarm.ScottFarmC.ScottFarmC.ScottFarmC17a.Field.Management.ExtraVariables
                Operations Sowing
                Operations FertiliserSchedule
                  1999-09-15  [Defoliate].Script.Defoliate(defoliationType: "Cut", amountDM: 50, amountType: "ResidualDM", duration: 1)
                  2000-04-25  [Fertiliser].Apply(Amount: 56, Type: Fertiliser.Types.NH4NO3N, Depth: 10)
                  2000-06-15  [Fertiliser].Apply(Amount: 56, Type: Fertiliser.Types.NH4NO3N, Depth: 10)
                  2000-07-12  [Fertiliser].Apply(Amount: 56, Type: Fertiliser.Types.NH4NO3N, Depth: 10)
                  2001-04-25  [Fertiliser].Apply(Amount: 56, Type: Fertiliser.Types.NH4NO3N, Depth: 10)
                  2001-06-05  [Fertiliser].Apply(Amount: 56, Type: Fertiliser.Types.NH4NO3N, Depth: 10)
                  2001-07-04  [Fertiliser].Apply(Amount: 56, Type: Fertiliser.Types.NH4NO3N, Depth: 10)
                Operations Cuttings
                  2000-05-16  [Defoliate].Script.Defoliate(defoliationType: "Cut", amountDM: 40, amountType: "ResidualDM", duration: 1)
                  2000-06-14  [Defoliate].Script.Defoliate(defoliationType: "Cut", amountDM: 40, amountType: "ResidualDM", duration: 1)
                  2000-07-11  [Defoliate].Script.Defoliate(defoliationType: "Cut", amountDM: 40, amountType: "ResidualDM", duration: 1)
                  2000-08-08  [Defoliate].Script.Defoliate(defoliationType: "Cut", amountDM: 40, amountType: "ResidualDM", duration: 1)
                  2000-09-05  [Defoliate].Script.Defoliate(defoliationType: "Cut", amountDM: 40, amountType: "ResidualDM", duration: 1)
                  2001-06-04  [Defoliate].Script.Defoliate(defoliationType: "Cut", amountDM: 40, amountType: "ResidualDM", duration: 1)
                  2001-07-03  [Defoliate].Script.Defoliate(defoliationType: "Cut", amountDM: 40, amountType: "ResidualDM", duration: 1)
                  2001-07-31  [Defoliate].Script.Defoliate(defoliationType: "Cut", amountDM: 40, amountType: "ResidualDM", duration: 1)
                  2001-09-05  [Defoliate].Script.Defoliate(defoliationType: "Cut", amountDM: 40, amountType: "ResidualDM", duration: 1)
                Manager Defoliate: same as Validation.New Zealand.ScottFarm.ScottFarmC.ScottFarmC.ScottFarmC17a.Field.Management.Defoliate
              MicroClimate: a_interception=0; b_interception=1; c_interception=0; d_interception=0; SoilHeatFluxFraction=0.4; MinimumHeightDiffForNewLayer=0; NightInterceptionFraction=0.5; ReferenceHeight=2
              SurfaceOrganicMatter: InitialResidueName=grass; InitialResidueType=grass; InitialResidueMass=500; InitialStandingFraction=0; InitialCPR=0; InitialCNR=40
              Irrigation
              Fertiliser
              Soil HagerstownSoil: same as Validation.USA.RELARC_01.RELARC_01.TPASU_01.Field.HagerstownSoil
              Plant Chicory
              Report: EventNames=[Clock].DoReport
      Memo SubTitle
        <br>
        ### All data from USA
        <br>
    Memo SubTitle
      <br>
      <br>
      ## All available data

      **Notes:**
       - Plant population is inclued here as but it is not considered for validation as it is not explictly simulated by the model;
       - Data of harvested biomass from USA simulations are not included as only seasonal or annual totals were available;
       - N concentration is currently poorly described and its predicted×observed graph is not included;
       - Cumulative harvested material is typically used for evaluation of cut/grazed conditions;
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