Simulations: Version=201
  Memo Simulation Notes
    Simulations here are for 12 rates trials and 12 response trials of the EKB series of trials comparing various combinations of rates of N fertiliser applied in 2018 or 2019, and again in 2022, in states of WA, Vic and Tas. It includes calibrated soils (one per site) and genotypes (one each of nitens and globulus covering all sites).

    Reports of results are available from FWPA.

    The research was funded by FWPA (Project PNC478-1819 'Optimising Nutrition Management of Hardwood Plantations for Sustainable Productivity and Profitability' and project VNC590-2223 'Enhancing the Knowledge Base for Hardwood Plantation Management'),
    partner companies (PGO, WAPRES, ABP, Forico, Midway, RFF, and SFM), and
    CSIRO.

    Researchers were John McGrath, Barrie May, Philip Smethurst, Ian Dumbrell, Danielle Wiseman, and Tom Baker.
  Folder Replacements
    Report DailyReport: EventNames=[Clock].DoReport
      VariableNames:
        [Clock].Today
        [Eucalyptus].Age
        [Eucalyptus].Population*10000 as sph
        [Eucalyptus].Stem.DBH
        [Eucalyptus].Stem.Ht
        [Eucalyptus].Stem.MAIub
        [Eucalyptus].Stem.BA
        [Eucalyptus].Stem.Volub
        [Eucalyptus].Stem.WoodDensity
        [Eucalyptus].Leaf.Fn
        [Eucalyptus].Leaf.Fw
        [Eucalyptus].FineRoot.Depth
        [Eucalyptus].Stem.BarkThickness
        [Eucalyptus].Stem.DBHub
        [Eucalyptus].Stem.MAI
        [Eucalyptus].Stem.Volub
        [Eucalyptus].Stem.VolBark
        [Eucalyptus].Stem.Vol
        [Eucalyptus].Stem.WoodWt
        [Eucalyptus].Stem.Wt
        [Eucalyptus].Stem.BarkDensity
        [Stem].WoodWt*10/([Stem].Volub+0.0001) as CalculatedWD
        //(([Eucalyptus].Stem.DBH)+ ([Eucalyptus].Stem.Ht)*0.6)) as DGL
        //(([Eucalyptus].Stem.DBHub)+ ([Eucalyptus].Stem.Ht)*0.6)) as DGLub
        //sum of (0.65,0) as WDmaxWT
        //sum of (0.05,0) as WDminWT
        //sum of (WDmaxWT/0.888) as WDmaxBH
        //sum of (WDminWT+100) as WDminBH
        //(WDmaxBH +(WDminBH)*Exp(((0-0.65319)*[Eucalyptus].Age/4.6))^2.99))*1000 as BHglobulusWoodDensity
        //([Eucalyptus].Stem.WoodDensity-78.4/0.888) as BHglobulusWoodDensity
        //([Eucalyptus].Stem.WoodDensity-2.8/1.0575) as BHnitensWoodDensity
        ((0.65*0.888)+((0.34*1.2+0.10)-(0.65*0.888))*Exp(((0-0.65319)*[Eucalyptus].Age/4.6))^2.99))*1000 as BHglobulusWoodDensity
        ((0.58*0.888)+((0.32*1.2+0.10)-(0.58*0.888))*Exp(((0-0.65319)*[Eucalyptus].Age/4))^2.99))*1000 as BHnitensWoodDensity
        [Eucalyptus].Leaf.RadiationIntercepted
        sum of ([Eucalyptus].Leaf.Wt*[Eucalyptus].Leaf.CarbonConcentration/100) from [Clock].StartOfDay to [Clock].EndOfDay as CGainLeaf
        sum of ([Eucalyptus].Branch.Wt*[Eucalyptus].Branch.CarbonConcentration/100) from [Clock].StartOfDay to [Clock].EndOfDay as CGainBranch
        sum of ([Eucalyptus].Stem.Wt*[Eucalyptus].Stem.CarbonConcentration/100) from [Clock].StartOfDay to [Clock].EndOfDay as CGainStem
        sum of ([Eucalyptus].CoarseRoot.Wt*[Eucalyptus].CoarseRoot.CarbonConcentration/100) from [Clock].StartOfDay to [Clock].EndOfDay as CGainCoarseRoot
        sum of ([Eucalyptus].FineRoot.Wt*[Eucalyptus].FineRoot.CarbonConcentration/100) from [Clock].StartOfDay to [Clock].EndOfDay as CGainFineRoot
        (CGainLeaf+CGainBranch+CGainStem+CGainCoarseRoot+CGainFineRoot) as CGainTotal
    Report AnnualReport: EventNames=[Clock].EndOfYear
      VariableNames:
        [Clock].Today
        [Eucalyptus].Age
        [Eucalyptus].Population*10000 as sph
        [Eucalyptus].Stem.DBH
        [Eucalyptus].Stem.Ht
        [Eucalyptus].Stem.MAIub
        [Eucalyptus].Stem.BA
        [Eucalyptus].Stem.Volub
        [Eucalyptus].Stem.WoodDensity
        [Eucalyptus].Leaf.Live.NConc as FoliarN
        [Eucalyptus].LAI
        [Eucalyptus].AboveGround.Wt
        [Eucalyptus].Stem.Wt
    Report HarvestReport: EventNames=[Eucalyptus].Harvesting
      VariableNames:
        [Clock].Today
        [Eucalyptus].Age
        [Eucalyptus].Population*10000 as sph
        [Eucalyptus].Stem.Ht
        [Eucalyptus].Stem.DBH
        [Eucalyptus].Stem.Volub
        [Eucalyptus].Stem.MAIub
        [Eucalyptus].Stem.WoodDensity
        sum of [Weather].Rain from [Clock].Start to [Clock].EndOfSimulation as SimTotRain
        mean of [Weather].MaxT from [Clock].Start to [Clock].EndOfSimulation as SimAvMaxTemp
        mean of [Weather].Radn from [Clock].Start to [Clock].EndOfSimulation as SimAvRadn
        Sum of [Weather].Rain from [Clock].StartOfSimulation to [Clock].EndOfSimulation as SimRain
        Sum of [Weather].PanEvap from [Clock].StartOfSimulation to [Clock].EndOfSimulation as SimEvap
        Divide (SimRain,SimEvap) as SimCWI
        Min of [Eucalyptus].Leaf.Fn from [Eucalyptus].Sowing to [Eucalyptus].Harvesting as FnMin
        Mean of [Eucalyptus].Leaf.Fn from [Eucalyptus].Sowing to [Eucalyptus].Harvesting as FnAv
        Min of [Eucalyptus].Leaf.Fw from [Eucalyptus].Sowing to [Eucalyptus].Harvesting as FwMin
        Mean of [Eucalyptus].Leaf.Fw from [Eucalyptus].Sowing to [Eucalyptus].Harvesting as FwAv
        [Soil].Organic.Carbon[1] as C1
        [Soil].Organic.Nitrogen[1] as N1
        [Soil].Organic.CNR[1] as CNR1
        [Soil].Chemical.PH[1] as pH1
        ([Soil].Physical.EucalyptusSoil.PAWCmm[1]+[Soil].Physical.EucalyptusSoil.PAWCmm[2]+[Soil].Physical.EucalyptusSoil.PAWCmm[3]+[Soil].Physical.EucalyptusSoil.PAWCmm[4]+[Soil].Physical.EucalyptusSoil.PAWCmm[5]+[Soil].Physical.EucalyptusSoil.PAWCmm[6]) as PAWC16mm
        sum of ([Soil].Nutrient.MineralisedN[1]/10) from [Eucalyptus].Sowing to [Eucalyptus].Harvesting as NNM1AnnAv
  DataStore
    ExcelInput: FileNames=[EKBObsCov241009a.xlsx]; SheetNames=[ObsPFOMAI, ObsGrowthRate]
    PredictedObserved OvP: PredictedTableName=DailyReport; ObservedTableName=ObsGrowthRate; FieldNameUsedForMatch=SimulationID; FieldName2UsedForMatch=Clock.Today; AllColumns=false
  Experiment T
    Factors _
      Factor t1
        CompositeFactor HaysRates
          Specifications:
            [Clock]
            [Weather]
            [Soil]
            [TreeManagement]
            [Operations]
          Clock: Start=2017-02-15; End=2029-08-31
          Weather Met: FileName=Hayes.met
          Soil SLGAmodHays: ASCOrder=NA; ASCSubOrder=NA; SoilType=Silty Clay; Site=37694_39775; NearestTown=SHEFFIELD; Region=Tasmanian Northern Slopes; State=Tasmania; ApsoilNumber=9999; Latitude=-41.41219; Longitude=146.145922; LocationAccuracy=+- 90m; YearOfSampling=2023; Comments=Landuse is Plantation forestry
            NaturalVegetation=Eucalyptus tall open forests and open forests with ferns, herbs, sedges, rushes or wet tu
            DataSource=Soil and Landscape Grid of Australia. This soil parameter file was automatically generated from the GSM National Surfaces using pedotransfer functions.
            Water: Thickness=[150, 150, 150, 150, 200, 200]; InitialValues=[0.48, 0.378, 0.344, 0.319, 0.312, 0.312]; FilledFromTop=true
            Physical
              Thickness  ParticleSizeSand  ParticleSizeSilt  ParticleSizeClay  Rocks  BD     AirDry  LL15   DUL    SAT    KS
              150        5                 65                30                0      1.035  0.142   0.426  0.55   0.609  2.133
              150        5                 65                30                0      1.138  0.126   0.378  0.52   0.571  1.278
              150        5                 65                30                0      1.192  0.115   0.344  0.542  0.55   0.962
              150        5                 65                30                0      1.219  0.106   0.319  0.492  0.516  0.89
              200        5                 65                30                0      1.24   0.104   0.312  0.476  0.51   0.815
              200        5                 65                30                0      1.258  0.104   0.312  0.473  0.504  0.765
              Rocks, ParticleSizeSand, ParticleSizeSilt, ParticleSizeClay source: Calculated
              SoilCrop EucalyptusSoil: LL=[0.5, 0.5, 0.51, 0.41, 0.31, 0.31]; KL=[0.02, 0.02, 0.01, 0.01, 0.01, 0.005]; XF=[0.1, 0.1, 0.1, 0.1, 0.1, 0.05]
            WaterBalance SoilWater: SummerDate=1-nov; SummerU=6; SummerCona=6; WinterDate=1-apr; WinterU=2; WinterCona=2; DiffusConst=32.416; DiffusSlope=22.3923; Salb=0.12; CN2Bare=78; CNRed=20; CNCov=0; DischargeWidth=10; CatchmentArea=5196.32; PSIDul=-100; Thickness=[150, 150, 150, 150, 200, 200]; SWCON=[0.55, 0.455, 0.398, 0.198, 0.107, 0.111]
            Organic: FOMCNRatio=40; CarbonUnits=Total
              Thickness  Carbon  SoilCNRatio  FBiom  FInert  FOM
              150        5       8            0.04   0.1     475.475
              150        3       8            0.03   0.2     303.176
              150        2       8            0.014  0.3     193.314
              150        1.5     8            0.01   0.4     123.262
              200        1       8            0.01   0.5     67.648
              200        0.73    8            0.01   1       37.126
            Chemical: Thickness=[150, 150, 150, 150, 200, 200]; PH=[5.75, 5.73, 5.72, 5.74, 5.76, 5.77]; PHUnits=Water
            Solute NO3: Thickness=[1000]; InitialValues=[3]; InitialValuesUnits=ppm; WaterTableConcentration=0; D0=0; DepthConstant=0; MaxDepthSoluteAccessible=0; RunoffEffectivenessAtMovingSolute=0; MaxEffectiveRunoff=0
            Solute NH4: Thickness=[1000]; InitialValues=[1]; InitialValuesUnits=ppm; WaterTableConcentration=0; D0=0; DepthConstant=0; MaxDepthSoluteAccessible=0; RunoffEffectivenessAtMovingSolute=0; MaxEffectiveRunoff=0
            Solute Urea: Thickness=[1000]; InitialValues=[0]; InitialValuesUnits=ppm; WaterTableConcentration=0; D0=0; DepthConstant=0; MaxDepthSoluteAccessible=0; RunoffEffectivenessAtMovingSolute=0; MaxEffectiveRunoff=0
            Nutrient
            SoilTemperature CERESSoilTemperature
          Manager TreeManagement
            RowSpace = 2.083333
            RowWidth = 4
            CultivarName = nitensEKB7
            PlantingDate = 15-Sep
            HarvestAge = 10
            FertAmount = 15
```csharp
using Models.Soils;
using System.Linq;
using System;
using Models.Core;
using Models.PMF;
using APSIM.Shared.Utilities;

namespace Models
{
    [Serializable] 
    [System.Xml.Serialization.XmlInclude(typeof(Model))]
    public class Script : Model
    {
        [Link] Plant Eucalyptus;
        [Link] Clock Clock;
        [Link] Fertiliser Fertiliser;

        public double TimeSincePlanting {get; set;}

        [Description("Spacing (m) between plants within rows")]
        public double RowSpace { get; set; }

        [Description("Spacing (m) between rows")]
        public double RowWidth { get; set; }

        [Description("Cultivar")]
        [Display(Type=DisplayType.CultivarName, PlantName = "Eucalyptus")]
        public string CultivarName { get; set; }

        [Description("Planting Date (dd-mmm)")]
        public String PlantingDate { get; set; }

        [Description("Harvest Age (years)")]
        public double HarvestAge { get; set; }

        [Description("Amount of fertiliser N to be applied at planting (kg N/ha)")]
        public double FertAmount { get; set; }

        [EventSubscribe("DoManagement")]
        private void OnDoManagement(object sender, EventArgs e)
        {
            double PlantPopulation = 1 / (RowWidth * RowSpace);
            double RowWidthmm = RowWidth * 1000;

            if (DateUtilities.WithinDates(PlantingDate, Clock.Today, PlantingDate) && !Eucalyptus.IsAlive)
            {
                Eucalyptus.Sow(population: PlantPopulation, 
                    cultivar: CultivarName, 
                    depth: 100, 
                    rowSpacing: RowWidthmm);
                TimeSincePlanting = 0;
                Fertiliser.Apply(amount: FertAmount, type: "NO3N");
            }

            if (TimeSincePlanting > HarvestAge && Eucalyptus.IsAlive)
            {
               Eucalyptus.Harvest();
               Eucalyptus.EndCrop();         
               TimeSincePlanting = 0;  
            }

            TimeSincePlanting += 1.0/365.0;
        }
    }
}
```
          Operations
            2018-02-12  [TreeThinning].Script.DoThin(0.1389);
            2019-02-12  [TreeThinning].Script.DoThin(0.06419);
            2020-02-12  [TreeThinning].Script.DoThin(0.0);
            2021-02-12  [TreeThinning].Script.DoThin(0.05747);
            2022-02-12  [TreeThinning].Script.DoThin(0.0);
            2023-02-12  [TreeThinning].Script.DoThin(0.0);
            2024-02-12  [TreeThinning].Script.DoThin(0.02439);
        CompositeFactor MyrtleBankRates
          Specifications:
            [Clock]
            [Weather]
            [Soil]
            [TreeManagement]
            [Operations]
          Clock: Start=2016-10-15; End=2029-08-31
          Weather Met: FileName=MyrtleBank.met
          Soil SLGAmodMyrtleBank: ASCOrder=NA; ASCSubOrder=NA; SoilType=Clay Loam over Silty Clay; Site=37549_41222; NearestTown=LILYDALE; Region=Ben Lomond; State=Tasmania; NaturalVegetation=Unknown; ApsoilNumber=9999; Latitude=-41.291486; Longitude=147.351528; LocationAccuracy=+- 90m; YearOfSampling=2023; Comments=Landuse is Plantation forestry
            DataSource=Soil and Landscape Grid of Australia. This soil parameter file was automatically generated from the GSM National Surfaces using pedotransfer functions.
            Water: Thickness=[150, 150, 150, 150, 200, 200]; InitialValues=[0.376, 0.323, 0.291, 0.268, 0.264, 0.268]; FilledFromTop=false
            Physical
              Thickness  ParticleSizeSand  ParticleSizeSilt  ParticleSizeClay  Rocks  BD     AirDry  LL15   DUL    SAT    KS
              150        5                 65                30                0      0.974  0.122   0.367  0.55   0.632  6.603
              150        5                 65                30                0      1.073  0.104   0.312  0.526  0.548  4.351
              150        5                 65                30                0      1.13   0.094   0.282  0.465  0.531  3.624
              150        5                 65                30                0      1.164  0.087   0.26   0.423  0.519  3.477
              200        5                 65                30                0      1.188  0.085   0.256  0.411  0.513  3.037
              200        5                 65                30                0      1.208  0.087   0.26   0.412  0.507  2.636
              Rocks, ParticleSizeSand, ParticleSizeSilt, ParticleSizeClay source: Calculated
              SoilCrop EucalyptusSoil: LL=[0.41, 0.41, 0.41, 0.41, 0.26, 0.25]; KL=[0.03, 0.02, 0.01, 0.01, 0.004, 0.004]; XF=[0.6, 0.4, 0.2, 0.05, 0.05, 0.05]
            WaterBalance SoilWater: SummerDate=1-nov; SummerU=6; SummerCona=6; WinterDate=1-apr; WinterU=2; WinterCona=2; DiffusConst=48.0424; DiffusSlope=23.3901; Salb=0.13; CN2Bare=90; CNRed=20; CNCov=0; DischargeWidth=10; CatchmentArea=18270.375; PSIDul=-100; Thickness=[150, 150, 150, 150, 200, 200]; SWCON=[0.712, 0.48, 0.239, 0.178, 0.123, 0]
            Organic: FOMCNRatio=40; CarbonUnits=Total
              Thickness  Carbon  SoilCNRatio  FBiom  FInert  FOM
              150        4.9     9            0.04   0.05    475.475
              150        2.8     9            0.031  0.1     303.176
              150        1.7     9            0.014  0.3     193.314
              150        1.1     9            0.01   0.4     123.262
              200        0.8     9            0.01   0.5     67.648
              200        0.64    9            0.01   1       37.126
            Chemical: Thickness=[150, 150, 150, 150, 200, 200]; PH=[4.911, 4.87, 4.85, 4.84, 4.89, 4.94]; PHUnits=Water
            Solute NO3: Thickness=[1000]; InitialValues=[3]; InitialValuesUnits=ppm; WaterTableConcentration=0; D0=0; DepthConstant=0; MaxDepthSoluteAccessible=0; RunoffEffectivenessAtMovingSolute=0; MaxEffectiveRunoff=0
            Solute NH4: Thickness=[1000]; InitialValues=[1]; InitialValuesUnits=ppm; WaterTableConcentration=0; D0=0; DepthConstant=0; MaxDepthSoluteAccessible=0; RunoffEffectivenessAtMovingSolute=0; MaxEffectiveRunoff=0
            Solute Urea: Thickness=[1000]; InitialValues=[0]; InitialValuesUnits=ppm; WaterTableConcentration=0; D0=0; DepthConstant=0; MaxDepthSoluteAccessible=0; RunoffEffectivenessAtMovingSolute=0; MaxEffectiveRunoff=0
            Nutrient
            SoilTemperature CERESSoilTemperature
          Manager TreeManagement
            RowSpace = 2.083333
            RowWidth = 4
            CultivarName = nitensEKB7
            PlantingDate = 9-jul
            HarvestAge = 10
            FertAmount = 15
            script: same as in T._.t1.HaysRates.TreeManagement
          Operations
            2017-12-12  [TreeThinning].Script.DoThin(0.0545);
            2018-12-12  [TreeThinning].Script.DoThin(0.0385);
            2019-12-12  [TreeThinning].Script.DoThin(0.0);
            2020-12-11  [TreeThinning].Script.DoThin(0.0);
            2021-12-11  [TreeThinning].Script.DoThin(0.0);
            2022-02-12  [TreeThinning].Script.DoThin(0.0);
            2023-02-12  [TreeThinning].Script.DoThin(0.02778);
            2024-02-12  [TreeThinning].Script.DoThin(0.04286);
        CompositeFactor ErribaResp
          Specifications:
            [Clock]
            [Weather]
            [Soil]
            [TreeManagement]
            [Operations]
          Clock: Start=2017-01-15; End=2029-08-31
          Weather Met: FileName=Erriba.met
          Manager TreeManagement: same as T._.t1.HaysRates.TreeManagement
          Operations
            2018-02-12  [TreeThinning].Script.DoThin(0.1792);
            2019-02-12  [TreeThinning].Script.DoThin(0.18778);
            2021-02-12  [TreeThinning].Script.DoThin(0.0);
            2022-02-11  [TreeThinning].Script.DoThin(0.05556);
            2023-02-11  [TreeThinning].Script.DoThin(0.00);
            2024-02-11  [TreeThinning].Script.DoThin(0.01471);
          Soil SLGAModForSWRules: ASCOrder=NA; ASCSubOrder=NA; SoilType=Silty Clay; Site=37738_39740; NearestTown=SHEFFIELD; Region=Tasmanian Northern Slopes; State=Tasmania; NaturalVegetation=Eucalyptus open forests with a shrubby understorey; ApsoilNumber=9999; Latitude=-41.4495; Longitude=146.1164; LocationAccuracy=+- 90m; YearOfSampling=2023; Comments=Landuse is Plantation forestry
            DataSource=Soil and Landscape Grid of Australia. This soil parameter file was automatically generated from the GSM National Surfaces using pedotransfer functions.
            Water: Thickness=[150, 150, 150, 150, 200, 200]; InitialValues=[0.485, 0.373, 0.329, 0.3, 0.294, 0.298]; FilledFromTop=true
            Physical
              Thickness  ParticleSizeSand  ParticleSizeSilt  ParticleSizeClay  Rocks  BD     AirDry  LL15   DUL    SAT
              150        5                 65                30                0      1.039  0.144   0.431  0.52   0.608
              150        5                 65                30                0      1.117  0.124   0.373  0.52   0.578
              150        5                 65                30                0      1.164  0.11    0.329  0.535  0.545
              150        5                 65                30                0      1.194  0.1     0.3    0.48   0.519
              200        5                 65                30                0      1.215  0.098   0.294  0.465  0.513
              200        5                 65                30                0      1.232  0.099   0.298  0.467  0.508
              Rocks, ParticleSizeSand, ParticleSizeSilt, ParticleSizeClay source: Calculated
              SoilCrop EucalyptusSoil: LL=[0.425, 0.386, 0.31, 0.29, 0.28, 0.28]; KL=[0.02, 0.005, 0.005, 0.01, 0.01, 0.01]; XF=[1, 1, 0, 0, 0, 0]
            WaterBalance SoilWater: SummerDate=1-nov; SummerU=6; SummerCona=6; WinterDate=1-apr; WinterU=2; WinterCona=2; DiffusConst=29.4698; DiffusSlope=21.5997; Salb=0.12; CN2Bare=78; CNRed=20; CNCov=0; DischargeWidth=10; CatchmentArea=17322.1; PSIDul=-100; Thickness=[150, 150, 150, 150, 200, 200]; SWCON=[0.6, 0.6, 0.5, 0.3, 0.3, 0.2]
            Organic: FOMCNRatio=40; CarbonUnits=Total
              Thickness  Carbon  SoilCNRatio  FBiom  FInert  FOM
              150        6       10           0.04   0.05    475.475
              150        4       10           0.03   0.1     303.176
              150        2       10           0.02   0.2     193.314
              150        1       10           0.01   0.3     123.262
              200        0.6     10           0.01   0.4     67.648
              200        0.4     10           0.01   0.5     37.126
            Chemical: Thickness=[150, 150, 150, 150, 200, 200]; PH=[6, 6, 6, 6, 6, 6]; PHUnits=Water
            Solute NO3: Thickness=[1000]; InitialValues=[3]; InitialValuesUnits=ppm; WaterTableConcentration=0; D0=0; DepthConstant=0; MaxDepthSoluteAccessible=0; RunoffEffectivenessAtMovingSolute=0; MaxEffectiveRunoff=0
            Solute NH4: Thickness=[1000]; InitialValues=[1]; InitialValuesUnits=ppm; WaterTableConcentration=0; D0=0; DepthConstant=0; MaxDepthSoluteAccessible=0; RunoffEffectivenessAtMovingSolute=0; MaxEffectiveRunoff=0
            Solute Urea: Thickness=[1000]; InitialValues=[0]; InitialValuesUnits=ppm; WaterTableConcentration=0; D0=0; DepthConstant=0; MaxDepthSoluteAccessible=0; RunoffEffectivenessAtMovingSolute=0; MaxEffectiveRunoff=0
            Nutrient
            SoilTemperature CERESSoilTemperature
      Factor t2
        CompositeFactor HaysRates
          Specifications:
            [Clock]
            [Weather]
            [Soil]
            [TreeManagement]
            [Operations]
          Clock: Start=2017-02-15; End=2029-08-31
          Weather Met: FileName=Hayes.met
          Manager TreeManagement: same as T._.t1.HaysRates.TreeManagement
          Operations
            2018-02-12  [TreeThinning].Script.DoThin(0.1389);
            2019-02-12  [TreeThinning].Script.DoThin(0.16128);
            2020-02-12  [TreeThinning].Script.DoThin(0.03846);
            2021-02-12  [TreeThinning].Script.DoThin(0.02667);
            2022-02-12  [TreeThinning].Script.DoThin(0.0274);
            2023-02-12  [TreeThinning].Script.DoThin(0.0);
            2024-02-12  [TreeThinning].Script.DoThin(0.01409);
          Soil SLGAmodHays: same as T._.t1.HaysRates.SLGAmodHays
        CompositeFactor MyrtleBankRates
          Specifications:
            [Clock]
            [Weather]
            [Soil]
            [TreeManagement]
            [Operations]
          Clock: Start=2016-10-15; End=2029-08-31
          Weather Met: FileName=MyrtleBank.met
          Manager TreeManagement: same as T._.t1.MyrtleBankRates.TreeManagement
          Operations
            2017-12-12  [TreeThinning].Script.DoThin(0.0545);
            2018-12-12  [TreeThinning].Script.DoThin(0.065225);
            2019-12-12  [TreeThinning].Script.DoThin(0.0);
            2020-12-11  [TreeThinning].Script.DoThin(0.0);
            2021-12-11  [TreeThinning].Script.DoThin(0.0);
            2022-02-12  [TreeThinning].Script.DoThin(0.0);
            2023-02-12  [TreeThinning].Script.DoThin(0.01429);
            2024-02-12  [TreeThinning].Script.DoThin(0.01449);
          Soil SLGAmodMyrtleBank: same as T._.t1.MyrtleBankRates.SLGAmodMyrtleBank
      Factor t3
        CompositeFactor HaysRates
          Specifications:
            [Clock]
            [Weather]
            [Soil]
            [TreeManagement]
            [Operations]
          Clock: Start=2017-02-15; End=2029-08-31
          Weather Met: FileName=Hayes.met
          Manager TreeManagement: same as T._.t1.HaysRates.TreeManagement
          Operations
            2018-02-12  [TreeThinning].Script.DoThin(0.1389);
            2019-02-12  [TreeThinning].Script.DoThin(0.10752);
            2020-02-12  [TreeThinning].Script.DoThin(0.0);
            2021-02-12  [TreeThinning].Script.DoThin(0.02410);
            2022-02-12  [TreeThinning].Script.DoThin(0.02469);
            2023-02-12  [TreeThinning].Script.DoThin(0.03797);
            2024-02-12  [TreeThinning].Script.DoThin(0.01316);
          Soil SLGAmodHays: same as T._.t1.HaysRates.SLGAmodHays
        CompositeFactor MyrtleBankRates
          Specifications:
            [Clock]
            [Weather]
            [Soil]
            [TreeManagement]
            [Operations]
          Clock: Start=2016-10-15; End=2029-08-31
          Weather Met: FileName=MyrtleBank.met
          Manager TreeManagement: same as T._.t1.MyrtleBankRates.TreeManagement
          Operations
            2017-12-12  [TreeThinning].Script.DoThin(0.0545);
            2018-12-12  [TreeThinning].Script.DoThin(0.03851);
            2019-12-12  [TreeThinning].Script.DoThin(0.0);
            2020-12-11  [TreeThinning].Script.DoThin(0.0);
            2021-12-11  [TreeThinning].Script.DoThin(0.0);
            2022-02-12  [TreeThinning].Script.DoThin(0.01389);
            2023-02-12  [TreeThinning].Script.DoThin(0.0);
            2024-02-12  [TreeThinning].Script.DoThin(0.02817);
          Soil SLGAmodMyrtleBank: same as T._.t1.MyrtleBankRates.SLGAmodMyrtleBank
      Factor t6
        CompositeFactor HaysRates
          Specifications:
            [Clock]
            [Weather]
            [Soil]
            [TreeManagement]
            [Operations]
            [ExptFert]
          Clock: Start=2017-02-15; End=2029-08-31
          Weather Met: FileName=Hayes.met
          Manager TreeManagement: same as T._.t1.HaysRates.TreeManagement
          Operations
            2018-02-12  [TreeThinning].Script.DoThin(0.1333);
            2019-02-12  [TreeThinning].Script.DoThin(0.12397);
            2020-02-12  [TreeThinning].Script.DoThin(0.0);
            2021-02-11  [TreeThinning].Script.DoThin(0.0);
            2021-02-11  [TreeThinning].Script.DoThin(0.02439);
            2022-02-11  [TreeThinning].Script.DoThin(0.03750);
            2023-02-11  [TreeThinning].Script.DoThin(0.02597);
            2024-02-11  [TreeThinning].Script.DoThin(0.0);
          Operations ExptFert
            2019-10-31  [Fertiliser].Apply(amount: 200, type: "UreaN", depth: 100)
            2022-09-28  [Fertiliser].Apply(amount: 200, type: "UreaN", depth: 100)
          Soil SLGAmodHays: same as T._.t1.HaysRates.SLGAmodHays
        CompositeFactor MyrtleBankRates
          Specifications:
            [Clock]
            [Weather]
            [Soil]
            [TreeManagement]
            [Operations]
            [ExptFert]
          Clock: Start=2016-10-15; End=2029-08-31
          Weather Met: FileName=MyrtleBank.met
          Manager TreeManagement: same as T._.t1.MyrtleBankRates.TreeManagement
          Operations
            2017-12-12  [TreeThinning].Script.DoThin(0.0318);
            2018-12-12  [TreeThinning].Script.DoThin(0.0219);
            2019-12-12  [TreeThinning].Script.DoThin(0.01333);
            2020-12-11  [TreeThinning].Script.DoThin(0.0);
            2021-12-11  [TreeThinning].Script.DoThin(0.0);
            2022-12-11  [TreeThinning].Script.DoThin(0.01351);
            2023-12-11  [TreeThinning].Script.DoThin(0.01370);
          Operations ExptFert
            2019-12-12  [Fertiliser].Apply(amount: 200, type: "UreaN", depth: 100)
            2022-12-12  [Fertiliser].Apply(amount: 200, type: "UreaN", depth: 100)
          Soil SLGAmodMyrtleBank: same as T._.t1.MyrtleBankRates.SLGAmodMyrtleBank
      Factor t7
        CompositeFactor HaysRates
          Specifications:
            [Clock]
            [Weather]
            [Soil]
            [TreeManagement]
            [Operations]
            [ExptFert]
          Clock: Start=2017-02-15; End=2029-08-31
          Weather Met: FileName=Hayes.met
          Manager TreeManagement: same as T._.t1.HaysRates.TreeManagement
          Operations
            2018-02-12  [TreeThinning].Script.DoThin(0.1333);
            2019-02-12  [TreeThinning].Script.DoThin(0.19875);
            2020-02-12  [TreeThinning].Script.DoThin(0.0);
            2021-02-11  [TreeThinning].Script.DoThin(0.0);
            2021-02-11  [TreeThinning].Script.DoThin(0.02667);
            2022-02-11  [TreeThinning].Script.DoThin(0.02740);
            2023-02-11  [TreeThinning].Script.DoThin(0.01408);
            2024-02-11  [TreeThinning].Script.DoThin(0.0);
          Operations ExptFert
            2019-10-31  [Fertiliser].Apply(amount: 200, type: "UreaN", depth: 100)
          Soil SLGAmodHays: same as T._.t1.HaysRates.SLGAmodHays
        CompositeFactor MyrtleBankRates
          Specifications:
            [Clock]
            [Weather]
            [Soil]
            [TreeManagement]
            [Operations]
            [ExptFert]
          Clock: Start=2016-10-15; End=2029-08-31
          Weather Met: FileName=MyrtleBank.met
          Manager TreeManagement: same as T._.t1.MyrtleBankRates.TreeManagement
          Operations
            2017-12-12  [TreeThinning].Script.DoThin(0.0318);
            2018-12-12  [TreeThinning].Script.DoThin(0.04801);
            2019-12-12  [TreeThinning].Script.DoThin(0.0);
            2020-12-11  [TreeThinning].Script.DoThin(0.0);
            2021-12-11  [TreeThinning].Script.DoThin(0.0274);
            2022-12-11  [TreeThinning].Script.DoThin(0.0);
            2023-12-11  [TreeThinning].Script.DoThin(0.01408);
          Operations ExptFert: same as T._.t6.MyrtleBankRates.ExptFert
          Soil SLGAmodMyrtleBank: same as T._.t1.MyrtleBankRates.SLGAmodMyrtleBank
      Factor t8
        CompositeFactor HaysRates
          Specifications:
            [Clock]
            [Weather]
            [Soil]
            [TreeManagement]
            [Operations]
            [ExptFert]
          Clock: Start=2017-02-15; End=2029-08-31
          Weather Met: FileName=Hayes.met
          Manager TreeManagement: same as T._.t1.HaysRates.TreeManagement
          Operations
            2018-02-12  [TreeThinning].Script.DoThin(0.12963);
            2019-02-12  [TreeThinning].Script.DoThin(0.0000);
            2020-02-12  [TreeThinning].Script.DoThin(0.01064);
            2021-02-11  [TreeThinning].Script.DoThin(0.04301);
            2022-02-11  [TreeThinning].Script.DoThin(0.01124);
            2023-02-11  [TreeThinning].Script.DoThin(0.0);
            2024-02-11  [TreeThinning].Script.DoThin(0.01136);
          Operations ExptFert
            2019-10-31  [Fertiliser].Apply(amount: 400, type: "UreaN", depth: 100)
          Soil SLGAmodHays: same as T._.t1.HaysRates.SLGAmodHays
        CompositeFactor MyrtleBankRates
          Specifications:
            [Clock]
            [Weather]
            [Soil]
            [TreeManagement]
            [Operations]
            [ExptFert]
          Clock: Start=2016-10-15; End=2029-08-31
          Weather Met: FileName=MyrtleBank.met
          Manager TreeManagement: same as T._.t1.MyrtleBankRates.TreeManagement
          Operations
            2017-12-12  [TreeThinning].Script.DoThin(0.0318);
            2018-12-12  [TreeThinning].Script.DoThin(0.02193);
            2019-12-12  [TreeThinning].Script.DoThin(0.0);
            2020-12-11  [TreeThinning].Script.DoThin(0.0);
            2021-12-11  [TreeThinning].Script.DoThin(0.02667);
            2022-12-11  [TreeThinning].Script.DoThin(0.01370);
            2023-12-11  [TreeThinning].Script.DoThin(0.08333);
          Operations ExptFert
            2019-12-12  [Fertiliser].Apply(amount: 400, type: "UreaN", depth: 100)
          Soil SLGAmodMyrtleBank: same as T._.t1.MyrtleBankRates.SLGAmodMyrtleBank
      Factor t9
        CompositeFactor HaysRates
          Specifications:
            [Clock]
            [Weather]
            [Soil]
            [TreeManagement]
            [Operations]
            [ExptFert]
          Clock: Start=2017-02-15; End=2029-08-31
          Weather Met: FileName=Hayes.met
          Manager TreeManagement: same as T._.t1.HaysRates.TreeManagement
          Operations
            2018-02-12  [TreeThinning].Script.DoThin(0.1333);
            2019-02-12  [TreeThinning].Script.DoThin(0.1026);
            2020-02-12  [TreeThinning].Script.DoThin(0.0);
            2021-02-11  [TreeThinning].Script.DoThin(0.0);
            2021-02-11  [TreeThinning].Script.DoThin(0.0119);
            2022-02-11  [TreeThinning].Script.DoThin(0.01205);
            2023-02-11  [TreeThinning].Script.DoThin(0.0122);
            2024-02-11  [TreeThinning].Script.DoThin(0.02469);
          Operations ExptFert
            2019-10-31  [Fertiliser].Apply(amount: 400, type: "UreaN", depth: 100)
            2022-09-28  [Fertiliser].Apply(amount: 400, type: "UreaN", depth: 100)
          Soil SLGAmodHays: same as T._.t1.HaysRates.SLGAmodHays
        CompositeFactor MyrtleBankRates
          Specifications:
            [Clock]
            [Weather]
            [Soil]
            [TreeManagement]
            [Operations]
            [ExptFert]
          Clock: Start=2016-10-15; End=2029-08-31
          Weather Met: FileName=MyrtleBank.met
          Manager TreeManagement: same as T._.t1.MyrtleBankRates.TreeManagement
          Operations
            2017-12-12  [TreeThinning].Script.DoThin(0.0318);
            2018-12-12  [TreeThinning].Script.DoThin(0.0219);
            2019-12-12  [TreeThinning].Script.DoThin(0.0);
            2020-12-11  [TreeThinning].Script.DoThin(0.0);
            2021-12-11  [TreeThinning].Script.DoThin(0.0);
            2022-12-11  [TreeThinning].Script.DoThin(0.01333);
            2023-12-11  [TreeThinning].Script.DoThin(0.02703);
          Operations ExptFert
            2019-12-12  [Fertiliser].Apply(amount: 400, type: "UreaN", depth: 100)
            2022-12-12  [Fertiliser].Apply(amount: 400, type: "UreaN", depth: 100)
          Soil SLGAmodMyrtleBank: same as T._.t1.MyrtleBankRates.SLGAmodMyrtleBank
        CompositeFactor ErribaResp
          Specifications:
            [Clock]
            [Weather]
            [Soil]
            [TreeManagement]
            [Operations]
            [ExptFert]
          Clock: Start=2017-01-15; End=2029-08-31
          Weather Met: FileName=Erriba.met
          Manager TreeManagement: same as T._.t1.HaysRates.TreeManagement
          Operations
            2018-02-12  [TreeThinning].Script.DoThin(0.2333);
            2019-02-12  [TreeThinning].Script.DoThin(0.25124);
            2021-02-11  [TreeThinning].Script.DoThin(0.03226);
            2022-02-11  [TreeThinning].Script.DoThin(0.03333);
            2023-02-11  [TreeThinning].Script.DoThin(0.0);
            2024-02-11  [TreeThinning].Script.DoThin(0.03448);
          Operations ExptFert
            2019-09-05  [Fertiliser].Apply(amount: 400, type: "UreaN", depth: 100)
            2022-09-28  [Fertiliser].Apply(amount: 400, type: "UreaN", depth: 100)
          Soil SLGAModForSWRules: same as T._.t1.ErribaResp.SLGAModForSWRules
      Factor t10
        CompositeFactor HaysRates
          Specifications:
            [Clock]
            [Weather]
            [Soil]
            [TreeManagement]
            [Operations]
            [ExptFert]
          Clock: Start=2017-02-15; End=2029-08-31
          Weather Met: FileName=Hayes.met
          Manager TreeManagement: same as T._.t1.HaysRates.TreeManagement
          Operations
            2018-02-12  [TreeThinning].Script.DoThin(0.1333);
            2019-02-12  [TreeThinning].Script.DoThin(0.166696);
            2020-02-12  [TreeThinning].Script.DoThin(0.01282);
            2021-02-11  [TreeThinning].Script.DoThin(0.02597);
            2022-02-11  [TreeThinning].Script.DoThin(0.01333);
            2023-02-11  [TreeThinning].Script.DoThin(0.02703);
            2024-02-11  [TreeThinning].Script.DoThin(0.01389);
          Operations ExptFert
            2019-10-31  [Fertiliser].Apply(amount: 400, type: "UreaN", depth: 100)
          Soil SLGAmodHays: same as T._.t1.HaysRates.SLGAmodHays
        CompositeFactor MyrtleBankRates
          Specifications:
            [Clock]
            [Weather]
            [Soil]
            [TreeManagement]
            [Operations]
            [ExptFert]
          Clock: Start=2016-10-15; End=2029-08-31
          Weather Met: FileName=MyrtleBank.met
          Manager TreeManagement: same as T._.t1.MyrtleBankRates.TreeManagement
          Operations
            2017-12-12  [TreeThinning].Script.DoThin(0.0318);
            2018-12-12  [TreeThinning].Script.DoThin(0.06105);
            2019-12-12  [TreeThinning].Script.DoThin(0.0);
            2020-12-11  [TreeThinning].Script.DoThin(0.0);
            2021-12-11  [TreeThinning].Script.DoThin(0.0);
            2022-12-11  [TreeThinning].Script.DoThin(0.0);
            2023-12-11  [TreeThinning].Script.DoThin(0.0);
          Operations ExptFert
            2019-12-12  [Fertiliser].Apply(amount: 400, type: "UreaN", depth: 100)
          Soil SLGAmodMyrtleBank: same as T._.t1.MyrtleBankRates.SLGAmodMyrtleBank
        CompositeFactor ErribaResp
          Specifications:
            [Clock]
            [Weather]
            [Soil]
            [TreeManagement]
            [Operations]
            [ExptFert]
          Clock: Start=2017-01-15; End=2029-08-31
          Weather Met: FileName=Erriba.met
          Manager TreeManagement: same as T._.t1.HaysRates.TreeManagement
          Operations
            2018-02-12  [TreeThinning].Script.DoThin(0.2333);
            2019-02-12  [TreeThinning].Script.DoThin(0.13047);
            2020-02-12  [TreeThinning].Script.DoThin(0.0);
            2021-02-11  [TreeThinning].Script.DoThin(0.0);
            2022-02-11  [TreeThinning].Script.DoThin(0.01389);
            2023-02-11  [TreeThinning].Script.DoThin(0.02817);
            2024-02-11  [TreeThinning].Script.DoThin(0.05797);
          Operations ExptFert
            2019-09-05  [Fertiliser].Apply(amount: 400, type: "UreaN", depth: 100)
          Soil SLGAModForSWRules: same as T._.t1.ErribaResp.SLGAModForSWRules
      Factor t19
        CompositeFactor ErribaResp
          Specifications:
            [Clock]
            [Weather]
            [Soil]
            [TreeManagement]
            [Operations]
            [ExptFert]
          Clock: Start=2017-01-15; End=2029-08-31
          Weather Met: FileName=Erriba.met
          Manager TreeManagement: same as T._.t1.HaysRates.TreeManagement
          Operations
            2018-02-12  [TreeThinning].Script.DoThin(0.2333);
            2019-02-12  [TreeThinning].Script.DoThin(0.1429);
            2020-02-12  [TreeThinning].Script.DoThin(0.0);
            2021-02-11  [TreeThinning].Script.DoThin(0.0);
            2022-02-11  [TreeThinning].Script.DoThin(0.02817);
            2023-02-11  [TreeThinning].Script.DoThin(0.0);
            2024-02-11  [TreeThinning].Script.DoThin(0.01449);
          Operations ExptFert
            2022-09-05  [Fertiliser].Apply(amount: 400, type: "UreaN", depth: 100)
          Soil SLGAModForSWRules: same as T._.t1.ErribaResp.SLGAModForSWRules
    Simulation TAS
      Weather: FileName=Hayes.met
      Clock: Start=2004-06-01; End=2029-08-31
      Summary
      SoilArbitrator Soil Arbitrator
      MicroClimate: a_interception=0; b_interception=1; c_interception=0; d_interception=0; SoilHeatFluxFraction=0.4; MinimumHeightDiffForNewLayer=0; NightInterceptionFraction=0.5; ReferenceHeight=2
      Zone Plantation: Area=1; Slope=0; AspectAngle=0; Altitude=50
        Fertiliser
        SurfaceOrganicMatter: InitialResidueName=Eucalyptus; InitialResidueType=Eucalyptus; InitialResidueMass=2000; InitialStandingFraction=0; InitialCPR=0; InitialCNR=80
        Plant Eucalyptus
        Manager TreeManagement
          RowSpace = 2.9703
          RowWidth = 4
          CultivarName = globulusEKB2
          PlantingDate = 15-Sep
          HarvestAge = 10
          FertAmount = 15
          script: same as in T._.t1.HaysRates.TreeManagement
        Manager TreeThinning
```csharp
using APSIM.Core;
using Models.Soils;
using System.Xml.Serialization;
using Models.PMF;
using Models.Core;
using System.Collections.Generic;
using System.Linq;
using System;
using Newtonsoft.Json;
using Models.PMF.Interfaces;

namespace Models
{
    [Serializable] 
    [System.Xml.Serialization.XmlInclude(typeof(Model))]
    public class Script : Model, IStructureDependency
    {
        [Link] private Plant Pinus;
        [Link] private Clock Clock;
        [field:NonSerialized]
        public IStructure Structure { private get; set; }


        
        [EventSubscribe("StartOfSimulation")]
        private void OnSimulationCommencing(object sender, EventArgs e)
        {
            
        }
        
        public void DoThin(double ThinFr)
        {
            //Set up  array of remove fractions to send with Cut method.  Each member in the array corresponds to an organ in the same order they are set up in.

                //Harvest with manager specified removal fractions
                Pinus.structure?.DoThin(ThinFr);
                var Leaf =   Structure.FindChild<IHasDamageableBiomass>("Leaf", relativeTo: (INodeModel)Pinus);
                var Stem =   Structure.FindChild<IHasDamageableBiomass>("Stem", relativeTo: (INodeModel)Pinus);
                var Branch =   Structure.FindChild<IHasDamageableBiomass>("Branch", relativeTo: (INodeModel)Pinus);
                var FineRoot =   Structure.FindChild<IHasDamageableBiomass>("FineRoot", relativeTo: (INodeModel)Pinus);
                var CoarseRoot =   Structure.FindChild<IHasDamageableBiomass>("CoarseRoot", relativeTo: (INodeModel)Pinus);
                Leaf.RemoveBiomass(liveToRemove: 0, deadToRemove: 0.0, liveToResidue: ThinFr, deadToResidue: 0.0);
                Stem.RemoveBiomass(liveToRemove: 0, deadToRemove: 0.0, liveToResidue: ThinFr, deadToResidue: 0.0);
                Branch.RemoveBiomass(liveToRemove: 0, deadToRemove: 0.0, liveToResidue: ThinFr, deadToResidue: 0.0);
                FineRoot.RemoveBiomass(liveToRemove: 0, deadToRemove: 0.0, liveToResidue: ThinFr, deadToResidue: 0.0);
                CoarseRoot.RemoveBiomass(liveToRemove: 0, deadToRemove: 0.0, liveToResidue: ThinFr, deadToResidue: 0.0);

                Pinus.Population = Pinus.Population*(1-ThinFr);
        }
    }
}
```
        Operations
        Report HarvestReport: EventNames=[Eucalyptus].Harvesting
          VariableNames:
            [Clock].Today
            [Eucalyptus].Population*10000 as sph
            [Eucalyptus].Stem.Ht
            [Eucalyptus].Stem.DBH
            [Eucalyptus].Stem.MAIub
            ([Eucalyptus].Stem.Volub) on 2020-01-01
        Operations ExptFert
        Report AnnualReport: EventNames=[Clock].EndOfYear
          VariableNames:
            [Clock].Today
            [Eucalyptus].Age
            [Eucalyptus].Population*10000 as sph
            [Eucalyptus].Stem.DBH
            [Eucalyptus].Stem.Ht
            [Eucalyptus].Stem.MAIub
            [Eucalyptus].Stem.BA
            [Eucalyptus].Stem.Volub
            [Eucalyptus].Stem.WoodDensity
        Soil SLGAModForSWRules: ASCOrder=NA; ASCSubOrder=NA; SoilType=Silty Clay; Site=37694_39775; NearestTown=SHEFFIELD; Region=Tasmanian Northern Slopes; State=Tasmania; ApsoilNumber=9999; Latitude=-41.41219; Longitude=146.145922; LocationAccuracy=+- 90m; YearOfSampling=2023; Comments=Landuse is Plantation forestry
          NaturalVegetation=Eucalyptus tall open forests and open forests with ferns, herbs, sedges, rushes or wet tu
          DataSource=Soil and Landscape Grid of Australia. This soil parameter file was automatically generated from the GSM National Surfaces using pedotransfer functions.
          Water: Thickness=[150, 150, 150, 150, 200, 200]; InitialValues=[0.48, 0.378, 0.344, 0.319, 0.312, 0.312]; FilledFromTop=true
          Physical
            Thickness  BD     AirDry  LL15   DUL    SAT    KS
            150        1.035  0.142   0.426  0.55   0.609  2.133
            150        1.138  0.126   0.378  0.52   0.571  1.278
            150        1.192  0.115   0.344  0.542  0.55   0.962
            150        1.219  0.106   0.319  0.492  0.516  0.89
            200        1.24   0.104   0.312  0.476  0.51   0.815
            200        1.258  0.104   0.312  0.473  0.504  0.765
            SoilCrop EucalyptusSoil: LL=[0.444, 0.392, 0.355, 0.329, 0.32, 0.319]; KL=[0.06, 0.06, 0.06, 0.055, 0.048, 0.04]; XF=[1, 1, 1, 1, 1, 1]
          WaterBalance SoilWater: same as T._.t1.HaysRates.SLGAmodHays.SoilWater
          Organic: FOMCNRatio=40; CarbonUnits=Total
            Thickness  Carbon  SoilCNRatio  FBiom  FInert  FOM
            150        5.037   8.821        0.04   0.164   475.475
            150        3.12    8.82         0.031  0.264   303.176
            150        1.84    8.82         0.014  0.451   193.314
            150        1.07    8.82         0.01   0.774   123.262
            200        0.78    8.82         0.01   0.995   67.648
            200        0.73    8.82         0.01   1       37.126
          Chemical: Thickness=[150, 150, 150, 150, 200, 200]; PH=[5.75, 5.73, 5.72, 5.74, 5.76, 5.77]; PHUnits=Water
          Solute NO3: Thickness=[1000]; InitialValues=[3]; InitialValuesUnits=ppm; WaterTableConcentration=0; D0=0; DepthConstant=0; MaxDepthSoluteAccessible=0; RunoffEffectivenessAtMovingSolute=0; MaxEffectiveRunoff=0
          Solute NH4: Thickness=[1000]; InitialValues=[1]; InitialValuesUnits=ppm; WaterTableConcentration=0; D0=0; DepthConstant=0; MaxDepthSoluteAccessible=0; RunoffEffectivenessAtMovingSolute=0; MaxEffectiveRunoff=0
          Solute Urea: Thickness=[1000]; InitialValues=[0]; InitialValuesUnits=ppm; WaterTableConcentration=0; D0=0; DepthConstant=0; MaxDepthSoluteAccessible=0; RunoffEffectivenessAtMovingSolute=0; MaxEffectiveRunoff=0
          Nutrient
          SoilTemperature CERESSoilTemperature
        Report DailyReport: same as Replacements.DailyReport
  Experiment V
    Factors _
      Factor t1
        CompositeFactor AndrewRates
          Specifications:
            [Clock]
            [Weather]
            [Soil]
            [TreeManagement]
            [Operations]
          Clock: Start=2018-01-15; End=2029-08-31
          Weather Met: FileName=Andrew.met
          Manager TreeManagement
            RowSpace = 2.083333
            RowWidth = 4
            CultivarName = globulusEKB9
            PlantingDate = 15-Jul
            HarvestAge = 10
            FertAmount = 27
            script: same as in T._.t1.HaysRates.TreeManagement
          Operations
            2018-12-12  [TreeThinning].Script.DoThin(0.240675);
            2019-12-12  [TreeThinning].Script.DoThin(0.0);
            2020-12-11  [TreeThinning].Script.DoThin(0.01176);
            2021-12-11  [TreeThinning].Script.DoThin(0.08333);
            2022-12-11  [TreeThinning].Script.DoThin(0.05195);
            2023-12-11  [TreeThinning].Script.DoThin(0.0274);
          Soil SLGAmodAndrew: ASCOrder=NA; ASCSubOrder=NA; SoilType=Sandy Loam over Sandy Clay Loam; Site=33477_33718; NearestTown=DARTMOOR; Region=Naracoorte Coastal Plain; State=Victoria; NaturalVegetation=Mallee with hummock grass; ApsoilNumber=9999; Latitude=-37.89816; Longitude=141.098365; LocationAccuracy=+- 90m; YearOfSampling=2023; Comments=Landuse is Grazing modified pastures
            DataSource=Soil and Landscape Grid of Australia. This soil parameter file was automatically generated from the GSM National Surfaces using pedotransfer functions.
            Water: FilledFromTop=false
              Thickness=[150, 150, 150, 150, 200, 200, 200, 400, 400, 500, 500, 500, 500]
              InitialValues=[0.1769, 0.14555, 0.14675, 0.1452, 0.14705, 0.1491, 0.14905, 0.14905, 0.14905, 0.14905, 0.14905, 0.14905, 0.14905]
            Physical
              Thickness  ParticleSizeSand  ParticleSizeSilt  ParticleSizeClay  Rocks  BD     AirDry  LL15   DUL    SAT
              150        5                 65                30                0      1.267  0.056   0.169  0.327  0.444
              150        5                 65                30                0      1.325  0.047   0.14   0.251  0.432
              150        5                 65                30                0      1.347  0.047   0.142  0.237  0.43
              150        5                 65                30                0      1.358  0.047   0.141  0.225  0.429
              200        5                 65                30                0      1.373  0.048   0.143  0.224  0.426
              200        5                 65                30                0      1.388  0.048   0.145  0.227  0.421
              200        5                 65                30                0      1.399  0.048   0.145  0.226  0.417
              400        5                 65                30                0      1.399  0.048   0.145  0.226  0.417
              400        5                 65                30                0      1.399  0.048   0.145  0.226  0.417
              500        5                 65                30                0      1.399  0.048   0.145  0.226  0.417
              500        5                 65                30                0      1.399  0.048   0.145  0.226  0.417
              500        5                 65                30                0      1.399  0.048   0.145  0.226  0.417
              500        5                 65                30                0      1.399  0.048   0.145  0.226  0.417
              Rocks, ParticleSizeSand, ParticleSizeSilt, ParticleSizeClay source: Calculated (layer 1, 2, 3, 4, 5, 6, 7, 8, 9)
              SoilCrop EucalyptusSoil
                LL=[0.19, 0.19, 0.19, 0.19, 0.19, 0.19, 0.19, 0.19, 0.19, 0.19, 0.19, 0.19, 0.19]
                KL=[0.02, 0.02, 0.02, 0.02, 0.02, 0.02, 0.02, 0.02, 0.02, 0.02, 0.02, 0.02, 0.02]
                XF=[1, 1, 1, 1, 1, 1, 1, 1, 1, 1, 0, 0, 0]
            WaterBalance SoilWater: SummerDate=1-nov; SummerU=6; SummerCona=6; WinterDate=1-apr; WinterU=2; WinterCona=2; DiffusConst=171.874; DiffusSlope=41.7011; Salb=0.13; CN2Bare=78; CNRed=20; CNCov=0; PSIDul=-100
              Thickness=[150, 150, 150, 150, 200, 200, 200, 400, 400, 500, 500, 500, 500]
              SWCON=[0.569, 0.467, 0.398, 0.356, 0.294, 0.295, 0.296, 0.296, 0.2, 0.2, 0.2, 0.2, 0]
            Organic: FOMCNRatio=40; CarbonUnits=Total
              Thickness  Carbon  SoilCNRatio  FBiom  FInert  FOM
              150        4       12           0.04   0.097   417.668
              150        2       12           0.031  0.21    287.059
              150        1       12           0.014  0.38    197.293
              150        0.5     12           0.01   0.753   135.597
              200        0.3     12           0.01   0.963   82.244
              200        0.34    12           0.01   0.851   49.883
              200        0.33    12           0.01   0.871   30.256
              400        0.01    12           0.01   1       30.256
              400        0.01    12           0.01   1       30.256
              500        0.01    12           0.01   1       30.256
              500        0.01    12           0.01   1       30.256
              500        0.01    12           0.01   1       30.256
              500        0.01    12           0.01   1       30.256
            Chemical: PHUnits=Water
              Thickness=[150, 150, 150, 150, 200, 200, 200, 400, 400, 500, 500, 500, 500]
              PH=[5.113, 5.09, 5.16, 5.29, 5.41, 5.51, 5.58, 5.58, 5.58, 5.58, 5.58, 5.58, 5.58]
            Solute NO3: Thickness=[1800]; InitialValues=[3]; InitialValuesUnits=ppm; WaterTableConcentration=0; D0=0; DepthConstant=0; MaxDepthSoluteAccessible=0; RunoffEffectivenessAtMovingSolute=0; MaxEffectiveRunoff=0
            Solute NH4: Thickness=[1800]; InitialValues=[1]; InitialValuesUnits=ppm; WaterTableConcentration=0; D0=0; DepthConstant=0; MaxDepthSoluteAccessible=0; RunoffEffectivenessAtMovingSolute=0; MaxEffectiveRunoff=0
            Solute Urea: Thickness=[1800]; InitialValues=[0]; InitialValuesUnits=ppm; WaterTableConcentration=0; D0=0; DepthConstant=0; MaxDepthSoluteAccessible=0; RunoffEffectivenessAtMovingSolute=0; MaxEffectiveRunoff=0
            Nutrient
            SoilTemperature CERESSoilTemperature
        CompositeFactor DanyenahRates
          Specifications:
            [Clock]
            [Weather]
            [Soil]
            [TreeManagement]
            [Operations]
          Clock: Start=2014-06-15; End=2029-08-31
          Weather Met: FileName=Danyenah.met
          Soil SLGAmodDanyenah: ASCOrder=NA; ASCSubOrder=NA; SoilType=Loam over Clay; Site=33489_34617; NearestTown=MACARTHUR; Region=Victorian Volcanic Plain; State=Victoria; NaturalVegetation=Mallee with hummock grass; ApsoilNumber=9999; Latitude=-37.9085; Longitude=141.8476; LocationAccuracy=+- 90m; YearOfSampling=2023; Comments=Landuse is Grazing modified pastures
            DataSource=Soil and Landscape Grid of Australia. This soil parameter file was automatically generated from the GSM National Surfaces using pedotransfer functions.
            Water: Thickness=[150, 150, 150, 150, 200, 200, 200, 400, 400]; FilledFromTop=true
              InitialValues=[0.297, 0.198, 0.227, 0.235, 0.237, 0.236, 0.235, 0.235, 0.235]
            Physical
              Thickness  ParticleSizeSand  ParticleSizeSilt  ParticleSizeClay  Rocks  BD     AirDry  LL15   DUL    SAT    KS
              150        5                 65                30                0      1.345  0.075   0.225  0.4    0.431  33.167
              150        5                 65                30                0      1.402  0.066   0.198  0.316  0.423  12.084
              150        5                 65                30                0      1.409  0.076   0.227  0.338  0.431  4.441
              150        5                 65                30                0      1.408  0.078   0.235  0.335  0.437  2.606
              200        5                 65                30                0      1.423  0.079   0.237  0.336  0.433  2.352
              200        5                 65                30                0      1.443  0.079   0.236  0.337  0.425  2.561
              200        5                 65                30                0      1.456  0.078   0.235  0.336  0.42   2.671
              400        5                 65                30                0      1.456  0.078   0.235  0.336  0.42   2.671
              400        5                 65                30                0      1.456  0.078   0.235  0.336  0.42   2.671
              Rocks, ParticleSizeSand, ParticleSizeSilt, ParticleSizeClay source: Calculated
              SoilCrop EucalyptusSoil: LL=[0.18, 0.18, 0.25, 0.3, 0.32, 0.33, 0.33, 0.31, 0.31]; KL=[0.02, 0.01, 0.01, 0.005, 0.01, 0.01, 0.01, 0.01, 0.01]; XF=[1, 0.5, 0.4, 0.3, 0, 0, 0, 0, 0]
            WaterBalance SoilWater: SummerDate=1-nov; SummerU=6; SummerCona=6; WinterDate=1-apr; WinterU=2; WinterCona=2; DiffusConst=114.543; DiffusSlope=37.3161; Salb=0.13; CN2Bare=78; CNRed=20; CNCov=0; PSIDul=-100; Thickness=[150, 150, 150, 150, 200, 200, 200, 400, 400]
              SWCON=[0.654, 0.337, 0.215, 0.139, 0.104, 0.122, 0.13, 0.13, 0.13]
            Organic: FOMCNRatio=40; CarbonUnits=Total
              Thickness  Carbon  SoilCNRatio  FBiom  FInert  FOM
              150        2.4     12           0.04   0.05    417.668
              150        2       12           0.031  0.1     287.059
              150        1       12           0.014  0.2     197.293
              150        0.8     12           0.01   0.2     135.597
              200        0.6     12           0.01   0.4     82.244
              200        0.4     12           0.01   0.6     49.883
              200        0.24    12           0.01   1       30.256
              400        0       12           0.01   1       30.256
              400        0       12           0.01   1       30.256
            Chemical: Thickness=[150, 150, 150, 150, 200, 200, 200, 400, 400]; PH=[6.53, 6.59, 6.72, 6.86, 6.99, 7.11, 7.22, 7.22, 7.22]; PHUnits=Water
            Solute NO3: Thickness=[1800]; InitialValues=[3]; InitialValuesUnits=ppm; WaterTableConcentration=0; D0=0; DepthConstant=0; MaxDepthSoluteAccessible=0; RunoffEffectivenessAtMovingSolute=0; MaxEffectiveRunoff=0
            Solute NH4: Thickness=[1800]; InitialValues=[1]; InitialValuesUnits=ppm; WaterTableConcentration=0; D0=0; DepthConstant=0; MaxDepthSoluteAccessible=0; RunoffEffectivenessAtMovingSolute=0; MaxEffectiveRunoff=0
            Solute Urea: Thickness=[1800]; InitialValues=[0]; InitialValuesUnits=ppm; WaterTableConcentration=0; D0=0; DepthConstant=0; MaxDepthSoluteAccessible=0; RunoffEffectivenessAtMovingSolute=0; MaxEffectiveRunoff=0
            Nutrient
            SoilTemperature CERESSoilTemperature
          Manager TreeManagement
            RowSpace = 2.083333
            RowWidth = 4
            CultivarName = globulusEKB9
            PlantingDate = 15-Jul
            HarvestAge = 10
            FertAmount = 15
            script: same as in T._.t1.HaysRates.TreeManagement
          Operations
            2014-07-16  [Eucalyptus].EndCrop()
            2015-07-16  [Eucalyptus].EndCrop()
            2016-12-12  [TreeThinning].Script.DoThin(0.027775);
            2017-12-12  [TreeThinning].Script.DoThin(0.0);
            2018-12-12  [TreeThinning].Script.DoThin(0.0);
            2019-12-12  [TreeThinning].Script.DoThin(0.0);
            2020-12-11  [TreeThinning].Script.DoThin(0.00952);
            2021-12-11  [TreeThinning].Script.DoThin(0.00962);
            2022-12-11  [TreeThinning].Script.DoThin(0.02913);
            2023-12-11  [TreeThinning].Script.DoThin(0.08);
        CompositeFactor HenkeRates
          Specifications:
            [Clock]
            [Weather]
            [Soil]
            [TreeManagement]
            [Operations]
          Clock: Start=2017-01-15; End=2029-08-31
          Weather Met: FileName=Henke.met
          Soil SLGAmodHenke: ASCOrder=NA; ASCSubOrder=NA; SoilType=Sand over Sandy Clay Loam; Site=33569_33826; NearestTown=DARTMOOR; Region=Naracoorte Coastal Plain; State=Victoria; NaturalVegetation=Mallee with hummock grass; ApsoilNumber=9999; Latitude=-37.975; Longitude=141.188; LocationAccuracy=+- 90m; YearOfSampling=2023; Comments=Landuse is Plantation forestry
            DataSource=Soil and Landscape Grid of Australia. This soil parameter file was automatically generated from the GSM National Surfaces using pedotransfer functions.
            Water: FilledFromTop=false
              Thickness=[150, 150, 150, 150, 200, 200, 200, 400, 400, 500, 500, 500, 500]
              InitialValues=[0.1946, 0.1476, 0.1386, 0.1306, 0.1328, 0.1368, 0.1374, 0.1374, 0.1374, 0.1374, 0.1374, 0.1374, 0.1374]
            Physical
              Thickness  ParticleSizeSand  ParticleSizeSilt  ParticleSizeClay  Rocks  BD     AirDry  LL15   DUL    SAT
              150        5                 65                30                0      1.232  0.054   0.163  0.321  0.452
              150        5                 65                30                0      1.293  0.042   0.126  0.234  0.437
              150        5                 65                30                0      1.328  0.04    0.12   0.213  0.43
              150        5                 65                30                0      1.348  0.038   0.114  0.197  0.424
              200        5                 65                30                0      1.363  0.039   0.117  0.196  0.421
              200        5                 65                30                0      1.374  0.04    0.121  0.2    0.419
              200        5                 65                30                0      1.385  0.041   0.122  0.199  0.416
              400        5                 65                30                0      1.385  0.041   0.122  0.199  0.416
              400        5                 65                30                0      1.385  0.041   0.122  0.199  0.416
              500        5                 65                30                0      1.385  0.041   0.122  0.199  0.416
              500        5                 65                30                0      1.385  0.041   0.122  0.199  0.416
              500        5                 65                30                0      1.385  0.041   0.122  0.199  0.416
              500        5                 65                30                0      1.385  0.041   0.122  0.199  0.416
              Rocks, ParticleSizeSand, ParticleSizeSilt, ParticleSizeClay source: Calculated
              SoilCrop EucalyptusSoil
                LL=[0.15, 0.12, 0.11, 0.11, 0.1, 0.12, 0.12, 0.122, 0.122, 0.122, 0.122, 0.122, 0.122]
                KL=[0.05, 0.05, 0.04, 0.04, 0.03, 0.03, 0.02, 0.02, 0.02, 0.02, 0.02, 0.01, 0.01]
                XF=[1, 1, 0.9, 0.8, 0.7, 0.6, 0.5, 0.4, 0.3, 0.2, 0.1, 0.1, 0.1]
            WaterBalance SoilWater: SummerDate=1-nov; SummerU=6; SummerCona=6; WinterDate=1-apr; WinterU=2; WinterCona=2; DiffusConst=189.094; DiffusSlope=41.8917; Salb=0.19; CN2Bare=70; CNRed=20; CNCov=0; PSIDul=-100
              Thickness=[150, 150, 150, 150, 200, 200, 200, 400, 400, 500, 500, 500, 500]
              SWCON=[0.585, 0.507, 0.47, 0.451, 0.383, 0.37, 0.365, 0.365, 0.365, 0.365, 0.365, 0.365, 0]
            Organic: FOMCNRatio=40; CarbonUnits=Total
              Thickness  Carbon  SoilCNRatio  FBiom  FInert  FOM
              150        4.3     15           0.05   0.08    417.668
              150        2.2     15           0.04   0.15    287.059
              150        1.5     15           0.03   0.3     197.293
              150        0.64    15           0.02   0.4     135.597
              200        0.5     15           0.01   0.5     82.244
              200        0.49    15           0.01   0.6     49.883
              200        0.45    16.02        0.01   0.7     30.256
              400        0.2     16.02        0.01   1       30.256
              400        0.01    16.02        0.01   1       30.256
              500        0.01    16.02        0.01   1       30.256
              500        0.01    16.02        0.01   1       30.256
              500        0.01    16.02        0.01   1       30.256
              500        0.01    16.02        0.01   1       30.256
            Chemical: PHUnits=Water
              Thickness=[150, 150, 150, 150, 200, 200, 200, 400, 400, 500, 500, 500, 500]
              PH=[5.8, 5.8, 5.8, 5.8, 5.8, 5.8, 5.91, 5.91, 5.91, 5.91, 5.91, 5.91, 5.91]
            Solute NO3: Thickness=[1800]; InitialValues=[3]; InitialValuesUnits=ppm; WaterTableConcentration=0; D0=0; DepthConstant=0; MaxDepthSoluteAccessible=0; RunoffEffectivenessAtMovingSolute=0; MaxEffectiveRunoff=0
            Solute NH4: Thickness=[1800]; InitialValues=[1]; InitialValuesUnits=ppm; WaterTableConcentration=0; D0=0; DepthConstant=0; MaxDepthSoluteAccessible=0; RunoffEffectivenessAtMovingSolute=0; MaxEffectiveRunoff=0
            Solute Urea: Thickness=[1800]; InitialValues=[0]; InitialValuesUnits=ppm; WaterTableConcentration=0; D0=0; DepthConstant=0; MaxDepthSoluteAccessible=0; RunoffEffectivenessAtMovingSolute=0; MaxEffectiveRunoff=0
            Nutrient
            SoilTemperature CERESSoilTemperature
          Manager TreeManagement: same as V._.t1.AndrewRates.TreeManagement
          Operations
            2017-12-12  [TreeThinning].Script.DoThin(0.2115);
            2018-12-12  [TreeThinning].Script.DoThin(0.01111);
            2019-12-12  [TreeThinning].Script.DoThin(0.0);
            2020-12-12  [TreeThinning].Script.DoThin(0.02247);
            2021-12-12  [TreeThinning].Script.DoThin(0.04598);
            2022-12-12  [TreeThinning].Script.DoThin(0.01205);
            2023-12-12  [TreeThinning].Script.DoThin(0.01205);
        CompositeFactor KarlinskiRates
          Specifications:
            [Clock]
            [Weather]
            [Soil]
            [TreeManagement]
            [Operations]
          Clock: Start=2015-06-15; End=2029-08-31
          Weather Met: FileName=Karlinski.met
          Soil SLGAmodKarlinski: ASCOrder=NA; ASCSubOrder=NA; SoilType=Clay Loam over Clay; Site=34262_36187; NearestTown=PORT CAMPBELL; Region=South East Coastal Plain; State=Victoria; NaturalVegetation=Mallee  with an open shrubby understorey; ApsoilNumber=9999; Latitude=-38.552292; Longitude=143.155436; LocationAccuracy=+- 90m; YearOfSampling=2023; Comments=Landuse is Grazing natural vegetation
            DataSource=Soil and Landscape Grid of Australia. This soil parameter file was automatically generated from the GSM National Surfaces using pedotransfer functions.
            Water: Thickness=[150, 150, 150, 150, 200, 200, 200, 400, 400]; FilledFromTop=false
              InitialValues=[0.285, 0.242, 0.26, 0.26, 0.262, 0.263, 0.262, 0.262, 0.262]
            Physical
              Thickness  ParticleSizeSand  ParticleSizeSilt  ParticleSizeClay  Rocks  BD     AirDry  LL15   DUL    SAT
              150        5                 65                30                0      1.284  0.092   0.275  0.471  0.481
              150        5                 65                30                0      1.373  0.078   0.235  0.368  0.441
              150        5                 65                30                0      1.356  0.084   0.253  0.384  0.454
              150        5                 65                30                0      1.325  0.085   0.254  0.377  0.469
              200        5                 65                30                0      1.342  0.085   0.256  0.374  0.464
              200        5                 65                30                0      1.377  0.086   0.257  0.374  0.452
              200        5                 65                30                0      1.395  0.085   0.256  0.372  0.446
              400        5                 65                30                0      1.395  0.085   0.256  0.372  0.446
              400        5                 65                30                0      1.395  0.085   0.256  0.372  0.446
              Rocks, ParticleSizeSand, ParticleSizeSilt, ParticleSizeClay source: Calculated
              SoilCrop EucalyptusSoil: LL=[0.31, 0.32, 0.33, 0.35, 0.35, 0.36, 0.36, 0.37, 0.37]; KL=[0.05, 0.05, 0.05, 0.055, 0.048, 0.04, 0.032, 0.03, 0.02]; XF=[1, 1, 1, 1, 1, 1, 1, 1, 1]
            WaterBalance SoilWater: SummerDate=1-nov; SummerU=6; SummerCona=6; WinterDate=1-apr; WinterU=2; WinterCona=2; DiffusConst=79.3284; DiffusSlope=32.2406; Salb=0.13; CN2Bare=90; CNRed=20; CNCov=0; PSIDul=-100; Thickness=[150, 150, 150, 150, 200, 200, 200, 400, 400]; SWCON=[0.771, 0.286, 0.2, 0.2, 0.2, 0.2, 0.2, 0.2, 0.2]
            Organic: FOMCNRatio=40; CarbonUnits=Total
              Thickness  Carbon  SoilCNRatio  FBiom  FInert  FOM
              150        6.7     14.985       0.04   0.05    417.668
              150        2.5     14.98        0.031  0.1     287.059
              150        2       14.98        0.014  0.1     197.293
              150        1       14.98        0.01   0.2     135.597
              200        0.8     14.98        0.01   0.4     82.244
              200        0.8     14.98        0.01   0.5     49.883
              200        0.8     14.98        0.01   0.834   30.256
              400        0.01    14.98        0.01   1       30.256
              400        0.01    14.98        0.01   1       30.256
            Chemical: Thickness=[150, 150, 150, 150, 200, 200, 200, 400, 400]; PH=[5.793, 5.9, 5.99, 6.04, 6.1, 6.16, 6.18, 6.18, 6.18]; PHUnits=Water
            Solute NO3: Thickness=[1800]; InitialValues=[3]; InitialValuesUnits=ppm; WaterTableConcentration=0; D0=0; DepthConstant=0; MaxDepthSoluteAccessible=0; RunoffEffectivenessAtMovingSolute=0; MaxEffectiveRunoff=0
            Solute NH4: Thickness=[1800]; InitialValues=[1]; InitialValuesUnits=ppm; WaterTableConcentration=0; D0=0; DepthConstant=0; MaxDepthSoluteAccessible=0; RunoffEffectivenessAtMovingSolute=0; MaxEffectiveRunoff=0
            Solute Urea: Thickness=[1800]; InitialValues=[0]; InitialValuesUnits=ppm; WaterTableConcentration=0; D0=0; DepthConstant=0; MaxDepthSoluteAccessible=0; RunoffEffectivenessAtMovingSolute=0; MaxEffectiveRunoff=0
            Nutrient
            SoilTemperature CERESSoilTemperature
          Manager TreeManagement
            RowSpace = 2.083333
            RowWidth = 4
            CultivarName = globulusEKB9
            PlantingDate = 15-Aug
            HarvestAge = 10
            FertAmount = 16
            script: same as in T._.t1.HaysRates.TreeManagement
          Operations
            2015-08-16  [Eucalyptus].EndCrop()
            2017-01-12  [TreeThinning].Script.DoThin(0.1201);
            2018-01-12  [TreeThinning].Script.DoThin(0.03435);
            2019-01-12  [TreeThinning].Script.DoThin(0.0);
            2020-01-12  [TreeThinning].Script.DoThin(0.00962);
            2021-01-11  [TreeThinning].Script.DoThin(0.02913);
            2022-01-11  [TreeThinning].Script.DoThin(0.03);
            2023-01-11  [TreeThinning].Script.DoThin(0.07216);
            2024-01-11  [TreeThinning].Script.DoThin(0.07778);
        CompositeFactor MoorabindaRates
          Specifications:
            [Clock]
            [Weather]
            [Soil]
            [TreeManagement]
            [Operations]
          Clock: Start=2018-01-15; End=2029-08-31
          Weather Met: FileName=Moorabinda.met
          Manager TreeManagement: same as V._.t1.AndrewRates.TreeManagement
          Operations
            2018-12-12  [TreeThinning].Script.DoThin(0.276408);
            2020-01-01  [TreeThinning].Script.DoThin(0.09877);
            2022-01-01  [TreeThinning].Script.DoThin(0.0);
          Soil SLGAmodMoorabinda: ASCOrder=NA; ASCSubOrder=NA; SoilType=Loam over Clay; Site=32929_34418; NearestTown=COLERAINE; Region=Victorian Midlands; State=Victoria; NaturalVegetation=Unknown; ApsoilNumber=9999; Latitude=-37.441888; Longitude=141.681713; LocationAccuracy=+- 90m; YearOfSampling=2023; Comments=Landuse is Grazing modified pastures
            DataSource=Soil and Landscape Grid of Australia. This soil parameter file was automatically generated from the GSM National Surfaces using pedotransfer functions.
            Water: Thickness=[150, 150, 150, 150, 200, 200, 200, 400, 400]; FilledFromTop=false
              InitialValues=[0.219, 0.191, 0.212, 0.222, 0.228, 0.231, 0.233, 0.233, 0.233]
            Physical
              Thickness  ParticleSizeSand  ParticleSizeSilt  ParticleSizeClay  Rocks  BD     AirDry  LL15   DUL    SAT
              150        5                 65                30                0      1.345  0.07    0.211  0.372  0.433
              150        5                 65                30                0      1.424  0.062   0.185  0.301  0.414
              150        5                 65                30                0      1.424  0.069   0.206  0.321  0.421
              150        5                 65                30                0      1.41   0.072   0.216  0.329  0.429
              200        5                 65                30                0      1.424  0.074   0.222  0.337  0.427
              200        5                 65                30                0      1.447  0.075   0.225  0.342  0.419
              200        5                 65                30                0      1.459  0.076   0.227  0.342  0.416
              400        5                 65                30                0      1.459  0.076   0.227  0.342  0.416
              400        5                 65                30                0      1.459  0.076   0.227  0.342  0.416
              Rocks, ParticleSizeSand, ParticleSizeSilt, ParticleSizeClay source: Calculated
              SoilCrop EucalyptusSoil
                LL=[0.285, 0.235, 0.255, 0.255, 0.255, 0.255, 0.255, 0.255, 0.255]
                KL=[0.03, 0.03, 0.02, 0.02, 0.01, 0.01, 0.005, 0.005, 0.01]
                XF=[1, 0.5, 0.3, 0.2, 0.1, 0.1, 0.05, 0, 0]
            WaterBalance SoilWater: SummerDate=1-nov; SummerU=6; SummerCona=6; WinterDate=1-apr; WinterU=2; WinterCona=2; DiffusConst=100.608; DiffusSlope=35.8873; Salb=0.13; CN2Bare=78; CNRed=20; CNCov=0; PSIDul=-100; Thickness=[150, 150, 150, 150, 200, 200, 200, 400, 400]; SWCON=[0.6, 0.6, 0.5, 0.5, 0.4, 0.4, 0.3, 0.2, 0.2]
            Organic: FOMCNRatio=40; CarbonUnits=Total
              Thickness  Carbon  SoilCNRatio  FBiom  FInert  FOM
              150        2.675   13           0.02   0.15    417.668
              150        0.93    13           0.01   0.25    287.059
              150        0.7     13           0.01   0.25    197.293
              150        0.43    13           0.01   0.35    135.597
              200        0.34    13           0.01   0.45    82.244
              200        0.34    11.84        0.01   0.55    49.883
              200        0.31    11.84        0.01   1       30.256
              400        0.01    11.84        0.01   1       30.256
              400        0.01    11.84        0.01   1       30.256
            Chemical: Thickness=[150, 150, 150, 150, 200, 200, 200, 400, 400]; PH=[5.66, 5.75, 5.8, 5.82, 5.89, 5.98, 6.06, 6.06, 6.06]; PHUnits=Water
            Solute NO3: Thickness=[1800]; InitialValues=[3]; InitialValuesUnits=ppm; WaterTableConcentration=0; D0=0; DepthConstant=0; MaxDepthSoluteAccessible=0; RunoffEffectivenessAtMovingSolute=0; MaxEffectiveRunoff=0
            Solute NH4: Thickness=[1800]; InitialValues=[1]; InitialValuesUnits=ppm; WaterTableConcentration=0; D0=0; DepthConstant=0; MaxDepthSoluteAccessible=0; RunoffEffectivenessAtMovingSolute=0; MaxEffectiveRunoff=0
            Solute Urea: Thickness=[1800]; InitialValues=[0]; InitialValuesUnits=ppm; WaterTableConcentration=0; D0=0; DepthConstant=0; MaxDepthSoluteAccessible=0; RunoffEffectivenessAtMovingSolute=0; MaxEffectiveRunoff=0
            Nutrient
            SoilTemperature CERESSoilTemperature
        CompositeFactor ConveyResp
          Specifications:
            [Clock]
            [Weather]
            [Soil]
            [TreeManagement]
            [Operations]
          Clock: Start=2016-02-15; End=2029-08-31
          Weather Met: FileName=Convey.met
          Operations
            2019-01-01  [TreeThinning].Script.DoThin(0.02564);
            2020-01-01  [TreeThinning].Script.DoThin(0.03509);
            2021-01-01  [TreeThinning].Script.DoThin(0.0);
            2022-01-01  [TreeThinning].Script.DoThin(0.05455);
            2023-01-01  [TreeThinning].Script.DoThin(0.03846);
            2024-01-01  [TreeThinning].Script.DoThin(0.0);
          Manager TreeManagement
            RowSpace = 2.05128
            RowWidth = 4
            CultivarName = globulusEKB9
            PlantingDate = 15-Aug
            HarvestAge = 10
            FertAmount = 15
            script: same as in T._.t1.HaysRates.TreeManagement
          Soil SLGAmodConvey: ASCOrder=NA; ASCSubOrder=NA; SoilType=Sand over Loam; Site=18328_24930; NearestTown=SANTA TERESA; Region=Finke; State=Northern Territory; NaturalVegetation=Other Acacia tall open shrublands and shrublands; ApsoilNumber=9999; Latitude=-25.274398; Longitude=133.775136; LocationAccuracy=+- 90m; YearOfSampling=2023; Comments=Landuse is Grazing natural vegetation
            DataSource=Soil and Landscape Grid of Australia. This soil parameter file was automatically generated from the GSM National Surfaces using pedotransfer functions.
            Water: Thickness=[150, 150, 150, 150, 200, 200, 200, 400, 400]; FilledFromTop=false
              InitialValues=[0.07155, 0.0825, 0.08455, 0.0826, 0.0826, 0.0826, 0.0826, 0.0826, 0.0826]
            Physical
              Thickness  ParticleSizeSand  ParticleSizeSilt  ParticleSizeClay  Rocks  BD     AirDry  LL15   DUL    SAT
              150        5                 65                30                0      1.46   0.023   0.068  0.139  0.378
              150        5                 65                30                0      1.491  0.026   0.079  0.149  0.372
              150        5                 65                30                0      1.495  0.027   0.081  0.152  0.371
              150        5                 65                30                0      1.494  0.026   0.079  0.151  0.371
              200        5                 65                30                0      1.494  0.026   0.079  0.151  0.371
              200        5                 65                30                0      1.494  0.026   0.079  0.151  0.371
              200        5                 65                30                0      1.494  0.026   0.079  0.151  0.371
              400        5                 65                30                0      1.494  0.026   0.079  0.151  0.371
              400        5                 65                30                0      1.494  0.026   0.079  0.151  0.371
              Rocks, ParticleSizeSand, ParticleSizeSilt, ParticleSizeClay source: Calculated
              SoilCrop EucalyptusSoil: LL=[0.08, 0.07, 0.06, 0.05, 0.05, 0.05, 0.05, 0.05, 0.05]; KL=[0.03, 0.03, 0.03, 0.03, 0.03, 0.03, 0.03, 0.03, 0.03]; XF=[1, 1, 1, 1, 1, 1, 1, 1, 1]
            WaterBalance SoilWater: SummerDate=1-nov; SummerU=6; SummerCona=6; WinterDate=1-apr; WinterU=4; WinterCona=2.5; DiffusConst=236.319; DiffusSlope=55.019; Salb=0.19; CN2Bare=70; CNRed=20; CNCov=0; DischargeWidth=10; CatchmentArea=111929; PSIDul=-100; Thickness=[150, 150, 150, 150, 200, 200, 200, 400, 400]; SWCON=[0.581, 0.543, 0.535, 0.54, 0.54, 0.54, 0.54, 0.54, 0]
            Organic: FOMCNRatio=40; CarbonUnits=Total
              Thickness  Carbon  SoilCNRatio  FBiom  FInert  FOM
              150        4.4     13.512       0.01   0.05    666.335
              150        2.9     13.51        0.005  0.1     314.754
              150        2.1     13.51        0.005  0.2     148.679
              150        1.8     13.51        0.005  0.3     70.231
              200        0.1     13.51        0.005  0.4     70.231
              200        0.1     13.51        0.005  0.5     70.231
              200        0.08    13.51        0.005  1       70.231
              400        0.08    13.51        0.005  1       70.231
              400        0.08    13.51        0.005  1       70.231
            Chemical: Thickness=[150, 150, 150, 150, 200, 200, 200, 400, 400]; PH=[5.5, 5.6, 5.7, 5.77, 5.77, 5.77, 5.77, 5.77, 5.77]; PHUnits=Water
            Solute NO3: Thickness=[150, 150, 150, 150, 200, 200, 200, 400, 400]; InitialValues=[3, 2, 1, 0.5, 0.1, 0, 0, 0, 0]; InitialValuesUnits=ppm; WaterTableConcentration=0; D0=0; DepthConstant=0; MaxDepthSoluteAccessible=0; RunoffEffectivenessAtMovingSolute=0; MaxEffectiveRunoff=0
            Solute NH4: same as V._.t1.ConveyResp.SLGAmodConvey.NO3
            Solute Urea: Thickness=[1800]; InitialValues=[0]; InitialValuesUnits=ppm; WaterTableConcentration=0; D0=0; DepthConstant=0; MaxDepthSoluteAccessible=0; RunoffEffectivenessAtMovingSolute=0; MaxEffectiveRunoff=0
            Nutrient
            SoilTemperature CERESSoilTemperature
        CompositeFactor CowlandResp
          Specifications:
            [Clock]
            [Weather]
            [Soil]
            [TreeManagement]
            [Operations]
          Clock: Start=2018-01-15; End=2029-08-31
          Weather Met: FileName=Cowland.met
          Operations
            2018-12-28  [TreeThinning].Script.DoThin(0.24368);
            2019-12-28  [TreeThinning].Script.DoThin(0.04000);
            2020-12-28  [TreeThinning].Script.DoThin(0.00833);
            2021-12-28  [TreeThinning].Script.DoThin(0.07563);
            2022-12-28  [TreeThinning].Script.DoThin(0.08182);
            2023-12-28  [TreeThinning].Script.DoThin(0.0396);
          Soil SLGAmodCowland: ASCOrder=NA; ASCSubOrder=NA; SoilType=Sandy Loam over Clay; Site=33673_34930; NearestTown=MACARTHUR; Region=Victorian Volcanic Plain; State=Victoria; NaturalVegetation=Unknown; ApsoilNumber=9999; Latitude=-38.061899; Longitude=142.108316; LocationAccuracy=+- 90m; YearOfSampling=2023; Comments=Landuse is Grazing modified pastures
            DataSource=Soil and Landscape Grid of Australia. This soil parameter file was automatically generated from the GSM National Surfaces using pedotransfer functions.
            Water: Thickness=[150, 150, 150, 150, 200, 200, 200, 400, 400]; FilledFromTop=false
              InitialValues=[0.219, 0.175, 0.197, 0.202, 0.205, 0.206, 0.205, 0.205, 0.205]
            Physical
              Thickness  ParticleSizeSand  ParticleSizeSilt  ParticleSizeClay  Rocks  BD     AirDry  LL15   DUL    SAT    KS
              150        5                 65                30                0      1.272  0.07    0.21   0.386  0.448  59.406
              150        5                 65                30                0      1.337  0.056   0.169  0.281  0.436  27.105
              150        5                 65                30                0      1.361  0.064   0.192  0.293  0.438  11.045
              150        5                 65                30                0      1.371  0.066   0.198  0.288  0.44   6.44
              200        5                 65                30                0      1.385  0.067   0.201  0.29   0.437  5.735
              200        5                 65                30                0      1.399  0.067   0.201  0.294  0.431  6.171
              200        5                 65                30                0      1.408  0.067   0.2    0.293  0.428  6.362
              400        5                 65                30                0      1.408  0.067   0.2    0.293  0.428  6.362
              400        5                 65                30                0      1.408  0.067   0.2    0.293  0.428  6.362
              Rocks, ParticleSizeSand, ParticleSizeSilt, ParticleSizeClay source: Calculated
              SoilCrop EucalyptusSoil: LL=[0.25, 0.2, 0.2, 0.2, 0.201, 0.201, 0.2, 0.2, 0.2]; KL=[0.02, 0.01, 0.01, 0.01, 0.01, 0.01, 0.01, 0.01, 0.01]; XF=[0.5, 0.2, 0.05, 0.05, 0.05, 0.05, 0.05, 0.05, 0.05]
            WaterBalance SoilWater: SummerDate=1-nov; SummerU=6; SummerCona=6; WinterDate=1-apr; WinterU=2; WinterCona=2; DiffusConst=152.232; DiffusSlope=39.6588; Salb=0.13; CN2Bare=78; CNRed=20; CNCov=0; PSIDul=-100; Thickness=[150, 150, 150, 150, 200, 200, 200, 400, 400]
              SWCON=[0.601, 0.394, 0.277, 0.197, 0.15, 0.166, 0.173, 0.173, 0.173]
            Organic: FOMCNRatio=40; CarbonUnits=Total
              Thickness  Carbon  SoilCNRatio  FBiom  FInert  FOM
              150        3       13.505       0.03   0.1     417.668
              150        2       13.5         0.02   0.2     287.059
              150        1.5     13.5         0.02   0.3     197.293
              150        1       13.5         0.01   0.4     135.597
              200        0.5     13.5         0.01   0.5     82.244
              200        0.28    13.5         0.01   1       49.883
              200        0.28    13.5         0.01   1       30.256
              400        0       13.5         0.01   1       30.256
              400        0       13.5         0.01   1       30.256
            Chemical: Thickness=[150, 150, 150, 150, 200, 200, 200, 400, 400]; PH=[5.5, 5.5, 5.5, 5.5, 5.5, 5.6, 5.7, 5.7, 5.7]; PHUnits=Water
            Solute NO3: same as V._.t1.ConveyResp.SLGAmodConvey.NO3
            Solute NH4: same as V._.t1.ConveyResp.SLGAmodConvey.NO3
            Solute Urea: Thickness=[1800]; InitialValues=[0]; InitialValuesUnits=ppm; WaterTableConcentration=0; D0=0; DepthConstant=0; MaxDepthSoluteAccessible=0; RunoffEffectivenessAtMovingSolute=0; MaxEffectiveRunoff=0
            Nutrient
            SoilTemperature CERESSoilTemperature
          Manager TreeManagement
            RowSpace = 2.08333
            RowWidth = 4
            CultivarName = globulusEKB9
            PlantingDate = 15-Jul
            HarvestAge = 10
            FertAmount = 27
            script: same as in T._.t1.HaysRates.TreeManagement
        CompositeFactor DanyenahResp
          Specifications:
            [Clock]
            [Weather]
            [Soil]
            [TreeManagement]
            [Operations]
          Clock: Start=2014-06-15; End=2029-08-31
          Weather Met: FileName=Danyenah.met
          Operations
            2014-07-16  [Eucalyptus].EndCrop()
            2015-07-16  [Eucalyptus].EndCrop()
            2016-12-12  [TreeThinning].Script.DoThin(0.1215);
            2017-12-12  [TreeThinning].Script.DoThin(0.0);
            2018-12-12  [TreeThinning].Script.DoThin(0.13574);
            2019-12-12  [TreeThinning].Script.DoThin(0.0);
            2021-12-12  [TreeThinning].Script.DoThin(0.02439);
            2022-12-12  [TreeThinning].Script.DoThin(0.05);
            2023-12-12  [TreeThinning].Script.DoThin(0.02632);
          Soil SLGAmodDanyenahResp: ASCOrder=NA; ASCSubOrder=NA; SoilType=Loam over Clay; Site=33489_34617; NearestTown=MACARTHUR; Region=Victorian Volcanic Plain; State=Victoria; NaturalVegetation=Mallee with hummock grass; ApsoilNumber=9999; Latitude=-37.9085; Longitude=141.8476; LocationAccuracy=+- 90m; YearOfSampling=2023; Comments=Landuse is Grazing modified pastures
            DataSource=Soil and Landscape Grid of Australia. This soil parameter file was automatically generated from the GSM National Surfaces using pedotransfer functions.
            Water: Thickness=[150, 150, 150, 150, 200, 200, 200, 400, 400]; FilledFromTop=true
              InitialValues=[0.2972, 0.198, 0.227, 0.235, 0.237, 0.236, 0.235, 0.235, 0.235]
            Physical
              Thickness  ParticleSizeSand  ParticleSizeSilt  ParticleSizeClay  Rocks  BD     AirDry  LL15   DUL    SAT
              150        5                 65                30                0      1.345  0.075   0.225  0.4    0.431
              150        5                 65                30                0      1.402  0.066   0.198  0.316  0.423
              150        5                 65                30                0      1.409  0.076   0.227  0.338  0.431
              150        5                 65                30                0      1.408  0.078   0.235  0.335  0.437
              200        5                 65                30                0      1.423  0.079   0.237  0.336  0.433
              200        5                 65                30                0      1.443  0.079   0.236  0.337  0.425
              200        5                 65                30                0      1.456  0.078   0.235  0.336  0.42
              400        5                 65                30                0      1.456  0.078   0.235  0.336  0.42
              400        5                 65                30                0      1.456  0.078   0.235  0.336  0.42
              Rocks, ParticleSizeSand, ParticleSizeSilt, ParticleSizeClay source: Calculated
              SoilCrop EucalyptusSoil: LL=[0.3, 0.28, 0.3, 0.3, 0.242, 0.24, 0.238, 0.238, 0.238]; KL=[0.04, 0.03, 0.02, 0.01, 0.01, 0.01, 0.01, 0.01, 0.005]; XF=[1, 1, 0.9, 0.8, 0, 0, 0, 0, 0]
            WaterBalance SoilWater: SummerDate=1-nov; SummerU=6; SummerCona=6; WinterDate=1-apr; WinterU=2; WinterCona=2; DiffusConst=114.543; DiffusSlope=37.3161; Salb=0.13; CN2Bare=78; CNRed=20; CNCov=0; DischargeWidth=10; CatchmentArea=304421; PSIDul=-100; Thickness=[150, 150, 150, 150, 200, 200, 200, 400, 400]; SWCON=[0.654, 0.5, 0.4, 0.4, 0.4, 0.3, 0.3, 0.3, 0.3]
            Organic: FOMCNRatio=40; CarbonUnits=Total
              Thickness  Carbon  SoilCNRatio  FBiom  FInert  FOM
              150        3.1     11.5         0.04   0.05    417.668
              150        1.6     11.5         0.031  0.15    287.059
              150        1       11.5         0.014  0.25    197.293
              150        0.5     13.68        0.01   0.696   135.597
              200        0.21    13.68        0.01   0.888   82.244
              200        0.29    13.68        0.01   0.642   49.883
              200        0.3     13.68        0.01   0.617   30.256
              400        0.01    13.68        0.01   1       30.256
              400        0.01    13.68        0.01   1       30.256
            Chemical: Thickness=[150, 150, 150, 150, 200, 200, 200, 400, 400]; PH=[5.7, 5.76, 5.87, 5.99, 6.1, 6.21, 6.3, 6.3, 6.3]; PHUnits=Water
            Solute NO3: Thickness=[150, 150, 150, 150, 200, 200, 200, 400, 400]; InitialValues=[20, 10, 5, 2, 1, 1, 1, 1, 1]; InitialValuesUnits=ppm; WaterTableConcentration=0; D0=0; DepthConstant=0; MaxDepthSoluteAccessible=0; RunoffEffectivenessAtMovingSolute=0; MaxEffectiveRunoff=0
            Solute NH4: same as V._.t1.DanyenahResp.SLGAmodDanyenahResp.NO3
            Solute Urea: Thickness=[150, 150, 150, 150, 200, 200, 200, 400, 400]; InitialValues=[0, -, -, -, -, -, -, -, -]; InitialValuesUnits=ppm; WaterTableConcentration=0; D0=0; DepthConstant=0; MaxDepthSoluteAccessible=0; RunoffEffectivenessAtMovingSolute=0; MaxEffectiveRunoff=0
            Nutrient
            SoilTemperature CERESSoilTemperature
          Manager TreeManagement: same as V._.t1.DanyenahRates.TreeManagement
        CompositeFactor MeadeResp
          Specifications:
            [Clock]
            [Weather]
            [Soil]
            [TreeManagement]
            [Operations]
          Clock: Start=2015-06-15; End=2029-08-31
          Weather Met: FileName=Meade.met
          Operations
            2015-08-16  [Eucalyptus].EndCrop()
            2017-01-12  [TreeThinning].Script.DoThin(0.06250);
            2018-01-12  [TreeThinning].Script.DoThin(0.0);
            2019-01-12  [TreeThinning].Script.DoThin(0.0);
            2020-01-01  [TreeThinning].Script.DoThin(0.05556);
            2021-01-01  [TreeThinning].Script.DoThin(0.0);
            2022-01-01  [TreeThinning].Script.DoThin(0.0);
            2023-01-01  [TreeThinning].Script.DoThin(0.03922);
            2024-01-01  [TreeThinning].Script.DoThin(0.14286);
          Soil SLGAmodMeade: ASCOrder=NA; ASCSubOrder=NA; SoilType=Clay Loam over Clay; Site=34180_36387; NearestTown=COBDEN; Region=South East Coastal Plain; State=Victoria; NaturalVegetation=Unknown; ApsoilNumber=9999; Latitude=-38.484523; Longitude=143.322515; LocationAccuracy=+- 90m; YearOfSampling=2023; Comments=Landuse is Grazing natural vegetation
            DataSource=Soil and Landscape Grid of Australia. This soil parameter file was automatically generated from the GSM National Surfaces using pedotransfer functions.
            Water: FilledFromTop=false
              Thickness=[150, 150, 150, 150, 200, 200, 200, 400, 400, 500, 500, 500, 500]
              InitialValues=[0.311, 0.261, 0.282, 0.286, 0.285, 0.283, 0.281, 0.281, 0.281, 0.281, 0.281, 0.281, 0.281]
            Physical
              Thickness  ParticleSizeSand  ParticleSizeSilt  ParticleSizeClay  Rocks  BD     AirDry  LL15   DUL    SAT
              150        5                 65                30                0      1.263  0.1     0.301  0.503  0.513
              150        5                 65                30                0      1.353  0.085   0.254  0.39   0.452
              150        5                 65                30                0      1.349  0.092   0.275  0.406  0.462
              150        5                 65                30                0      1.33   0.093   0.28   0.403  0.474
              200        5                 65                30                0      1.347  0.093   0.279  0.399  0.469
              200        5                 65                30                0      1.378  0.092   0.277  0.396  0.457
              200        5                 65                30                0      1.395  0.092   0.275  0.392  0.451
              400        5                 65                30                0      1.395  0.092   0.275  0.392  0.451
              400        5                 65                30                0      1.395  0.092   0.275  0.392  0.451
              500        5                 65                30                0      1.395  0.092   0.275  0.392  0.451
              500        5                 65                30                0      1.395  0.092   0.275  0.392  0.451
              500        5                 65                30                0      1.395  0.092   0.275  0.392  0.451
              500        5                 65                30                0      1.395  0.092   0.275  0.392  0.451
              Rocks, ParticleSizeSand, ParticleSizeSilt, ParticleSizeClay source: Calculated
              SoilCrop EucalyptusSoil
                LL=[0.48, 0.38, 0.4, 0.37, 0.35, 0.35, 0.279, 0.275, 0.27, 0.27, 0.27, 0.1, 0.1]
                KL=[0.01, 0.01, 0.005, 0.005, 0.005, 0.005, 0.005, 0.005, 0.005, 0.005, 0.005, 0.04, 0.04]
                XF=[0.6, 0.4, 0.3, 0.2, 0.2, 0.2, 0.2, 0.2, 0.2, 0.2, 0.2, 0, 0]
            WaterBalance SoilWater: SummerDate=1-nov; SummerU=6; SummerCona=6; WinterDate=1-apr; WinterU=2; WinterCona=2; DiffusConst=80.387; DiffusSlope=32.0866; Salb=0.13; CN2Bare=90; CNRed=20; CNCov=0; PSIDul=-100
              Thickness=[150, 150, 150, 150, 200, 200, 200, 400, 400, 500, 500, 500, 500]
              SWCON=[0.73, 0.263, 0.17, 0.095, 0.069, 0.082, 0.086, 0.086, 0.086, 0.086, 0.086, 0.086, 0.086]
            Organic: FOMCNRatio=40; CarbonUnits=Total
              Thickness  Carbon  SoilCNRatio  FBiom  FInert  FOM
              150        4.5     12           0.02   0.05    417.668
              150        2.5     12           0.01   0.1     287.059
              150        1.5     12           0.01   0.2     197.293
              150        1.2     12           0.01   0.3     135.597
              200        0.8     12           0.01   0.4     82.244
              200        0.6     12           0.01   0.5     49.883
              200        0.4     14           0.01   0.6     30.256
              400        0.1     14           0.01   0.7     30.256
              400        0.1     13.95        0.01   0.8     30.256
              500        0.01    13.95        0.01   0.9     30.256
              500        0.01    13.95        0.01   1       30.256
              500        0.01    13.95        0.01   1       30.256
              500        0.01    13.95        0.01   1       30.256
            Chemical: PHUnits=Water
              Thickness=[150, 150, 150, 150, 200, 200, 200, 400, 400, 500, 500, 500, 500]
              PH=[5.8, 5.8, 5.8, 5.8, 5.8, 5.9, 5.9, 5.9, 5.9, 5.9, 5.9, 5.9, 5.9]
            Solute NO3: InitialValues=[3, 2, 1, 0.5, 0, 0, 0, 0, 0, 0, 0, 0, 0]; InitialValuesUnits=ppm; WaterTableConcentration=0; D0=0; DepthConstant=0; MaxDepthSoluteAccessible=0; RunoffEffectivenessAtMovingSolute=0; MaxEffectiveRunoff=0
              Thickness=[150, 150, 150, 150, 200, 200, 200, 400, 400, 500, 500, 500, 500]
            Solute NH4: same as V._.t1.MeadeResp.SLGAmodMeade.NO3
            Solute Urea: Thickness=[1800]; InitialValues=[0]; InitialValuesUnits=ppm; WaterTableConcentration=0; D0=0; DepthConstant=0; MaxDepthSoluteAccessible=0; RunoffEffectivenessAtMovingSolute=0; MaxEffectiveRunoff=0
            Nutrient
            SoilTemperature CERESSoilTemperature
          Manager TreeManagement
            RowSpace = 2.083333
            RowWidth = 4
            CultivarName = globulusEKB9
            PlantingDate = 15-Aug
            HarvestAge = 10
            FertAmount = 15
            script: same as in T._.t1.HaysRates.TreeManagement
        CompositeFactor SmithResp
          Specifications:
            [Clock]
            [Weather]
            [Soil]
            [TreeManagement]
            [Operations]
          Clock: Start=2017-01-15; End=2029-08-31
          Weather Met: FileName=Smith.met
          Operations
            2017-12-12  [TreeThinning].Script.DoThin(0.1821);
            2018-12-12  [TreeThinning].Script.DoThin(0.19669);
            2019-12-12  [TreeThinning].Script.DoThin(0.0);
            2020-12-11  [TreeThinning].Script.DoThin(0.04943);
            2021-12-11  [TreeThinning].Script.DoThin(0.0);
            2022-12-01  [TreeThinning].Script.DoThin(0.0104);
            2023-12-01  [TreeThinning].Script.DoThin(0.03075);
          Soil Synthetic Soil Derived from the SLGA: ASCOrder=NA; ASCSubOrder=NA; SoilType=Loam over Clay; Site=33462_34364; NearestTown=MERINO; Region=Victorian Midlands; State=Victoria; NaturalVegetation=Mallee  with an open shrubby understorey; ApsoilNumber=9999; Latitude=-37.886178; Longitude=141.637048; LocationAccuracy=+- 90m; YearOfSampling=2023; Comments=Landuse is Grazing modified pastures
            DataSource=Soil and Landscape Grid of Australia. This soil parameter file was automatically generated from the GSM National Surfaces using pedotransfer functions.
            Water: Thickness=[150, 150, 150, 150, 200, 200, 200, 400, 400]; FilledFromTop=false
              InitialValues=[0.24, 0.209, 0.236, 0.242, 0.245, 0.245, 0.244, 0.244, 0.244]
            Physical
              Thickness  ParticleSizeSand  ParticleSizeSilt  ParticleSizeClay  Rocks  BD     AirDry  LL15   DUL    SAT    KS
              150        5                 65                30                0      1.367  0.077   0.231  0.406  0.427  25.357
              150        5                 65                30                0      1.448  0.068   0.203  0.324  0.409  10.634
              150        5                 65                30                0      1.435  0.077   0.23   0.346  0.422  4.275
              150        5                 65                30                0      1.409  0.079   0.237  0.347  0.437  4.275
              200        5                 65                30                0      1.425  0.08    0.24   0.349  0.432  4.275
              200        5                 65                30                0      1.455  0.08    0.239  0.35   0.421  4.275
              200        5                 65                30                0      1.471  0.08    0.239  0.348  0.415  4.275
              400        5                 65                30                0      1.471  0.08    0.239  0.348  0.415  4.275
              400        5                 65                30                0      1.471  0.08    0.239  0.348  0.415  4.275
              Rocks, ParticleSizeSand, ParticleSizeSilt, ParticleSizeClay source: Calculated
              SoilCrop EucalyptusSoil: LL=[0.38, 0.29, 0.3, 0.3, 0.32, 0.32, 0.32, 0.32, 0.32]; KL=[0.03, 0.03, 0.02, 0.02, 0.01, 0.005, 0.005, 0.01, 0.02]; XF=[0.8, 0.5, 0.2, 0.1, 0.1, 0.1, 0, 0, 0]
            WaterBalance SoilWater: SummerDate=1-nov; SummerU=6; SummerCona=6; WinterDate=1-apr; WinterU=2; WinterCona=2; DiffusConst=97.5366; DiffusSlope=35.8227; Salb=0.13; CN2Bare=78; CNRed=20; CNCov=0; DischargeWidth=10; CatchmentArea=10840.6; PSIDul=-100; Thickness=[150, 150, 150, 150, 200, 200, 200, 400, 400]
              SWCON=[0.695, 0.356, 0.24, 0.152, 0.118, 0.142, 0.151, 0.151, 0.151]
            Organic: FOMCNRatio=40; CarbonUnits=Total
              Thickness  Carbon  SoilCNRatio  FBiom  FInert  FOM
              150        3.649   17           0.03   0.2     417.668
              150        1.27    17           0.02   0.3     287.059
              150        0.86    17           0.01   0.4     197.293
              150        0.34    17           0.01   0.5     135.597
              200        0.26    17           0.01   0.6     82.244
              200        0.37    17           0.01   1       49.883
              200        0.38    15           0.01   1       30.256
              400        0.01    13.63        0.01   1       30.256
              400        0.01    13.63        0.01   1       30.256
            Chemical: Thickness=[150, 150, 150, 150, 200, 200, 200, 400, 400]; PH=[5.2, 5.2, 5.2, 5.2, 5.3, 5.3, 5.4, 5.4, 5.4]; PHUnits=Water
            Solute NO3: Thickness=[150, 150, 150, 150, 200, 200, 200, 400, 400]; InitialValues=[3, 2, 1, 0.5, 0, 0, 0, 0, 0]; InitialValuesUnits=ppm; WaterTableConcentration=0; D0=0; DepthConstant=0; MaxDepthSoluteAccessible=0; RunoffEffectivenessAtMovingSolute=0; MaxEffectiveRunoff=0
            Solute NH4: same as V._.t1.SmithResp.Synthetic Soil Derived from the SLGA.NO3
            Solute Urea: Thickness=[1800]; InitialValues=[0]; InitialValuesUnits=ppm; WaterTableConcentration=0; D0=0; DepthConstant=0; MaxDepthSoluteAccessible=0; RunoffEffectivenessAtMovingSolute=0; MaxEffectiveRunoff=0
            Nutrient
            SoilTemperature CERESSoilTemperature
          Manager TreeManagement: same as V._.t1.AndrewRates.TreeManagement
      Factor t2
        CompositeFactor AndrewRates
          Specifications:
            [Clock]
            [Weather]
            [Soil]
            [TreeManagement]
            [Operations]
          Clock: Start=2018-01-15; End=2029-08-31
          Weather Met: FileName=Andrew.met
          Manager TreeManagement: same as V._.t1.AndrewRates.TreeManagement
          Operations
            2018-12-12  [TreeThinning].Script.DoThin(0.23174);
            2019-12-12  [TreeThinning].Script.DoThin(0.01163);
            2020-12-11  [TreeThinning].Script.DoThin(0.02353);
            2021-12-11  [TreeThinning].Script.DoThin(0.06024);
            2022-12-11  [TreeThinning].Script.DoThin(0.01282);
            2023-12-11  [TreeThinning].Script.DoThin(0.02597);
          Soil SLGAmodAndrew: same as V._.t1.AndrewRates.SLGAmodAndrew
        CompositeFactor DanyenahRates
          Specifications:
            [Clock]
            [Weather]
            [Soil]
            [TreeManagement]
            [Operations]
          Clock: Start=2014-06-15; End=2029-08-31
          Weather Met: FileName=Danyenah.met
          Manager TreeManagement: same as V._.t1.DanyenahRates.TreeManagement
          Operations
            2014-07-16  [Eucalyptus].EndCrop()
            2015-07-16  [Eucalyptus].EndCrop()
            2016-12-12  [TreeThinning].Script.DoThin(0.14286);
            2017-12-12  [TreeThinning].Script.DoThin(0.02778);
            2018-12-12  [TreeThinning].Script.DoThin(0.0);
            2019-12-12  [TreeThinning].Script.DoThin(0.0444);
            2020-12-11  [TreeThinning].Script.DoThin(0.02326);
            2021-12-11  [TreeThinning].Script.DoThin(0.05952);
            2022-12-11  [TreeThinning].Script.DoThin(0.0);
            2023-12-11  [TreeThinning].Script.DoThin(0.02532);
          Soil SLGAmodDanyenah: same as V._.t1.DanyenahRates.SLGAmodDanyenah
        CompositeFactor HenkeRates
          Specifications:
            [Clock]
            [Weather]
            [Soil]
            [TreeManagement]
            [Operations]
          Clock: Start=2017-01-15; End=2029-08-31
          Weather Met: FileName=Henke.met
          Manager TreeManagement: same as V._.t1.AndrewRates.TreeManagement
          Operations
            2017-12-12  [TreeThinning].Script.DoThin(0.1515);
            2018-03-12  [TreeThinning].Script.DoThin(0.10169);
            2019-12-12  [TreeThinning].Script.DoThin(0.0);
            2020-12-12  [TreeThinning].Script.DoThin(0.01149)
            2021-12-12  [TreeThinning].Script.DoThin(0.03488);
            2022-12-12  [TreeThinning].Script.DoThin(0.01205);
            2023-12-12  [TreeThinning].Script.DoThin(0.0);
          Soil SLGAmodHenke: same as V._.t1.HenkeRates.SLGAmodHenke
        CompositeFactor KarlinskiRates
          Specifications:
            [Clock]
            [Weather]
            [Soil]
            [TreeManagement]
            [Operations]
          Clock: Start=2015-06-15; End=2029-08-31
          Weather Met: FileName=Karlinski.met
          Manager TreeManagement: same as V._.t1.KarlinskiRates.TreeManagement
          Operations
            2015-08-16  [Eucalyptus].EndCrop()
            2017-01-12  [TreeThinning].Script.DoThin(0.1201);
            2018-01-12  [TreeThinning].Script.DoThin(0.00650);
            2019-01-12  [TreeThinning].Script.DoThin(0.0);
            2020-01-12  [TreeThinning].Script.DoThin(0.03738);
            2021-01-11  [TreeThinning].Script.DoThin(0.02913);
            2022-01-11  [TreeThinning].Script.DoThin(0.06);
            2023-01-11  [TreeThinning].Script.DoThin(0.04255);
            2024-01-11  [TreeThinning].Script.DoThin(0.11111);
          Soil SLGAmodKarlinski: same as V._.t1.KarlinskiRates.SLGAmodKarlinski
        CompositeFactor MoorabindaRates
          Specifications:
            [Clock]
            [Weather]
            [Soil]
            [TreeManagement]
            [Operations]
          Clock: Start=2018-01-15; End=2029-08-31
          Weather Met: FileName=Moorabinda.met
          Manager TreeManagement: same as V._.t1.AndrewRates.TreeManagement
          Operations
            2018-12-12  [TreeThinning].Script.DoThin(0.15938);
            2019-05-12  [TreeThinning].Script.DoThin(0.13921);
            2020-01-01  [TreeThinning].Script.DoThin(0.04938);
            2021-01-01  [TreeThinning].Script.DoThin(0.03896);
            2022-01-01  [TreeThinning].Script.DoThin(0.0);
            2023-01-01  [TreeThinning].Script.DoThin(0.0);
          Soil SLGAmodMoorabinda: same as V._.t1.MoorabindaRates.SLGAmodMoorabinda
      Factor t3
        CompositeFactor AndrewRates
          Specifications:
            [Clock]
            [Weather]
            [Soil]
            [TreeManagement]
            [Operations]
          Clock: Start=2018-01-15; End=2029-08-31
          Weather Met: FileName=Andrew.met
          Manager TreeManagement: same as V._.t1.AndrewRates.TreeManagement
          Operations
            2018-12-12  [TreeThinning].Script.DoThin(0.15174);
            2019-05-12  [TreeThinning].Script.DoThin(0.08378);
            2020-12-11  [TreeThinning].Script.DoThin(0.0);
            2021-12-11  [TreeThinning].Script.DoThin(0.0);
            2021-12-11  [TreeThinning].Script.DoThin(0.10345);
            2022-12-11  [TreeThinning].Script.DoThin(0.05128);
            2023-12-11  [TreeThinning].Script.DoThin(0.08108);
          Soil SLGAmodAndrew: same as V._.t1.AndrewRates.SLGAmodAndrew
        CompositeFactor DanyenahRates
          Specifications:
            [Clock]
            [Weather]
            [Soil]
            [TreeManagement]
            [Operations]
          Clock: Start=2014-06-15; End=2029-08-31
          Weather Met: FileName=Danyenah.met
          Manager TreeManagement: same as V._.t1.DanyenahRates.TreeManagement
          Operations
            2014-07-16  [Eucalyptus].EndCrop()
            2015-07-16  [Eucalyptus].EndCrop()
            2016-12-12  [TreeThinning].Script.DoThin(0.11111);
            2017-12-12  [TreeThinning].Script.DoThin(0.0);
            2018-12-12  [TreeThinning].Script.DoThin(0.0);
            2019-12-12  [TreeThinning].Script.DoThin(0.02083);
            2020-12-11  [TreeThinning].Script.DoThin(0.0);
            2021-12-11  [TreeThinning].Script.DoThin(0.03191);
            2022-12-11  [TreeThinning].Script.DoThin(0.01099);
            2023-12-11  [TreeThinning].Script.DoThin(0.07778);
          Soil SLGAmodDanyenah: same as V._.t1.DanyenahRates.SLGAmodDanyenah
        CompositeFactor HenkeRates
          Specifications:
            [Clock]
            [Weather]
            [Soil]
            [TreeManagement]
            [Operations]
          Clock: Start=2017-01-15; End=2029-08-31
          Weather Met: FileName=Henke.met
          Manager TreeManagement: same as V._.t1.AndrewRates.TreeManagement
          Operations
            2017-12-12  [TreeThinning].Script.DoThin(0.1515);
            2018-03-12  [TreeThinning].Script.DoThin(0.08104);
            2019-05-12  [TreeThinning].Script.DoThin(0.01124);
            2020-05-12  [TreeThinning].Script.DoThin(0.02273)
            2021-05-12  [TreeThinning].Script.DoThin(0.02326);
            2022-05-12  [TreeThinning].Script.DoThin(0.07143);
            2023-05-12  [TreeThinning].Script.DoThin(0.02564);
          Soil SLGAmodHenke: same as V._.t1.HenkeRates.SLGAmodHenke
        CompositeFactor KarlinskiRates
          Specifications:
            [Clock]
            [Weather]
            [Soil]
            [TreeManagement]
            [Operations]
          Clock: Start=2015-06-15; End=2029-08-31
          Weather Met: FileName=Karlinski.met
          Manager TreeManagement: same as V._.t1.KarlinskiRates.TreeManagement
          Operations
            2015-08-16  [Eucalyptus].EndCrop()
            2017-01-12  [TreeThinning].Script.DoThin(0.1201);
            2018-01-12  [TreeThinning].Script.DoThin(0.13649);
            2019-01-12  [TreeThinning].Script.DoThin(0.0);
            2020-01-12  [TreeThinning].Script.DoThin(0.01075);
            2021-01-11  [TreeThinning].Script.DoThin(0.02174);
            2022-01-11  [TreeThinning].Script.DoThin(0.0);
            2023-01-11  [TreeThinning].Script.DoThin(0.1);
            2024-01-11  [TreeThinning].Script.DoThin(0.07407);
          Soil SLGAmodKarlinski: same as V._.t1.KarlinskiRates.SLGAmodKarlinski
        CompositeFactor MoorabindaRates
          Specifications:
            [Clock]
            [Weather]
            [Soil]
            [TreeManagement]
            [Operations]
          Clock: Start=2018-01-15; End=2029-08-31
          Weather Met: FileName=Moorabinda.met
          Manager TreeManagement: same as V._.t1.AndrewRates.TreeManagement
          Operations
            2018-12-12  [TreeThinning].Script.DoThin(0.15938);
            2019-05-12  [TreeThinning].Script.DoThin(0.13921);
            2020-01-01  [TreeThinning].Script.DoThin(0.11111);
            2021-01-01  [TreeThinning].Script.DoThin(0.0);
            2022-01-01  [TreeThinning].Script.DoThin(0.0);
            2023-01-01  [TreeThinning].Script.DoThin(0.0);
          Soil SLGAmodMoorabinda: same as V._.t1.MoorabindaRates.SLGAmodMoorabinda
      Factor t6
        CompositeFactor AndrewRates
          Specifications:
            [Clock]
            [Weather]
            [Soil]
            [TreeManagement]
            [Operations]
            [ExptFert]
          Clock: Start=2018-01-15; End=2029-08-31
          Weather Met: FileName=Andrew.met
          Manager TreeManagement: same as V._.t1.AndrewRates.TreeManagement
          Operations
            2018-12-12  [TreeThinning].Script.DoThin(0.24961);
            2019-12-12  [TreeThinning].Script.DoThin(0.0);
            2020-12-11  [TreeThinning].Script.DoThin(0.05952);
            2021-12-11  [TreeThinning].Script.DoThin(0.06329);
            2022-12-11  [TreeThinning].Script.DoThin(0.02703);
            2023-12-11  [TreeThinning].Script.DoThin(0.06944);
          Operations ExptFert
            2019-09-12  [Fertiliser].Apply(amount: 200, type: "UreaN", depth: 100)
            2022-09-20  [Fertiliser].Apply(amount: 200, type: "NH4N", depth: 100)
          Soil SLGAmodAndrew: same as V._.t1.AndrewRates.SLGAmodAndrew
        CompositeFactor DanyenahRates
          Specifications:
            [Clock]
            [Weather]
            [Soil]
            [TreeManagement]
            [Operations]
            [ExptFert]
          Clock: Start=2014-06-15; End=2029-08-31
          Weather Met: FileName=Danyenah.met
          Manager TreeManagement: same as V._.t1.DanyenahRates.TreeManagement
          Operations
            2014-07-16  [Eucalyptus].EndCrop()
            2015-07-16  [Eucalyptus].EndCrop()
            2016-12-12  [TreeThinning].Script.DoThin(0.0694);
            2017-12-12  [TreeThinning].Script.DoThin(0.00502);
            2018-12-12  [TreeThinning].Script.DoThin(0.0);
            2019-12-12  [TreeThinning].Script.DoThin(0.01);
            2020-12-12  [TreeThinning].Script.DoThin(0.0404);
            2021-12-11  [TreeThinning].Script.DoThin(0.02105);
            2022-12-11  [TreeThinning].Script.DoThin(0.04301);
            2023-12-11  [TreeThinning].Script.DoThin(0.05618);
          Operations ExptFert
            2019-09-26  [Fertiliser].Apply(amount: 200, type: "UreaN", depth: 100)
            2022-09-20  [Fertiliser].Apply(amount: 200, type: "NH4N", depth: 100)
          Soil SLGAmodDanyenah: same as V._.t1.DanyenahRates.SLGAmodDanyenah
        CompositeFactor HenkeRates
          Specifications:
            [Clock]
            [Weather]
            [Soil]
            [TreeManagement]
            [Operations]
            [ExptFert]
          Clock: Start=2017-01-15; End=2029-08-31
          Weather Met: FileName=Henke.met
          Manager TreeManagement: same as V._.t1.AndrewRates.TreeManagement
          Operations
            2017-12-12  [TreeThinning].Script.DoThin(0.12026);
            2018-01-12  [TreeThinning].Script.DoThin(0.11149);
            2019-01-12  [TreeThinning].Script.DoThin(0.02247);
            2020-01-12  [TreeThinning].Script.DoThin(0.0);
            2021-01-12  [TreeThinning].Script.DoThin(0.03448);
            2022-01-12  [TreeThinning].Script.DoThin(0.05952);
            2023-01-12  [TreeThinning].Script.DoThin(0.03797);
          Operations ExptFert
            2018-09-09  [Fertiliser].Apply(amount: 200, type: "UreaN", depth: 100)
            2022-09-21  [Fertiliser].Apply(amount: 200, type: "NH4N", depth: 100)
          Soil SLGAmodHenke: same as V._.t1.HenkeRates.SLGAmodHenke
        CompositeFactor KarlinskiRates
          Specifications:
            [Clock]
            [Weather]
            [Soil]
            [TreeManagement]
            [Operations]
            [ExptFert]
          Clock: Start=2015-06-15; End=2029-08-31
          Weather Met: FileName=Karlinski.met
          Manager TreeManagement: same as V._.t1.KarlinskiRates.TreeManagement
          Operations
            2015-08-16  [Eucalyptus].EndCrop()
            2017-01-12  [TreeThinning].Script.DoThin(0.0997);
            2018-01-12  [TreeThinning].Script.DoThin(0.0664);
            2019-01-12  [TreeThinning].Script.DoThin(0.00855);
            2020-01-12  [TreeThinning].Script.DoThin(0.01961);
            2021-01-11  [TreeThinning].Script.DoThin(0.04);
            2022-01-11  [TreeThinning].Script.DoThin(0.04167);
            2023-01-11  [TreeThinning].Script.DoThin(0.08696);
            2024-01-11  [TreeThinning].Script.DoThin(0.10714);
          Operations ExptFert
            2019-09-26  [Fertiliser].Apply(amount: 200, type: "UreaN", depth: 100)
            2022-09-01  [Fertiliser].Apply(amount: 200, type: "UreaN", depth: 100)
          Soil SLGAmodKarlinski: same as V._.t1.KarlinskiRates.SLGAmodKarlinski
        CompositeFactor MoorabindaRates
          Specifications:
            [Clock]
            [Weather]
            [Soil]
            [TreeManagement]
            [Operations]
            [ExptFert]
          Clock: Start=2018-01-15; End=2029-08-31
          Weather Met: FileName=Moorabinda.met
          Manager TreeManagement: same as V._.t1.AndrewRates.TreeManagement
          Operations
            2018-12-12  [TreeThinning].Script.DoThin(0.2496);
            2019-12-12  [TreeThinning].Script.DoThin(0.05952);
            2021-01-01  [TreeThinning].Script.DoThin(0.0);
            2022-01-01  [TreeThinning].Script.DoThin(0.0);
            2023-01-01  [TreeThinning].Script.DoThin(0.01266);
            2024-01-01  [TreeThinning].Script.DoThin(0.01282);
          Operations ExptFert
            2019-09-10  [Fertiliser].Apply(amount: 200, type: "UreaN", depth: 100)
            2022-09-19  [Fertiliser].Apply(amount: 200, type: "NH4N", depth: 100)
          Soil SLGAmodMoorabinda: same as V._.t1.MoorabindaRates.SLGAmodMoorabinda
      Factor t7
        CompositeFactor AndrewRates
          Specifications:
            [Clock]
            [Weather]
            [Soil]
            [TreeManagement]
            [Operations]
            [ExptFert]
          Clock: Start=2018-01-15; End=2029-08-31
          Weather Met: FileName=Andrew.met
          Manager TreeManagement: same as V._.t1.AndrewRates.TreeManagement
          Operations
            2018-12-12  [TreeThinning].Script.DoThin(0.23174);
            2019-12-12  [TreeThinning].Script.DoThin(0.02326);
            2020-12-11  [TreeThinning].Script.DoThin(0.0);
            2021-12-11  [TreeThinning].Script.DoThin(0.03571);
            2022-12-11  [TreeThinning].Script.DoThin(0.03704);
            2023-12-11  [TreeThinning].Script.DoThin(0.06410);
          Operations ExptFert
            2019-09-12  [Fertiliser].Apply(amount: 200, type: "UreaN", depth: 100)
          Soil SLGAmodAndrew: same as V._.t1.AndrewRates.SLGAmodAndrew
        CompositeFactor DanyenahRates
          Specifications:
            [Clock]
            [Weather]
            [Soil]
            [TreeManagement]
            [Operations]
            [ExptFert]
          Clock: Start=2014-06-15; End=2029-08-31
          Weather Met: FileName=Danyenah.met
          Manager TreeManagement: same as V._.t1.DanyenahRates.TreeManagement
          Operations
            2014-07-16  [Eucalyptus].EndCrop()
            2015-07-16  [Eucalyptus].EndCrop()
            2016-12-12  [TreeThinning].Script.DoThin(0.0694);
            2017-12-12  [TreeThinning].Script.DoThin(0.00502);
            2018-12-12  [TreeThinning].Script.DoThin(0.0);
            2019-12-12  [TreeThinning].Script.DoThin(0.04);
            2020-12-12  [TreeThinning].Script.DoThin(0.0);
            2021-12-11  [TreeThinning].Script.DoThin(0.04167);
            2022-12-11  [TreeThinning].Script.DoThin(0.0);
            2023-12-11  [TreeThinning].Script.DoThin(0.02174);
          Operations ExptFert
            2019-09-26  [Fertiliser].Apply(amount: 200, type: "UreaN", depth: 100)
          Soil SLGAmodDanyenah: same as V._.t1.DanyenahRates.SLGAmodDanyenah
        CompositeFactor HenkeRates
          Specifications:
            [Clock]
            [Weather]
            [Soil]
            [TreeManagement]
            [Operations]
            [ExptFert]
          Clock: Start=2017-01-15; End=2029-08-31
          Weather Met: FileName=Henke.met
          Manager TreeManagement: same as V._.t1.AndrewRates.TreeManagement
          Operations
            2017-12-12  [TreeThinning].Script.DoThin(0.12026);
            2018-05-12  [TreeThinning].Script.DoThin(0.09375);
            2019-01-12  [TreeThinning].Script.DoThin(0.0);
            2020-01-12  [TreeThinning].Script.DoThin(0.01099);
            2021-01-12  [TreeThinning].Script.DoThin(0.0);
            2022-01-12  [TreeThinning].Script.DoThin(0.01111);
            2023-01-12  [TreeThinning].Script.DoThin(0.04494);
          Operations ExptFert
            2018-09-09  [Fertiliser].Apply(amount: 200, type: "UreaN", depth: 100)
          Soil SLGAmodHenke: same as V._.t1.HenkeRates.SLGAmodHenke
        CompositeFactor KarlinskiRates
          Specifications:
            [Clock]
            [Weather]
            [Soil]
            [TreeManagement]
            [Operations]
            [ExptFert]
          Clock: Start=2015-06-15; End=2029-08-31
          Weather Met: FileName=Karlinski.met
          Manager TreeManagement: same as V._.t1.KarlinskiRates.TreeManagement
          Operations
            2015-08-16  [Eucalyptus].EndCrop()
            2017-01-12  [TreeThinning].Script.DoThin(0.0997);
            2018-01-12  [TreeThinning].Script.DoThin(0.01993);
            2019-01-12  [TreeThinning].Script.DoThin(0.0);
            2020-01-12  [TreeThinning].Script.DoThin(0.0);
            2021-01-11  [TreeThinning].Script.DoThin(0.03704);
            2022-01-11  [TreeThinning].Script.DoThin(0.01923);
            2023-01-11  [TreeThinning].Script.DoThin(0.02941);
            2024-01-11  [TreeThinning].Script.DoThin(0.10101);
          Operations ExptFert
            2019-09-26  [Fertiliser].Apply(amount: 200, type: "UreaN", depth: 100)
          Soil SLGAmodKarlinski: same as V._.t1.KarlinskiRates.SLGAmodKarlinski
        CompositeFactor MoorabindaRates
          Specifications:
            [Clock]
            [Weather]
            [Soil]
            [TreeManagement]
            [Operations]
            [ExptFert]
          Clock: Start=2018-01-15; End=2029-08-31
          Weather Met: FileName=Moorabinda.met
          Manager TreeManagement: same as V._.t1.AndrewRates.TreeManagement
          Operations
            2018-12-12  [TreeThinning].Script.DoThin(0.23174);
            2019-12-12  [TreeThinning].Script.DoThin(0.05814);
            2021-01-01  [TreeThinning].Script.DoThin(0.01235);
            2022-01-01  [TreeThinning].Script.DoThin(0.0);
            2023-01-01  [TreeThinning].Script.DoThin(0.0);
            2024-01-01  [TreeThinning].Script.DoThin(0.0);
          Operations ExptFert
            2019-09-10  [Fertiliser].Apply(amount: 200, type: "UreaN", depth: 100)
          Soil SLGAmodMoorabinda: same as V._.t1.MoorabindaRates.SLGAmodMoorabinda
        CompositeFactor ConveyResp
          Specifications:
            [Clock]
            [Weather]
            [Soil]
            [TreeManagement]
            [Operations]
            [ExptFert]
            [WaterTableManager]
            [NO3inAquifer]
          Clock: Start=2016-02-15; End=2029-08-31
          Weather Met: FileName=Convey.met
          Operations
            2017-01-12  [TreeThinning].Script.DoThin(0.072);
            2018-01-12  [TreeThinning].Script.DoThin(0.0);
            2021-01-12  [TreeThinning].Script.DoThin(0.0517);
            2022-01-12  [TreeThinning].Script.DoThin(0.0182);
            2023-01-11  [TreeThinning].Script.DoThin(0.074);
            2024-01-11  [TreeThinning].Script.DoThin(0.0);
          Manager TreeManagement
            RowSpace = 1.92
            RowWidth = 4
            CultivarName = globulusEKB9
            PlantingDate = 15-Aug
            HarvestAge = 10
            FertAmount = 15
            script: same as in T._.t1.HaysRates.TreeManagement
          Manager WaterTableManager
            WaterTableDepth = 1700
            InSeasonWaterTableDepth = 1700
            StartDate = 1-Jan
            EndDate = 31-Dec
```csharp
using Models.Interfaces;
using Models.Soils;
using APSIM.Shared.Utilities;
using Models.PMF;
using Models.Core;
using System;
using Models.Soils.Nutrients;
        
        namespace Models
        {
           [Serializable] 
           [System.Xml.Serialization.XmlInclude(typeof(Model))]
            public class Script : Model
            {      
        [Link] private Soil Soil;
        [Link] private Clock Clock;
        [Link]
        private ISoilWater waterBalance;

               [Description("Water Table Depth (mm)")]
               public double WaterTableDepth { get; set; }

              [Description("InSeason Table Depth (mm)")]
               public double InSeasonWaterTableDepth { get; set; }

        [Description("Start of water table window (d-mmm)")]
        public string StartDate { get; set; }

        [Description("End of water table window (d-mmm)")]
        public string EndDate { get; set; }


        [EventSubscribe("StartOfSimulation")]
        private void OnSimulationCommencing(object sender, EventArgs e)
        {
        //(waterBalance).WaterTable = InitialWaterTableDepth;
        }       

  //             [EventSubscribe("DoManagement")]
  //             private void OnDoManagement(object sender, EventArgs e)
  //             {
  //             if (DateUtilities.WithinDates(StartDate, Clock.Today, EndDate))
  //                 (waterBalance).WaterTable = InSeasonWaterTableDepth;
  //              else
  //                  (waterBalance).WaterTable = WaterTableDepth;
  //             }
            }
        }
```
          Manager NO3inAquifer
            EachYear = True
            Dates = 15-jan, 15-feb, 15-mar, 15-apr, 15-may, 15-jun, 15-jul, 15-aug, 15-sep, 15-oct, 15-nov, 15-dec
            UseCritNThreshold = False
            CritNThreshold = -
            CritNDepth = 10000
            Depth = 1700
            Amount = 10
            FertiliserType = NO3N
```csharp
using APSIM.Core;
using System;
using Models.Core;
using Models.Soils.Nutrients;
using Models.Soils;
using Models.PMF;
using APSIM.Shared.Utilities;
using System.Linq;
using Models.Interfaces;

namespace Models
{
    [Serializable]
    public class Script : Model, IStructureDependency
    {
        [Link] private Clock clock;
        [Link] private Fertiliser fertiliser;
        [Link] private ISummary summary;
        [Link] private Soil soil;
        private Nutrient nutrient;
        private Nutrient soilN;
        [Link]
        private IPhysical soilPhysical;
        [Link]
        private Nutrient Nutrient;
        [Link(Path="[SurfaceOrganicMatter].SurfaceResidue.Decomposition")]
        private OrganicFlow ResidueDecomposition;
        public IStructure Structure { private get; set; }
        
        


        [Separator("Fertiliser will be applied on the date(s) below")]
        [Description("Apply fertiliser on the same day(s) each year? If no, then must include the year of application below")]
        public bool EachYear { get; set; }

        [Description("Dates for one or more fertiliser applications (dd-mmm or dd-mmm-yyyy) as a list with a comma between dates")]
        public string[] Dates { get; set; }

        [Separator("Test for the mineral N in the soil and don't apply the fertiliser if greater than X kgN/ha is stored in the soil above a depth of Y mm")]
        [Description("Use a critical soil mineral N to prevent application above a threshold?")]
        public bool UseCritNThreshold { get; set; }

        [Description("Don't add fertiliser if N in the soil to the depth below exceeds (kg/ha)")]
        public double CritNThreshold { get; set; }

        [Description("Depth to which the amount of N in the soil should be calculated (mm)")]
        public double CritNDepth { get; set; }

        [Separator("Fertiliser application details")]
        [Description("Depth at which to apply the fertiliser (mm)")]
        public double Depth { get; set; }

        [Description("Amount of fertiliser to apply (kg N /ha) per application")]
        public double Amount { get; set; }

        [Description("Fertiliser type - select from the list")]
        [Display(Type = DisplayType.FertiliserType)]public string FertiliserType { get; set; }


        [EventSubscribe("StartOfSimulation")]
        private void FindSoilNOrNutrient(object sender, EventArgs e)
        {
            nutrient =  Structure.Find<Nutrient>() as Nutrient;
            soilN =  Structure.Find<Nutrient>() as Nutrient;

            if (nutrient == null && soilN == null)
                throw new Exception(string.Format("Error in script {0}: Unable to find nutrient or soilN.", Name));
        }

        [EventSubscribe("DoManagement")]
        private void OnDoManagement(object sender, EventArgs e)
        {
            if (OnApplicationDate())
            {
                if (NContentBelowThreshold())
                    fertiliser.Apply(Amount, FertiliserType, Depth);
                else
                    summary.WriteMessage(this, "Skipping fertiliser application due to soil mineral N content being above critical threshold.", MessageType.Diagnostic);
            }
        }

        /// <summary>Checks if today's date is one of the specified fertiliser application dates.</summary>
        private bool OnApplicationDate()
        {
            if (EachYear)
                return Dates.Any(d => DateUtilities.DatesEqual(d, clock.Today));
            
            DateTime[] dates = Dates.Select(d => DateTime.ParseExact(d, "d-MMM-yyyy", null)).ToArray();
            return dates.Any(d => SameDate(d, clock.Today));
        }

        /// <summary>Checks if N content in soil is below critical threshold.</summary>
        private bool NContentBelowThreshold()
        {
            if (!UseCritNThreshold)
                return true;
            
            double[] weights = GetLayerWeights();
            double cumSoilN = 0;

            for (int i = 0; i < soilPhysical.Thickness.Length; i++)
            {
                if (nutrient != null)
                    cumSoilN += weights[i] * nutrient.MineralN[i];
                else if (soilN != null)
                    cumSoilN += weights[i] * soilN.MineralN[i];
            }

            return cumSoilN <= CritNThreshold;
        }

        private double[] GetLayerWeights()
        {
            double[] weights = new double[soilPhysical.Thickness.Length];
            double cumDepth = 0;

            for (int i = 0; i < soilPhysical.Thickness.Length; i++)
            {
                cumDepth += soilPhysical.Thickness[i];
                if (cumDepth < CritNDepth)
                    weights[i] = 1;
                else if (cumDepth - soilPhysical.Thickness[i] <= CritNDepth)
                    weights[i] = (CritNDepth - (cumDepth - soilPhysical.Thickness[i])) / soilPhysical.Thickness[i];
                else
                    weights[i] = 0;
            }

            return weights;
        }

        private bool SameDate(DateTime d1, DateTime d2)
        {
            return d1.Year == d2.Year && d1.DayOfYear == d2.DayOfYear;
        }
    }
}
```
          Operations ExptFert
            2019-10-01  [Fertiliser].Apply(amount: 400, type: "UreaN", depth: 100)
            2022-08-31  [Fertiliser].Apply(amount: 400, type: "UreaN", depth: 100)
          Soil SLGAmodConvey: ASCOrder=NA; ASCSubOrder=NA; SoilType=Sand over Loam; Site=18328_24930; NearestTown=SANTA TERESA; Region=Finke; State=Northern Territory; NaturalVegetation=Other Acacia tall open shrublands and shrublands; ApsoilNumber=9999; Latitude=-25.274398; Longitude=133.775136; LocationAccuracy=+- 90m; YearOfSampling=2023; Comments=Landuse is Grazing natural vegetation
            DataSource=Soil and Landscape Grid of Australia. This soil parameter file was automatically generated from the GSM National Surfaces using pedotransfer functions.
            Water: Thickness=[150, 150, 150, 150, 200, 200, 200, 400, 400]; FilledFromTop=false
              InitialValues=[0.072, 0.083, 0.085, 0.083, 0.083, 0.083, 0.083, 0.083, 0.083]
            Physical
              Thickness  ParticleSizeSand  ParticleSizeSilt  ParticleSizeClay  Rocks  BD     AirDry  LL15   DUL    SAT
              150        5                 65                30                0      1.46   0.023   0.068  0.139  0.378
              150        5                 65                30                0      1.491  0.026   0.079  0.149  0.372
              150        5                 65                30                0      1.495  0.027   0.081  0.152  0.371
              150        5                 65                30                0      1.494  0.026   0.079  0.151  0.371
              200        5                 65                30                0      1.494  0.026   0.079  0.151  0.371
              200        5                 65                30                0      1.494  0.026   0.079  0.151  0.371
              200        5                 65                30                0      1.494  0.026   0.079  0.151  0.371
              400        5                 65                30                0      1.494  0.026   0.079  0.151  0.371
              400        5                 65                30                0      1.494  0.026   0.079  0.151  0.371
              Rocks, ParticleSizeSand, ParticleSizeSilt, ParticleSizeClay source: Calculated
              SoilCrop EucalyptusSoil
                LL=[0.072, 0.083, 0.086, 0.083, 0.083, 0.083, 0.083, 0.083, 0.083]
                KL=[0.04, 0.04, 0.03, 0.03, 0.02, 0.02, 0.02, 0.06, 0.06]
                XF=[0.8, 0.6, 0.4, 0.2, 0.2, 0.2, 0.2, 0.2, 0.1]
            WaterBalance SoilWater: SummerDate=1-nov; SummerU=6; SummerCona=6; WinterDate=1-apr; WinterU=4; WinterCona=2.5; DiffusConst=236.319; DiffusSlope=55.019; Salb=0.19; CN2Bare=70; CNRed=20; CNCov=0; DischargeWidth=10; CatchmentArea=111929; PSIDul=-100; Thickness=[150, 150, 150, 150, 200, 200, 200, 400, 400]; SWCON=[0.581, 0.543, 0.535, 0.54, 0.54, 0.54, 0.54, 0.54, 0.54]
            Organic: FOMCNRatio=40; CarbonUnits=Total
              Thickness  Carbon  SoilCNRatio  FBiom  FInert  FOM
              150        4.274   13.512       0.01   0.4     666.335
              150        2.72    13.51        0.005  0.5     314.754
              150        2.02    13.51        0.005  0.6     148.679
              150        1.69    13.51        0.005  0.7     70.231
              200        0.08    13.51        0.005  1       70.231
              200        0.08    13.51        0.01   1       70.231
              200        0.08    13.51        0.01   1       70.231
              400        0.08    13.51        0.01   1       70.231
              400        0.08    13.51        0.01   1       70.231
            Chemical: Thickness=[150, 150, 150, 150, 200, 200, 200, 400, 400]; PH=[5.5, 5.6, 5.7, 5.77, 5.77, 5.77, 5.77, 5.77, 5.77]; PHUnits=Water
            Solute NO3: Thickness=[1800]; InitialValues=[3]; InitialValuesUnits=ppm; WaterTableConcentration=0; D0=0; DepthConstant=0; MaxDepthSoluteAccessible=0; RunoffEffectivenessAtMovingSolute=0; MaxEffectiveRunoff=0
            Solute NH4: Thickness=[1800]; InitialValues=[1]; InitialValuesUnits=ppm; WaterTableConcentration=0; D0=0; DepthConstant=0; MaxDepthSoluteAccessible=0; RunoffEffectivenessAtMovingSolute=0; MaxEffectiveRunoff=0
            Solute Urea: Thickness=[1800]; InitialValues=[0]; InitialValuesUnits=ppm; WaterTableConcentration=0; D0=0; DepthConstant=0; MaxDepthSoluteAccessible=0; RunoffEffectivenessAtMovingSolute=0; MaxEffectiveRunoff=0
            Nutrient
            SoilTemperature CERESSoilTemperature
        CompositeFactor CowlandResp
          Specifications:
            [Clock]
            [Weather]
            [Soil]
            [TreeManagement]
            [Operations]
            [ExptFert]
          Clock: Start=2018-01-15; End=2029-08-31
          Weather Met: FileName=Cowland.met
          Operations
            2018-12-28  [TreeThinning].Script.DoThin(0.33442);
            2019-12-28  [TreeThinning].Script.DoThin(0.0);
            2020-12-28  [TreeThinning].Script.DoThin(0.0091);
            2021-12-28  [TreeThinning].Script.DoThin(0.0);
            2022-12-28  [TreeThinning].Script.DoThin(0.0091);
          Manager TreeManagement: same as V._.t1.CowlandResp.TreeManagement
          Operations ExptFert
            2019-12-23  [Fertiliser].Apply(amount: 400, type: "UreaN", depth: 100)
            2021-01-30  [Fertiliser].Apply(amount: 400, type: "NH4N", depth: 100)
          Soil SLGAmodCowland: ASCOrder=NA; ASCSubOrder=NA; SoilType=Sandy Loam over Clay; Site=33673_34930; NearestTown=MACARTHUR; Region=Victorian Volcanic Plain; State=Victoria; NaturalVegetation=Unknown; ApsoilNumber=9999; Latitude=-38.061899; Longitude=142.108316; LocationAccuracy=+- 90m; YearOfSampling=2023; Comments=Landuse is Grazing modified pastures
            DataSource=Soil and Landscape Grid of Australia. This soil parameter file was automatically generated from the GSM National Surfaces using pedotransfer functions.
            Water: Thickness=[150, 150, 150, 150, 200, 200, 200, 400, 400]; FilledFromTop=false
              InitialValues=[0.219, 0.175, 0.197, 0.202, 0.205, 0.206, 0.205, 0.205, 0.205]
            Physical: same as V._.t1.CowlandResp.SLGAmodCowland.Physical
            WaterBalance SoilWater: same as V._.t1.CowlandResp.SLGAmodCowland.SoilWater
            Organic: FOMCNRatio=40; CarbonUnits=Total
              Thickness  Carbon  SoilCNRatio  FBiom  FInert  FOM
              150        2.8     13.505       0.02   0.08    417.668
              150        1.8     13.5         0.01   0.1     287.059
              150        1.2     13.5         0.01   0.2     197.293
              150        0.6     13.5         0.01   0.3     135.597
              200        0.22    13.5         0.01   0.922   82.244
              200        0.28    13.5         0.01   0.724   49.883
              200        0.28    13.5         0.01   0.715   30.256
              400        0       13.5         0.01   1       30.256
              400        0       13.5         0.01   1       30.256
            Chemical: Thickness=[150, 150, 150, 150, 200, 200, 200, 400, 400]; PH=[5.2, 5.24, 5.31, 5.4, 5.5, 5.59, 5.66, 5.66, 5.66]; PHUnits=Water
            Solute NO3: Thickness=[1800]; InitialValues=[3]; InitialValuesUnits=ppm; WaterTableConcentration=0; D0=0; DepthConstant=0; MaxDepthSoluteAccessible=0; RunoffEffectivenessAtMovingSolute=0; MaxEffectiveRunoff=0
            Solute NH4: Thickness=[1800]; InitialValues=[1]; InitialValuesUnits=ppm; WaterTableConcentration=0; D0=0; DepthConstant=0; MaxDepthSoluteAccessible=0; RunoffEffectivenessAtMovingSolute=0; MaxEffectiveRunoff=0
            Solute Urea: Thickness=[1800]; InitialValues=[0]; InitialValuesUnits=ppm; WaterTableConcentration=0; D0=0; DepthConstant=0; MaxDepthSoluteAccessible=0; RunoffEffectivenessAtMovingSolute=0; MaxEffectiveRunoff=0
            Nutrient
            SoilTemperature CERESSoilTemperature
        CompositeFactor DanyenahResp
          Specifications:
            [Clock]
            [Weather]
            [Soil]
            [TreeManagement]
            [Operations]
            [ExptFert]
          Clock: Start=2014-06-15; End=2029-08-31
          Weather Met: FileName=Danyenah.met
          Operations
            2014-07-16  [Eucalyptus].EndCrop()
            2015-07-16  [Eucalyptus].EndCrop()
            2016-12-12  [TreeThinning].Script.DoThin(0.1389);
            2017-12-12  [TreeThinning].Script.DoThin(0.0968);
            2018-12-12  [TreeThinning].Script.DoThin(0.10714);
            2019-12-12  [TreeThinning].Script.DoThin(0.0);
            2020-12-12  [TreeThinning].Script.DoThin(0.0);
            2021-12-12  [TreeThinning].Script.DoThin(0.0);
            2022-12-12  [TreeThinning].Script.DoThin(0.0133);
          Manager TreeManagement: same as V._.t1.DanyenahRates.TreeManagement
          Operations ExptFert
            2019-09-26  [Fertiliser].Apply(amount: 400, type: "UreaN", depth: 100)
            2022-09-20  [Fertiliser].Apply(amount: 400, type: "NH4N", depth: 100)
          Soil SLGAmodDanyenahResp: ASCOrder=NA; ASCSubOrder=NA; SoilType=Loam over Clay; Site=33489_34617; NearestTown=MACARTHUR; Region=Victorian Volcanic Plain; State=Victoria; NaturalVegetation=Mallee with hummock grass; ApsoilNumber=9999; Latitude=-37.9085; Longitude=141.8476; LocationAccuracy=+- 90m; YearOfSampling=2023; Comments=Landuse is Grazing modified pastures
            DataSource=Soil and Landscape Grid of Australia. This soil parameter file was automatically generated from the GSM National Surfaces using pedotransfer functions.
            Water: Thickness=[150, 150, 150, 150, 200, 200, 200, 400, 400]; InitialValues=[0.4, 0.316, 0.338, 0.335, 0.336, 0.3, 0.235, 0.235, 0.235]; FilledFromTop=true
            Physical
              Thickness  ParticleSizeSand  ParticleSizeSilt  ParticleSizeClay  Rocks  BD     AirDry  LL15   DUL    SAT
              150        5                 65                30                0      1.345  0.075   0.225  0.4    0.431
              150        5                 65                30                0      1.402  0.066   0.198  0.316  0.423
              150        5                 65                30                0      1.409  0.076   0.227  0.338  0.431
              150        5                 65                30                0      1.408  0.078   0.235  0.335  0.437
              200        5                 65                30                0      1.423  0.079   0.237  0.336  0.433
              200        5                 65                30                0      1.443  0.079   0.236  0.337  0.425
              200        5                 65                30                0      1.456  0.078   0.235  0.336  0.42
              400        5                 65                30                0      1.456  0.078   0.235  0.336  0.42
              400        5                 65                30                0      1.456  0.078   0.235  0.336  0.42
              Rocks, ParticleSizeSand, ParticleSizeSilt, ParticleSizeClay source: Calculated
              SoilCrop EucalyptusSoil
                LL=[0.225, 0.198, 0.234, 0.241, 0.242, 0.24, 0.238, 0.238, 0.238]
                KL=[0.06, 0.05, 0.05, 0.01, 0.01, 0.01, 0.01, 0.01, 0.005]
                XF=[0.5, 0.4, 0.3, 0.05, 0.05, 0.05, 0, 0, 0]
            WaterBalance SoilWater: same as V._.t1.DanyenahResp.SLGAmodDanyenahResp.SoilWater
            Organic: same as V._.t1.DanyenahResp.SLGAmodDanyenahResp.Organic
            Chemical: Thickness=[150, 150, 150, 150, 200, 200, 200, 400, 400]; PH=[5.7, 5.76, 5.87, 5.99, 6.1, 6.21, 6.3, 6.3, 6.3]; PHUnits=Water
            Solute NO3: same as V._.t1.DanyenahResp.SLGAmodDanyenahResp.NO3
            Solute NH4: same as V._.t1.DanyenahResp.SLGAmodDanyenahResp.NO3
            Solute Urea: same as V._.t1.DanyenahResp.SLGAmodDanyenahResp.Urea
            Nutrient
            SoilTemperature CERESSoilTemperature
        CompositeFactor MeadeResp
          Specifications:
            [Clock]
            [Weather]
            [Soil]
            [TreeManagement]
            [Operations]
            [ExptFert]
          Clock: Start=2015-06-15; End=2029-08-31
          Weather Met: FileName=Meade.met
          Operations
            2015-08-16  [Eucalyptus].EndCrop()
            2017-01-12  [TreeThinning].Script.DoThin(0.0399);
            2018-01-12  [TreeThinning].Script.DoThin(0.1169);
            2019-01-12  [TreeThinning].Script.DoThin(0.0);
            2020-01-01  [TreeThinning].Script.DoThin(0.0);
            2020-01-01  [TreeThinning].Script.DoThin(0.0);
            2021-01-01  [TreeThinning].Script.DoThin(0.0);
            2022-01-01  [TreeThinning].Script.DoThin(0.0);
          Manager TreeManagement: same as V._.t1.MeadeResp.TreeManagement
          Operations ExptFert
            2019-10-03  [Fertiliser].Apply(amount: 400, type: "UreaN", depth: 100)
            2022-08-31  [Fertiliser].Apply(amount: 400, type: "UreaN", depth: 100)
          Soil SLGAmodMeade: ASCOrder=NA; ASCSubOrder=NA; SoilType=Clay Loam over Clay; Site=34180_36387; NearestTown=COBDEN; Region=South East Coastal Plain; State=Victoria; NaturalVegetation=Unknown; ApsoilNumber=9999; Latitude=-38.484523; Longitude=143.322515; LocationAccuracy=+- 90m; YearOfSampling=2023; Comments=Landuse is Grazing natural vegetation
            DataSource=Soil and Landscape Grid of Australia. This soil parameter file was automatically generated from the GSM National Surfaces using pedotransfer functions.
            Water: FilledFromTop=false
              Thickness=[150, 150, 150, 150, 200, 200, 200, 400, 400, 500, 500, 500, 500]
              InitialValues=[0.311, 0.261, 0.282, 0.286, 0.285, 0.283, 0.281, 0.281, 0.281, 0.281, 0.281, 0.281, 0.281]
            Physical
              Thickness  ParticleSizeSand  ParticleSizeSilt  ParticleSizeClay  Rocks  BD     AirDry  LL15   DUL    SAT
              150        5                 65                30                0      1.263  0.1     0.301  0.503  0.513
              150        5                 65                30                0      1.353  0.085   0.254  0.39   0.452
              150        5                 65                30                0      1.349  0.092   0.275  0.406  0.462
              150        5                 65                30                0      1.33   0.093   0.28   0.403  0.474
              200        5                 65                30                0      1.347  0.093   0.279  0.399  0.469
              200        5                 65                30                0      1.378  0.092   0.277  0.396  0.457
              200        5                 65                30                0      1.395  0.092   0.275  0.392  0.451
              400        5                 65                30                0      1.395  0.092   0.275  0.392  0.451
              400        5                 65                30                0      1.395  0.092   0.275  0.392  0.451
              500        5                 65                30                0      1.395  0.092   0.275  0.392  0.451
              500        5                 65                30                0      1.395  0.092   0.275  0.392  0.451
              500        5                 65                30                0      1.395  0.092   0.275  0.392  0.451
              500        5                 65                30                0      1.395  0.092   0.275  0.392  0.451
              Rocks, ParticleSizeSand, ParticleSizeSilt, ParticleSizeClay source: Calculated
              SoilCrop EucalyptusSoil
                LL=[0.47, 0.37, 0.4, 0.36, 0.35, 0.35, 0.279, 0.275, 0.27, 0.27, 0.27, 0.1, 0.1]
                KL=[0.02, 0.02, 0.005, 0.005, 0.005, 0.005, 0.005, 0.005, 0.005, 0.005, 0.005, 0.04, 0.04]
                XF=[0.6, 0.4, 0.2, 0.1, 0.1, 0.1, 0.1, 0.1, 0.3, 0.3, 0.3, 0.3, 0.3]
            WaterBalance SoilWater: same as V._.t1.MeadeResp.SLGAmodMeade.SoilWater
            Organic: FOMCNRatio=40; CarbonUnits=Total
              Thickness  Carbon  SoilCNRatio  FBiom  FInert  FOM
              150        4       12           0.02   0.1     417.668
              150        2       12           0.01   0.2     287.059
              150        1       12           0.01   0.3     197.293
              150        0.8     12           0.01   0.4     135.597
              200        0.42    12           0.01   0.5     82.244
              200        0.2     12           0.01   1       49.883
              200        0.1     14           0.01   1       30.256
              400        0.01    14           0.01   1       30.256
              400        0.01    13.95        0.01   1       30.256
              500        0.01    13.95        0.01   1       30.256
              500        0.01    13.95        0.01   1       30.256
              500        0.01    13.95        0.01   1       30.256
              500        0.01    13.95        0.01   1       30.256
            Chemical: PHUnits=Water
              Thickness=[150, 150, 150, 150, 200, 200, 200, 400, 400, 500, 500, 500, 500]
              PH=[5.563, 5.65, 5.75, 5.79, 5.84, 5.88, 5.88, 5.88, 5.88, 5.88, 5.88, 5.88, 5.88]
            Solute NO3: Thickness=[1800]; InitialValues=[3]; InitialValuesUnits=ppm; WaterTableConcentration=0; D0=0; DepthConstant=0; MaxDepthSoluteAccessible=0; RunoffEffectivenessAtMovingSolute=0; MaxEffectiveRunoff=0
            Solute NH4: Thickness=[1800]; InitialValues=[1]; InitialValuesUnits=ppm; WaterTableConcentration=0; D0=0; DepthConstant=0; MaxDepthSoluteAccessible=0; RunoffEffectivenessAtMovingSolute=0; MaxEffectiveRunoff=0
            Solute Urea: Thickness=[1800]; InitialValues=[0]; InitialValuesUnits=ppm; WaterTableConcentration=0; D0=0; DepthConstant=0; MaxDepthSoluteAccessible=0; RunoffEffectivenessAtMovingSolute=0; MaxEffectiveRunoff=0
            Nutrient
            SoilTemperature CERESSoilTemperature
        CompositeFactor SmithResp
          Specifications:
            [Clock]
            [Weather]
            [Soil]
            [TreeManagement]
            [Operations]
            [ExptFert]
          Clock: Start=2017-01-15; End=2029-08-31
          Weather Met: FileName=Smith.met
          Operations
            2017-12-12  [TreeThinning].Script.DoThin(0.24);
            2018-12-12  [TreeThinning].Script.DoThin(0.17599);
            2019-12-12  [TreeThinning].Script.DoThin(0.0096);
            2020-12-11  [TreeThinning].Script.DoThin(0.0);
            2021-12-11  [TreeThinning].Script.DoThin(0.0);
            2022-12-01  [TreeThinning].Script.DoThin(0.0);
          Manager TreeManagement: same as V._.t1.AndrewRates.TreeManagement
          Operations ExptFert
            2019-10-18  [Fertiliser].Apply(amount: 400, type: "UreaN", depth: 100)
            2022-11-16  [Fertiliser].Apply(amount: 400, type: "NH4N", depth: 100)
          Soil Synthetic Soil Derived from the SLGA: ASCOrder=NA; ASCSubOrder=NA; SoilType=Loam over Clay; Site=33462_34364; NearestTown=MERINO; Region=Victorian Midlands; State=Victoria; NaturalVegetation=Mallee  with an open shrubby understorey; ApsoilNumber=9999; Latitude=-37.886178; Longitude=141.637048; LocationAccuracy=+- 90m; YearOfSampling=2023; Comments=Landuse is Grazing modified pastures
            DataSource=Soil and Landscape Grid of Australia. This soil parameter file was automatically generated from the GSM National Surfaces using pedotransfer functions.
            Water: Thickness=[150, 150, 150, 150, 200, 200, 200, 400, 400]; FilledFromTop=false
              InitialValues=[0.24, 0.209, 0.236, 0.242, 0.245, 0.245, 0.244, 0.244, 0.244]
            Physical
              Thickness  ParticleSizeSand  ParticleSizeSilt  ParticleSizeClay  Rocks  BD     AirDry  LL15   DUL    SAT    KS
              150        5                 65                30                0      1.367  0.077   0.231  0.406  0.427  25.357
              150        5                 65                30                0      1.448  0.068   0.203  0.324  0.409  10.634
              150        5                 65                30                0      1.435  0.077   0.23   0.346  0.422  4.275
              150        5                 65                30                0      1.409  0.079   0.237  0.347  0.437  2.584
              200        5                 65                30                0      1.425  0.08    0.24   0.349  0.432  2.332
              200        5                 65                30                0      1.455  0.08    0.239  0.35   0.421  2.495
              200        5                 65                30                0      1.471  0.08    0.239  0.348  0.415  2.545
              400        5                 65                30                0      1.471  0.08    0.239  0.348  0.415  2.545
              400        5                 65                30                0      1.471  0.08    0.239  0.348  0.415  2.545
              Rocks, ParticleSizeSand, ParticleSizeSilt, ParticleSizeClay source: Calculated
              SoilCrop EucalyptusSoil: LL=[0.38, 0.27, 0.27, 0.27, 0.26, 0.26, 0.24, 0.24, 0.25]; KL=[0.03, 0.03, 0.02, 0.02, 0.01, 0.01, 0.01, 0.01, 0.02]; XF=[0.8, 0.5, 0.2, 0.1, 0.1, 0.1, 0.1, 0.1, 0.1]
            WaterBalance SoilWater: same as V._.t1.SmithResp.Synthetic Soil Derived from the SLGA.SoilWater
            Organic: FOMCNRatio=40; CarbonUnits=Total
              Thickness  Carbon  SoilCNRatio  FBiom  FInert  FOM
              150        3.649   19           0.02   0.3     417.668
              150        1.27    19           0.01   0.5     287.059
              150        0.86    19           0.01   0.6     197.293
              150        0.34    17           0.01   0.8     135.597
              200        0.26    17           0.01   1       82.244
              200        0.37    17           0.01   1       49.883
              200        0.38    15           0.01   1       30.256
              400        0.01    13.63        0.01   1       30.256
              400        0.01    13.63        0.01   1       30.256
            Chemical: Thickness=[150, 150, 150, 150, 200, 200, 200, 400, 400]; PH=[5.025, 5.05, 5.13, 5.22, 5.29, 5.34, 5.39, 5.39, 5.39]; PHUnits=Water
            Solute NO3: Thickness=[1800]; InitialValues=[3]; InitialValuesUnits=ppm; WaterTableConcentration=0; D0=0; DepthConstant=0; MaxDepthSoluteAccessible=0; RunoffEffectivenessAtMovingSolute=0; MaxEffectiveRunoff=0
            Solute NH4: Thickness=[1800]; InitialValues=[1]; InitialValuesUnits=ppm; WaterTableConcentration=0; D0=0; DepthConstant=0; MaxDepthSoluteAccessible=0; RunoffEffectivenessAtMovingSolute=0; MaxEffectiveRunoff=0
            Solute Urea: Thickness=[1800]; InitialValues=[0]; InitialValuesUnits=ppm; WaterTableConcentration=0; D0=0; DepthConstant=0; MaxDepthSoluteAccessible=0; RunoffEffectivenessAtMovingSolute=0; MaxEffectiveRunoff=0
            Nutrient
            SoilTemperature CERESSoilTemperature
      Factor t8
        CompositeFactor AndrewRates
          Specifications:
            [Clock]
            [Weather]
            [Soil]
            [TreeManagement]
            [Operations]
            [ExptFert]
          Clock: Start=2018-01-15; End=2029-08-31
          Weather Met: FileName=Andrew.met
          Manager TreeManagement: same as V._.t1.AndrewRates.TreeManagement
          Operations
            2018-12-12  [TreeThinning].Script.DoThin(0.24961);
            2019-12-12  [TreeThinning].Script.DoThin(0.01190);
            2020-12-11  [TreeThinning].Script.DoThin(0.01205);
            2021-12-11  [TreeThinning].Script.DoThin(0.04878);
            2022-12-11  [TreeThinning].Script.DoThin(0.06410);
            2023-12-11  [TreeThinning].Script.DoThin(0.04110);
          Operations ExptFert
            2019-09-12  [Fertiliser].Apply(amount: 400, type: "UreaN", depth: 100)
          Soil SLGAmodAndrew: same as V._.t1.AndrewRates.SLGAmodAndrew
        CompositeFactor DanyenahRates
          Specifications:
            [Clock]
            [Weather]
            [Soil]
            [TreeManagement]
            [Operations]
            [ExptFert]
          Clock: Start=2014-06-15; End=2029-08-31
          Weather Met: FileName=Danyenah.met
          Manager TreeManagement: same as V._.t1.DanyenahRates.TreeManagement
          Operations
            2014-07-16  [Eucalyptus].EndCrop()
            2015-07-16  [Eucalyptus].EndCrop()
            2016-12-12  [TreeThinning].Script.DoThin(0.03704);
            2017-12-12  [TreeThinning].Script.DoThin(0.0);
            2018-12-12  [TreeThinning].Script.DoThin(0.0);
            2019-12-12  [TreeThinning].Script.DoThin(0.0);
            2020-12-12  [TreeThinning].Script.DoThin(0.01923);
            2021-12-11  [TreeThinning].Script.DoThin(0.05882);
            2022-12-11  [TreeThinning].Script.DoThin(0.05208);
            2023-12-11  [TreeThinning].Script.DoThin(0.07692);
          Operations ExptFert
            2019-09-26  [Fertiliser].Apply(amount: 400, type: "UreaN", depth: 100)
          Soil SLGAmodDanyenah: same as V._.t1.DanyenahRates.SLGAmodDanyenah
        CompositeFactor HenkeRates
          Specifications:
            [Clock]
            [Weather]
            [Soil]
            [TreeManagement]
            [Operations]
            [ExptFert]
          Clock: Start=2017-01-15; End=2029-08-31
          Weather Met: FileName=Henke.met
          Manager TreeManagement: same as V._.t1.AndrewRates.TreeManagement
          Operations
            2017-12-12  [TreeThinning].Script.DoThin(0.20274);
            2018-12-12  [TreeThinning].Script.DoThin(0.0);
            2019-12-12  [TreeThinning].Script.DoThin(0.01099);
            2020-12-12  [TreeThinning].Script.DoThin(0.04444);
            2021-12-12  [TreeThinning].Script.DoThin(0.03488);
            2022-12-12  [TreeThinning].Script.DoThin(0.0);
          Operations ExptFert
            2018-09-09  [Fertiliser].Apply(amount: 400, type: "UreaN", depth: 100)
          Soil SLGAmodHenke: same as V._.t1.HenkeRates.SLGAmodHenke
        CompositeFactor KarlinskiRates
          Specifications:
            [Clock]
            [Weather]
            [Soil]
            [TreeManagement]
            [Operations]
            [ExptFert]
          Clock: Start=2015-06-15; End=2029-08-31
          Weather Met: FileName=Karlinski.met
          Manager TreeManagement: same as V._.t1.KarlinskiRates.TreeManagement
          Operations
            2015-08-16  [Eucalyptus].EndCrop()
            2017-01-12  [TreeThinning].Script.DoThin(0.1);
            2018-01-12  [TreeThinning].Script.DoThin(0.1);
            2019-01-12  [TreeThinning].Script.DoThin(0.00145);
            2020-01-12  [TreeThinning].Script.DoThin(0.01010);
            2021-01-11  [TreeThinning].Script.DoThin(0.02041);
            2022-01-11  [TreeThinning].Script.DoThin(0.03125);
            2023-01-11  [TreeThinning].Script.DoThin(0.04301);
            2024-01-11  [TreeThinning].Script.DoThin(0.11236);
          Operations ExptFert
            2019-09-26  [Fertiliser].Apply(amount: 400, type: "UreaN", depth: 100)
          Soil SLGAmodKarlinski: same as V._.t1.KarlinskiRates.SLGAmodKarlinski
        CompositeFactor MoorabindaRates
          Specifications:
            [Clock]
            [Weather]
            [Soil]
            [TreeManagement]
            [Operations]
            [ExptFert]
          Clock: Start=2018-01-15; End=2029-08-31
          Weather Met: FileName=Moorabinda.met
          Manager TreeManagement: same as V._.t1.AndrewRates.TreeManagement
          Operations
            2018-12-12  [TreeThinning].Script.DoThin(0.18708);
            2019-12-12  [TreeThinning].Script.DoThin(0.03297);
            2021-01-01  [TreeThinning].Script.DoThin(0.0);
            2022-01-01  [TreeThinning].Script.DoThin(0.01136);
            2023-01-01  [TreeThinning].Script.DoThin(0.0);
            2024-01-01  [TreeThinning].Script.DoThin(0.0149);
          Operations ExptFert
            2019-09-10  [Fertiliser].Apply(amount: 400, type: "UreaN", depth: 100)
          Soil SLGAmodMoorabinda: same as V._.t1.MoorabindaRates.SLGAmodMoorabinda
        CompositeFactor ConveyResp
          Specifications:
            [Clock]
            [Weather]
            [Soil]
            [TreeManagement]
            [Operations]
            [ExptFert]
            [WaterTableManager]
            [NO3inAquifer]
          Clock: Start=2016-02-15; End=2029-08-31
          Weather Met: FileName=Convey.met
          Operations: same as V._.t7.ConveyResp.Operations
          Manager TreeManagement: same as V._.t7.ConveyResp.TreeManagement
          Manager WaterTableManager: same as V._.t7.ConveyResp.WaterTableManager
          Manager NO3inAquifer: same as V._.t7.ConveyResp.NO3inAquifer
          Operations ExptFert
            2019-10-01  [Fertiliser].Apply(amount: 400, type: "UreaN", depth: 100)
          Soil SLGAmodConvey: same as V._.t7.ConveyResp.SLGAmodConvey
        CompositeFactor CowlandResp
          Specifications:
            [Clock]
            [Weather]
            [Soil]
            [TreeManagement]
            [Operations]
            [ExptFert]
          Clock: Start=2018-01-15; End=2029-08-31
          Weather Met: FileName=Cowland.met
          Operations: same as V._.t7.CowlandResp.Operations
          Manager TreeManagement: same as V._.t1.CowlandResp.TreeManagement
          Operations ExptFert
            2019-12-23  [Fertiliser].Apply(amount: 400, type: "UreaN", depth: 100)
          Soil SLGAmodCowland: same as V._.t7.CowlandResp.SLGAmodCowland
        CompositeFactor DanyenahResp
          Specifications:
            [Clock]
            [Weather]
            [Soil]
            [TreeManagement]
            [Operations]
            [ExptFert]
          Clock: Start=2014-06-15; End=2029-08-31
          Weather Met: FileName=Danyenah.met
          Operations: same as V._.t7.DanyenahResp.Operations
          Manager TreeManagement: same as V._.t1.DanyenahRates.TreeManagement
          Operations ExptFert
            2019-09-26  [Fertiliser].Apply(amount: 400, type: "UreaN", depth: 100)
          Soil SLGAmodDanyenahResp: same as V._.t7.DanyenahResp.SLGAmodDanyenahResp
        CompositeFactor MeadeResp
          Specifications:
            [Clock]
            [Weather]
            [Soil]
            [TreeManagement]
            [Operations]
            [ExptFert]
          Clock: Start=2015-06-15; End=2029-08-31
          Weather Met: FileName=Meade.met
          Operations: same as V._.t7.MeadeResp.Operations
          Manager TreeManagement: same as V._.t1.MeadeResp.TreeManagement
          Operations ExptFert
            2019-10-03  [Fertiliser].Apply(amount: 400, type: "UreaN", depth: 100)
          Soil SLGAmodMeade: same as V._.t7.MeadeResp.SLGAmodMeade
        CompositeFactor SmithResp
          Specifications:
            [Clock]
            [Weather]
            [Soil]
            [TreeManagement]
            [Operations]
            [ExptFert]
          Clock: Start=2017-01-15; End=2029-08-31
          Weather Met: FileName=Smith.met
          Operations: same as V._.t7.SmithResp.Operations
          Manager TreeManagement: same as V._.t1.AndrewRates.TreeManagement
          Operations ExptFert
            2019-10-18  [Fertiliser].Apply(amount: 400, type: "UreaN", depth: 100)
          Soil Synthetic Soil Derived from the SLGA: same as V._.t7.SmithResp.Synthetic Soil Derived from the SLGA
      Factor t9
        CompositeFactor AndrewRates
          Specifications:
            [Clock]
            [Weather]
            [Soil]
            [TreeManagement]
            [Operations]
            [ExptFert]
          Clock: Start=2018-01-15; End=2029-08-31
          Weather Met: FileName=Andrew.met
          Manager TreeManagement: same as V._.t1.AndrewRates.TreeManagement
          Operations
            2018-12-12  [TreeThinning].Script.DoThin(0.28);
            2019-12-12  [TreeThinning].Script.DoThin(0.0);
            2020-12-11  [TreeThinning].Script.DoThin(0.0);
            2021-12-11  [TreeThinning].Script.DoThin(0.06173);
            2022-12-11  [TreeThinning].Script.DoThin(0.05263);
            2023-12-11  [TreeThinning].Script.DoThin(0.09722);
          Operations ExptFert
            2019-09-12  [Fertiliser].Apply(amount: 400, type: "UreaN", depth: 100)
            2022-09-20  [Fertiliser].Apply(amount: 400, type: "NH4N", depth: 100)
          Soil SLGAmodAndrew: same as V._.t1.AndrewRates.SLGAmodAndrew
        CompositeFactor DanyenahRates
          Specifications:
            [Clock]
            [Weather]
            [Soil]
            [TreeManagement]
            [Operations]
            [ExptFert]
          Clock: Start=2014-06-15; End=2029-08-31
          Weather Met: FileName=Danyenah.met
          Manager TreeManagement: same as V._.t1.DanyenahRates.TreeManagement
          Operations
            2014-07-16  [Eucalyptus].EndCrop()
            2015-07-16  [Eucalyptus].EndCrop()
            2016-12-12  [TreeThinning].Script.DoThin(0.0694);
            2017-12-12  [TreeThinning].Script.DoThin(0.0448);
            2018-12-12  [TreeThinning].Script.DoThin(0.0313);
            2019-12-12  [TreeThinning].Script.DoThin(0.0);
            2020-12-12  [TreeThinning].Script.DoThin(0.02151);
            2021-12-11  [TreeThinning].Script.DoThin(0.03297);
            2022-12-11  [TreeThinning].Script.DoThin(0.03409);
            2023-12-11  [TreeThinning].Script.DoThin(0.02353);
          Operations ExptFert: same as V._.t7.DanyenahResp.ExptFert
          Soil SLGAmodDanyenah: same as V._.t1.DanyenahRates.SLGAmodDanyenah
        CompositeFactor HenkeRates
          Specifications:
            [Clock]
            [Weather]
            [Soil]
            [TreeManagement]
            [Operations]
            [ExptFert]
          Clock: Start=2017-01-15; End=2029-08-31
          Weather Met: FileName=Henke.met
          Manager TreeManagement: same as V._.t1.AndrewRates.TreeManagement
          Operations
            2017-12-12  [TreeThinning].Script.DoThin(0.23778);
            2018-12-12  [TreeThinning].Script.DoThin(0.01149);
            2019-12-12  [TreeThinning].Script.DoThin(0.01163);
            2020-12-12  [TreeThinning].Script.DoThin(0.0);
            2021-12-12  [TreeThinning].Script.DoThin(0.05882);
            2022-12-12  [TreeThinning].Script.DoThin(0.05);
          Operations ExptFert
            2018-09-09  [Fertiliser].Apply(amount: 400, type: "UreaN", depth: 100)
            2022-09-21  [Fertiliser].Apply(amount: 400, type: "NH4N", depth: 100)
          Soil SLGAmodHenke: same as V._.t1.HenkeRates.SLGAmodHenke
        CompositeFactor KarlinskiRates
          Specifications:
            [Clock]
            [Weather]
            [Soil]
            [TreeManagement]
            [Operations]
            [ExptFert]
          Clock: Start=2015-06-15; End=2029-08-31
          Weather Met: FileName=Karlinski.met
          Manager TreeManagement: same as V._.t1.KarlinskiRates.TreeManagement
          Operations
            2015-08-16  [Eucalyptus].EndCrop()
            2017-01-12  [TreeThinning].Script.DoThin(0.0997);
            2018-01-12  [TreeThinning].Script.DoThin(0.0664);
            2019-01-12  [TreeThinning].Script.DoThin(0.0474);
            2020-01-12  [TreeThinning].Script.DoThin(0.03061);
            2021-01-11  [TreeThinning].Script.DoThin(0.01053);
            2022-01-11  [TreeThinning].Script.DoThin(0.03191);
            2023-01-11  [TreeThinning].Script.DoThin(0.04396);
            2024-01-11  [TreeThinning].Script.DoThin(0.10345);
          Operations ExptFert
            2019-09-26  [Fertiliser].Apply(amount: 400, type: "UreaN", depth: 100)
            2022-09-01  [Fertiliser].Apply(amount: 400, type: "UreaN", depth: 100)
          Soil SLGAmodKarlinski: same as V._.t1.KarlinskiRates.SLGAmodKarlinski
        CompositeFactor MoorabindaRates
          Specifications:
            [Clock]
            [Weather]
            [Soil]
            [TreeManagement]
            [Operations]
            [ExptFert]
          Clock: Start=2018-01-15; End=2029-08-31
          Weather Met: FileName=Moorabinda.met
          Manager TreeManagement: same as V._.t1.AndrewRates.TreeManagement
          Operations
            2018-12-12  [TreeThinning].Script.DoThin(0.2496);
            2019-12-12  [TreeThinning].Script.DoThin(0.10714);
            2021-01-01  [TreeThinning].Script.DoThin(0.0);
            2022-01-01  [TreeThinning].Script.DoThin(0.0);
            2023-01-01  [TreeThinning].Script.DoThin(0.0);
            2024-01-01  [TreeThinning].Script.DoThin(0.01333);
          Operations ExptFert
            2019-09-10  [Fertiliser].Apply(amount: 400, type: "UreaN", depth: 100)
            2022-09-19  [Fertiliser].Apply(amount: 400, type: "NH4N", depth: 100)
          Soil SLGAmodMoorabinda: same as V._.t1.MoorabindaRates.SLGAmodMoorabinda
        CompositeFactor ConveyResp
          Specifications:
            [Clock]
            [Weather]
            [Soil]
            [TreeManagement]
            [Operations]
            [ExptFert]
          Clock: Start=2016-02-15; End=2029-08-31
          Weather Met: FileName=Convey.met
          Operations
            2017-01-12  [TreeThinning].Script.DoThin(0.00298);
            2018-01-12  [TreeThinning].Script.DoThin(0.0);
            2019-01-12  [TreeThinning].Script.DoThin(0.0);
            2020-01-12  [TreeThinning].Script.DoThin(0.01493);
            2021-01-12  [TreeThinning].Script.DoThin(0.0);
            2022-01-12  [TreeThinning].Script.DoThin(0.04545);
            2023-01-11  [TreeThinning].Script.DoThin(0.12698);
            2024-01-11  [TreeThinning].Script.DoThin(0.0);
          Manager TreeManagement
            RowSpace = 1.7857
            RowWidth = 4
            CultivarName = globulusEKB9
            PlantingDate = 15-Aug
            HarvestAge = 10
            FertAmount = 15
            script: same as in T._.t1.HaysRates.TreeManagement
          Operations ExptFert: same as V._.t7.ConveyResp.ExptFert
          Soil SLGAmodConvey: same as V._.t1.ConveyResp.SLGAmodConvey
        CompositeFactor CowlandResp
          Specifications:
            [Clock]
            [Weather]
            [Soil]
            [TreeManagement]
            [Operations]
            [ExptFert]
          Clock: Start=2018-01-15; End=2029-08-31
          Weather Met: FileName=Cowland.met
          Operations
            2018-12-28  [TreeThinning].Script.DoThin(0.27998);
            2019-12-28  [TreeThinning].Script.DoThin(0.01681);
            2020-12-28  [TreeThinning].Script.DoThin(0.00);
            2021-12-28  [TreeThinning].Script.DoThin(0.05128);
            2022-12-28  [TreeThinning].Script.DoThin(0.03604);
            2023-12-28  [TreeThinning].Script.DoThin(0.03738);
          Manager TreeManagement: same as V._.t1.CowlandResp.TreeManagement
          Operations ExptFert: same as V._.t7.CowlandResp.ExptFert
          Soil SLGAmodCowland: same as V._.t1.CowlandResp.SLGAmodCowland
        CompositeFactor DanyenahResp
          Specifications:
            [Clock]
            [Weather]
            [Soil]
            [TreeManagement]
            [Operations]
            [ExptFert]
          Clock: Start=2014-06-15; End=2029-08-31
          Weather Met: FileName=Danyenah.met
          Operations
            2014-07-16  [Eucalyptus].EndCrop()
            2015-07-16  [Eucalyptus].EndCrop()
            2016-12-12  [TreeThinning].Script.DoThin(0.1389);
            2017-12-12  [TreeThinning].Script.DoThin(0.0968);
            2018-12-12  [TreeThinning].Script.DoThin(0.11901);
            2019-12-12  [TreeThinning].Script.DoThin(0.0);
            2020-12-12  [TreeThinning].Script.DoThin(0.0);
            2021-12-12  [TreeThinning].Script.DoThin(0.02703);
            2022-12-12  [TreeThinning].Script.DoThin(0.0);
            2023-12-12  [TreeThinning].Script.DoThin(0.02778);
          Manager TreeManagement: same as V._.t1.DanyenahRates.TreeManagement
          Operations ExptFert: same as V._.t7.DanyenahResp.ExptFert
          Soil SLGAmodDanyenahResp: same as V._.t1.DanyenahResp.SLGAmodDanyenahResp
        CompositeFactor MeadeResp
          Specifications:
            [Clock]
            [Weather]
            [Soil]
            [TreeManagement]
            [Operations]
            [ExptFert]
          Clock: Start=2015-06-15; End=2029-08-31
          Weather Met: FileName=Meade.met
          Operations
            2015-08-16  [Eucalyptus].EndCrop()
            2017-01-12  [TreeThinning].Script.DoThin(0.0399);
            2018-01-12  [TreeThinning].Script.DoThin(0.0);
            2019-01-12  [TreeThinning].Script.DoThin(0.07779);
            2020-01-01  [TreeThinning].Script.DoThin(0.01961);
            2020-01-01  [TreeThinning].Script.DoThin(0.0);
            2021-01-01  [TreeThinning].Script.DoThin(0.0);
            2022-01-01  [TreeThinning].Script.DoThin(0.02);
            2023-01-01  [TreeThinning].Script.DoThin(0.04082);
            2024-01-01  [TreeThinning].Script.DoThin(0.10638);
          Manager TreeManagement: same as V._.t1.MeadeResp.TreeManagement
          Operations ExptFert: same as V._.t7.MeadeResp.ExptFert
          Soil SLGAmodMeade: same as V._.t1.MeadeResp.SLGAmodMeade
        CompositeFactor SmithResp
          Specifications:
            [Clock]
            [Weather]
            [Soil]
            [TreeManagement]
            [Operations]
            [ExptFert]
          Clock: Start=2017-01-15; End=2029-08-31
          Weather Met: FileName=Smith.met
          Operations
            2017-12-12  [TreeThinning].Script.DoThin(0.24);
            2018-12-12  [TreeThinning].Script.DoThin(0.24306);
            2019-12-12  [TreeThinning].Script.DoThin(0.01129);
            2020-12-11  [TreeThinning].Script.DoThin(0.02284);
            2021-12-11  [TreeThinning].Script.DoThin(0.0);
            2022-12-01  [TreeThinning].Script.DoThin(0.0);
            2023-12-01  [TreeThinning].Script.DoThin(0.02251);
          Manager TreeManagement: same as V._.t1.AndrewRates.TreeManagement
          Operations ExptFert: same as V._.t7.SmithResp.ExptFert
          Soil Synthetic Soil Derived from the SLGA: same as V._.t1.SmithResp.Synthetic Soil Derived from the SLGA
      Factor t10
        CompositeFactor AndrewRates
          Specifications:
            [Clock]
            [Weather]
            [Soil]
            [TreeManagement]
            [Operations]
            [ExptFert]
          Clock: Start=2018-01-15; End=2029-08-31
          Weather Met: FileName=Andrew.met
          Manager TreeManagement: same as V._.t1.AndrewRates.TreeManagement
          Operations
            2018-12-12  [TreeThinning].Script.DoThin(0.24961);
            2019-12-12  [TreeThinning].Script.DoThin(0.01190);
            2020-12-11  [TreeThinning].Script.DoThin(0.01205);
            2021-12-11  [TreeThinning].Script.DoThin(0.06098);
            2022-12-11  [TreeThinning].Script.DoThin(0.03896);
            2023-12-11  [TreeThinning].Script.DoThin(0.09459);
          Operations ExptFert
            2019-09-12  [Fertiliser].Apply(amount: 400, type: "UreaN", depth: 100)
          Soil SLGAmodAndrew: same as V._.t1.AndrewRates.SLGAmodAndrew
        CompositeFactor DanyenahRates
          Specifications:
            [Clock]
            [Weather]
            [Soil]
            [TreeManagement]
            [Operations]
            [ExptFert]
          Clock: Start=2014-06-15; End=2029-08-31
          Weather Met: FileName=Danyenah.met
          Manager TreeManagement: same as V._.t1.DanyenahRates.TreeManagement
          Operations
            2014-07-16  [Eucalyptus].EndCrop()
            2015-07-16  [Eucalyptus].EndCrop()
            2016-12-12  [TreeThinning].Script.DoThin(0.0694);
            2017-12-12  [TreeThinning].Script.DoThin(0.0);
            2018-12-12  [TreeThinning].Script.DoThin(0.01497);
            2019-12-12  [TreeThinning].Script.DoThin(0.01010);
            2020-12-12  [TreeThinning].Script.DoThin(0.02041);
            2021-12-11  [TreeThinning].Script.DoThin(0.02083);
            2022-12-11  [TreeThinning].Script.DoThin(0.01064);
            2023-12-11  [TreeThinning].Script.DoThin(0.04301);
          Operations ExptFert
            2019-09-26  [Fertiliser].Apply(amount: 400, type: "UreaN", depth: 100)
          Soil SLGAmodDanyenah: same as V._.t1.DanyenahRates.SLGAmodDanyenah
        CompositeFactor HenkeRates
          Specifications:
            [Clock]
            [Weather]
            [Soil]
            [TreeManagement]
            [Operations]
            [ExptFert]
          Clock: Start=2017-01-15; End=2029-08-31
          Weather Met: FileName=Henke.met
          Manager TreeManagement: same as V._.t1.AndrewRates.TreeManagement
          Operations
            2017-12-12  [TreeThinning].Script.DoThin(0.19398);
            2018-12-12  [TreeThinning].Script.DoThin(0.0);
            2019-12-12  [TreeThinning].Script.DoThin(0.0);
            2020-12-12  [TreeThinning].Script.DoThin(0.05435);
            2021-12-12  [TreeThinning].Script.DoThin(0.04598);
            2023-12-12  [TreeThinning].Script.DoThin(0.0);
          Operations ExptFert
            2018-09-09  [Fertiliser].Apply(amount: 400, type: "UreaN", depth: 100)
          Soil SLGAmodHenke: same as V._.t1.HenkeRates.SLGAmodHenke
        CompositeFactor KarlinskiRates
          Specifications:
            [Clock]
            [Weather]
            [Soil]
            [TreeManagement]
            [Operations]
            [ExptFert]
          Clock: Start=2015-06-15; End=2029-08-31
          Weather Met: FileName=Karlinski.met
          Manager TreeManagement: same as V._.t1.KarlinskiRates.TreeManagement
          Operations
            2015-08-16  [Eucalyptus].EndCrop()
            2017-01-12  [TreeThinning].Script.DoThin(0.0);
            2018-01-12  [TreeThinning].Script.DoThin(0.0);
            2019-01-12  [TreeThinning].Script.DoThin(0.05229);
            2020-01-12  [TreeThinning].Script.DoThin(0.02586);
            2021-01-11  [TreeThinning].Script.DoThin(0.05310);
            2022-01-11  [TreeThinning].Script.DoThin(0.02804);
            2023-01-11  [TreeThinning].Script.DoThin(0.05769);
            2024-01-11  [TreeThinning].Script.DoThin(0.17347);
          Operations ExptFert
            2019-09-26  [Fertiliser].Apply(amount: 400, type: "UreaN", depth: 100)
          Soil SLGAmodKarlinski: same as V._.t1.KarlinskiRates.SLGAmodKarlinski
        CompositeFactor MoorabindaRates
          Specifications:
            [Clock]
            [Weather]
            [Soil]
            [TreeManagement]
            [Operations]
            [ExptFert]
          Clock: Start=2018-01-15; End=2029-08-31
          Weather Met: FileName=Moorabinda.met
          Manager TreeManagement: same as V._.t1.AndrewRates.TreeManagement
          Operations
            2018-12-12  [TreeThinning].Script.DoThin(0.2496);
            2019-12-12  [TreeThinning].Script.DoThin(0.05952);
            2021-01-01  [TreeThinning].Script.DoThin(0.0);
            2022-01-01  [TreeThinning].Script.DoThin(0.0);
            2023-01-01  [TreeThinning].Script.DoThin(0.0);
            2024-01-01  [TreeThinning].Script.DoThin(0.0);
          Operations ExptFert
            2019-09-10  [Fertiliser].Apply(amount: 400, type: "UreaN", depth: 100)
          Soil SLGAmodMoorabinda: same as V._.t1.MoorabindaRates.SLGAmodMoorabinda
        CompositeFactor ConveyResp
          Specifications:
            [Clock]
            [Weather]
            [Soil]
            [TreeManagement]
            [Operations]
            [ExptFert]
          Clock: Start=2016-02-15; End=2029-08-31
          Weather Met: FileName=Convey.met
          Operations
            2017-01-12  [TreeThinning].Script.DoThin(0.0);
            2020-01-12  [TreeThinning].Script.DoThin(0.05);
            2021-01-12  [TreeThinning].Script.DoThin(0.0);
            2022-01-12  [TreeThinning].Script.DoThin(0.05263);
            2023-01-11  [TreeThinning].Script.DoThin(0.01852);
            2024-01-11  [TreeThinning].Script.DoThin(0.0);
          Manager TreeManagement
            RowSpace = 2
            RowWidth = 4
            CultivarName = globulusEKB9
            PlantingDate = 15-Aug
            HarvestAge = 10
            FertAmount = 15
            script: same as in T._.t1.HaysRates.TreeManagement
          Operations ExptFert
            2019-10-01  [Fertiliser].Apply(amount: 400, type: "UreaN", depth: 100)
          Soil SLGAmodConvey: same as V._.t1.ConveyResp.SLGAmodConvey
        CompositeFactor CowlandResp
          Specifications:
            [Clock]
            [Weather]
            [Soil]
            [TreeManagement]
            [Operations]
            [ExptFert]
          Clock: Start=2018-01-15; End=2029-08-31
          Weather Met: FileName=Cowland.met
          Operations
            2018-12-28  [TreeThinning].Script.DoThin(0.28603);
            2019-12-28  [TreeThinning].Script.DoThin(0.0);
            2020-12-28  [TreeThinning].Script.DoThin(0.0);
            2021-12-28  [TreeThinning].Script.DoThin(0.05932);
            2022-12-28  [TreeThinning].Script.DoThin(0.05405);
            2023-12-28  [TreeThinning].Script.DoThin(0.02857);
          Manager TreeManagement: same as V._.t1.CowlandResp.TreeManagement
          Operations ExptFert
            2019-12-23  [Fertiliser].Apply(amount: 400, type: "UreaN", depth: 100)
          Soil SLGAmodCowland: same as V._.t1.CowlandResp.SLGAmodCowland
        CompositeFactor DanyenahResp
          Specifications:
            [Clock]
            [Weather]
            [Soil]
            [TreeManagement]
            [Operations]
            [ExptFert]
          Clock: Start=2014-06-15; End=2029-08-31
          Weather Met: FileName=Danyenah.met
          Operations
            2014-07-16  [Eucalyptus].EndCrop()
            2015-07-16  [Eucalyptus].EndCrop()
            2016-12-12  [TreeThinning].Script.DoThin(0.1389);
            2017-12-12  [TreeThinning].Script.DoThin(0.06450);
            2018-12-12  [TreeThinning].Script.DoThin(0.0);
            2019-12-12  [TreeThinning].Script.DoThin(0.02299);
            2020-12-12  [TreeThinning].Script.DoThin(0.0);
            2021-12-12  [TreeThinning].Script.DoThin(0.02353);
            2022-12-12  [TreeThinning].Script.DoThin(0.0);
            2023-12-12  [TreeThinning].Script.DoThin(0.06024);
          Manager TreeManagement: same as V._.t1.DanyenahRates.TreeManagement
          Operations ExptFert
            2019-09-26  [Fertiliser].Apply(amount: 400, type: "UreaN", depth: 100)
          Soil SLGAmodDanyenahResp: same as V._.t1.DanyenahResp.SLGAmodDanyenahResp
        CompositeFactor MeadeResp
          Specifications:
            [Clock]
            [Weather]
            [Soil]
            [TreeManagement]
            [Operations]
            [ExptFert]
          Clock: Start=2015-06-15; End=2029-08-31
          Weather Met: FileName=Meade.met
          Operations
            2015-08-16  [Eucalyptus].EndCrop()
            2017-01-12  [TreeThinning].Script.DoThin(0.);
            2018-01-12  [TreeThinning].Script.DoThin(0.09722);
            2019-01-12  [TreeThinning].Script.DoThin(0.);
            2020-01-01  [TreeThinning].Script.DoThin(0.03846);
            2021-01-01  [TreeThinning].Script.DoThin(0.0);
            2022-01-01  [TreeThinning].Script.DoThin(0.06);
            2023-01-01  [TreeThinning].Script.DoThin(0.02128);
            2024-01-01  [TreeThinning].Script.DoThin(0.1087);
          Manager TreeManagement: same as V._.t1.MeadeResp.TreeManagement
          Operations ExptFert
            2019-10-03  [Fertiliser].Apply(amount: 400, type: "UreaN", depth: 100)
          Soil SLGAmodMeade: same as V._.t1.MeadeResp.SLGAmodMeade
        CompositeFactor SmithResp
          Specifications:
            [Clock]
            [Weather]
            [Soil]
            [TreeManagement]
            [Operations]
            [ExptFert]
          Clock: Start=2017-01-15; End=2029-08-31
          Weather Met: FileName=Smith.met
          Operations
            2017-12-12  [TreeThinning].Script.DoThin(0.24);
            2018-12-12  [TreeThinning].Script.DoThin(0.25325);
            2019-12-12  [TreeThinning].Script.DoThin(0.01122);
            2020-12-11  [TreeThinning].Script.DoThin(0.0);
            2021-12-11  [TreeThinning].Script.DoThin(0.0);
            2023-12-01  [TreeThinning].Script.DoThin(0.09508);
          Manager TreeManagement: same as V._.t1.AndrewRates.TreeManagement
          Operations ExptFert
            2019-10-18  [Fertiliser].Apply(amount: 400, type: "UreaN", depth: 100)
          Soil Synthetic Soil Derived from the SLGA: same as V._.t1.SmithResp.Synthetic Soil Derived from the SLGA
      Factor t19
        CompositeFactor ConveyResp
          Specifications:
            [Clock]
            [Weather]
            [Soil]
            [TreeManagement]
            [Operations]
            [ExptFert]
          Clock: Start=2016-02-15; End=2029-08-31
          Weather Met: FileName=Convey.met
          Operations
            2017-01-12  [TreeThinning].Script.DoThin(0.0);
            2018-01-12  [TreeThinning].Script.DoThin(0.0);
            2021-01-12  [TreeThinning].Script.DoThin(0.05172);
            2022-01-12  [TreeThinning].Script.DoThin(0.07273);
            2023-01-11  [TreeThinning].Script.DoThin(0.15686);
            2024-01-11  [TreeThinning].Script.DoThin(0.0);
          Manager TreeManagement
            RowSpace = 2.069536
            RowWidth = 4
            CultivarName = globulusEKB9
            PlantingDate = 15-Aug
            HarvestAge = 10
            FertAmount = 15
            script: same as in T._.t1.HaysRates.TreeManagement
          Operations ExptFert
            2022-10-01  [Fertiliser].Apply(amount: 400, type: "UreaN", depth: 100)
          Soil SLGAmodConvey: same as V._.t1.ConveyResp.SLGAmodConvey
        CompositeFactor CowlandResp
          Specifications:
            [Clock]
            [Weather]
            [Soil]
            [TreeManagement]
            [Operations]
            [ExptFert]
          Clock: Start=2018-01-15; End=2029-08-31
          Weather Met: FileName=Cowland.met
          Operations
            2018-12-28  [TreeThinning].Script.DoThin(0.33443);
            2019-12-28  [TreeThinning].Script.DoThin(0.00909);
            2020-12-28  [TreeThinning].Script.DoThin(0.00917);
            2021-12-28  [TreeThinning].Script.DoThin(0.06481);
            2022-12-28  [TreeThinning].Script.DoThin(0.0198);
            2023-12-28  [TreeThinning].Script.DoThin(0.09091);
          Manager TreeManagement: same as V._.t1.CowlandResp.TreeManagement
          Operations ExptFert
            2022-12-23  [Fertiliser].Apply(amount: 400, type: "UreaN", depth: 100)
          Soil SLGAmodCowland: same as V._.t1.CowlandResp.SLGAmodCowland
        CompositeFactor DanyenahResp
          Specifications:
            [Clock]
            [Weather]
            [Soil]
            [TreeManagement]
            [Operations]
            [ExptFert]
          Clock: Start=2014-06-15; End=2029-08-31
          Weather Met: FileName=Danyenah.met
          Operations
            2014-07-16  [Eucalyptus].EndCrop()
            2015-07-16  [Eucalyptus].EndCrop()
            2016-12-12  [TreeThinning].Script.DoThin(0.1389);
            2017-12-12  [TreeThinning].Script.DoThin(0.0968);
            2018-12-12  [TreeThinning].Script.DoThin(0.10714);
            2019-12-12  [TreeThinning].Script.DoThin(0.0);
            2020-12-12  [TreeThinning].Script.DoThin(0.0);
            2021-12-12  [TreeThinning].Script.DoThin(0.0);
            2022-12-12  [TreeThinning].Script.DoThin(0.0133);
            2023-12-12  [TreeThinning].Script.DoThin(0.0133);
          Manager TreeManagement: same as V._.t1.DanyenahRates.TreeManagement
          Operations ExptFert
            2022-09-26  [Fertiliser].Apply(amount: 400, type: "UreaN", depth: 100)
          Soil SLGAmodDanyenahResp: same as V._.t1.DanyenahResp.SLGAmodDanyenahResp
        CompositeFactor MeadeResp
          Specifications:
            [Clock]
            [Weather]
            [Soil]
            [TreeManagement]
            [Operations]
            [ExptFert]
          Clock: Start=2015-06-15; End=2029-08-31
          Weather Met: FileName=Meade.met
          Operations
            2015-08-16  [Eucalyptus].EndCrop()
            2017-01-12  [TreeThinning].Script.DoThin(0.0399);
            2018-01-12  [TreeThinning].Script.DoThin(0.1169);
            2019-01-12  [TreeThinning].Script.DoThin(0.0);
            2020-01-01  [TreeThinning].Script.DoThin(0.0);
            2020-01-01  [TreeThinning].Script.DoThin(0.0);
            2021-01-01  [TreeThinning].Script.DoThin(0.0);
            2022-01-01  [TreeThinning].Script.DoThin(0.04082);
            2023-01-01  [TreeThinning].Script.DoThin(0.0);
            2024-01-01  [TreeThinning].Script.DoThin(0.08511);
          Manager TreeManagement: same as V._.t1.MeadeResp.TreeManagement
          Operations ExptFert
            2022-10-03  [Fertiliser].Apply(amount: 400, type: "UreaN", depth: 100)
          Soil SLGAmodMeade: same as V._.t1.MeadeResp.SLGAmodMeade
        CompositeFactor SmithResp
          Specifications:
            [Clock]
            [Weather]
            [Soil]
            [TreeManagement]
            [Operations]
            [ExptFert]
          Clock: Start=2017-01-15; End=2029-08-31
          Weather Met: FileName=Smith.met
          Operations
            2017-12-12  [TreeThinning].Script.DoThin(0.24);
            2018-12-12  [TreeThinning].Script.DoThin(0.16803);
            2019-12-12  [TreeThinning].Script.DoThin(0.01027);
            2020-12-11  [TreeThinning].Script.DoThin(0.01038);
            2021-12-11  [TreeThinning].Script.DoThin(0.0);
            2022-12-01  [TreeThinning].Script.DoThin(0.02020);
            2023-12-01  [TreeThinning].Script.DoThin(0.02062);
          Manager TreeManagement: same as V._.t1.AndrewRates.TreeManagement
          Operations ExptFert
            2022-10-18  [Fertiliser].Apply(amount: 400, type: "UreaN", depth: 100)
          Soil Synthetic Soil Derived from the SLGA: same as V._.t1.SmithResp.Synthetic Soil Derived from the SLGA
    Simulation VIC
      Weather: FileName=Hayes.met
      Clock: Start=2004-06-01; End=2024-10-30
      Summary
      SoilArbitrator Soil Arbitrator
      MicroClimate: a_interception=0; b_interception=1; c_interception=0; d_interception=0; SoilHeatFluxFraction=0.4; MinimumHeightDiffForNewLayer=0; NightInterceptionFraction=0.5; ReferenceHeight=2
      Zone Plantation: Area=1; Slope=0; AspectAngle=0; Altitude=50
        Fertiliser
        SurfaceOrganicMatter: InitialResidueName=Eucalyptus; InitialResidueType=Eucalyptus; InitialResidueMass=2000; InitialStandingFraction=0; InitialCPR=0; InitialCNR=80
        Plant Eucalyptus
        Manager TreeManagement
          RowSpace = 2.9703
          RowWidth = 4
          CultivarName = globulusEKB9
          PlantingDate = 15-Sep
          HarvestAge = 10
          FertAmount = 15
          script: same as in T._.t1.HaysRates.TreeManagement
        Manager TreeThinning: same as T.TAS.Plantation.TreeThinning
        Operations
        Report HarvestReport: EventNames=[Eucalyptus].Harvesting
          VariableNames:
            [Clock].Today
            [Eucalyptus].Population*10000 as sph
            [Eucalyptus].Stem.Ht
            [Eucalyptus].Stem.DBH
            [Eucalyptus].Stem.MAIub
            ([Eucalyptus].Stem.Volub) on 2020-01-01
        Soil Synthetic Soil Derived from the SLGA1: ASCOrder=NA; ASCSubOrder=NA; SoilType=Loam over Clay; Site=32929_34418; NearestTown=COLERAINE; Region=Victorian Midlands; State=Victoria; NaturalVegetation=Unknown; ApsoilNumber=9999; Latitude=-37.441888; Longitude=141.681713; LocationAccuracy=+- 90m; YearOfSampling=2023; Comments=Landuse is Grazing modified pastures
          DataSource=Soil and Landscape Grid of Australia. This soil parameter file was automatically generated from the GSM National Surfaces using pedotransfer functions.
          Water: Thickness=[150, 150, 150, 150, 200, 200, 200]; FilledFromTop=false
            InitialValues=[0.37217, 0.30149, 0.321102, 0.329199, 0.33682, 0.341949, 0.342259]
          Physical
            Thickness  BD       AirDry     LL15      DUL       SAT       KS
            150        1.3451   0.0704485  0.211346  0.37217   0.433316  27.3726
            150        1.42388  0.0615524  0.184657  0.30149   0.413533  14.7631
            150        1.42368  0.0685193  0.205558  0.321102  0.420515  7.56159
            150        1.41022  0.0718355  0.215507  0.329199  0.42948   4.98588
            200        1.42423  0.0739143  0.221743  0.33682   0.426704  4.07733
            200        1.44749  0.075099   0.225297  0.341949  0.419459  3.74842
            200        1.45921  0.0755574  0.226672  0.342259  0.415947  3.53945
            SoilCrop WheatSoil
              LL=[0.220995, 0.191667, 0.212453, 0.221762, 0.227269, 0.229966, 0.230373]
              KL=[0.06, 0.06, 0.0596733, 0.05502, 0.04802, 0.04002, 0.03202]
              XF=[1, 1, 1, 1, 1, 1, 1]
            SoilCrop EucalyptusSoil
              LL=[0.220995, 0.191667, 0.212453, 0.221762, 0.227269, 0.229966, 0.230373]
              KL=[0.06, 0.06, 0.0596733, 0.05502, 0.04802, 0.04002, 0.03202]
              XF=[1, 1, 1, 1, 1, 1, 1]
            SoilCrop PinusSoil
              LL=[0.220995, 0.191667, 0.212453, 0.221762, 0.227269, 0.229966, 0.230373]
              KL=[0.06, 0.06, 0.0596733, 0.05502, 0.04802, 0.04002, 0.03202]
              XF=[1, 1, 1, 1, 1, 1, 1]
            SoilCrop SCRUMSoil
              LL=[0.220995, 0.191667, 0.212453, 0.221762, 0.227269, 0.229966, 0.230373]
              KL=[0.06, 0.06, 0.0596733, 0.05502, 0.04802, 0.04002, 0.03202]
              XF=[1, 1, 1, 1, 1, 1, 1]
            SoilCrop OatsSoil
              LL=[0.220995, 0.191667, 0.212453, 0.221762, 0.227269, 0.229966, 0.230373]
              KL=[0.06, 0.06, 0.0596733, 0.05502, 0.04802, 0.04002, 0.03202]
              XF=[1, 1, 1, 1, 1, 1, 1]
            SoilCrop SorghumSoil
              LL=[0.222603, 0.192835, 0.213613, 0.22297, 0.228592, 0.231423, 0.231933]
              KL=[0.07, 0.07, 0.0697142, 0.0656425, 0.0595175, 0.0525175, 0.0455175]
              XF=[1, 1, 1, 1, 1, 1, 1]
            SoilCrop BarleySoil
              LL=[0.222603, 0.192835, 0.213607, 0.222882, 0.228379, 0.231064, 0.231434]
              KL=[0.07, 0.07, 0.0696637, 0.0648735, 0.0576676, 0.0494324, 0.0411971]
              XF=[1, 1, 1, 1, 1, 1, 1]
            SoilCrop ChickpeaSoil
              LL=[0.220995, 0.191667, 0.212491, 0.222328, 0.228119, 0.230684, 0.230943]
              KL=[0.06, 0.06, 0.06, 0.06, 0.0554077, 0.0461769, 0.0369462]
              XF=[1, 1, 1, 1, 1, 1, 1]
            SoilCrop MungbeanSoil
              LL=[0.220995, 0.191667, 0.212491, 0.222103, 0.22727, 0.2295, 0.22945]
              KL=[0.06, 0.06, 0.06, 0.05802, 0.04803, 0.03603, 0.02403]
              XF=[1, 1, 1, 1, 1, 1, 1]
            SoilCrop CottonSoil
              LL=[0.227428, 0.19634, 0.217112, 0.226876, 0.233251, 0.236318, 0.236308]
              KL=[0.1, 0.1, 0.1, 0.1, 0.1, 0.0944722, 0.0833611]
              XF=[1, 1, 1, 1, 1, 1, 1]
            SoilCrop CanolaSoil
              LL=[0.220995, 0.191667, 0.212453, 0.221762, 0.227269, 0.229966, 0.230373]
              KL=[0.06, 0.06, 0.0596733, 0.05502, 0.04802, 0.04002, 0.03202]
              XF=[1, 1, 1, 1, 1, 1, 1]
            SoilCrop Pigeon PeaSoil
              LL=[0.220995, 0.191667, 0.212491, 0.222328, 0.228075, 0.230549, 0.230721]
              KL=[0.06, 0.06, 0.06, 0.06, 0.055025, 0.045025, 0.035025]
              XF=[1, 1, 1, 1, 1, 1, 1]
            SoilCrop MaizeSoil
              LL=[0.220995, 0.191667, 0.212453, 0.221762, 0.227269, 0.229966, 0.230373]
              KL=[0.06, 0.06, 0.0596733, 0.05502, 0.04802, 0.04002, 0.03202]
              XF=[1, 1, 1, 1, 1, 1, 1]
            SoilCrop CowpeasSoil
              LL=[0.220995, 0.191667, 0.212453, 0.221762, 0.227269, 0.229966, 0.230373]
              KL=[0.06, 0.06, 0.0596733, 0.05502, 0.04802, 0.04002, 0.03202]
              XF=[1, 1, 1, 1, 1, 1, 1]
            SoilCrop SunflowerSoil
              LL=[0.227351, 0.195485, 0.215247, 0.224037, 0.229193, 0.231476, 0.231435]
              KL=[0.0995196, 0.0926765, 0.0838529, 0.0750294, 0.0647353, 0.0529706, 0.0412059]
              XF=[1, 1, 1, 1, 1, 1, 1]
            SoilCrop FababeanSoil
              LL=[0.224212, 0.194004, 0.214801, 0.224602, 0.230786, 0.233299, 0.233281]
              KL=[0.08, 0.08, 0.08, 0.08, 0.0785857, 0.0686, 0.0571714]
              XF=[1, 1, 1, 1, 1, 1, 1]
            SoilCrop LucerneSoil
              LL=[0.227428, 0.19634, 0.217112, 0.226876, 0.233251, 0.236962, 0.238231]
              KL=[0.1, 0.1, 0.1, 0.1, 0.1, 0.1, 0.1]
              XF=[1, 1, 1, 1, 1, 1, 1]
            SoilCrop PerennialsSoil
              LL=[0.227428, 0.19634, 0.217112, 0.226876, 0.233251, 0.236318, 0.236308]
              KL=[0.1, 0.1, 0.1, 0.1, 0.1, 0.0944722, 0.0833611]
              XF=[1, 1, 1, 1, 1, 1, 1]
            SoilCrop LupinsSoil
              LL=[0.220995, 0.191667, 0.212453, 0.221762, 0.227269, 0.229966, 0.230373]
              KL=[0.06, 0.06, 0.0596733, 0.05502, 0.04802, 0.04002, 0.03202]
              XF=[1, 1, 1, 1, 1, 1, 1]
            SoilCrop LentilsSoil
              LL=[0.220995, 0.191667, 0.212453, 0.221762, 0.227269, 0.229966, 0.230373]
              KL=[0.06, 0.06, 0.0596733, 0.05502, 0.04802, 0.04002, 0.03202]
              XF=[1, 1, 1, 1, 1, 1, 1]
            SoilCrop TriticaleSoil
              LL=[0.222603, 0.192835, 0.213098, 0.221841, 0.226873, 0.229013, 0.228883]
              KL=[0.07, 0.07, 0.0652591, 0.0557136, 0.0445773, 0.03185, 0.0191227]
              XF=[1, 1, 1, 1, 1, 1, 1]
            SoilCrop MilletSoil: same as V.VIC.Plantation.Synthetic Soil Derived from the SLGA1.Physical.SorghumSoil
            SoilCrop SoybeansSoil
              LL=[0.220995, 0.191667, 0.212453, 0.221762, 0.227269, 0.229966, 0.230373]
              KL=[0.06, 0.06, 0.0596733, 0.05502, 0.04802, 0.04002, 0.03202]
              XF=[1, 1, 1, 1, 1, 1, 1]
            SoilCrop Pasture grasses & legumesSoil
              LL=[0.220995, 0.191667, 0.212453, 0.221762, 0.227269, 0.229966, 0.230373]
              KL=[0.06, 0.06, 0.0596733, 0.05502, 0.04802, 0.04002, 0.03202]
              XF=[1, 1, 1, 1, 1, 1, 1]
          WaterBalance SoilWater: SummerDate=1-nov; SummerU=6; SummerCona=6; WinterDate=1-apr; WinterU=2; WinterCona=2; DiffusConst=100.608; DiffusSlope=35.8873; Salb=0.13; CN2Bare=78; CNRed=20; CNCov=0; DischargeWidth=10; CatchmentArea=1778.89; PSIDul=-100; Thickness=[150, 150, 150, 150, 200, 200, 200]
            SWCON=[0.529346, 0.35842, 0.28065, 0.220405, 0.168975, 0.177762, 0.17736]
          Organic: FOMCNRatio=40; CarbonUnits=Total
            Thickness  Carbon    SoilCNRatio  FBiom    FInert    FOM
            150        3.74363   14           0.04     0.15408   417.668
            150        1.29892   14           0.03106  0.370147  287.059
            150        0.982525  14           0.01404  0.493649  197.293
            150        0.606444  14           0.01     0.797373  135.597
            200        0.477866  14           0.01     0.993473  82.2438
            200        0.469139  14           0.01     1         49.8834
            200        0.434521  14           0.01     1         30.2558
          Chemical: Thickness=[150, 150, 150, 150, 200, 200, 200]; PHUnits=Water
            PH=[5.04944, 5.13296, 5.17257, 5.19378, 5.2541, 5.33396, 5.40309]
          Solute NO3: Thickness=[1800]; InitialValues=[3]; InitialValuesUnits=ppm; WaterTableConcentration=0; D0=0; DepthConstant=0; MaxDepthSoluteAccessible=0; RunoffEffectivenessAtMovingSolute=0; MaxEffectiveRunoff=0
          Solute NH4: Thickness=[1800]; InitialValues=[1]; InitialValuesUnits=ppm; WaterTableConcentration=0; D0=0; DepthConstant=0; MaxDepthSoluteAccessible=0; RunoffEffectivenessAtMovingSolute=0; MaxEffectiveRunoff=0
          Solute Urea: Thickness=[1800]; InitialValues=[0]; InitialValuesUnits=ppm; WaterTableConcentration=0; D0=0; DepthConstant=0; MaxDepthSoluteAccessible=0; RunoffEffectivenessAtMovingSolute=0; MaxEffectiveRunoff=0
          Nutrient
          SoilTemperature CERESSoilTemperature
        Operations ExptFert
        Report AnnualReport: EventNames=[Clock].EndOfYear
          VariableNames:
            [Clock].Today
            [Eucalyptus].Age
            [Eucalyptus].Population*10000 as sph
            [Eucalyptus].Stem.DBH
            [Eucalyptus].Stem.Ht
            [Eucalyptus].Stem.MAIub
            [Eucalyptus].Stem.BA
            [Eucalyptus].Stem.Volub
            [Eucalyptus].Stem.WoodDensity
        Manager WaterTableManager
          WaterTableDepth = 9500
          InSeasonWaterTableDepth = 9500
          StartDate = 1-Jan
          EndDate = 31-Dec
          script: same as in V._.t7.ConveyResp.WaterTableManager
        Manager NO3inAquifer
          EachYear = True
          Dates = 15-jan, 15-feb, 15-mar, 15-apr, 15-may, 15-jun, 15-jul, 15-aug, 15-sep, 15-oct, 15-nov, 15-dec
          UseCritNThreshold = False
          CritNThreshold = -
          CritNDepth = 10000
          Depth = 1900
          Amount = 0
          FertiliserType = NO3N
          script: same as in V._.t7.ConveyResp.NO3inAquifer
        Report DailyReport: same as Replacements.DailyReport
  Experiment W
    Factors _
      Factor t1
        CompositeFactor FaganRates
          Specifications:
            [Clock]
            [Weather]
            [Soil]
            [TreeManagement]
            [Operations]
          Clock: Start=2017-02-15; End=2029-08-31
          Weather Met: FileName=Fagan.met
          Manager TreeManagement: same as V._.t1.MeadeResp.TreeManagement
          Operations
            2018-01-12  [TreeThinning].Script.DoThin(0.1466);
            2019-01-12  [TreeThinning].Script.DoThin(0.0);
            2020-01-12  [TreeThinning].Script.DoThin(0.0);
            2021-01-11  [TreeThinning].Script.DoThin(0.0099);
            2022-01-11  [TreeThinning].Script.DoThin(0.01);
            2023-01-11  [TreeThinning].Script.DoThin(0.0);
            2024-01-11  [TreeThinning].Script.DoThin(0.0202);
          Soil SLGAmodFagan: ASCOrder=NA; ASCSubOrder=NA; SoilType=Sand over Clay Loam; Site=29891_4956; NearestTown=DENMARK; Region=Warren; State=Western Australia; NaturalVegetation=Cleared, non-native vegetation, buildings; ApsoilNumber=9999; Latitude=-34.91; Longitude=117.13; LocationAccuracy=+- 90m; YearOfSampling=2024; Comments=Landuse is Grazing modified pastures
            DataSource=Soil and Landscape Grid of Australia. This soil parameter file was automatically generated from the GSM National Surfaces using pedotransfer functions.
            Water: FilledFromTop=false
              Thickness=[150, 150, 150, 150, 200, 200, 500, 500, 500, 500, 500, 500, 500, 500, 500, 500]
              InitialValues=[0.162, 0.118, 0.125, 0.139, 0.158, 0.175, 0.175, 0.175, 0.175, 0.175, 0.175, 0.175, 0.175, 0.175, 0.175, 0.175]
            Physical
              Thickness  ParticleSizeSand  ParticleSizeSilt  ParticleSizeClay  Rocks  BD     AirDry  LL15   DUL    SAT    KS
              150        5                 65                30                0      1.384  0.052   0.155  0.296  0.403  136.847
              150        5                 65                30                0      1.44   0.038   0.113  0.209  0.389  91.817
              150        5                 65                30                0      1.446  0.04    0.121  0.21   0.392  57.204
              150        5                 65                30                0      1.435  0.045   0.135  0.222  0.401  35.542
              200        5                 65                30                0      1.436  0.051   0.153  0.245  0.406  21.315
              200        5                 65                30                0      1.445  0.057   0.17   0.266  0.407  13.751
              500        5                 65                30                0      1.445  0.057   0.17   0.266  0.407  13.751
              500        5                 65                30                0      1.445  0.057   0.17   0.266  0.407  13.751
              500        5                 65                30                0      1.445  0.057   0.17   0.266  0.407  13.751
              500        5                 65                30                0      1.445  0.057   0.17   0.266  0.407  13.751
              500        5                 65                30                0      1.445  0.057   0.17   0.266  0.407  13.751
              500        5                 65                30                0      1.445  0.057   0.17   0.266  0.407  13.751
              500        5                 65                30                0      1.445  0.057   0.17   0.266  0.407  13.751
              500        5                 65                30                0      1.445  0.057   0.17   0.266  0.407  13.751
              500        5                 65                30                0      1.445  0.057   0.17   0.266  0.407  13.751
              500        5                 65                30                0      1.445  0.057   0.17   0.266  0.407  13.751
              Rocks, ParticleSizeSand, ParticleSizeSilt, ParticleSizeClay source: Calculated
              SoilCrop EucalyptusSoil
                LL=[0.155, 0.113, 0.121, 0.135, 0.18, 0.2, 0.2, 0.2, 0.2, 0.17, 0.17, 0.17, 0.17, 0.17, 0.17, 0.17]
                KL=[0.06, 0.06, 0.06, 0.055, 0.048, 0.04, 0.005, 0.005, 0.001, 0.001, 0.001, 0.001, 0.001, 0.001, 0.001, 0.001]
                XF=[1, 1, 1, 1, 1, 1, 1, 1, 1, 0, 0, 0, 0, 0, 0, 0]
                XF source: Calculated (layer 7)
            WaterBalance SoilWater: SummerDate=1-nov; SummerU=6; SummerCona=6; WinterDate=1-apr; WinterU=2; WinterCona=2; DiffusConst=189.16; DiffusSlope=44.1802; Salb=0.19; CN2Bare=70; CNRed=20; CNCov=0; DischargeWidth=10; CatchmentArea=3486.37; PSIDul=-100
              Thickness=[150, 150, 150, 150, 200, 200, 500, 500, 500, 500, 500, 500, 500, 500, 500, 500]
              SWCON=[0.61, 0.532, 0.477, 0.418, 0.31, 0.267, 0.267, 0.267, 0.267, 0.267, 0.267, 0.267, 0.267, 0.267, 0.267, 0.267]
            Organic: FOMCNRatio=40; CarbonUnits=Total
              Thickness  Carbon  SoilCNRatio  FBiom  FInert  FOM
              150        4.2     16           0.04   0.25    475.475
              150        1.6     16           0.031  0.3     303.176
              150        1.03    16           0.014  0.4     193.314
              150        0.75    16           0.01   0.7     123.262
              200        0.58    16           0.01   0.8     67.648
              200        0.48    16           0.01   1       37.126
              500        0.01    16           0.01   1       37.126
              500        0.01    16           0.01   1       37.126
              500        0.01    16.41        0.01   1       37.126
              500        0.01    16.41        0.01   1       37.126
              500        0.01    16.41        0.01   1       37.126
              500        0.01    16.41        0.01   1       37.126
              500        0.01    16.41        0.01   1       37.126
              500        0.01    16.41        0.01   1       37.126
              500        0.01    16.41        0.01   1       37.126
              500        0.01    16.41        0.01   1       37.126
            Chemical: PHUnits=Water
              Thickness=[150, 150, 150, 150, 200, 200, 500, 500, 500, 500, 500, 500, 500, 500, 500, 500]
              PH=[4.503, 4.53, 4.59, 4.65, 4.7, 4.72, 4.72, 4.7, 4.72, 4.72, 4.72, 4.72, 4.72, 4.72, 4.72, 4.72]
            Solute NO3: InitialValues=[20, 10, 5, 3, 3, 3, 3, 3, 2, 1, 1, 1, 1, 1, 1, 1]; InitialValuesUnits=ppm; WaterTableConcentration=0; D0=0; DepthConstant=0; MaxDepthSoluteAccessible=0; RunoffEffectivenessAtMovingSolute=0; MaxEffectiveRunoff=0
              Thickness=[150, 150, 150, 150, 200, 200, 500, 500, 500, 500, 500, 500, 500, 500, 500, 500]
            Solute NH4: InitialValues=[20, 10, 5, 5, 5, 5, 1, 1, 1, 1, 1, 1, 1, 1, 1, 1]; InitialValuesUnits=ppm; WaterTableConcentration=0; D0=0; DepthConstant=0; MaxDepthSoluteAccessible=0; RunoffEffectivenessAtMovingSolute=0; MaxEffectiveRunoff=0
              Thickness=[150, 150, 150, 150, 200, 200, 500, 500, 500, 500, 500, 500, 500, 500, 500, 500]
            Solute Urea: InitialValues=[0, 0, 0, 0, 0, 0, 0, 0, 0.5, 1, 1, 1, 1, 1, 1, 1]; InitialValuesUnits=ppm; WaterTableConcentration=0; D0=0; DepthConstant=0; MaxDepthSoluteAccessible=0; RunoffEffectivenessAtMovingSolute=0; MaxEffectiveRunoff=0
              Thickness=[150, 150, 150, 150, 200, 200, 500, 500, 500, 500, 500, 500, 500, 500, 500, 500]
            Nutrient
            SoilTemperature
        CompositeFactor JonesRates
          Specifications:
            [Clock]
            [Weather]
            [Soil]
            [TreeManagement]
            [Operations]
          Clock: Start=2017-01-15; End=2029-08-31
          Weather Met: FileName=Jones.met
          Manager TreeManagement: same as V._.t1.DanyenahRates.TreeManagement
          Operations
            2017-12-12  [TreeThinning].Script.DoThin(0.1617);
            2018-12-12  [TreeThinning].Script.DoThin(0.1286);
            2019-12-12  [TreeThinning].Script.DoThin(0.0149);
            2020-01-01  [TreeThinning].Script.DoThin(0.02125);
            2021-01-01  [TreeThinning].Script.DoThin(0.0);
            2022-01-01  [TreeThinning].Script.DoThin(0.02941);
            2023-01-01  [TreeThinning].Script.DoThin(0.0);
            2024-01-01  [TreeThinning].Script.DoThin(0.0);
          Soil SLGAmodJones: ASCOrder=NA; ASCSubOrder=NA; SoilType=Sand over Clay Loam; Site=29636_5196; NearestTown=DENMARK; Region=Jarrah Forest; State=Western Australia; NaturalVegetation=Cleared, non-native vegetation, buildings; ApsoilNumber=9999; Latitude=-34.697372; Longitude=117.330046; LocationAccuracy=+- 90m; YearOfSampling=2023; Comments=Landuse is Grazing modified pastures
            DataSource=Soil and Landscape Grid of Australia. This soil parameter file was automatically generated from the GSM National Surfaces using pedotransfer functions.
            Water: FilledFromTop=false
              Thickness=[150, 150, 150, 150, 200, 200, 200, 400, 400, 400, 400, 400, 400, 400, 400, 400, 400, 400, 400]
              InitialValues=[0.156, 0.117, 0.13, 0.142, 0.158, 0.173, 0.173, 0.173, 0.173, 0.173, 0.173, 0.173, 0.173, 0.173, 0.173, 0.173, 0.173, 0.173, 0.173]
            Physical
              Thickness  ParticleSizeSand  ParticleSizeSilt  ParticleSizeClay  Rocks  BD     AirDry  LL15   DUL    SAT
              150        5                 65                30                0      1.41   0.05    0.149  0.287  0.394
              150        5                 65                30                0      1.47   0.037   0.112  0.203  0.381
              150        5                 65                30                0      1.486  0.042   0.126  0.215  0.381
              150        5                 65                30                0      1.481  0.046   0.137  0.23   0.386
              200        5                 65                30                0      1.491  0.051   0.153  0.249  0.387
              200        5                 65                30                0      1.507  0.056   0.168  0.266  0.386
              200        5                 65                30                0      1.507  0.056   0.168  0.266  0.386
              400        5                 65                30                0      1.507  0.056   0.168  0.266  0.386
              400        5                 65                30                0      1.507  0.056   0.168  0.266  0.386
              400        5                 65                30                0      1.507  0.056   0.168  0.266  0.386
              400        5                 65                30                0      1.507  0.056   0.168  0.266  0.386
              400        5                 65                30                0      1.507  0.056   0.168  0.266  0.386
              400        5                 65                30                0      1.507  0.056   0.168  0.266  0.386
              400        5                 65                30                0      1.507  0.056   0.168  0.266  0.386
              400        5                 65                30                0      1.507  0.056   0.168  0.266  0.386
              400        5                 65                30                0      1.507  0.056   0.168  0.266  0.386
              400        5                 65                30                0      1.507  0.056   0.168  0.266  0.386
              400        5                 65                30                0      1.507  0.056   0.168  0.266  0.386
              400        5                 65                30                0      1.507  0.056   0.168  0.266  0.386
              Rocks, ParticleSizeSand, ParticleSizeSilt, ParticleSizeClay source: Calculated
              SoilCrop EucalyptusSoil
                LL=[0.2, 0.19, 0.18, 0.2, 0.2, 0.2, 0.2, 0.2, 0.2, 0.2, 0.2, 0.2, 0.2, 0.18, 0.168, 0.168, 0.168, 0.168, 0.168]
                KL=[0.04, 0.03, 0.02, 0.01, 0.01, 0.01, 0.01, 0.01, 0.01, 0.01, 0.01, 0.01, 0.01, 0.01, 0.01, 0.02, 0.02, 0.02, 0.02]
                XF=[1, 0.8, 0.6, 0.3, 0.2, 0.2, 0.2, 0.2, 0.2, 0.2, 0.2, 0.1, 0.1, 0.1, 0.1, 0, 0, 0, 0]
            WaterBalance SoilWater: SummerDate=1-nov; SummerU=6; SummerCona=6; WinterDate=1-apr; WinterU=2; WinterCona=2; DiffusConst=174.548; DiffusSlope=44.0045; Salb=0.19; CN2Bare=70; CNRed=20; CNCov=0; PSIDul=-100
              Thickness=[150, 150, 150, 150, 200, 200, 200, 400, 400, 400, 400, 400, 400, 400, 400, 400, 400, 400, 400]
              SWCON=[0.9, 0.9, 0.9, 0.9, 0.7, 0.7, 0.7, 0.7, 0.7, 0.7, 0.7, 0.7, 0.7, 0.7, 0.7, 0.7, 0.7, 0.7, 0.7]
            Organic: FOMCNRatio=40; CarbonUnits=Total
              Thickness  Carbon  SoilCNRatio  FBiom  FInert  FOM
              150        3.9     17.5         0.04   0.3     475.475
              150        1       17.5         0.031  0.4     303.176
              150        0.94    17.5         0.014  0.5     193.314
              150        0.72    17.5         0.01   0.6     123.262
              200        0.57    17.5         0.01   0.7     67.648
              200        0.46    18           0.01   1       37.126
              200        0.2     17           0.01   1       37.126
              400        0.2     15           0.01   1       37.126
              400        0.01    15           0.01   1       37.126
              400        0.01    15           0.01   1       37.126
              400        0.01    15.44        0.01   1       37.126
              400        0.01    15.44        0.01   1       37.126
              400        0.01    15.44        0.01   1       37.126
              400        0.01    15.44        0.01   1       37.126
              400        0.01    15.44        0.01   1       37.126
              400        0.01    15.44        0.01   1       37.126
              400        0.01    15.44        0.01   1       37.126
              400        0.01    15.44        0.01   1       37.126
              400        0.01    15.44        0.01   1       37.126
            Chemical: PHUnits=Water
              Thickness=[150, 150, 150, 150, 200, 200, 200, 400, 400, 400, 400, 400, 400, 400, 400, 400, 400, 400, 400]
              PH=[5.647, 5.66, 5.74, 5.82, 5.87, 5.87, 5.87, 5.87, 5.87, 5.87, 5.87, 5.87, 5.87, 5.87, 5.87, 5.87, 5.87, 5.87, 5.87]
            Solute NO3: Thickness=[1800]; InitialValues=[3]; InitialValuesUnits=ppm; WaterTableConcentration=0; D0=0; DepthConstant=0; MaxDepthSoluteAccessible=0; RunoffEffectivenessAtMovingSolute=0; MaxEffectiveRunoff=0
            Solute NH4: Thickness=[1800]; InitialValues=[1]; InitialValuesUnits=ppm; WaterTableConcentration=0; D0=0; DepthConstant=0; MaxDepthSoluteAccessible=0; RunoffEffectivenessAtMovingSolute=0; MaxEffectiveRunoff=0
            Solute Urea: Thickness=[1800]; InitialValues=[0]; InitialValuesUnits=ppm; WaterTableConcentration=0; D0=0; DepthConstant=0; MaxDepthSoluteAccessible=0; RunoffEffectivenessAtMovingSolute=0; MaxEffectiveRunoff=0
            Nutrient
            SoilTemperature CERESSoilTemperature
        CompositeFactor LakeJasperRates
          Specifications:
            [Clock]
            [Weather]
            [Soil]
            [TreeManagement]
            [Operations]
          Clock: Start=2015-12-13; End=2029-08-31
          Weather Met: FileName=LakeJasperRates.met
          Manager TreeManagement
            RowSpace = 2.083333
            RowWidth = 4
            CultivarName = globulusEKB9
            PlantingDate = 13-Jun
            HarvestAge = 10
            FertAmount = 15
            script: same as in T._.t1.HaysRates.TreeManagement
          Operations
            2016-11-10  [TreeThinning].Script.DoThin(0.1104);
            2017-11-10  [TreeThinning].Script.DoThin(0.0757);
            2018-11-10  [TreeThinning].Script.DoThin(0.0);
            2019-11-10  [TreeThinning].Script.DoThin(0.01042);
            2020-11-09  [TreeThinning].Script.DoThin(0.02105);
            2021-11-01  [TreeThinning].Script.DoThin(0.01075);
            2022-11-01  [TreeThinning].Script.DoThin(0.02174);
            2023-11-01  [TreeThinning].Script.DoThin(0.01111);
          Soil SLGAmodLakeJasperRates: ASCOrder=NA; ASCSubOrder=NA; SoilType=Loamy Sand over Sandy Loam; Site=29243_3216; NearestTown=PEMBERTON; Region=Warren; State=Western Australia; NaturalVegetation=Banksia woodlands; ApsoilNumber=9999; Latitude=-34.37; Longitude=115.68; LocationAccuracy=+- 90m; YearOfSampling=2024; Comments=Landuse is Grazing modified pastures
            DataSource=Soil and Landscape Grid of Australia. This soil parameter file was automatically generated from the GSM National Surfaces using pedotransfer functions.
            Water: FilledFromTop=false
              Thickness=[150, 150, 150, 150, 200, 200, 200, 300, 500, 500, 500, 500, 500, 500, 500, 500, 500]
              InitialValues=[0.173, 0.093, 0.088, 0.084, 0.092, 0.106, 0.117, 0.117, 0.117, 0.117, 0.117, 0.117, 0.117, 0.117, 0.117, 0.117, 0.117]
            Physical
              Thickness  ParticleSizeSand  ParticleSizeSilt  ParticleSizeClay  Rocks  BD     AirDry  LL15   DUL    SAT    KS
              150        5                 65                30                0      1.388  0.057   0.171  0.331  0.4    167.633
              150        5                 65                30                0      1.407  0.031   0.092  0.181  0.395  151.249
              150        5                 65                30                0      1.397  0.029   0.087  0.169  0.399  134.785
              150        5                 65                30                0      1.399  0.028   0.083  0.16   0.4    116.457
              200        5                 65                30                0      1.403  0.03    0.091  0.169  0.401  90.93
              200        5                 65                30                0      1.411  0.035   0.105  0.186  0.402  66.305
              200        5                 65                30                0      1.422  0.039   0.116  0.199  0.402  48.574
              300        5                 65                30                0      1.422  0.039   0.116  0.199  0.402  48.574
              500        5                 65                30                0      1.422  0.039   0.116  0.199  0.402  48.574
              500        5                 65                30                0      1.422  0.039   0.116  0.199  0.402  48.574
              500        5                 65                30                0      1.422  0.039   0.116  0.199  0.402  48.574
              500        5                 65                30                0      1.422  0.039   0.116  0.199  0.402  48.574
              500        5                 65                30                0      1.422  0.039   0.116  0.199  0.402  48.574
              500        5                 65                30                0      1.422  0.039   0.116  0.199  0.402  48.574
              500        5                 65                30                0      1.422  0.039   0.116  0.199  0.402  48.574
              500        5                 65                30                0      1.422  0.039   0.116  0.199  0.402  48.574
              500        5                 65                30                0      1.422  0.039   0.116  0.199  0.402  48.574
              Rocks, ParticleSizeSand, ParticleSizeSilt, ParticleSizeClay source: Calculated
              SoilCrop EucalyptusSoil
                LL=[0.27, 0.17, 0.168, 0.159, 0.169, 0.17, 0.17, 0.17, 0.17, 0.17, 0.18, 0.18, 0.18, 0.18, 0.18, 0.18, 0.18]
                KL=[0.02, 0.02, 0.02, 0.02, 0.02, 0.02, 0.02, 0.02, 0.02, 0.01, 0.01, 0.01, 0.01, 0.01, 0.04, 0.04, 0.04]
                XF=[1, 1, 1, 1, 0.5, 0.5, 0.5, 0.5, 0.5, 0.5, 0.5, 0.5, 0.5, 0.4, 0.4, 0.3, 0.3]
            WaterBalance SoilWater: SummerDate=1-nov; SummerU=6; SummerCona=6; WinterDate=1-apr; WinterU=2; WinterCona=2; DiffusConst=226.781; DiffusSlope=46.7391; Salb=0.16; CN2Bare=80; CNRed=20; CNCov=0; PSIDul=-100
              Thickness=[150, 150, 150, 150, 200, 200, 200, 300, 500, 500, 500, 500, 500, 500, 500, 500, 500]
              SWCON=[0.67, 0.573, 0.56, 0.544, 0.469, 0.433, 0.397, 0.397, 0.397, 0.397, 0.397, 0.397, 0.2, 0.2, 0.1, 0.1, 0]
            Organic: FOMCNRatio=40; CarbonUnits=Total
              Thickness  Carbon  SoilCNRatio  FBiom  FInert  FOM
              150        4.5     14           0.04   0.2     417.668
              150        1.4     14           0.031  0.3     287.059
              150        0.99    14           0.014  0.431   197.293
              150        0.55    14           0.01   0.5     135.597
              200        0.43    14           0.01   0.7     82.244
              200        0.46    14           0.01   1       49.883
              200        0.45    14           0.01   1       30.256
              300        0.01    14           0.01   1       30.256
              500        0.01    14           0.01   1       30.256
              500        0.01    14           0.01   1       30.256
              500        0.01    14           0.01   1       30.256
              500        0.01    14           0.01   1       30.256
              500        0.01    14           0.01   1       30.256
              500        0.01    14           0.01   1       30.256
              500        0.01    14           0.01   1       30.256
              500        0.01    14           0.01   1       30.256
              500        0.01    14           0.01   1       30.256
            Chemical: PHUnits=Water
              Thickness=[150, 150, 150, 150, 200, 200, 200, 300, 500, 500, 500, 500, 500, 500, 500, 500, 500]
              PH=[4.503, 4.53, 4.59, 4.65, 4.7, 4.72, 4.72, 4.7, 4.72, 4.72, 4.72, 4.72, 4.72, 4.72, 4.72, 4.72, 4.72]
            Solute NO3: InitialValues=[5, 2, 1, 0, 0, 0, 0, 0, 0, 0, 0, 0, 0, 0, 0, 0, 0]; InitialValuesUnits=ppm; WaterTableConcentration=0; D0=0; DepthConstant=0; MaxDepthSoluteAccessible=0; RunoffEffectivenessAtMovingSolute=0; MaxEffectiveRunoff=0
              Thickness=[150, 150, 150, 150, 200, 200, 200, 300, 500, 500, 500, 500, 500, 500, 500, 500, 500]
            Solute NH4: same as W._.t1.LakeJasperRates.SLGAmodLakeJasperRates.NO3
            Solute Urea: InitialValues=[0, 0, 0, 0, 0, 0, 0, 0, 0, 0, 0, 0, 0, 0, 0, 0, 0]; InitialValuesUnits=ppm; WaterTableConcentration=0; D0=0; DepthConstant=0; MaxDepthSoluteAccessible=0; RunoffEffectivenessAtMovingSolute=0; MaxEffectiveRunoff=0
              Thickness=[150, 150, 150, 150, 200, 200, 200, 300, 500, 500, 500, 500, 500, 500, 500, 500, 500]
            Nutrient
            SoilTemperature
        CompositeFactor LyonsRates
          Specifications:
            [Clock]
            [Weather]
            [Soil]
            [TreeManagement]
            [Operations]
          Clock: Start=2017-02-15; End=2029-08-31
          Weather Met: FileName=Lyon.met
          Manager TreeManagement: same as V._.t1.MeadeResp.TreeManagement
          Operations
            2018-01-12  [TreeThinning].Script.DoThin(0.1164);
            2019-01-12  [TreeThinning].Script.DoThin(0.116);
            2020-01-01  [TreeThinning].Script.DoThin(0.02151);
            2021-01-01  [TreeThinning].Script.DoThin(0.01099);
            2022-01-01  [TreeThinning].Script.DoThin(0.0);
            2023-01-01  [TreeThinning].Script.DoThin(0.01111);
            2024-01-01  [TreeThinning].Script.DoThin(0.04494);
          Soil SLGAmodLyons: ASCOrder=NA; ASCSubOrder=NA; SoilType=Sandy Loam over Sandy Clay Loam; Site=29800_6084; NearestTown=ALBANY; Region=Jarrah Forest; State=Western Australia; NaturalVegetation=Cleared, non-native vegetation, buildings; ApsoilNumber=9999; Latitude=-34.834046; Longitude=118.070304; LocationAccuracy=+- 90m; YearOfSampling=2023; Comments=Landuse is Grazing modified pastures
            DataSource=Soil and Landscape Grid of Australia. This soil parameter file was automatically generated from the GSM National Surfaces using pedotransfer functions.
            Water: FilledFromTop=false
              Thickness=[150, 150, 150, 150, 200, 200, 200, 400, 400, 400, 400, 400, 400, 400, 400, 400, 400, 400, 400]
              InitialValues=[0.192, 0.11, 0.128, 0.137, 0.158, 0.158, 0.158, 0.158, 0.158, 0.158, 0.158, 0.158, 0.158, 0.158, 0.158, 0.158, 0.158, 0.158, 0.158]
            Physical
              Thickness  ParticleSizeSand  ParticleSizeSilt  ParticleSizeClay  Rocks  BD     AirDry  LL15   DUL    SAT
              150        5                 65                30                0      1.404  0.061   0.184  0.346  0.399
              150        5                 65                30                0      1.471  0.035   0.106  0.186  0.381
              150        5                 65                30                0      1.475  0.041   0.124  0.206  0.384
              150        5                 65                30                0      1.466  0.044   0.133  0.209  0.393
              200        5                 65                30                0      1.479  0.051   0.154  0.233  0.394
              200        5                 65                30                0      1.479  0.051   0.154  0.233  0.394
              200        5                 65                30                0      1.479  0.051   0.154  0.233  0.394
              400        5                 65                30                0      1.479  0.051   0.154  0.233  0.394
              400        5                 65                30                0      1.479  0.051   0.154  0.233  0.394
              400        5                 65                30                0      1.479  0.051   0.154  0.233  0.394
              400        5                 65                30                0      1.479  0.051   0.154  0.233  0.394
              400        5                 65                30                0      1.479  0.051   0.154  0.233  0.394
              400        5                 65                30                0      1.479  0.051   0.154  0.233  0.394
              400        5                 65                30                0      1.479  0.051   0.154  0.233  0.394
              400        5                 65                30                0      1.479  0.051   0.154  0.233  0.394
              400        5                 65                30                0      1.479  0.051   0.154  0.233  0.394
              400        5                 65                30                0      1.479  0.051   0.154  0.233  0.394
              400        5                 65                30                0      1.479  0.051   0.154  0.233  0.394
              400        5                 65                30                0      1.479  0.051   0.154  0.233  0.394
              Rocks, ParticleSizeSand, ParticleSizeSilt, ParticleSizeClay source: Calculated
              SoilCrop EucalyptusSoil
                LL=[0.22, 0.15, 0.18, 0.19, 0.21, 0.21, 0.21, 0.21, 0.21, 0.21, 0.21, 0.21, 0.21, 0.21, 0.21, 0.21, 0.21, 0.21, 0.21]
                KL=[0.04, 0.03, 0.03, 0.03, 0.02, 0.02, 0.02, 0.02, 0.01, 0.01, 0.01, 0.01, 0.01, 0.01, 0.01, 0.01, 0.01, 0.01, 0.01]
                XF=[1, 1, 1, 1, 0.6, 0.6, 0.6, 0.4, 0.3, 0.2, 0.2, 0.2, 0, 0, 0, 0, 0, 0, 0]
            WaterBalance SoilWater: SummerDate=1-nov; SummerU=6; SummerCona=6; WinterDate=1-apr; WinterU=2; WinterCona=2; DiffusConst=213.861; DiffusSlope=47.7821; Salb=0.13; CN2Bare=78; CNRed=20; CNCov=0; DischargeWidth=10; CatchmentArea=35970.4; PSIDul=-100
              Thickness=[150, 150, 150, 150, 200, 200, 200, 400, 400, 400, 400, 400, 400, 400, 400, 400, 400, 400, 400]
              SWCON=[0.675, 0.517, 0.464, 0.383, 0.275, 0.275, 0.275, 0.275, 0.275, 0.275, 0.275, 0.275, 0.275, 0.275, 0.275, 0.275, 0.275, 0.275, 0.275]
            Organic: FOMCNRatio=40; CarbonUnits=Total
              Thickness  Carbon  SoilCNRatio  FBiom  FInert  FOM
              150        4       17           0.04   0.2     553.813
              150        0.87    17           0.031  0.3     315.553
              150        0.78    17           0.014  0.4     179.797
              150        0.4     17           0.01   0.5     102.445
              200        0.4     17           0.01   0.6     48.392
              200        0.3     16           0.01   1       48.392
              200        0.3     16           0.01   1       48.392
              400        0.2     16           0.01   1       48.392
              400        0.01    14           0.01   1       48.392
              400        0.01    14           0.01   1       48.392
              400        0.01    14           0.01   1       48.392
              400        0.01    14           0.01   1       48.392
              400        0.01    14.03        0.01   1       48.392
              400        0.01    14.03        0.01   1       48.392
              400        0.01    14.03        0.01   1       48.392
              400        0.01    14.03        0.01   1       48.392
              400        0.01    14.03        0.01   1       48.392
              400        0.01    14.03        0.01   1       48.392
              400        0.01    14.03        0.01   1       48.392
            Chemical: PHUnits=Water
              Thickness=[150, 150, 150, 150, 200, 200, 200, 400, 400, 400, 400, 400, 400, 400, 400, 400, 400, 400, 400]
              PH=[4.96, 5.02, 5.11, 5.19, 5.28, 5.28, 5.28, 5.28, 5.28, 5.28, 5.28, 5.28, 5.28, 5.28, 5.28, 5.28, 5.28, 5.28, 5.28]
            Solute NO3: Thickness=[1800]; InitialValues=[3]; InitialValuesUnits=ppm; WaterTableConcentration=0; D0=0; DepthConstant=0; MaxDepthSoluteAccessible=0; RunoffEffectivenessAtMovingSolute=0; MaxEffectiveRunoff=0
            Solute NH4: Thickness=[1800]; InitialValues=[1]; InitialValuesUnits=ppm; WaterTableConcentration=0; D0=0; DepthConstant=0; MaxDepthSoluteAccessible=0; RunoffEffectivenessAtMovingSolute=0; MaxEffectiveRunoff=0
            Solute Urea: Thickness=[1800]; InitialValues=[0]; InitialValuesUnits=ppm; WaterTableConcentration=0; D0=0; DepthConstant=0; MaxDepthSoluteAccessible=0; RunoffEffectivenessAtMovingSolute=0; MaxEffectiveRunoff=0
            Nutrient
            SoilTemperature CERESSoilTemperature
        CompositeFactor ParolaRates
          Specifications:
            [Clock]
            [Weather]
            [Soil]
            [TreeManagement]
            [Operations]
          Clock: Start=2017-02-12; End=2029-08-31
          Weather Met: FileName=Parola.met
          Manager TreeManagement: same as V._.t1.MeadeResp.TreeManagement
          Operations
            2018-01-12  [TreeThinning].Script.DoThin(0.1655);
            2019-01-12  [TreeThinning].Script.DoThin(0.14406);
            2020-01-12  [TreeThinning].Script.DoThin(0.0);
            2021-01-11  [TreeThinning].Script.DoThin(0.0);
            2022-01-11  [TreeThinning].Script.DoThin(0.0);
          Soil SLGAmodParola: ASCOrder=NA; ASCSubOrder=NA; SoilType=Loamy Sand over Sandy Clay Loam; Site=29756_5952; NearestTown=ALBANY; Region=Jarrah Forest; State=Western Australia; NaturalVegetation=Cleared, non-native vegetation, buildings; ApsoilNumber=9999; Latitude=-34.797713; Longitude=117.959978; LocationAccuracy=+- 90m; YearOfSampling=2023; Comments=Landuse is Plantation forestry
            DataSource=Soil and Landscape Grid of Australia. This soil parameter file was automatically generated from the GSM National Surfaces using pedotransfer functions.
            Water: FilledFromTop=false
              Thickness=[150, 150, 150, 150, 200, 200, 200, 400, 400, 400, 400, 400, 400, 400, 400, 400, 400, 400, 400]
              InitialValues=[0.154, 0.103, 0.119, 0.13, 0.148, 0.148, 0.148, 0.148, 0.148, 0.148, 0.148, 0.148, 0.148, 0.148, 0.148, 0.148, 0.148, 0.148, 0.148]
            Physical
              Thickness  ParticleSizeSand  ParticleSizeSilt  ParticleSizeClay  Rocks  BD     AirDry  LL15   DUL    SAT
              150        5                 65                30                0      1.383  0.049   0.147  0.281  0.403
              150        5                 65                30                0      1.447  0.033   0.099  0.178  0.387
              150        5                 65                30                0      1.466  0.038   0.115  0.193  0.386
              150        5                 65                30                0      1.463  0.042   0.126  0.201  0.392
              200        5                 65                30                0      1.471  0.048   0.144  0.221  0.394
              200        5                 65                30                0      1.471  0.048   0.144  0.221  0.394
              200        5                 65                30                0      1.471  0.048   0.144  0.221  0.394
              400        5                 65                30                0      1.471  0.048   0.144  0.221  0.394
              400        5                 65                30                0      1.471  0.048   0.144  0.221  0.394
              400        5                 65                30                0      1.471  0.048   0.144  0.221  0.394
              400        5                 65                30                0      1.471  0.048   0.144  0.221  0.394
              400        5                 65                30                0      1.471  0.048   0.144  0.221  0.394
              400        5                 65                30                0      1.471  0.048   0.144  0.221  0.394
              400        5                 65                30                0      1.471  0.048   0.144  0.221  0.394
              400        5                 65                30                0      1.471  0.048   0.144  0.221  0.394
              400        5                 65                30                0      1.471  0.048   0.144  0.221  0.394
              400        5                 65                30                0      1.471  0.048   0.144  0.221  0.394
              400        5                 65                30                0      1.471  0.048   0.144  0.221  0.394
              400        5                 65                30                0      1.471  0.048   0.144  0.221  0.394
              Rocks, ParticleSizeSand, ParticleSizeSilt, ParticleSizeClay source: Calculated
              SoilCrop EucalyptusSoil
                LL=[0.2, 0.16, 0.14, 0.14, 0.14, 0.14, 0.14, 0.14, 0.14, 0.14, 0.14, 0.15, 0.15, 0.15, 0.148, 0.148, 0.148, 0.148, 0.148]
                KL=[0.03, 0.02, 0.02, 0.01, 0.01, 0.01, 0.01, 0.01, 0.01, 0.01, 0.01, 0.01, 0.01, 0.01, 0.01, 0.01, 0.01, 0.01, 0.01]
                XF=[1, 0.9, 0.8, 0.7, 0.6, 0.5, 0.4, 0, 0, 0, 0, 0, 0, 0, 0, 0, 0, 0, 0]
            WaterBalance SoilWater: SummerDate=1-nov; SummerU=6; SummerCona=6; WinterDate=1-apr; WinterU=2; WinterCona=2; DiffusConst=228.336; DiffusSlope=49.9671; Salb=0.16; CN2Bare=80; CNRed=20; CNCov=0; PSIDul=-100
              Thickness=[150, 150, 150, 150, 200, 200, 200, 400, 400, 400, 400, 400, 400, 400, 400, 400, 400, 400, 400]
              SWCON=[0.602, 0.529, 0.474, 0.412, 0.4, 0.4, 0.4, 0.4, 0.4, 0.4, 0.4, 0.4, 0.4, 0.4, 0.4, 0.4, 0.4, 0.4, 0.4]
            Organic: FOMCNRatio=40; CarbonUnits=Total
              Thickness  Carbon  SoilCNRatio  FBiom  FInert  FOM
              150        2.7     14           0.04   0.1     553.813
              150        1       14           0.031  0.2     315.553
              150        0.7     14           0.014  0.3     179.797
              150        0.5     14           0.01   0.4     102.445
              200        0.3     14           0.01   0.5     48.392
              200        0.01    14           0.01   1       48.392
              200        0.01    14           0.01   1       48.392
              400        0.01    14           0.01   1       48.392
              400        0.01    14           0.01   1       48.392
              400        0.01    14           0.01   1       48.392
              400        0.01    14.93        0.01   1       48.392
              400        0.01    14.93        0.01   1       48.392
              400        0.01    14.93        0.01   1       48.392
              400        0.01    14.93        0.01   1       48.392
              400        0.01    14.93        0.01   1       48.392
              400        0.01    14.93        0.01   1       48.392
              400        0.01    14.93        0.01   1       48.392
              400        0.01    14.93        0.01   1       48.392
              400        0.01    14.93        0.01   1       48.392
            Chemical: PHUnits=Water
              Thickness=[150, 150, 150, 150, 200, 200, 200, 400, 400, 400, 400, 400, 400, 400, 400, 400, 400, 400, 400]
              PH=[6.342, 6.41, 6.52, 6.63, 6.74, 6.74, 6.74, 6.74, 6.74, 6.74, 6.74, 6.74, 6.74, 6.74, 6.74, 6.74, 6.74, 6.74, 6.74]
            Solute NO3: Thickness=[1800]; InitialValues=[3]; InitialValuesUnits=ppm; WaterTableConcentration=0; D0=0; DepthConstant=0; MaxDepthSoluteAccessible=0; RunoffEffectivenessAtMovingSolute=0; MaxEffectiveRunoff=0
            Solute NH4: Thickness=[1800]; InitialValues=[1]; InitialValuesUnits=ppm; WaterTableConcentration=0; D0=0; DepthConstant=0; MaxDepthSoluteAccessible=0; RunoffEffectivenessAtMovingSolute=0; MaxEffectiveRunoff=0
            Solute Urea: Thickness=[1800]; InitialValues=[0]; InitialValuesUnits=ppm; WaterTableConcentration=0; D0=0; DepthConstant=0; MaxDepthSoluteAccessible=0; RunoffEffectivenessAtMovingSolute=0; MaxEffectiveRunoff=0
            Nutrient
            SoilTemperature CERESSoilTemperature
        CompositeFactor DingupResp18
          Specifications:
            [Clock]
            [Weather]
            [Soil]
            [TreeManagement]
            [Operations]
          Clock: Start=2016-01-15; End=2029-08-31
          Weather Met: FileName=Dingup.met
          Manager TreeManagement
            RowSpace = 1.9753
            RowWidth = 4
            CultivarName = globulusEKB9
            PlantingDate = 15-Jul
            HarvestAge = 10
            FertAmount = 15
            script: same as in T._.t1.HaysRates.TreeManagement
          Operations
            2015-11-28  [TreeThinning].Script.DoThin(0.0);
            2016-11-28  [TreeThinning].Script.DoThin(0.0);
            2017-11-28  [TreeThinning].Script.DoThin(0.0);
            2018-11-28  [TreeThinning].Script.DoThin(0.01235);
            2019-11-28  [TreeThinning].Script.DoThin(0.0);
            2020-11-28  [TreeThinning].Script.DoThin(0.01875);
            2021-11-28  [TreeThinning].Script.DoThin(0.07006);
            2022-11-28  [TreeThinning].Script.DoThin(0.03425);
            2023-11-28  [TreeThinning].Script.DoThin(0.00709);
          Soil Synthetic Soil Derived from the SLGA: ASCOrder=NA; ASCSubOrder=NA; SoilType=Sandy Loam over Clay; Site=29118_3911; NearestTown=MANJIMUP; Region=Jarrah Forest; State=Western Australia; NaturalVegetation=Eucalyptus woodlands with a shrubby understorey; ApsoilNumber=9999; Latitude=-34.266; Longitude=116.259; LocationAccuracy=+- 90m; YearOfSampling=2023; Comments=Landuse is Grazing modified pastures
            DataSource=Soil and Landscape Grid of Australia. This soil parameter file was automatically generated from the GSM National Surfaces using pedotransfer functions.
            Water: FilledFromTop=true
              Thickness=[150, 150, 150, 150, 200, 200, 200, 400, 400, 400, 400, 400, 400, 400, 400, 400, 400, 400, 400]
              InitialValues=[0.283, 0.181, 0.135, 0.158, 0.182, 0.199, 0.199, 0.199, 0.199, 0.199, 0.199, 0.199, 0.199, 0.199, 0.199, 0.199, 0.199, 0.199, 0.199]
            Physical
              Thickness  ParticleSizeSand  ParticleSizeSilt  ParticleSizeClay  Rocks  BD     AirDry  LL15   DUL    SAT    KS
              150        5                 65                30                0      1.469  0.051   0.153  0.283  0.379  101.394
              150        5                 65                30                0      1.539  0.04    0.121  0.209  0.36   66.275
              150        5                 65                30                0      1.53   0.045   0.135  0.214  0.37   32.975
              150        5                 65                30                0      1.507  0.053   0.158  0.241  0.385  15.937
              200        5                 65                30                0      1.514  0.061   0.182  0.271  0.388  8.897
              200        5                 65                30                0      1.534  0.066   0.199  0.294  0.385  5.901
              200        5                 65                30                0      1.534  0.066   0.199  0.294  0.385  5.901
              400        5                 65                30                0      1.534  0.066   0.199  0.294  0.385  5.901
              400        5                 65                30                0      1.534  0.066   0.199  0.294  0.385  5.901
              400        5                 65                30                0      1.534  0.066   0.199  0.294  0.385  5.901
              400        5                 65                30                0      1.534  0.066   0.199  0.294  0.385  5.901
              400        5                 65                30                0      1.534  0.066   0.199  0.294  0.385  5.901
              400        5                 65                30                0      1.534  0.066   0.199  0.294  0.385  5.901
              400        5                 65                30                0      1.534  0.066   0.199  0.294  0.385  5.901
              400        5                 65                30                0      1.534  0.066   0.199  0.294  0.385  5.901
              400        5                 65                30                0      1.534  0.066   0.199  0.294  0.385  5.901
              400        5                 65                30                0      1.534  0.066   0.199  0.294  0.385  5.901
              400        5                 65                30                0      1.534  0.066   0.199  0.294  0.385  5.901
              400        5                 65                30                0      1.534  0.066   0.199  0.294  0.385  5.901
              Rocks, ParticleSizeSand, ParticleSizeSilt, ParticleSizeClay source: Calculated
              SoilCrop EucalyptusSoil
                LL=[0.19, 0.12, 0.12, 0.21, 0.21, 0.21, 0.22, 0.22, 0.23, 0.23, 0.23, 0.23, 0.23, 0.21, 0.21, 0.21, 0.21, 0.21, 0.21]
                KL=[0.04, 0.04, 0.03, 0.03, 0.02, 0.02, 0.01, 0.01, 0.01, 0.01, 0.01, 0.01, 0.01, 0.01, 0.01, 0.01, 0.01, 0.01, 0.01]
                XF=[1, 1, 1, 1, 1, 0.9, 0.9, 0.9, 0.9, 0.9, 0.9, 0.9, 0.9, 0, 0, 0, 0, 0, 0]
            WaterBalance SoilWater: SummerDate=1-nov; SummerU=6; SummerCona=6; WinterDate=1-apr; WinterU=2; WinterCona=2; DiffusConst=210.45; DiffusSlope=50.0803; Salb=0.13; CN2Bare=78; CNRed=20; CNCov=0; DischargeWidth=10; CatchmentArea=3417.15; PSIDul=-100
              Thickness=[150, 150, 150, 150, 200, 200, 200, 400, 400, 400, 400, 400, 400, 400, 400, 400, 400, 400, 400]
              SWCON=[0.598, 0.516, 0.427, 0.335, 0.234, 0.215, 0.215, 0.215, 0.215, 0.215, 0.215, 0.215, 0.215, 0.215, 0.215, 0.215, 0.215, 0.215, 0.215]
            Organic: FOMCNRatio=40; CarbonUnits=Total
              Thickness  Carbon  SoilCNRatio  FBiom  FInert  FOM
              150        5       10.487       0.04   0.096   475.475
              150        2       10.49        0.031  0.226   303.176
              150        1       10.49        0.014  0.434   193.314
              150        0.6     10.49        0.01   0.781   123.262
              200        0.5     10.49        0.01   0.987   67.648
              200        0.5     10.49        0.01   0.946   37.126
              200        0.01    10.49        0.01   1       37.126
              400        0.01    10.49        0.01   1       37.126
              400        0.01    10.49        0.01   1       37.126
              400        0.01    10.49        0.01   1       37.126
              400        0.01    10.49        0.01   1       37.126
              400        0.01    10.49        0.01   1       37.126
              400        0.01    10.49        0.01   1       37.126
              400        0.01    10.49        0.01   1       37.126
              400        0.01    10.49        0.01   1       37.126
              400        0.01    10.49        0.01   1       37.126
              400        0.01    10.49        0.01   1       37.126
              400        0.01    10.49        0.01   1       37.126
              400        0.01    10.49        0.01   1       37.126
            Chemical: PHUnits=Water
              Thickness=[150, 150, 150, 150, 200, 200, 200, 400, 400, 400, 400, 400, 400, 400, 400, 400, 400, 400, 400]
              PH=[6.3, 6.42, 6.51, 6.58, 6.66, 6.71, 6.71, 6.71, 6.71, 6.71, 6.71, 6.71, 6.71, 6.71, 6.71, 6.71, 6.71, 6.71, 6.71]
            Solute NO3: Thickness=[1800]; InitialValues=[3]; InitialValuesUnits=ppm; WaterTableConcentration=0; D0=0; DepthConstant=0; MaxDepthSoluteAccessible=0; RunoffEffectivenessAtMovingSolute=0; MaxEffectiveRunoff=0
            Solute NH4: Thickness=[1800]; InitialValues=[1]; InitialValuesUnits=ppm; WaterTableConcentration=0; D0=0; DepthConstant=0; MaxDepthSoluteAccessible=0; RunoffEffectivenessAtMovingSolute=0; MaxEffectiveRunoff=0
            Solute Urea: Thickness=[1800]; InitialValues=[0]; InitialValuesUnits=ppm; WaterTableConcentration=0; D0=0; DepthConstant=0; MaxDepthSoluteAccessible=0; RunoffEffectivenessAtMovingSolute=0; MaxEffectiveRunoff=0
            Nutrient
            SoilTemperature CERESSoilTemperature
        CompositeFactor DingupResp19
          Specifications:
            [Clock]
            [Weather]
            [Soil]
            [TreeManagement]
            [Operations]
          Clock: Start=2016-01-15; End=2029-08-31
          Weather Met: FileName=Dingup.met
          Manager TreeManagement
            RowSpace = 2
            RowWidth = 4
            CultivarName = globulusEKB9
            PlantingDate = 15-Jul
            HarvestAge = 10
            FertAmount = 15
            script: same as in T._.t1.HaysRates.TreeManagement
          Operations
            2016-11-28  [TreeThinning].Script.DoThin(0.0);
            2017-11-28  [TreeThinning].Script.DoThin(0.0);
            2018-11-28  [TreeThinning].Script.DoThin(0.0);
            2019-11-28  [TreeThinning].Script.DoThin(0.0);
            2020-11-28  [TreeThinning].Script.DoThin(0.01875);
            2021-11-28  [TreeThinning].Script.DoThin(0.07006);
            2022-11-28  [TreeThinning].Script.DoThin(0.03425);
            2023-11-28  [TreeThinning].Script.DoThin(0.00709);
          Soil SLGAmodeDingup19: ASCOrder=NA; ASCSubOrder=NA; SoilType=Sandy Loam over Clay; Site=29118_3911; NearestTown=MANJIMUP; Region=Jarrah Forest; State=Western Australia; NaturalVegetation=Eucalyptus woodlands with a shrubby understorey; ApsoilNumber=9999; Latitude=-34.266; Longitude=116.259; LocationAccuracy=+- 90m; YearOfSampling=2023; Comments=Landuse is Grazing modified pastures
            DataSource=Soil and Landscape Grid of Australia. This soil parameter file was automatically generated from the GSM National Surfaces using pedotransfer functions.
            Water: FilledFromTop=false
              Thickness=[150, 150, 150, 150, 200, 200, 200, 400, 400, 400, 400, 400, 400, 400, 400, 400, 400, 400, 400]
              InitialValues=[0.16, 0.125, 0.139, 0.162, 0.186, 0.204, 0.204, 0.204, 0.204, 0.204, 0.204, 0.204, 0.204, 0.204, 0.204, 0.204, 0.204, 0.204, 0.204]
            Physical
              Thickness  ParticleSizeSand  ParticleSizeSilt  ParticleSizeClay  Rocks  BD     AirDry  LL15   DUL    SAT
              150        5                 65                30                0      1.469  0.051   0.153  0.283  0.379
              150        5                 65                30                0      1.539  0.04    0.121  0.209  0.36
              150        5                 65                30                0      1.53   0.045   0.135  0.214  0.37
              150        5                 65                30                0      1.507  0.053   0.158  0.241  0.385
              200        5                 65                30                0      1.514  0.061   0.182  0.271  0.388
              200        5                 65                30                0      1.534  0.066   0.199  0.294  0.385
              200        5                 65                30                0      1.534  0.066   0.199  0.294  0.385
              400        5                 65                30                0      1.534  0.066   0.199  0.294  0.385
              400        5                 65                30                0      1.534  0.066   0.199  0.294  0.385
              400        5                 65                30                0      1.534  0.066   0.199  0.294  0.385
              400        5                 65                30                0      1.534  0.066   0.199  0.294  0.385
              400        5                 65                30                0      1.534  0.066   0.199  0.294  0.385
              400        5                 65                30                0      1.534  0.066   0.199  0.294  0.385
              400        5                 65                30                0      1.534  0.066   0.199  0.294  0.385
              400        5                 65                30                0      1.534  0.066   0.199  0.294  0.385
              400        5                 65                30                0      1.534  0.066   0.199  0.294  0.385
              400        5                 65                30                0      1.534  0.066   0.199  0.294  0.385
              400        5                 65                30                0      1.534  0.066   0.199  0.294  0.385
              400        5                 65                30                0      1.534  0.066   0.199  0.294  0.385
              Rocks, ParticleSizeSand, ParticleSizeSilt, ParticleSizeClay source: Calculated
              SoilCrop EucalyptusSoil
                LL=[0.23, 0.2, 0.2, 0.22, 0.25, 0.25, 0.25, 0.25, 0.25, 0.25, 0.25, 0.13, 0.13, 0.1, 0.1, 0.08, 0.07, 0.07, 0.07]
                KL=[0.02, 0.02, 0.02, 0.02, 0.02, 0.02, 0.02, 0.02, 0.02, 0.02, 0.02, 0.02, 0.02, 0.04, 0.04, 0.06, 0.06, 0.06, 0.06]
                XF=[1, 0.9, 0.9, 0.8, 0.7, 0.7, 0.6, 0.6, 0.5, 0.5, 0.4, 0.4, 0.4, 0, 0, 0, 0, 0, 0]
            WaterBalance SoilWater: SummerDate=1-nov; SummerU=6; SummerCona=6; WinterDate=1-apr; WinterU=2; WinterCona=2; DiffusConst=210.45; DiffusSlope=50.0803; Salb=0.13; CN2Bare=78; CNRed=20; CNCov=0; PSIDul=-100
              Thickness=[150, 150, 150, 150, 200, 200, 200, 400, 400, 400, 400, 400, 400, 400, 400, 400, 400, 400, 400]
              SWCON=[0.598, 0.516, 0.427, 0.335, 0.234, 0.215, 0.215, 0.215, 0.215, 0.215, 0.215, 0.215, 0.215, 0.215, 0.215, 0.215, 0.1, 0.1, 0]
            Organic: FOMCNRatio=40; CarbonUnits=Total
              Thickness  Carbon  SoilCNRatio  FBiom  FInert  FOM
              150        4.8     10.6         0.02   0.05    475.475
              150        2.5     10.6         0.01   0.1     303.176
              150        1.5     10.6         0.01   0.2     193.314
              150        0.7     10.6         0.01   0.3     123.262
              200        0.6     10.6         0.01   0.4     67.648
              200        0.3     10.6         0.01   0.5     37.126
              200        0.01    12           0.01   1       37.126
              400        0.01    12           0.01   1       37.126
              400        0.01    12           0.01   1       37.126
              400        0.01    12           0.01   1       37.126
              400        0.01    12           0.01   1       37.126
              400        0.01    12           0.01   1       37.126
              400        0.01    12           0.01   1       37.126
              400        0.01    12           0.01   1       37.126
              400        0.01    12           0.01   1       37.126
              400        0.01    12           0.01   1       37.126
              400        0.01    12           0.01   1       37.126
              400        0.01    12           0.01   1       37.126
              400        0.01    12           0.01   1       37.126
            Chemical: PHUnits=Water
              Thickness=[150, 150, 150, 150, 200, 200, 200, 400, 400, 400, 400, 400, 400, 400, 400, 400, 400, 400, 400]
              PH=[6.3, 6, 5.8, 5.8, 5.8, 5.8, 5.8, 5.8, 5.8, 5.8, 5.8, 5.8, 5.8, 5.8, 5.8, 5.8, 5.8, 5.8, 5.8]
            Solute NO3: Thickness=[1800]; InitialValues=[3]; InitialValuesUnits=ppm; WaterTableConcentration=0; D0=0; DepthConstant=0; MaxDepthSoluteAccessible=0; RunoffEffectivenessAtMovingSolute=0; MaxEffectiveRunoff=0
            Solute NH4: Thickness=[1800]; InitialValues=[1]; InitialValuesUnits=ppm; WaterTableConcentration=0; D0=0; DepthConstant=0; MaxDepthSoluteAccessible=0; RunoffEffectivenessAtMovingSolute=0; MaxEffectiveRunoff=0
            Solute Urea: Thickness=[1800]; InitialValues=[0]; InitialValuesUnits=ppm; WaterTableConcentration=0; D0=0; DepthConstant=0; MaxDepthSoluteAccessible=0; RunoffEffectivenessAtMovingSolute=0; MaxEffectiveRunoff=0
            Nutrient
            SoilTemperature CERESSoilTemperature
        CompositeFactor LakeJasperResp18
          Specifications:
            [Clock]
            [Weather]
            [Soil]
            [TreeManagement]
            [Operations]
          Clock: Start=2016-01-15; End=2029-08-31
          Weather Met: FileName=LakeJasperResp.met
          Manager TreeManagement
            RowSpace = 1.8181
            RowWidth = 4
            CultivarName = globulusEKB9
            PlantingDate = 13-Jun
            HarvestAge = 10
            FertAmount = 15
            script: same as in T._.t1.HaysRates.TreeManagement
          Operations
            2016-11-10  [TreeThinning].Script.DoThin(0.0);
            2017-11-10  [TreeThinning].Script.DoThin(0.0);
            2018-11-10  [TreeThinning].Script.DoThin(0.0);
            2019-11-10  [TreeThinning].Script.DoThin(0.0);
            2020-11-10  [TreeThinning].Script.DoThin(0.02273);
            2021-11-10  [TreeThinning].Script.DoThin(0.05426);
            2023-04-10  [TreeThinning].Script.DoThin(0.01639);
            2023-11-10  [TreeThinning].Script.DoThin(0.0);
          Soil SLGAmodLakeJasper18: ASCOrder=NA; ASCSubOrder=NA; SoilType=Sandy Loam over Clay; Site=29118_3911; NearestTown=MANJIMUP; Region=Jarrah Forest; State=Western Australia; NaturalVegetation=Eucalyptus woodlands with a shrubby understorey; ApsoilNumber=9999; Latitude=-34.266; Longitude=116.259; LocationAccuracy=+- 90m; YearOfSampling=2023; Comments=Landuse is Grazing modified pastures
            DataSource=Soil and Landscape Grid of Australia. This soil parameter file was automatically generated from the GSM National Surfaces using pedotransfer functions.
            Water: FilledFromTop=false
              Thickness=[150, 150, 150, 150, 200, 200, 200, 300, 500, 500, 500, 500, 500, 500, 500, 500, 500]
              InitialValues=[0.179, 0.09645, 0.0911, 0.08685, 0.0949, 0.10905, 0.12015, 0.12015, 0.12015, 0.12015, 0.12015, 0.12015, 0.12015, 0.12015, 0.12015, 0.12015, 0.12015]
            Physical
              Thickness  ParticleSizeSand  ParticleSizeSilt  ParticleSizeClay  Rocks  BD     AirDry  LL15   DUL    SAT    KS
              150        5                 65                30                0      1.388  0.057   0.171  0.331  0.4    167.633
              150        5                 65                30                0      1.407  0.031   0.092  0.181  0.395  151.249
              150        5                 65                30                0      1.397  0.029   0.087  0.169  0.399  134.785
              150        5                 65                30                0      1.399  0.028   0.083  0.16   0.4    116.457
              200        5                 65                30                0      1.403  0.03    0.091  0.169  0.401  90.93
              200        5                 65                30                0      1.411  0.035   0.105  0.186  0.402  66.305
              200        5                 65                30                0      1.422  0.039   0.116  0.199  0.402  48.574
              300        5                 65                30                0      1.422  0.039   0.116  0.199  0.402  48.574
              500        5                 65                30                0      1.422  0.039   0.116  0.199  0.402  48.574
              500        5                 65                30                0      1.422  0.039   0.116  0.199  0.402  48.574
              500        5                 65                30                0      1.422  0.039   0.116  0.199  0.402  48.574
              500        5                 65                30                0      1.422  0.039   0.116  0.199  0.402  48.574
              500        5                 65                30                0      1.422  0.039   0.116  0.199  0.402  48.574
              500        5                 65                30                0      1.422  0.039   0.116  0.199  0.402  48.574
              500        5                 65                30                0      1.422  0.039   0.116  0.199  0.402  48.574
              500        5                 65                30                0      1.422  0.039   0.116  0.199  0.402  48.574
              500        5                 65                30                0      1.422  0.039   0.116  0.199  0.402  48.574
              Rocks, ParticleSizeSand, ParticleSizeSilt, ParticleSizeClay source: Calculated
              SoilCrop EucalyptusSoil
                LL=[0.171, 0.092, 0.087, 0.083, 0.091, 0.105, 0.1, 0.1, 0.1, 0.1, 0.14, 0.14, 0.14, 0.14, 0.14, 0.14, 0.14]
                KL=[0.03, 0.02, 0.02, 0.02, 0.02, 0.02, 0.02, 0.02, 0.02, 0.02, 0.02, 0.01, 0.01, 0.01, 0.01, 0.01, 0.01]
                XF=[1, 1, 1, 1, 0.5, 0.5, 0.5, 0.5, 0.5, 0.5, 0.5, 0.5, 0.5, 0.5, 0.5, 0.5, 0.5]
            WaterBalance SoilWater: SummerDate=1-nov; SummerU=6; SummerCona=6; WinterDate=1-apr; WinterU=2; WinterCona=2; DiffusConst=210.45; DiffusSlope=50.0803; Salb=0.13; CN2Bare=78; CNRed=20; CNCov=0; DischargeWidth=10; CatchmentArea=3417.15; PSIDul=-100
              Thickness=[150, 150, 150, 150, 200, 200, 200, 300, 500, 500, 500, 500, 500, 500, 500, 500, 500]
              SWCON=[0.598, 0.516, 0.427, 0.335, 0.234, 0.215, 0.215, 0.215, 0.215, 0.215, 0.215, 0.215, 0.215, 0.215, 0.215, 0.215, 0]
            Organic: FOMCNRatio=40; CarbonUnits=Total
              Thickness  Carbon  SoilCNRatio  FBiom  FInert  FOM
              150        4.6     16           0.01   0.1     475.475
              150        1.78    16           0.005  0.2     303.176
              150        0.93    16           0.005  0.3     193.314
              150        0.51    16           0.005  0.4     123.262
              200        0.4     16           0.005  0.5     67.648
              200        0.42    16           0.005  0.6     37.126
              200        0.01    16           0.01   0.7     37.126
              300        0.01    16           0.01   1       37.126
              500        0.01    16           0.01   1       37.126
              500        0.01    16           0.01   1       37.126
              500        0.01    10.49        0.01   1       37.126
              500        0.01    10.49        0.01   1       37.126
              500        0.01    10.49        0.01   1       37.126
              500        0.01    10.49        0.01   1       37.126
              500        0.01    10.49        0.01   1       37.126
              500        0.01    10.49        0.01   1       37.126
              500        0.01    10.49        0.01   1       37.126
            Chemical: PHUnits=Water
              Thickness=[150, 150, 150, 150, 200, 200, 200, 300, 500, 500, 500, 500, 500, 500, 500, 500, 500]
              PH=[6.3, 6.42, 6.51, 6.58, 6.66, 6.71, 6.71, 6.71, 6.71, 6.71, 6.71, 6.71, 6.71, 6.71, 6.71, 6.71, 6.71]
            Solute NO3: Thickness=[1800]; InitialValues=[3]; InitialValuesUnits=ppm; WaterTableConcentration=0; D0=0; DepthConstant=0; MaxDepthSoluteAccessible=0; RunoffEffectivenessAtMovingSolute=0; MaxEffectiveRunoff=0
            Solute NH4: Thickness=[1800]; InitialValues=[1]; InitialValuesUnits=ppm; WaterTableConcentration=0; D0=0; DepthConstant=0; MaxDepthSoluteAccessible=0; RunoffEffectivenessAtMovingSolute=0; MaxEffectiveRunoff=0
            Solute Urea: Thickness=[1800]; InitialValues=[0]; InitialValuesUnits=ppm; WaterTableConcentration=0; D0=0; DepthConstant=0; MaxDepthSoluteAccessible=0; RunoffEffectivenessAtMovingSolute=0; MaxEffectiveRunoff=0
            Nutrient
            SoilTemperature CERESSoilTemperature
        CompositeFactor LakeJasperResp19
          Specifications:
            [Clock]
            [Weather]
            [Soil]
            [TreeManagement]
            [Operations]
          Clock: Start=2016-01-15; End=2029-08-31
          Weather Met: FileName=LakeJasperResp.met
          Manager TreeManagement
            RowSpace = 1.81818
            RowWidth = 4
            CultivarName = globulusEKB9
            PlantingDate = 13-Jun
            HarvestAge = 10
            FertAmount = 15
            script: same as in T._.t1.HaysRates.TreeManagement
          Operations
            2016-11-10  [TreeThinning].Script.DoThin(0.0);
            2017-11-10  [TreeThinning].Script.DoThin(0.0);
            2018-11-10  [TreeThinning].Script.DoThin(0.0);
            2019-11-10  [TreeThinning].Script.DoThin(0.0);
            2020-11-10  [TreeThinning].Script.DoThin(0.02273);
            2021-11-10  [TreeThinning].Script.DoThin(0.05426);
            2023-05-10  [TreeThinning].Script.DoThin(0.01639);
            2023-11-10  [TreeThinning].Script.DoThin(0.0);
          Soil SLGAmodLakeJasper19: ASCOrder=NA; ASCSubOrder=NA; SoilType=Sandy Loam over Clay; Site=29118_3911; NearestTown=MANJIMUP; Region=Jarrah Forest; State=Western Australia; NaturalVegetation=Eucalyptus woodlands with a shrubby understorey; ApsoilNumber=9999; Latitude=-34.266; Longitude=116.259; LocationAccuracy=+- 90m; YearOfSampling=2023; Comments=Landuse is Grazing modified pastures
            DataSource=Soil and Landscape Grid of Australia. This soil parameter file was automatically generated from the GSM National Surfaces using pedotransfer functions.
            Water: FilledFromTop=true
              Thickness=[150, 150, 150, 150, 200, 200, 200, 300, 500, 500, 500, 500, 500, 500, 500, 500, 500]
              InitialValues=[0.331, 0.101333, 0.087, 0.083, 0.091, 0.105, 0.116, 0.116, 0.116, 0.116, 0.116, 0.116, 0.116, 0.116, 0.116, 0.116, 0.116]
            Physical
              Thickness  ParticleSizeSand  ParticleSizeSilt  ParticleSizeClay  Rocks  BD     AirDry  LL15   DUL    SAT    KS
              150        5                 65                30                0      1.388  0.057   0.171  0.331  0.4    167.633
              150        5                 65                30                0      1.407  0.031   0.092  0.181  0.395  151.249
              150        5                 65                30                0      1.397  0.029   0.087  0.169  0.399  134.785
              150        5                 65                30                0      1.399  0.028   0.083  0.16   0.4    116.457
              200        5                 65                30                0      1.403  0.03    0.091  0.169  0.401  90.93
              200        5                 65                30                0      1.411  0.035   0.105  0.186  0.402  66.305
              200        5                 65                30                0      1.422  0.039   0.116  0.199  0.402  48.574
              300        5                 65                30                0      1.422  0.039   0.116  0.199  0.402  48.574
              500        5                 65                30                0      1.422  0.039   0.116  0.199  0.402  48.574
              500        5                 65                30                0      1.422  0.039   0.116  0.199  0.402  48.574
              500        5                 65                30                0      1.422  0.039   0.116  0.199  0.402  48.574
              500        5                 65                30                0      1.422  0.039   0.116  0.199  0.402  48.574
              500        5                 65                30                0      1.422  0.039   0.116  0.199  0.402  48.574
              500        5                 65                30                0      1.422  0.039   0.116  0.199  0.402  48.574
              500        5                 65                30                0      1.422  0.039   0.116  0.199  0.402  48.574
              500        5                 65                30                0      1.422  0.039   0.116  0.199  0.402  48.574
              500        5                 65                30                0      1.422  0.039   0.116  0.199  0.402  48.574
              Rocks, ParticleSizeSand, ParticleSizeSilt, ParticleSizeClay source: Calculated
              SoilCrop EucalyptusSoil
                LL=[0.26, 0.16, 0.15, 0.15, 0.15, 0.15, 0.15, 0.15, 0.15, 0.15, 0.15, 0.15, 0.15, 0.15, 0.15, 0.15, 0.15]
                KL=[0.02, 0.02, 0.02, 0.02, 0.02, 0.02, 0.02, 0.02, 0.02, 0.01, 0.01, 0.01, 0.01, 0.01, 0.04, 0.04, 0.04]
                XF=[1, 1, 1, 1, 0.5, 0.5, 0.5, 0.5, 0.5, 0.5, 0.5, 0.5, 0.5, 0.5, 0.5, 0.5, 0.5]
            WaterBalance SoilWater: same as W._.t1.LakeJasperResp18.SLGAmodLakeJasper18.SoilWater
            Organic: FOMCNRatio=40; CarbonUnits=Total
              Thickness  Carbon  SoilCNRatio  FBiom  FInert  FOM
              150        4.409   16           0.02   0.2     475.475
              150        1.78    16           0.01   0.3     303.176
              150        0.93    16           0.01   0.4     193.314
              150        0.51    16           0.01   0.5     123.262
              200        0.4     16           0.01   0.6     67.648
              200        0.42    16           0.01   0.7     37.126
              200        0.01    16           0.01   1       37.126
              300        0.01    16           0.01   1       37.126
              500        0.01    16           0.01   1       37.126
              500        0.01    10.49        0.01   1       37.126
              500        0.01    10.49        0.01   1       37.126
              500        0.01    10.49        0.01   1       37.126
              500        0.01    10.49        0.01   1       37.126
              500        0.01    10.49        0.01   1       37.126
              500        0.01    10.49        0.01   1       37.126
              500        0.01    10.49        0.01   1       37.126
              500        0.01    10.49        0.01   1       37.126
            Chemical: same as W._.t1.LakeJasperResp18.SLGAmodLakeJasper18.Chemical
            Solute NO3: Thickness=[1800]; InitialValues=[3]; InitialValuesUnits=ppm; WaterTableConcentration=0; D0=0; DepthConstant=0; MaxDepthSoluteAccessible=0; RunoffEffectivenessAtMovingSolute=0; MaxEffectiveRunoff=0
            Solute NH4: Thickness=[1800]; InitialValues=[1]; InitialValuesUnits=ppm; WaterTableConcentration=0; D0=0; DepthConstant=0; MaxDepthSoluteAccessible=0; RunoffEffectivenessAtMovingSolute=0; MaxEffectiveRunoff=0
            Solute Urea: Thickness=[1800]; InitialValues=[0]; InitialValuesUnits=ppm; WaterTableConcentration=0; D0=0; DepthConstant=0; MaxDepthSoluteAccessible=0; RunoffEffectivenessAtMovingSolute=0; MaxEffectiveRunoff=0
            Nutrient
            SoilTemperature CERESSoilTemperature
        CompositeFactor OCallaghanResp
          Specifications:
            [Clock]
            [Weather]
            [Soil]
            [TreeManagement]
            [Operations]
          Clock: Start=2017-02-15; End=2029-08-31
          Weather Met: FileName=OCallaghan.met
          Manager TreeManagement: same as V._.t1.MeadeResp.TreeManagement
          Operations
            2018-01-12  [TreeThinning].Script.DoThin(0.1407);
            2019-01-12  [TreeThinning].Script.DoThin(0.12941);
            2020-01-12  [TreeThinning].Script.DoThin(0.0);
            2021-01-12  [TreeThinning].Script.DoThin(0.00827);
            2022-01-12  [TreeThinning].Script.DoThin(0.01668);
            2023-01-12  [TreeThinning].Script.DoThin(0.0165);
            2024-01-12  [TreeThinning].Script.DoThin(0.01724);
          Soil SLGAmodOCallaghan: ASCOrder=NA; ASCSubOrder=NA; SoilType=Loamy Sand over Clay Loam; Site=29780_5606; NearestTown=MOUNT BARKER; Region=Jarrah Forest; State=Western Australia; NaturalVegetation=Cleared, non-native vegetation, buildings; ApsoilNumber=9999; Latitude=-34.817682; Longitude=117.671264; LocationAccuracy=+- 90m; YearOfSampling=2023; Comments=Landuse is Grazing modified pastures
            DataSource=Soil and Landscape Grid of Australia. This soil parameter file was automatically generated from the GSM National Surfaces using pedotransfer functions.
            Water: FilledFromTop=false
              Thickness=[150, 150, 150, 150, 200, 200, 200, 400, 400, 400, 400, 400, 400, 400, 400, 400, 400, 400, 400]
              InitialValues=[0.159, 0.097, 0.118, 0.133, 0.161, 0.161, 0.161, 0.161, 0.161, 0.161, 0.161, 0.161, 0.161, 0.161, 0.161, 0.161, 0.161, 0.161, 0.161]
            Physical
              Thickness  ParticleSizeSand  ParticleSizeSilt  ParticleSizeClay  Rocks  BD     AirDry  LL15   DUL    SAT
              150        5                 65                30                0      1.448  0.051   0.152  0.29   0.382
              150        5                 65                30                0      1.518  0.031   0.093  0.166  0.363
              150        5                 65                30                0      1.515  0.038   0.114  0.189  0.37
              150        5                 65                30                0      1.502  0.043   0.129  0.201  0.381
              200        5                 65                30                0      1.519  0.052   0.157  0.235  0.382
              200        5                 65                30                0      1.519  0.052   0.157  0.235  0.382
              200        5                 65                30                0      1.519  0.052   0.157  0.235  0.382
              400        5                 65                30                0      1.519  0.052   0.157  0.235  0.382
              400        5                 65                30                0      1.519  0.052   0.157  0.235  0.382
              400        5                 65                30                0      1.519  0.052   0.157  0.235  0.382
              400        5                 65                30                0      1.519  0.052   0.157  0.235  0.382
              400        5                 65                30                0      1.519  0.052   0.157  0.235  0.382
              400        5                 65                30                0      1.519  0.052   0.157  0.235  0.382
              400        5                 65                30                0      1.519  0.052   0.157  0.235  0.382
              400        5                 65                30                0      1.519  0.052   0.157  0.235  0.382
              400        5                 65                30                0      1.519  0.052   0.157  0.235  0.382
              400        5                 65                30                0      1.519  0.052   0.157  0.235  0.382
              400        5                 65                30                0      1.519  0.052   0.157  0.235  0.382
              400        5                 65                30                0      1.519  0.052   0.157  0.235  0.382
              Rocks, ParticleSizeSand, ParticleSizeSilt, ParticleSizeClay source: Calculated
              SoilCrop EucalyptusSoil
                LL=[0.2, 0.12, 0.14, 0.17, 0.19, 0.2, 0.2, 0.2, 0.2, 0.2, 0.2, 0.2, 0.21, 0.21, 0.21, 0.21, 0.21, 0.21, 0.21]
                KL=[0.03, 0.03, 0.02, 0.02, 0.02, 0.02, 0.02, 0.02, 0.02, 0.01, 0.01, 0.005, 0.005, 0.005, 0.005, 0.005, 0.005, 0.005, 0.005]
                XF=[1, 0.9, 0.8, 0.7, 0.6, 0.5, 0.5, 0.5, 0.5, 0.5, 0.5, 0.5, 0.5, 0.5, 0.5, 0.5, 0.5, 0.5, 0.5]
            WaterBalance SoilWater: SummerDate=1-nov; SummerU=6; SummerCona=6; WinterDate=1-apr; WinterU=2; WinterCona=2; DiffusConst=232.627; DiffusSlope=51.8174; Salb=0.16; CN2Bare=80; CNRed=20; CNCov=0; PSIDul=-100
              Thickness=[150, 150, 150, 150, 200, 200, 200, 400, 400, 400, 400, 400, 400, 400, 400, 400, 400, 400, 400]
              SWCON=[0.7, 0.6, 0.6, 0.6, 0.5, 0.5, 0.4, 0.4, 0.3, 0.3, 0.3, 0.3, 0.3, 0.3, 0.3, 0.3, 0.3, 0.3, 0]
            Organic: FOMCNRatio=40; CarbonUnits=Total
              Thickness  Carbon  SoilCNRatio  FBiom  FInert  FOM
              150        3       14           0.01   0.1     553.813
              150        1.5     16           0.005  0.2     315.553
              150        1       16           0.005  0.3     179.797
              150        0.5     16           0.005  0.4     102.445
              200        0.12    16           0.005  0.5     48.392
              200        0.01    16           0.005  1       48.392
              200        0.01    16           0.005  1       48.392
              400        0.01    16           0.01   1       48.392
              400        0.01    14           0.01   1       48.392
              400        0.01    15           0.01   1       48.392
              400        0.01    14.17        0.01   1       48.392
              400        0.01    14.17        0.01   1       48.392
              400        0.01    14.17        0.01   1       48.392
              400        0.01    14.17        0.01   1       48.392
              400        0.01    14.17        0.01   1       48.392
              400        0.01    14.17        0.01   1       48.392
              400        0.01    14.17        0.01   1       48.392
              400        0.01    14.17        0.01   1       48.392
              400        0.01    14.17        0.01   1       48.392
            Chemical: PHUnits=Water
              Thickness=[150, 150, 150, 150, 200, 200, 200, 400, 400, 400, 400, 400, 400, 400, 400, 400, 400, 400, 400]
              PH=[5.9, 5.9, 5.9, 5.9, 5.9, 5.9, 5.9, 5.9, 6.41, 6.41, 6.41, 6.41, 6.41, 6.41, 6.41, 6.41, 6.41, 6.41, 6.41]
            Solute NO3: Thickness=[1800]; InitialValues=[3]; InitialValuesUnits=ppm; WaterTableConcentration=0; D0=0; DepthConstant=0; MaxDepthSoluteAccessible=0; RunoffEffectivenessAtMovingSolute=0; MaxEffectiveRunoff=0
            Solute NH4: Thickness=[1800]; InitialValues=[1]; InitialValuesUnits=ppm; WaterTableConcentration=0; D0=0; DepthConstant=0; MaxDepthSoluteAccessible=0; RunoffEffectivenessAtMovingSolute=0; MaxEffectiveRunoff=0
            Solute Urea: Thickness=[1800]; InitialValues=[0]; InitialValuesUnits=ppm; WaterTableConcentration=0; D0=0; DepthConstant=0; MaxDepthSoluteAccessible=0; RunoffEffectivenessAtMovingSolute=0; MaxEffectiveRunoff=0
            Nutrient
            SoilTemperature CERESSoilTemperature
        CompositeFactor WisbeyResp
          Specifications:
            [Clock]
            [Weather]
            [Soil]
            [TreeManagement]
            [Operations]
          Clock: Start=2017-02-15; End=2029-08-31
          Weather Met: FileName=Wisbey.met
          Manager TreeManagement: same as V._.t1.MeadeResp.TreeManagement
          Operations
            2018-01-18  [TreeThinning].Script.DoThin(0.1537);
            2019-01-19  [TreeThinning].Script.DoThin(0.074993);
            2020-01-20  [TreeThinning].Script.DoThin(0.0);
            2021-01-21  [TreeThinning].Script.DoThin(0.00828);
            2023-01-22  [TreeThinning].Script.DoThin(0.0161);
            2024-01-22  [TreeThinning].Script.DoThin(0.0);
          Soil SLGAmodWisbey: ASCOrder=NA; ASCSubOrder=NA; SoilType=Loamy Sand over Clay Loam; Site=29870_5826; NearestTown=ALBANY; Region=Jarrah Forest; State=Western Australia; NaturalVegetation=Cleared, non-native vegetation, buildings; ApsoilNumber=9999; Latitude=-34.89258; Longitude=117.855011; LocationAccuracy=+- 90m; YearOfSampling=2023; Comments=Landuse is Grazing modified pastures
            DataSource=Soil and Landscape Grid of Australia. This soil parameter file was automatically generated from the GSM National Surfaces using pedotransfer functions.
            Water: FilledFromTop=false
              Thickness=[150, 150, 150, 150, 200, 200, 200, 400, 400, 400, 400, 400, 400, 400, 400, 400, 400, 400]
              InitialValues=[0.3, 0.1, 0.11, 0.133, 0.166, 0.166, 0.166, 0.166, 0.166, 0.166, 0.166, 0.166, 0.166, 0.166, 0.166, 0.166, 0.166, 0.166]
            Physical
              Thickness  ParticleSizeSand  ParticleSizeSilt  ParticleSizeClay  Rocks  BD     AirDry  LL15   DUL    SAT
              150        5                 65                30                0      1.397  0.051   0.154  0.3    0.396
              150        5                 65                30                0      1.48   0.027   0.082  0.155  0.373
              150        5                 65                30                0      1.486  0.037   0.11   0.191  0.378
              150        5                 65                30                0      1.473  0.044   0.133  0.216  0.39
              200        5                 65                30                0      1.488  0.055   0.166  0.253  0.393
              200        5                 65                30                0      1.488  0.055   0.166  0.253  0.393
              200        5                 65                30                0      1.488  0.055   0.166  0.253  0.393
              400        5                 65                30                0      1.488  0.055   0.166  0.253  0.393
              400        5                 65                30                0      1.488  0.055   0.166  0.253  0.393
              400        5                 65                30                0      1.488  0.055   0.166  0.253  0.393
              400        5                 65                30                0      1.488  0.055   0.166  0.253  0.393
              400        5                 65                30                0      1.488  0.055   0.166  0.253  0.393
              400        5                 65                30                0      1.488  0.055   0.166  0.253  0.393
              400        5                 65                30                0      1.488  0.055   0.166  0.253  0.393
              400        5                 65                30                0      1.488  0.055   0.166  0.253  0.393
              400        5                 65                30                0      1.488  0.055   0.166  0.253  0.393
              400        5                 65                30                0      1.488  0.055   0.166  0.253  0.393
              400        5                 65                30                0      1.488  0.055   0.166  0.253  0.393
              400        5                 65                30                0      1.488  0.055   0.166  0.253  0.393
              Rocks, ParticleSizeSand, ParticleSizeSilt, ParticleSizeClay source: Calculated
              SoilCrop EucalyptusSoil
                LL=[0.25, 0.1, 0.14, 0.15, 0.2, 0.2, 0.2, 0.2, 0.2, 0.2, 0.2, 0.2, 0.2, 0.2, 0.2, 0.2, 0.2, 0.2, 0.2]
                KL=[0.03, 0.03, 0.02, 0.02, 0.02, 0.02, 0.02, 0.02, 0.02, 0.01, 0.01, 0.01, 0.01, 0.01, 0.01, 0.01, 0.01, 0.01, 0.01]
                XF=[1, 0.9, 0.8, 0.7, 0.6, 0.5, 0.5, 0.5, 0.5, 0.5, 0, 0, 0, 0, 0, 0, 0, 0, 0]
            WaterBalance SoilWater: SummerDate=1-nov; SummerU=6; SummerCona=6; WinterDate=1-apr; WinterU=2; WinterCona=2; DiffusConst=213.311; DiffusSlope=48.1161; Salb=0.16; CN2Bare=80; CNRed=20; CNCov=0; PSIDul=-100
              Thickness=[150, 150, 150, 150, 200, 200, 200, 400, 400, 400, 400, 400, 400, 400, 400, 400, 400, 400, 400]
              SWCON=[0.638, 0.571, 0.5, 0.395, 0.259, 0.259, 0.259, 0.259, 0.259, 0.259, 0.259, 0.259, 0.259, 0.259, 0.259, 0.259, 0.259, 0.259, 0.259]
            Organic: FOMCNRatio=40; CarbonUnits=Total
              Thickness  Carbon  SoilCNRatio  FBiom  FInert  FOM
              150        3.5     10.649       0.04   0.07    553.813
              150        2       10.65        0.031  0.209   315.553
              150        1       10.65        0.014  0.231   179.797
              150        1       10.65        0.01   0.649   102.445
              200        0.5     10.65        0.01   0.827   48.392
              200        0.2     10.65        0.01   0.9     48.392
              200        0.01    10.65        0.01   1       48.392
              400        0.01    10.65        0.01   1       48.392
              400        0.01    10.65        0.01   1       48.392
              400        0.01    10.65        0.01   1       48.392
              400        0.01    10.65        0.01   1       48.392
              400        0.01    10.65        0.01   1       48.392
              400        0.01    10.65        0.01   1       48.392
              400        0.01    10.65        0.01   1       48.392
              400        0.01    10.65        0.01   1       48.392
              400        0.01    10.65        0.01   1       48.392
              400        0.01    10.65        0.01   1       48.392
              400        0.01    10.65        0.01   1       48.392
              400        0.01    10.65        0.01   1       48.392
            Chemical: PHUnits=Water
              Thickness=[150, 150, 150, 150, 200, 200, 200, 400, 400, 400, 400, 400, 400, 400, 400, 400, 400, 400, 400]
              PH=[5.163, 5.26, 5.35, 5.4, 5.49, 5.49, 5.49, 5.49, 5.49, 5.49, 5.49, 5.49, 5.49, 5.49, 5.49, 5.49, 5.49, 5.49, 5.49]
            Solute NO3: Thickness=[1800]; InitialValues=[3]; InitialValuesUnits=ppm; WaterTableConcentration=0; D0=0; DepthConstant=0; MaxDepthSoluteAccessible=0; RunoffEffectivenessAtMovingSolute=0; MaxEffectiveRunoff=0
            Solute NH4: Thickness=[1800]; InitialValues=[1]; InitialValuesUnits=ppm; WaterTableConcentration=0; D0=0; DepthConstant=0; MaxDepthSoluteAccessible=0; RunoffEffectivenessAtMovingSolute=0; MaxEffectiveRunoff=0
            Solute Urea: Thickness=[1800]; InitialValues=[0]; InitialValuesUnits=ppm; WaterTableConcentration=0; D0=0; DepthConstant=0; MaxDepthSoluteAccessible=0; RunoffEffectivenessAtMovingSolute=0; MaxEffectiveRunoff=0
            Nutrient
            SoilTemperature CERESSoilTemperature
      Factor t2
        CompositeFactor FaganRates
          Specifications:
            [Clock]
            [Weather]
            [Soil]
            [TreeManagement]
            [Operations]
          Clock: Start=2017-02-15; End=2029-08-31
          Weather Met: FileName=Fagan.met
          Manager TreeManagement: same as V._.t1.MeadeResp.TreeManagement
          Operations
            2018-01-12  [TreeThinning].Script.DoThin(0.1466);
            2019-01-12  [TreeThinning].Script.DoThin(0.07515);
            2020-01-12  [TreeThinning].Script.DoThin(0.0);
            2021-01-11  [TreeThinning].Script.DoThin(0.02128);
            2022-01-11  [TreeThinning].Script.DoThin(0.01087);
            2023-01-11  [TreeThinning].Script.DoThin(0.0);
            2024-01-11  [TreeThinning].Script.DoThin(0.02198);
          Soil SLGAmodFagan: ASCOrder=NA; ASCSubOrder=NA; SoilType=Sand over Clay Loam; Site=29891_4956; NearestTown=DENMARK; Region=Warren; State=Western Australia; NaturalVegetation=Cleared, non-native vegetation, buildings; ApsoilNumber=9999; Latitude=-34.91; Longitude=117.13; LocationAccuracy=+- 90m; YearOfSampling=2024; Comments=Landuse is Grazing modified pastures
            DataSource=Soil and Landscape Grid of Australia. This soil parameter file was automatically generated from the GSM National Surfaces using pedotransfer functions.
            Water: FilledFromTop=false
              Thickness=[150, 150, 150, 150, 200, 200, 500, 500, 500, 500, 500, 500, 500, 500, 500, 500]
              InitialValues=[0.162, 0.118, 0.125, 0.139, 0.158, 0.175, 0.175, 0.175, 0.175, 0.175, 0.175, 0.175, 0.175, 0.175, 0.175, 0.175]
            Physical: same as W._.t1.FaganRates.SLGAmodFagan.Physical
            WaterBalance SoilWater: same as W._.t1.FaganRates.SLGAmodFagan.SoilWater
            Organic: FOMCNRatio=40; CarbonUnits=Total
              Thickness  Carbon  SoilCNRatio  FBiom  FInert  FOM
              150        4.2     16           0.04   0.15    475.475
              150        1.6     16           0.031  0.2     303.176
              150        1.03    16           0.014  0.3     193.314
              150        0.75    16           0.01   0.6     123.262
              200        0.58    16           0.01   0.8     67.648
              200        0.48    16           0.01   1       37.126
              500        0.01    16           0.01   1       37.126
              500        0.01    16           0.01   1       37.126
              500        0.01    16.41        0.01   1       37.126
              500        0.01    16.41        0.01   1       37.126
              500        0.01    16.41        0.01   1       37.126
              500        0.01    16.41        0.01   1       37.126
              500        0.01    16.41        0.01   1       37.126
              500        0.01    16.41        0.01   1       37.126
              500        0.01    16.41        0.01   1       37.126
              500        0.01    16.41        0.01   1       37.126
            Chemical: same as W._.t1.FaganRates.SLGAmodFagan.Chemical
            Solute NO3: same as W._.t1.FaganRates.SLGAmodFagan.NO3
            Solute NH4: same as W._.t1.FaganRates.SLGAmodFagan.NH4
            Solute Urea: same as W._.t1.FaganRates.SLGAmodFagan.Urea
            Nutrient
            SoilTemperature
        CompositeFactor JonesRates
          Specifications:
            [Clock]
            [Weather]
            [Soil]
            [TreeManagement]
            [Operations]
          Clock: Start=2017-01-15; End=2029-08-31
          Weather Met: FileName=Jones.met
          Manager TreeManagement: same as V._.t1.DanyenahRates.TreeManagement
          Operations
            2017-12-12  [TreeThinning].Script.DoThin(0.1617);
            2018-12-12  [TreeThinning].Script.DoThin(0.1286);
            2019-12-12  [TreeThinning].Script.DoThin(0.0);
            2020-01-01  [TreeThinning].Script.DoThin(0.0);
            2021-01-01  [TreeThinning].Script.DoThin(0.0);
            2022-01-01  [TreeThinning].Script.DoThin(0.0);
            2023-01-01  [TreeThinning].Script.DoThin(0.0);
            2024-01-01  [TreeThinning].Script.DoThin(0.0);
          Soil SLGAmodJones: same as W._.t1.JonesRates.SLGAmodJones
        CompositeFactor LakeJasperRates
          Specifications:
            [Clock]
            [Weather]
            [Soil]
            [TreeManagement]
            [Operations]
          Clock: Start=2015-12-13; End=2029-08-31
          Weather Met: FileName=LakeJasperRates.met
          Manager TreeManagement: same as W._.t1.LakeJasperRates.TreeManagement
          Operations
            2016-11-10  [TreeThinning].Script.DoThin(0.1104);
            2017-11-10  [TreeThinning].Script.DoThin(0.16083);
            2019-05-31  [TreeThinning].Script.DoThin(0.02326);
            2019-11-09  [TreeThinning].Script.DoThin(0.0);
            2020-11-01  [TreeThinning].Script.DoThin(0.0);
            2021-11-01  [TreeThinning].Script.DoThin(0.0);
            2023-05-30  [TreeThinning].Script.DoThin(0.01190);
          Soil SLGAmodLakeJasperRates: same as W._.t1.LakeJasperRates.SLGAmodLakeJasperRates
        CompositeFactor LyonsRates
          Specifications:
            [Clock]
            [Weather]
            [Soil]
            [TreeManagement]
            [Operations]
          Clock: Start=2017-02-15; End=2029-08-31
          Weather Met: FileName=Lyon.met
          Manager TreeManagement: same as V._.t1.MeadeResp.TreeManagement
          Operations
            2018-01-12  [TreeThinning].Script.DoThin(0.09318);
            2019-01-12  [TreeThinning].Script.DoThin(0.0);
            2020-01-01  [TreeThinning].Script.DoThin(0.0);
            2021-01-01  [TreeThinning].Script.DoThin(0.01852);
            2022-01-01  [TreeThinning].Script.DoThin(0.00943);
            2023-01-01  [TreeThinning].Script.DoThin(0.03810);
            2024-01-01  [TreeThinning].Script.DoThin(0.03960);
          Soil SLGAmodLyons: same as W._.t1.LyonsRates.SLGAmodLyons
        CompositeFactor ParolaRates
          Specifications:
            [Clock]
            [Weather]
            [Soil]
            [TreeManagement]
            [Operations]
          Clock: Start=2017-02-12; End=2029-08-31
          Weather Met: FileName=Parola.met
          Manager TreeManagement: same as V._.t1.MeadeResp.TreeManagement
          Operations
            2018-01-12  [TreeThinning].Script.DoThin(0.1655);
            2019-01-12  [TreeThinning].Script.DoThin(0.15594);
            2020-01-12  [TreeThinning].Script.DoThin(0.0);
            2021-01-11  [TreeThinning].Script.DoThin(0.0);
            2022-01-11  [TreeThinning].Script.DoThin(0.01408);
            2023-01-11  [TreeThinning].Script.DoThin(0.0);
            2024-01-11  [TreeThinning].Script.DoThin(0.0);
          Soil SLGAmodParola: same as W._.t1.ParolaRates.SLGAmodParola
      Factor t3
        CompositeFactor FaganRates
          Specifications:
            [Clock]
            [Weather]
            [Soil]
            [TreeManagement]
            [Operations]
          Clock: Start=2017-02-15; End=2029-08-31
          Weather Met: FileName=Fagan.met
          Manager TreeManagement: same as V._.t1.MeadeResp.TreeManagement
          Operations
            2018-01-12  [TreeThinning].Script.DoThin(0.1466);
            2019-01-12  [TreeThinning].Script.DoThin(0.10467);
            2020-01-12  [TreeThinning].Script.DoThin(0.0);
            2021-01-11  [TreeThinning].Script.DoThin(0.02198);
            2022-01-11  [TreeThinning].Script.DoThin(0.0);
            2023-01-11  [TreeThinning].Script.DoThin(0.01124);
            2024-01-11  [TreeThinning].Script.DoThin(0.0);
          Soil SLGAmodFagan: same as W._.t2.FaganRates.SLGAmodFagan
        CompositeFactor JonesRates
          Specifications:
            [Clock]
            [Weather]
            [Soil]
            [TreeManagement]
            [Operations]
          Clock: Start=2017-01-15; End=2029-08-31
          Weather Met: FileName=Jones.met
          Manager TreeManagement: same as V._.t1.DanyenahRates.TreeManagement
          Operations
            2017-12-12  [TreeThinning].Script.DoThin(0.1617);
            2018-12-12  [TreeThinning].Script.DoThin(0.1286);
            2019-12-12  [TreeThinning].Script.DoThin(0.0);
            2020-01-01  [TreeThinning].Script.DoThin(0.02817);
            2021-01-01  [TreeThinning].Script.DoThin(0.01449);
            2022-01-01  [TreeThinning].Script.DoThin(0.0);
            2023-01-01  [TreeThinning].Script.DoThin(0.0);
            2024-01-01  [TreeThinning].Script.DoThin(0.0);
          Soil SLGAmodJones: same as W._.t1.JonesRates.SLGAmodJones
        CompositeFactor LakeJasperRates
          Specifications:
            [Clock]
            [Weather]
            [Soil]
            [TreeManagement]
            [Operations]
          Clock: Start=2015-12-13; End=2029-08-31
          Weather Met: FileName=LakeJasperRates.met
          Manager TreeManagement: same as W._.t1.LakeJasperRates.TreeManagement
          Operations
            2016-11-10  [TreeThinning].Script.DoThin(0.1104);
            2017-11-10  [TreeThinning].Script.DoThin(0.08277);
            2019-11-01  [TreeThinning].Script.DoThin(0.0);
            2020-11-01  [TreeThinning].Script.DoThin(0.0);
            2021-05-01  [TreeThinning].Script.DoThin(0.01064);
            2022-05-01  [TreeThinning].Script.DoThin(0.01075);
            2023-05-30  [TreeThinning].Script.DoThin(0.0);
          Soil SLGAmodLakeJasperRates: same as W._.t1.LakeJasperRates.SLGAmodLakeJasperRates
        CompositeFactor LyonsRates
          Specifications:
            [Clock]
            [Weather]
            [Soil]
            [TreeManagement]
            [Operations]
          Clock: Start=2017-02-15; End=2029-08-31
          Weather Met: FileName=Lyon.met
          Manager TreeManagement: same as V._.t1.MeadeResp.TreeManagement
          Operations
            2018-01-12  [TreeThinning].Script.DoThin(0.09318);
            2019-01-12  [TreeThinning].Script.DoThin(0.11111);
            2020-01-01  [TreeThinning].Script.DoThin(0.0);
            2021-01-01  [TreeThinning].Script.DoThin(0.0);
            2022-01-01  [TreeThinning].Script.DoThin(0.0);
            2023-01-01  [TreeThinning].Script.DoThin(0.02083);
            2024-01-01  [TreeThinning].Script.DoThin(0.01064);
          Soil SLGAmodLyons: same as W._.t1.LyonsRates.SLGAmodLyons
        CompositeFactor ParolaRates
          Specifications:
            [Clock]
            [Weather]
            [Soil]
            [TreeManagement]
            [Operations]
          Clock: Start=2017-02-12; End=2029-08-31
          Weather Met: FileName=Parola.met
          Manager TreeManagement: same as V._.t1.MeadeResp.TreeManagement
          Operations
            2018-01-12  [TreeThinning].Script.DoThin(0.1655);
            2019-01-12  [TreeThinning].Script.DoThin(0.13217);
            2020-01-12  [TreeThinning].Script.DoThin(0.0274);
            2021-01-11  [TreeThinning].Script.DoThin(0.01408);
            2022-01-11  [TreeThinning].Script.DoThin(0.0);
            2023-01-11  [TreeThinning].Script.DoThin(0.0);
            2024-01-11  [TreeThinning].Script.DoThin(0.0);
          Soil SLGAmodParola: same as W._.t1.ParolaRates.SLGAmodParola
      Factor t6
        CompositeFactor FaganRates
          Specifications:
            [Clock]
            [Weather]
            [Soil]
            [TreeManagement]
            [Operations]
            [ExptFert]
          Clock: Start=2017-02-15; End=2029-08-31
          Weather Met: FileName=Fagan.met
          Manager TreeManagement: same as V._.t1.MeadeResp.TreeManagement
          Operations
            2018-01-12  [TreeThinning].Script.DoThin(0.1466);
            2019-01-12  [TreeThinning].Script.DoThin(0.13418);
            2020-01-12  [TreeThinning].Script.DoThin(0.0);
            2021-01-11  [TreeThinning].Script.DoThin(0.0);
            2022-01-11  [TreeThinning].Script.DoThin(0.03409);
            2023-01-11  [TreeThinning].Script.DoThin(0.02353);
            2024-01-11  [TreeThinning].Script.DoThin(0.06024);
          Operations ExptFert
            2019-10-13  [Fertiliser].Apply(amount: 200, type: "UreaN", depth: 100)
            2022-09-08  [Fertiliser].Apply(amount: 200, type: "NH4N", depth: 100)
          Soil SLGAmodFagan: same as W._.t2.FaganRates.SLGAmodFagan
        CompositeFactor JonesRates
          Specifications:
            [Clock]
            [Weather]
            [Soil]
            [TreeManagement]
            [Operations]
            [ExptFert]
          Clock: Start=2017-01-15; End=2029-08-31
          Weather Met: FileName=Jones.met
          Manager TreeManagement: same as V._.t1.DanyenahRates.TreeManagement
          Operations
            2017-12-12  [TreeThinning].Script.DoThin(0.20782);
            2018-12-12  [TreeThinning].Script.DoThin(0.0);
            2019-12-12  [TreeThinning].Script.DoThin(0.0);
            2020-01-01  [TreeThinning].Script.DoThin(0.0);
            2021-01-01  [TreeThinning].Script.DoThin(0.0);
            2022-01-01  [TreeThinning].Script.DoThin(0.0);
            2023-01-01  [TreeThinning].Script.DoThin(0.0);
            2024-01-01  [TreeThinning].Script.DoThin(0.0);
          Operations ExptFert
            2019-09-06  [Fertiliser].Apply(amount: 200, type: "UreaN", depth: 100)
            2022-10-01  [Fertiliser].Apply(amount: 200, type: "NH4N", depth: 100)
          Soil SLGAmodJones: same as W._.t1.JonesRates.SLGAmodJones
        CompositeFactor LakeJasperRates
          Specifications:
            [Clock]
            [Weather]
            [Soil]
            [TreeManagement]
            [Operations]
            [ExptFert]
          Clock: Start=2016-01-15; End=2029-08-31
          Weather Met: FileName=LakeJasperRates.met
          Manager TreeManagement: same as W._.t1.LakeJasperRates.TreeManagement
          Operations
            2016-11-10  [TreeThinning].Script.DoThin(0.1469);
            2017-11-10  [TreeThinning].Script.DoThin(0.13510);
            2018-11-10  [TreeThinning].Script.DoThin(0.0);
            2020-05-10  [TreeThinning].Script.DoThin(0.01176);
            2020-11-09  [TreeThinning].Script.DoThin(0.04762);
            2022-05-01  [TreeThinning].Script.DoThin(0.0125);
            2023-05-01  [TreeThinning].Script.DoThin(0.02532);
          Operations ExptFert
            2018-09-28  [Fertiliser].Apply(amount: 200, type: "UreaN", depth: 100)
            2022-10-10  [Fertiliser].Apply(amount: 200, type: "NH4N", depth: 100)
          Soil SLGAmodLakeJasperRates: same as W._.t1.LakeJasperRates.SLGAmodLakeJasperRates
        CompositeFactor LyonsRates
          Specifications:
            [Clock]
            [Weather]
            [Soil]
            [TreeManagement]
            [Operations]
            [ExptFert]
          Clock: Start=2017-02-15; End=2029-08-31
          Weather Met: FileName=Lyon.met
          Manager TreeManagement: same as V._.t1.MeadeResp.TreeManagement
          Operations
            2018-01-12  [TreeThinning].Script.DoThin(0.1063);
            2019-01-12  [TreeThinning].Script.DoThin(0.10746);
            2020-01-01  [TreeThinning].Script.DoThin(0.01053);
            2021-01-01  [TreeThinning].Script.DoThin(0.01064);
            2022-01-01  [TreeThinning].Script.DoThin(0.0);
            2023-01-01  [TreeThinning].Script.DoThin(0.04301);
            2024-01-01  [TreeThinning].Script.DoThin(0.03371);
          Operations ExptFert
            2019-09-05  [Fertiliser].Apply(amount: 200, type: "UreaN", depth: 100)
            2022-09-07  [Fertiliser].Apply(amount: 200, type: "NH4N", depth: 100)
          Soil SLGAmodLyons: same as W._.t1.LyonsRates.SLGAmodLyons
        CompositeFactor ParolaRates
          Specifications:
            [Clock]
            [Weather]
            [Soil]
            [TreeManagement]
            [Operations]
            [ExptFert]
          Clock: Start=2017-02-12; End=2029-08-31
          Weather Met: FileName=Parola.met
          Manager TreeManagement: same as V._.t1.MeadeResp.TreeManagement
          Operations
            2018-01-12  [TreeThinning].Script.DoThin(0.1655);
            2019-01-12  [TreeThinning].Script.DoThin(0.19161);
            2020-01-12  [TreeThinning].Script.DoThin(0.04412);
            2021-01-11  [TreeThinning].Script.DoThin(0.0);
            2022-01-11  [TreeThinning].Script.DoThin(0.0);
            2023-01-11  [TreeThinning].Script.DoThin(0.0);
            2024-01-11  [TreeThinning].Script.DoThin(0.0);
          Operations ExptFert
            2019-08-20  [Fertiliser].Apply(amount: 200, type: "UreaN", depth: 100)
            2022-09-09  [Fertiliser].Apply(amount: 200, type: "NH4N", depth: 100)
          Soil SLGAmodParola: same as W._.t1.ParolaRates.SLGAmodParola
      Factor t7
        CompositeFactor FaganRates
          Specifications:
            [Clock]
            [Weather]
            [Soil]
            [TreeManagement]
            [Operations]
            [ExptFert]
          Clock: Start=2017-02-15; End=2029-08-31
          Weather Met: FileName=Fagan.met
          Manager TreeManagement: same as V._.t1.MeadeResp.TreeManagement
          Operations
            2018-01-12  [TreeThinning].Script.DoThin(0.1466);
            2019-01-12  [TreeThinning].Script.DoThin(0.04563);
            2020-01-12  [TreeThinning].Script.DoThin(0.0);
            2021-01-11  [TreeThinning].Script.DoThin(0.02062);
            2022-01-11  [TreeThinning].Script.DoThin(0.04211);
            2023-01-11  [TreeThinning].Script.DoThin(0.01099);
            2024-01-11  [TreeThinning].Script.DoThin(0.01111);
          Operations ExptFert
            2019-10-13  [Fertiliser].Apply(amount: 200, type: "UreaN", depth: 100)
          Soil SLGAmodFagan: same as W._.t2.FaganRates.SLGAmodFagan
        CompositeFactor JonesRates
          Specifications:
            [Clock]
            [Weather]
            [Soil]
            [TreeManagement]
            [Operations]
            [ExptFert]
          Clock: Start=2017-01-15; End=2029-08-31
          Weather Met: FileName=Jones.met
          Manager TreeManagement: same as V._.t1.DanyenahRates.TreeManagement
          Operations
            2017-12-12  [TreeThinning].Script.DoThin(0.20782);
            2018-12-12  [TreeThinning].Script.DoThin(0.11689);
            2019-12-12  [TreeThinning].Script.DoThin(0.0);
            2020-01-01  [TreeThinning].Script.DoThin(0.01471);
            2021-01-01  [TreeThinning].Script.DoThin(0.0);
            2022-01-01  [TreeThinning].Script.DoThin(0.02985);
            2023-01-01  [TreeThinning].Script.DoThin(0.0);
            2024-01-01  [TreeThinning].Script.DoThin(0.0);
          Operations ExptFert
            2019-09-06  [Fertiliser].Apply(amount: 200, type: "UreaN", depth: 100)
          Soil SLGAmodJones: same as W._.t1.JonesRates.SLGAmodJones
        CompositeFactor LakeJasperRates
          Specifications:
            [Clock]
            [Weather]
            [Soil]
            [TreeManagement]
            [Operations]
            [ExptFert]
          Clock: Start=2016-01-15; End=2029-08-31
          Weather Met: FileName=LakeJasperRates.met
          Manager TreeManagement: same as W._.t1.LakeJasperRates.TreeManagement
          Operations
            2016-11-10  [TreeThinning].Script.DoThin(0.1469);
            2017-11-10  [TreeThinning].Script.DoThin(0.05370);
            2018-11-10  [TreeThinning].Script.DoThin(0.01075);
            2020-05-10  [TreeThinning].Script.DoThin(0.0);
            2020-11-09  [TreeThinning].Script.DoThin(0.02174);
            2022-05-01  [TreeThinning].Script.DoThin(0.0);
            2023-05-01  [TreeThinning].Script.DoThin(0.0);
          Operations ExptFert
            2018-09-28  [Fertiliser].Apply(amount: 200, type: "UreaN", depth: 100)
          Soil SLGAmodLakeJasperRates: same as W._.t1.LakeJasperRates.SLGAmodLakeJasperRates
        CompositeFactor LyonsRates
          Specifications:
            [Clock]
            [Weather]
            [Soil]
            [TreeManagement]
            [Operations]
            [ExptFert]
          Clock: Start=2017-02-15; End=2029-08-31
          Weather Met: FileName=Lyon.met
          Manager TreeManagement: same as V._.t1.MeadeResp.TreeManagement
          Operations
            2018-01-12  [TreeThinning].Script.DoThin(0.1063);
            2019-01-12  [TreeThinning].Script.DoThin(0.09807);
            2020-01-01  [TreeThinning].Script.DoThin(0.01042);
            2021-01-01  [TreeThinning].Script.DoThin(0.0);
            2022-01-01  [TreeThinning].Script.DoThin(0.0);
            2023-01-01  [TreeThinning].Script.DoThin(0.01053);
            2024-01-01  [TreeThinning].Script.DoThin(0.01064);
          Operations ExptFert
            2019-09-05  [Fertiliser].Apply(amount: 200, type: "UreaN", depth: 100)
          Soil SLGAmodLyons: same as W._.t1.LyonsRates.SLGAmodLyons
        CompositeFactor ParolaRates
          Specifications:
            [Clock]
            [Weather]
            [Soil]
            [TreeManagement]
            [Operations]
            [ExptFert]
          Clock: Start=2017-02-12; End=2029-08-31
          Weather Met: FileName=Parola.met
          Manager TreeManagement: same as V._.t1.MeadeResp.TreeManagement
          Operations
            2018-01-12  [TreeThinning].Script.DoThin(0.1655);
            2019-01-12  [TreeThinning].Script.DoThin(0.15594);
            2020-01-12  [TreeThinning].Script.DoThin(0.02817);
            2021-01-11  [TreeThinning].Script.DoThin(0.0);
            2022-01-11  [TreeThinning].Script.DoThin(0.0);
            2023-01-11  [TreeThinning].Script.DoThin(0.0);
            2024-01-11  [TreeThinning].Script.DoThin(0.0);
          Operations ExptFert
            2019-08-20  [Fertiliser].Apply(amount: 200, type: "UreaN", depth: 100)
          Soil SLGAmodParola: same as W._.t1.ParolaRates.SLGAmodParola
      Factor t8
        CompositeFactor FaganRates
          Specifications:
            [Clock]
            [Weather]
            [Soil]
            [TreeManagement]
            [Operations]
            [ExptFert]
          Clock: Start=2017-02-15; End=2029-08-31
          Weather Met: FileName=Fagan.met
          Manager TreeManagement: same as V._.t1.MeadeResp.TreeManagement
          Operations
            2018-01-12  [TreeThinning].Script.DoThin(0.1466);
            2019-01-12  [TreeThinning].Script.DoThin(0.06531);
            2020-01-12  [TreeThinning].Script.DoThin(0.0);
            2021-01-11  [TreeThinning].Script.DoThin(0.04211);
            2022-01-11  [TreeThinning].Script.DoThin(0.04396);
            2023-01-11  [TreeThinning].Script.DoThin(0.03448);
            2024-01-11  [TreeThinning].Script.DoThin(0.02381);
          Operations ExptFert
            2019-10-13  [Fertiliser].Apply(amount: 400, type: "UreaN", depth: 100)
          Soil SLGAmodFagan: same as W._.t2.FaganRates.SLGAmodFagan
        CompositeFactor JonesRates
          Specifications:
            [Clock]
            [Weather]
            [Soil]
            [TreeManagement]
            [Operations]
            [ExptFert]
          Clock: Start=2017-01-15; End=2029-08-31
          Weather Met: FileName=Jones.met
          Manager TreeManagement: same as V._.t1.DanyenahRates.TreeManagement
          Operations
            2017-12-12  [TreeThinning].Script.DoThin(0.2111);
            2018-12-12  [TreeThinning].Script.DoThin(0.00888);
            2019-12-12  [TreeThinning].Script.DoThin(0.0);
            2020-01-01  [TreeThinning].Script.DoThin(0.0);
            2021-01-01  [TreeThinning].Script.DoThin(0.01316);
            2022-01-01  [TreeThinning].Script.DoThin(0.0);
            2023-01-01  [TreeThinning].Script.DoThin(0.0);
            2024-01-01  [TreeThinning].Script.DoThin(0.0);
          Operations ExptFert
            2019-09-06  [Fertiliser].Apply(amount: 400, type: "UreaN", depth: 100)
          Soil SLGAmodJones: same as W._.t1.JonesRates.SLGAmodJones
        CompositeFactor LakeJasperRates
          Specifications:
            [Clock]
            [Weather]
            [Soil]
            [TreeManagement]
            [Operations]
            [ExptFert]
          Clock: Start=2016-01-15; End=2029-08-31
          Weather Met: FileName=LakeJasperRates.met
          Manager TreeManagement: same as W._.t1.LakeJasperRates.TreeManagement
          Operations
            2016-11-10  [TreeThinning].Script.DoThin(0.1469);
            2017-11-10  [TreeThinning].Script.DoThin(0.04352);
            2019-05-10  [TreeThinning].Script.DoThin(0.04255);
            2020-11-01  [TreeThinning].Script.DoThin(0.02222);
            2021-05-01  [TreeThinning].Script.DoThin(0.0);
            2023-05-01  [TreeThinning].Script.DoThin(0.01136);
          Operations ExptFert
            2018-09-28  [Fertiliser].Apply(amount: 400, type: "UreaN", depth: 100)
          Soil SLGAmodLakeJasperRates: same as W._.t1.LakeJasperRates.SLGAmodLakeJasperRates
        CompositeFactor LyonsRates
          Specifications:
            [Clock]
            [Weather]
            [Soil]
            [TreeManagement]
            [Operations]
            [ExptFert]
          Clock: Start=2017-02-15; End=2029-08-31
          Weather Met: FileName=Lyon.met
          Manager TreeManagement: same as V._.t1.MeadeResp.TreeManagement
          Operations
            2018-01-12  [TreeThinning].Script.DoThin(0.1063);
            2019-01-12  [TreeThinning].Script.DoThin(0.10746);
            2020-01-01  [TreeThinning].Script.DoThin(0.0);
            2021-01-01  [TreeThinning].Script.DoThin(0.01053);
            2022-01-01  [TreeThinning].Script.DoThin(0.0);
            2023-01-01  [TreeThinning].Script.DoThin(0.0);
            2024-01-01  [TreeThinning].Script.DoThin(0.07447);
          Operations ExptFert
            2019-09-05  [Fertiliser].Apply(amount: 400, type: "UreaN", depth: 100)
          Soil SLGAmodLyons: same as W._.t1.LyonsRates.SLGAmodLyons
        CompositeFactor ParolaRates
          Specifications:
            [Clock]
            [Weather]
            [Soil]
            [TreeManagement]
            [Operations]
            [ExptFert]
          Clock: Start=2017-02-12; End=2029-08-31
          Weather Met: FileName=Parola.met
          Manager TreeManagement: same as V._.t1.MeadeResp.TreeManagement
          Operations
            2018-01-12  [TreeThinning].Script.DoThin(0.1655);
            2019-01-12  [TreeThinning].Script.DoThin(0.16783);
            2020-01-12  [TreeThinning].Script.DoThin(0.0);
            2021-01-11  [TreeThinning].Script.DoThin(0.0);
            2022-01-11  [TreeThinning].Script.DoThin(0.01429);
            2023-01-11  [TreeThinning].Script.DoThin(0.0);
            2024-01-11  [TreeThinning].Script.DoThin(0.0);
          Operations ExptFert
            2019-08-20  [Fertiliser].Apply(amount: 400, type: "UreaN", depth: 100)
          Soil SLGAmodParola: same as W._.t1.ParolaRates.SLGAmodParola
      Factor t9
        CompositeFactor FaganRates
          Specifications:
            [Clock]
            [Weather]
            [Soil]
            [TreeManagement]
            [Operations]
            [ExptFert]
          Clock: Start=2017-02-15; End=2029-08-31
          Weather Met: FileName=Fagan.met
          Manager TreeManagement: same as V._.t1.MeadeResp.TreeManagement
          Operations
            2018-01-12  [TreeThinning].Script.DoThin(0.1466);
            2019-01-12  [TreeThinning].Script.DoThin(0.1145);
            2020-01-12  [TreeThinning].Script.DoThin(0.0);
            2021-01-11  [TreeThinning].Script.DoThin(0.02222);
            2022-01-11  [TreeThinning].Script.DoThin(0.04545);
            2023-01-11  [TreeThinning].Script.DoThin(0.07143);
            2024-01-11  [TreeThinning].Script.DoThin(0.05128);
          Operations ExptFert
            2019-10-13  [Fertiliser].Apply(amount: 400, type: "UreaN", depth: 100)
            2022-09-08  [Fertiliser].Apply(amount: 400, type: "NH4N", depth: 100)
          Soil SLGAmodFagan: same as W._.t1.FaganRates.SLGAmodFagan
        CompositeFactor JonesRates
          Specifications:
            [Clock]
            [Weather]
            [Soil]
            [TreeManagement]
            [Operations]
            [ExptFert]
          Clock: Start=2017-01-15; End=2029-08-31
          Weather Met: FileName=Jones.met
          Manager TreeManagement: same as V._.t1.DanyenahRates.TreeManagement
          Operations
            2017-12-12  [TreeThinning].Script.DoThin(0.2111);
            2018-12-12  [TreeThinning].Script.DoThin(0.1784);
            2019-12-12  [TreeThinning].Script.DoThin(0.0);
            2020-01-01  [TreeThinning].Script.DoThin(0.0);
            2021-01-01  [TreeThinning].Script.DoThin(0.0);
            2022-01-01  [TreeThinning].Script.DoThin(0.0);
            2023-01-01  [TreeThinning].Script.DoThin(0.0);
            2024-01-01  [TreeThinning].Script.DoThin(0.0);
          Operations ExptFert
            2019-09-06  [Fertiliser].Apply(amount: 400, type: "UreaN", depth: 100)
            2022-10-01  [Fertiliser].Apply(amount: 400, type: "NH4N", depth: 100)
          Soil SLGAmodJones: same as W._.t1.JonesRates.SLGAmodJones
        CompositeFactor LakeJasperRates
          Specifications:
            [Clock]
            [Weather]
            [Soil]
            [TreeManagement]
            [Operations]
            [ExptFert]
          Clock: Start=2016-01-15; End=2029-08-31
          Weather Met: FileName=LakeJasperRates.met
          Manager TreeManagement: same as W._.t1.LakeJasperRates.TreeManagement
          Operations
            2016-11-10  [TreeThinning].Script.DoThin(0.1469);
            2017-11-10  [TreeThinning].Script.DoThin(0.10457);
            2018-11-10  [TreeThinning].Script.DoThin(0.0);
            2019-11-10  [TreeThinning].Script.DoThin(0.0);
            2020-11-09  [TreeThinning].Script.DoThin(0.02273);
            2021-11-01  [TreeThinning].Script.DoThin(0.0814);
            2022-11-01  [TreeThinning].Script.DoThin(0.0);
            2023-11-01  [TreeThinning].Script.DoThin(0.0);
          Operations ExptFert
            2018-09-28  [Fertiliser].Apply(amount: 400, type: "UreaN", depth: 100)
            2022-10-10  [Fertiliser].Apply(amount: 400, type: "NH4N", depth: 100)
          Soil SLGAmodLakeJasperRates: same as W._.t1.LakeJasperRates.SLGAmodLakeJasperRates
        CompositeFactor LyonsRates
          Specifications:
            [Clock]
            [Weather]
            [Soil]
            [TreeManagement]
            [Operations]
            [ExptFert]
          Clock: Start=2017-02-15; End=2029-08-31
          Weather Met: FileName=Lyon.met
          Manager TreeManagement: same as V._.t1.MeadeResp.TreeManagement
          Operations
            2018-01-12  [TreeThinning].Script.DoThin(0.1063);
            2019-01-12  [TreeThinning].Script.DoThin(0.0793);
            2020-01-01  [TreeThinning].Script.DoThin(0.0);
            2021-01-01  [TreeThinning].Script.DoThin(0.02041);
            2022-01-01  [TreeThinning].Script.DoThin(0.02083);
            2023-01-01  [TreeThinning].Script.DoThin(0.06383);
            2024-01-01  [TreeThinning].Script.DoThin(0.05682);
          Operations ExptFert
            2019-09-05  [Fertiliser].Apply(amount: 400, type: "UreaN", depth: 100)
            2022-09-07  [Fertiliser].Apply(amount: 400, type: "NH4N", depth: 100)
          Soil SLGAmodLyons: same as W._.t1.LyonsRates.SLGAmodLyons
        CompositeFactor ParolaRates
          Specifications:
            [Clock]
            [Weather]
            [Soil]
            [TreeManagement]
            [Operations]
            [ExptFert]
          Clock: Start=2017-02-12; End=2029-08-31
          Weather Met: FileName=Parola.met
          Manager TreeManagement: same as V._.t1.MeadeResp.TreeManagement
          Operations
            2018-01-12  [TreeThinning].Script.DoThin(0.1655);
            2019-01-12  [TreeThinning].Script.DoThin(0.1322);
            2020-01-12  [TreeThinning].Script.DoThin(0.0);
            2021-01-11  [TreeThinning].Script.DoThin(0.0137);
            2022-01-11  [TreeThinning].Script.DoThin(0.01389);
            2023-01-11  [TreeThinning].Script.DoThin(0.0);
            2024-01-11  [TreeThinning].Script.DoThin(0.0);
          Operations ExptFert
            2019-08-20  [Fertiliser].Apply(amount: 400, type: "UreaN", depth: 100)
            2022-09-09  [Fertiliser].Apply(amount: 400, type: "NH4N", depth: 100)
          Soil SLGAmodParola: same as W._.t1.ParolaRates.SLGAmodParola
        CompositeFactor DingupResp18
          Specifications:
            [Clock]
            [Weather]
            [Soil]
            [TreeManagement]
            [Operations]
            [ExptFert]
          Clock: Start=2016-01-15; End=2029-08-31
          Weather Met: FileName=Dingup.met
          Manager TreeManagement
            RowSpace = 1.8181
            RowWidth = 4
            CultivarName = globulusEKB9
            PlantingDate = 15-Jul
            HarvestAge = 10
            FertAmount = 15
            script: same as in T._.t1.HaysRates.TreeManagement
          Operations
            2016-11-28  [TreeThinning].Script.DoThin(0.08776);
            2017-11-28  [TreeThinning].Script.DoThin(0.06269);
            2018-11-28  [TreeThinning].Script.DoThin(0.01333);
            2019-11-28  [TreeThinning].Script.DoThin(0.0);
            2020-11-28  [TreeThinning].Script.DoThin(0.0);
            2021-11-28  [TreeThinning].Script.DoThin(0.0);
            2022-11-28  [TreeThinning].Script.DoThin(0.0);
            2023-05-28  [TreeThinning].Script.DoThin(0.04054);
            2024-01-28  [TreeThinning].Script.DoThin(0.0);
          Operations ExptFert
            2018-09-13  [Fertiliser].Apply(amount: 400, type: "UreaN", depth: 100)
            2022-10-03  [Fertiliser].Apply(amount: 400, type: "NH4N", depth: 100)
          Soil Synthetic Soil Derived from the SLGA: same as W._.t1.DingupResp18.Synthetic Soil Derived from the SLGA
        CompositeFactor DingupResp19
          Specifications:
            [Clock]
            [Weather]
            [Soil]
            [TreeManagement]
            [Operations]
            [ExptFert]
          Clock: Start=2016-01-15; End=2029-08-31
          Weather Met: FileName=Dingup.met
          Manager TreeManagement
            RowSpace = 1.90404
            RowWidth = 4
            CultivarName = globulusEKB9
            PlantingDate = 15-Jul
            HarvestAge = 10
            FertAmount = 15
            script: same as in T._.t1.HaysRates.TreeManagement
          Operations
            2016-11-28  [TreeThinning].Script.DoThin(0.0);
            2017-11-28  [TreeThinning].Script.DoThin(0.0);
            2018-11-28  [TreeThinning].Script.DoThin(0.0);
            2019-11-28  [TreeThinning].Script.DoThin(0.0);
            2020-11-28  [TreeThinning].Script.DoThin(0.02381);
            2021-11-28  [TreeThinning].Script.DoThin(0.03659);
            2022-11-28  [TreeThinning].Script.DoThin(0.0);
            2023-11-28  [TreeThinning].Script.DoThin(0.03797);
          Operations ExptFert
            2019-06-19  [Fertiliser].Apply(amount: 400, type: "UreaN", depth: 100)
            2022-10-03  [Fertiliser].Apply(amount: 400, type: "NH4N", depth: 100)
          Soil SLGAmodeDingup19: same as W._.t1.DingupResp19.SLGAmodeDingup19
        CompositeFactor LakeJasperResp18
          Specifications:
            [Clock]
            [Weather]
            [Soil]
            [TreeManagement]
            [Operations]
            [ExptFert]
          Clock: Start=2016-01-15; End=2029-08-31
          Weather Met: FileName=LakeJasperResp.met
          Manager TreeManagement
            RowSpace = 1.79727
            RowWidth = 4
            CultivarName = globulusEKB9
            PlantingDate = 13-Jun
            HarvestAge = 10
            FertAmount = 15
            script: same as in T._.t1.HaysRates.TreeManagement
          Operations
            2016-11-10  [TreeThinning].Script.DoThin(0.0);
            2017-11-10  [TreeThinning].Script.DoThin(0.0);
            2018-11-10  [TreeThinning].Script.DoThin(0.0);
            2019-11-10  [TreeThinning].Script.DoThin(0.0);
            2020-11-10  [TreeThinning].Script.DoThin(0.03371);
            2021-11-10  [TreeThinning].Script.DoThin(0.05814);
            2022-12-10  [TreeThinning].Script.DoThin(0.04938);
            2023-12-10  [TreeThinning].Script.DoThin(0.01299);
          Operations ExptFert
            2018-05-11  [Fertiliser].Apply(amount: 400, type: "UreaN", depth: 100)
            2022-10-10  [Fertiliser].Apply(amount: 400, type: "NH4N", depth: 100)
          Soil SLGAmodLakeJasper18: same as W._.t1.LakeJasperResp18.SLGAmodLakeJasper18
        CompositeFactor LakeJasperResp19
          Specifications:
            [Clock]
            [Weather]
            [Soil]
            [TreeManagement]
            [Operations]
            [ExptFert]
          Clock: Start=2016-01-15; End=2029-08-31
          Weather Met: FileName=LakeJasperResp.met
          Manager TreeManagement
            RowSpace = 1.738526
            RowWidth = 4
            CultivarName = globulusEKB9
            PlantingDate = 13-Jun
            HarvestAge = 10
            FertAmount = 15
            script: same as in T._.t1.HaysRates.TreeManagement
          Operations
            2016-11-10  [TreeThinning].Script.DoThin(0.0);
            2017-11-10  [TreeThinning].Script.DoThin(0.0);
            2018-11-10  [TreeThinning].Script.DoThin(0.0);
            2019-11-10  [TreeThinning].Script.DoThin(0.0);
            2020-11-10  [TreeThinning].Script.DoThin(0.02174);
            2021-11-10  [TreeThinning].Script.DoThin(0.03333);
            2022-12-10  [TreeThinning].Script.DoThin(0.03448);
            2023-12-10  [TreeThinning].Script.DoThin(0.0);
          Operations ExptFert
            2019-06-24  [Fertiliser].Apply(amount: 400, type: "UreaN", depth: 100)
            2022-10-10  [Fertiliser].Apply(amount: 400, type: "NH4N", depth: 100)
          Soil SLGAmodLakeJasper19: same as W._.t1.LakeJasperResp19.SLGAmodLakeJasper19
        CompositeFactor OCallaghanResp
          Specifications:
            [Clock]
            [Weather]
            [Soil]
            [TreeManagement]
            [Operations]
            [ExptFert]
          Clock: Start=2017-02-15; End=2029-08-31
          Weather Met: FileName=OCallaghan.met
          Manager TreeManagement: same as V._.t1.MeadeResp.TreeManagement
          Operations
            2018-01-12  [TreeThinning].Script.DoThin(0.1463);
            2019-01-12  [TreeThinning].Script.DoThin(0.15217);
            2020-01-12  [TreeThinning].Script.DoThin(0.0);
            2021-01-12  [TreeThinning].Script.DoThin(0.01709);
            2022-01-12  [TreeThinning].Script.DoThin(0.01739);
            2023-01-12  [TreeThinning].Script.DoThin(0.0);
            2024-01-12  [TreeThinning].Script.DoThin(0.01746);
          Operations ExptFert
            2019-09-16  [Fertiliser].Apply(amount: 400, type: "UreaN", depth: 100)
            2022-09-08  [Fertiliser].Apply(amount: 400, type: "NH4N", depth: 100)
          Soil SLGAmodOCallaghan: ASCOrder=NA; ASCSubOrder=NA; SoilType=Loamy Sand over Clay Loam; Site=29780_5606; NearestTown=MOUNT BARKER; Region=Jarrah Forest; State=Western Australia; NaturalVegetation=Cleared, non-native vegetation, buildings; ApsoilNumber=9999; Latitude=-34.817682; Longitude=117.671264; LocationAccuracy=+- 90m; YearOfSampling=2023; Comments=Landuse is Grazing modified pastures
            DataSource=Soil and Landscape Grid of Australia. This soil parameter file was automatically generated from the GSM National Surfaces using pedotransfer functions.
            Water: FilledFromTop=false
              Thickness=[150, 150, 150, 150, 200, 200, 200, 400, 400, 400, 400, 400, 400, 400, 400, 400, 400, 400, 400]
              InitialValues=[0.159, 0.097, 0.118, 0.133, 0.161, 0.161, 0.161, 0.161, 0.161, 0.161, 0.161, 0.161, 0.161, 0.161, 0.161, 0.161, 0.161, 0.161, 0.161]
            Physical: same as W._.t1.OCallaghanResp.SLGAmodOCallaghan.Physical
            WaterBalance SoilWater: same as W._.t1.OCallaghanResp.SLGAmodOCallaghan.SoilWater
            Organic: FOMCNRatio=40; CarbonUnits=Total
              Thickness  Carbon  SoilCNRatio  FBiom  FInert  FOM
              150        3       14           0.01   0.1     553.813
              150        1.5     16           0.005  0.2     315.553
              150        1       16           0.005  0.3     179.797
              150        0.5     16           0.005  0.4     102.445
              200        0.12    16           0.005  0.5     48.392
              200        0.01    16           0.005  1       48.392
              200        0.01    16           0.005  1       48.392
              400        0.01    16           0.01   1       48.392
              400        0.01    14           0.01   1       48.392
              400        0.01    15           0.01   1       48.392
              400        0.01    14.17        0.01   1       48.392
              400        0.01    14.17        0.01   1       48.392
              400        0.01    14.17        0.01   1       48.392
              400        0.01    14.17        0.01   1       48.392
              400        0.01    14.17        0.01   1       48.392
              400        0.01    14.17        0.01   1       48.392
              400        0.01    14.17        0.01   1       48.392
              400        0.01    14.17        0.01   1       48.392
              400        0.01    14.17        0.01   1       48.392
            Chemical: same as W._.t1.OCallaghanResp.SLGAmodOCallaghan.Chemical
            Solute NO3: Thickness=[1800]; InitialValues=[3]; InitialValuesUnits=ppm; WaterTableConcentration=0; D0=0; DepthConstant=0; MaxDepthSoluteAccessible=0; RunoffEffectivenessAtMovingSolute=0; MaxEffectiveRunoff=0
            Solute NH4: Thickness=[1800]; InitialValues=[1]; InitialValuesUnits=ppm; WaterTableConcentration=0; D0=0; DepthConstant=0; MaxDepthSoluteAccessible=0; RunoffEffectivenessAtMovingSolute=0; MaxEffectiveRunoff=0
            Solute Urea: Thickness=[1800]; InitialValues=[0]; InitialValuesUnits=ppm; WaterTableConcentration=0; D0=0; DepthConstant=0; MaxDepthSoluteAccessible=0; RunoffEffectivenessAtMovingSolute=0; MaxEffectiveRunoff=0
            Nutrient
            SoilTemperature CERESSoilTemperature
        CompositeFactor WisbeyResp
          Specifications:
            [Clock]
            [Weather]
            [Soil]
            [TreeManagement]
            [Operations]
            [ExptFert]
          Clock: Start=2017-02-15; End=2029-08-31
          Weather Met: FileName=Wisbey.met
          Manager TreeManagement: same as V._.t1.MeadeResp.TreeManagement
          Operations
            2018-01-18  [TreeThinning].Script.DoThin(0.1566);
            2019-01-19  [TreeThinning].Script.DoThin(0.08440);
            2020-01-20  [TreeThinning].Script.DoThin(0.0);
            2021-01-21  [TreeThinning].Script.DoThin(0.00839);
            2022-01-22  [TreeThinning].Script.DoThin(0.00846);
            2023-01-22  [TreeThinning].Script.DoThin(0.02439);
            2024-01-22  [TreeThinning].Script.DoThin(0.0);
          Operations ExptFert
            2019-09-13  [Fertiliser].Apply(amount: 400, type: "UreaN", depth: 100)
            2022-09-09  [Fertiliser].Apply(amount: 400, type: "NH4N", depth: 100)
          Soil SLGAmodWisbey: same as W._.t1.WisbeyResp.SLGAmodWisbey
      Factor t10
        CompositeFactor FaganRates
          Specifications:
            [Clock]
            [Weather]
            [Soil]
            [TreeManagement]
            [Operations]
            [ExptFert]
          Clock: Start=2017-02-15; End=2029-08-31
          Weather Met: FileName=Fagan.met
          Manager TreeManagement: same as V._.t1.MeadeResp.TreeManagement
          Operations
            2018-01-12  [TreeThinning].Script.DoThin(0.1466);
            2019-01-12  [TreeThinning].Script.DoThin(0.03580);
            2020-01-12  [TreeThinning].Script.DoThin(0.0);
            2021-01-11  [TreeThinning].Script.DoThin(0.02041);
            2022-01-11  [TreeThinning].Script.DoThin(0.05208);
            2023-01-11  [TreeThinning].Script.DoThin(0.02198);
            2024-01-11  [TreeThinning].Script.DoThin(0.07865);
          Operations ExptFert
            2019-10-13  [Fertiliser].Apply(amount: 400, type: "UreaN", depth: 100)
          Soil SLGAmodFagan: same as W._.t1.FaganRates.SLGAmodFagan
        CompositeFactor JonesRates
          Specifications:
            [Clock]
            [Weather]
            [Soil]
            [TreeManagement]
            [Operations]
            [ExptFert]
          Clock: Start=2017-01-15; End=2029-08-31
          Weather Met: FileName=Jones.met
          Manager TreeManagement: same as V._.t1.DanyenahRates.TreeManagement
          Operations
            2017-12-12  [TreeThinning].Script.DoThin(0.2111);
            2018-12-12  [TreeThinning].Script.DoThin(0.00888);
            2019-12-12  [TreeThinning].Script.DoThin(0.0);
            2020-01-01  [TreeThinning].Script.DoThin(0.01316);
            2021-01-01  [TreeThinning].Script.DoThin(0.0);
            2022-01-01  [TreeThinning].Script.DoThin(0.01333);
            2023-01-01  [TreeThinning].Script.DoThin(0.0);
            2024-01-01  [TreeThinning].Script.DoThin(0.0);
          Operations ExptFert
            2019-09-06  [Fertiliser].Apply(amount: 400, type: "UreaN", depth: 100)
          Soil SLGAmodJones: same as W._.t1.JonesRates.SLGAmodJones
        CompositeFactor LakeJasperRates
          Specifications:
            [Clock]
            [Weather]
            [Soil]
            [TreeManagement]
            [Operations]
            [ExptFert]
          Clock: Start=2016-01-15; End=2029-08-31
          Weather Met: FileName=LakeJasperRates.met
          Manager TreeManagement: same as W._.t1.LakeJasperRates.TreeManagement
          Operations
            2016-11-10  [TreeThinning].Script.DoThin(0.1469);
            2017-11-10  [TreeThinning].Script.DoThin(0.03335);
            2018-11-10  [TreeThinning].Script.DoThin(0.02105);
            2020-11-01  [TreeThinning].Script.DoThin(0.03226);
            2022-11-01  [TreeThinning].Script.DoThin(0.01111);
            2023-11-01  [TreeThinning].Script.DoThin(0.0);
          Operations ExptFert
            2018-09-28  [Fertiliser].Apply(amount: 400, type: "UreaN", depth: 100)
          Soil SLGAmodLakeJasperRates: same as W._.t1.LakeJasperRates.SLGAmodLakeJasperRates
        CompositeFactor LyonsRates
          Specifications:
            [Clock]
            [Weather]
            [Soil]
            [TreeManagement]
            [Operations]
            [ExptFert]
          Clock: Start=2017-02-15; End=2029-08-31
          Weather Met: FileName=Lyon.met
          Manager TreeManagement: same as V._.t1.MeadeResp.TreeManagement
          Operations
            2018-01-12  [TreeThinning].Script.DoThin(0.1063);
            2019-01-12  [TreeThinning].Script.DoThin(0.12625);
            2020-01-01  [TreeThinning].Script.DoThin(0.0);
            2021-01-01  [TreeThinning].Script.DoThin(0.02151);
            2022-01-01  [TreeThinning].Script.DoThin(0.0);
            2023-01-01  [TreeThinning].Script.DoThin(0.0);
            2024-01-01  [TreeThinning].Script.DoThin(0.02198);
          Operations ExptFert
            2019-09-05  [Fertiliser].Apply(amount: 400, type: "UreaN", depth: 100)
          Soil SLGAmodLyons: same as W._.t1.LyonsRates.SLGAmodLyons
        CompositeFactor ParolaRates
          Specifications:
            [Clock]
            [Weather]
            [Soil]
            [TreeManagement]
            [Operations]
            [ExptFert]
          Clock: Start=2017-02-12; End=2029-08-31
          Weather Met: FileName=Parola.met
          Manager TreeManagement: same as V._.t1.MeadeResp.TreeManagement
          Operations
            2018-01-12  [TreeThinning].Script.DoThin(0.1655);
            2019-01-12  [TreeThinning].Script.DoThin(0.09650);
            2020-01-12  [TreeThinning].Script.DoThin(0.03947);
            2021-01-11  [TreeThinning].Script.DoThin(0.0);
            2022-01-11  [TreeThinning].Script.DoThin(0.0);
            2023-01-11  [TreeThinning].Script.DoThin(0.0);
            2024-01-11  [TreeThinning].Script.DoThin(0.0);
          Operations ExptFert
            2019-08-20  [Fertiliser].Apply(amount: 400, type: "UreaN", depth: 100)
          Soil SLGAmodParola: same as W._.t1.ParolaRates.SLGAmodParola
        CompositeFactor DingupResp18
          Specifications:
            [Clock]
            [Weather]
            [Soil]
            [TreeManagement]
            [Operations]
            [ExptFert]
          Clock: Start=2016-01-15; End=2029-08-31
          Weather Met: FileName=Dingup.met
          Manager TreeManagement
            RowSpace = 1.9516
            RowWidth = 4
            CultivarName = globulusEKB9
            PlantingDate = 15-Jul
            HarvestAge = 10
            FertAmount = 15
            script: same as in T._.t1.HaysRates.TreeManagement
          Operations
            2016-11-28  [TreeThinning].Script.DoThin(0.0);
            2017-11-28  [TreeThinning].Script.DoThin(0.0);
            2018-11-28  [TreeThinning].Script.DoThin(0.0122);
            2019-11-28  [TreeThinning].Script.DoThin(0.00617);
            2020-11-28  [TreeThinning].Script.DoThin(0.0);
            2021-11-28  [TreeThinning].Script.DoThin(0.0);
            2022-11-28  [TreeThinning].Script.DoThin(0.04969);
            2023-11-28  [TreeThinning].Script.DoThin(0.01307);
          Operations ExptFert
            2018-09-13  [Fertiliser].Apply(amount: 400, type: "UreaN", depth: 100)
          Soil Synthetic Soil Derived from the SLGA: same as W._.t1.DingupResp18.Synthetic Soil Derived from the SLGA
        CompositeFactor DingupResp19
          Specifications:
            [Clock]
            [Weather]
            [Soil]
            [TreeManagement]
            [Operations]
            [ExptFert]
          Clock: Start=2016-01-15; End=2029-08-31
          Weather Met: FileName=Dingup.met
          Manager TreeManagement
            RowSpace = 1.97532
            RowWidth = 4
            CultivarName = globulusEKB9
            PlantingDate = 15-Jul
            HarvestAge = 10
            FertAmount = 15
            script: same as in T._.t1.HaysRates.TreeManagement
          Operations
            2016-11-28  [TreeThinning].Script.DoThin(0.0);
            2017-11-28  [TreeThinning].Script.DoThin(0.0);
            2018-11-28  [TreeThinning].Script.DoThin(0.0);
            2019-11-28  [TreeThinning].Script.DoThin(0.00617);
            2020-11-28  [TreeThinning].Script.DoThin(0.0);
            2021-11-28  [TreeThinning].Script.DoThin(0.0);
            2022-11-28  [TreeThinning].Script.DoThin(0.04969);
            2023-11-28  [TreeThinning].Script.DoThin(0.01307);
          Operations ExptFert
            2019-06-19  [Fertiliser].Apply(amount: 400, type: "UreaN", depth: 100)
          Soil SLGAmodeDingup19: same as W._.t1.DingupResp19.SLGAmodeDingup19
        CompositeFactor LakeJasperResp18
          Specifications:
            [Clock]
            [Weather]
            [Soil]
            [TreeManagement]
            [Operations]
            [ExptFert]
          Clock: Start=2016-01-15; End=2029-08-31
          Weather Met: FileName=LakeJasperResp.met
          Manager TreeManagement
            RowSpace = 1.720578
            RowWidth = 4
            CultivarName = globulusEKB9
            PlantingDate = 13-Jun
            HarvestAge = 10
            FertAmount = 15
            script: same as in T._.t1.HaysRates.TreeManagement
          Operations
            2016-11-10  [TreeThinning].Script.DoThin(0.0);
            2017-11-10  [TreeThinning].Script.DoThin(0.0);
            2018-05-10  [TreeThinning].Script.DoThin(0.03217);
            2019-05-10  [TreeThinning].Script.DoThin(0.01111);
            2020-11-10  [TreeThinning].Script.DoThin(0.0);
            2022-03-10  [TreeThinning].Script.DoThin(0.04494);
            2023-03-10  [TreeThinning].Script.DoThin(0.01176);
            2024-03-10  [TreeThinning].Script.DoThin(0.022381);
          Operations ExptFert
            2018-05-11  [Fertiliser].Apply(amount: 400, type: "UreaN", depth: 100)
          Soil SLGAmodLakeJasper18: same as W._.t1.LakeJasperResp18.SLGAmodLakeJasper18
        CompositeFactor LakeJasperResp19
          Specifications:
            [Clock]
            [Weather]
            [Soil]
            [TreeManagement]
            [Operations]
            [ExptFert]
          Clock: Start=2016-01-15; End=2029-08-31
          Weather Met: FileName=LakeJasperResp.met
          Manager TreeManagement
            RowSpace = 1.79776
            RowWidth = 4
            CultivarName = globulusEKB9
            PlantingDate = 13-Jun
            HarvestAge = 10
            FertAmount = 15
            script: same as in T._.t1.HaysRates.TreeManagement
          Operations
            2016-11-10  [TreeThinning].Script.DoThin(0.0);
            2017-11-10  [TreeThinning].Script.DoThin(0.0);
            2018-11-10  [TreeThinning].Script.DoThin(0.0);
            2019-11-10  [TreeThinning].Script.DoThin(0.0);
            2020-11-10  [TreeThinning].Script.DoThin(0.01124);
            2021-11-10  [TreeThinning].Script.DoThin(0.03409);
            2023-04-10  [TreeThinning].Script.DoThin(0.01176);
            2023-11-10  [TreeThinning].Script.DoThin(0.02381);
          Operations ExptFert
            2019-06-24  [Fertiliser].Apply(amount: 400, type: "UreaN", depth: 100)
          Soil SLGAmodLakeJasper19: same as W._.t1.LakeJasperResp19.SLGAmodLakeJasper19
        CompositeFactor OCallaghanResp
          Specifications:
            [Clock]
            [Weather]
            [Soil]
            [TreeManagement]
            [Operations]
            [ExptFert]
          Clock: Start=2017-02-15; End=2029-08-31
          Weather Met: FileName=OCallaghan.met
          Manager TreeManagement: same as V._.t1.MeadeResp.TreeManagement
          Operations
            2018-01-12  [TreeThinning].Script.DoThin(0.1463);
            2019-01-12  [TreeThinning].Script.DoThin(0.08874);
            2020-01-12  [TreeThinning].Script.DoThin(0.0);
            2021-01-12  [TreeThinning].Script.DoThin(0.0);
            2022-01-12  [TreeThinning].Script.DoThin(0.0318);
            2023-01-12  [TreeThinning].Script.DoThin(0.04084);
            2024-01-12  [TreeThinning].Script.DoThin(0.01712);
          Operations ExptFert
            2019-09-16  [Fertiliser].Apply(amount: 400, type: "UreaN", depth: 100)
          Soil SLGAmodOCallaghan: same as W._.t9.OCallaghanResp.SLGAmodOCallaghan
        CompositeFactor WisbeyResp
          Specifications:
            [Clock]
            [Weather]
            [Soil]
            [TreeManagement]
            [Operations]
            [ExptFert]
          Clock: Start=2017-02-15; End=2029-08-31
          Weather Met: FileName=Wisbey.met
          Manager TreeManagement: same as V._.t1.MeadeResp.TreeManagement
          Operations
            2018-01-18  [TreeThinning].Script.DoThin(0.1566);
            2019-01-19  [TreeThinning].Script.DoThin(0.17387);
            2020-01-20  [TreeThinning].Script.DoThin(0.0093);
            2021-01-21  [TreeThinning].Script.DoThin(0.00939);
            2022-01-22  [TreeThinning].Script.DoThin(0.0);
            2023-01-22  [TreeThinning].Script.DoThin(0.0);
            2024-01-22  [TreeThinning].Script.DoThin(0.0);
          Operations ExptFert
            2019-09-13  [Fertiliser].Apply(amount: 400, type: "UreaN", depth: 100)
          Soil SLGAmodWisbey: same as W._.t1.WisbeyResp.SLGAmodWisbey
      Factor t19
        CompositeFactor DingupResp18
          Specifications:
            [Clock]
            [Weather]
            [Soil]
            [TreeManagement]
            [Operations]
            [ExptFert]
          Clock: Start=2016-01-15; End=2029-08-31
          Weather Met: FileName=Dingup.met
          Manager TreeManagement
            RowSpace = 1.7973
            RowWidth = 4
            CultivarName = globulusEKB9
            PlantingDate = 15-Jul
            HarvestAge = 10
            FertAmount = 15
            script: same as in T._.t1.HaysRates.TreeManagement
          Operations
            2016-11-28  [TreeThinning].Script.DoThin(0.0);
            2017-11-28  [TreeThinning].Script.DoThin(0.0);
            2018-11-28  [TreeThinning].Script.DoThin(0.0);
            2019-11-28  [TreeThinning].Script.DoThin(0.02247);
            2020-11-28  [TreeThinning].Script.DoThin(0.09195);
            2021-11-28  [TreeThinning].Script.DoThin(0.0);
            2022-11-28  [TreeThinning].Script.DoThin(0.02532);
            2023-11-28  [TreeThinning].Script.DoThin(0.0);
          Operations ExptFert
            2022-10-03  [Fertiliser].Apply(amount: 400, type: "NH4N", depth: 100)
          Soil Synthetic Soil Derived from the SLGA: same as W._.t1.DingupResp18.Synthetic Soil Derived from the SLGA
        CompositeFactor DingupResp19
          Specifications:
            [Clock]
            [Weather]
            [Soil]
            [TreeManagement]
            [Operations]
            [ExptFert]
          Clock: Start=2016-01-15; End=2029-08-31
          Weather Met: FileName=Dingup.met
          Manager TreeManagement
            RowSpace = 2.07814
            RowWidth = 4
            CultivarName = globulusEKB9
            PlantingDate = 15-Jul
            HarvestAge = 10
            FertAmount = 15
            script: same as in T._.t1.HaysRates.TreeManagement
          Operations
            2016-11-28  [TreeThinning].Script.DoThin(0.0);
            2017-11-28  [TreeThinning].Script.DoThin(0.0);
            2018-11-28  [TreeThinning].Script.DoThin(0.0);
            2020-11-28  [TreeThinning].Script.DoThin(0.01299);
            2021-11-28  [TreeThinning].Script.DoThin(0.07895);
            2022-11-28  [TreeThinning].Script.DoThin(0.0);
            2023-11-28  [TreeThinning].Script.DoThin(0.0);
          Operations ExptFert
            2022-10-03  [Fertiliser].Apply(amount: 400, type: "NH4N", depth: 100)
          Soil SLGAmodeDingup19: same as W._.t1.DingupResp19.SLGAmodeDingup19
        CompositeFactor LakeJasperResp18
          Specifications:
            [Clock]
            [Weather]
            [Soil]
            [TreeManagement]
            [Operations]
            [ExptFert]
          Clock: Start=2016-01-15; End=2029-08-31
          Weather Met: FileName=LakeJasperResp.met
          Manager TreeManagement
            RowSpace = 1.72043
            RowWidth = 4
            CultivarName = globulusEKB9
            PlantingDate = 13-Jun
            HarvestAge = 10
            FertAmount = 15
            script: same as in T._.t1.HaysRates.TreeManagement
          Operations
            2016-11-10  [TreeThinning].Script.DoThin(0.0);
            2017-11-10  [TreeThinning].Script.DoThin(0.0);
            2018-11-10  [TreeThinning].Script.DoThin(0.03226);
            2019-11-10  [TreeThinning].Script.DoThin(0.0);
            2020-11-10  [TreeThinning].Script.DoThin(0.02222);
            2021-11-10  [TreeThinning].Script.DoThin(0.07955);
            2022-11-10  [TreeThinning].Script.DoThin(0.0);
            2023-11-10  [TreeThinning].Script.DoThin(0.02469);
          Operations ExptFert
            2022-10-10  [Fertiliser].Apply(amount: 400, type: "NH4N", depth: 100)
          Soil SLGAmodLakeJasper18: same as W._.t1.LakeJasperResp18.SLGAmodLakeJasper18
        CompositeFactor LakeJasperResp19
          Specifications:
            [Clock]
            [Weather]
            [Soil]
            [TreeManagement]
            [Operations]
            [ExptFert]
          Clock: Start=2016-01-15; End=2029-08-31
          Weather Met: FileName=LakeJasperResp.met
          Manager TreeManagement
            RowSpace = 1.86012
            RowWidth = 4
            CultivarName = globulusEKB9
            PlantingDate = 13-Jun
            HarvestAge = 10
            FertAmount = 15
            script: same as in T._.t1.HaysRates.TreeManagement
          Operations
            2016-11-10  [TreeThinning].Script.DoThin(0.0);
            2017-11-10  [TreeThinning].Script.DoThin(0.0);
            2018-11-10  [TreeThinning].Script.DoThin(0.0);
            2019-11-10  [TreeThinning].Script.DoThin(0.01163);
            2020-11-10  [TreeThinning].Script.DoThin(0.01176);
            2021-11-10  [TreeThinning].Script.DoThin(0.107140);
            2023-04-10  [TreeThinning].Script.DoThin(0.05333);
            2023-11-10  [TreeThinning].Script.DoThin(0.0);
          Operations ExptFert
            2022-10-10  [Fertiliser].Apply(amount: 400, type: "NH4N", depth: 100)
          Soil SLGAmodLakeJasper19: same as W._.t1.LakeJasperResp19.SLGAmodLakeJasper19
        CompositeFactor OCallaghanResp
          Specifications:
            [Clock]
            [Weather]
            [Soil]
            [TreeManagement]
            [Operations]
            [ExptFert]
          Clock: Start=2017-02-15; End=2029-08-31
          Weather Met: FileName=OCallaghan.met
          Manager TreeManagement: same as V._.t1.MeadeResp.TreeManagement
          Operations
            2018-01-12  [TreeThinning].Script.DoThin(0.1463);
            2019-01-12  [TreeThinning].Script.DoThin(0.13114);
            2020-01-12  [TreeThinning].Script.DoThin(0.0);
            2021-01-12  [TreeThinning].Script.DoThin(0.00834);
            2022-01-12  [TreeThinning].Script.DoThin(0.0);
            2023-01-12  [TreeThinning].Script.DoThin(0.03364);
            2024-01-12  [TreeThinning].Script.DoThin(0.0087);
          Operations ExptFert
            2022-09-08  [Fertiliser].Apply(amount: 400, type: "NH4N", depth: 100)
          Soil SLGAmodOCallaghan: same as W._.t9.OCallaghanResp.SLGAmodOCallaghan
        CompositeFactor WisbeyResp
          Specifications:
            [Clock]
            [Weather]
            [Soil]
            [TreeManagement]
            [Operations]
            [ExptFert]
          Clock: Start=2017-02-15; End=2029-08-31
          Weather Met: FileName=Wisbey.met
          Manager TreeManagement: same as V._.t1.MeadeResp.TreeManagement
          Operations
            2018-01-18  [TreeThinning].Script.DoThin(0.1566);
            2019-01-19  [TreeThinning].Script.DoThin(0.2265);
            2020-01-20  [TreeThinning].Script.DoThin(0.0);
            2021-01-21  [TreeThinning].Script.DoThin(0.03975);
            2022-01-22  [TreeThinning].Script.DoThin(0.01035);
            2023-01-22  [TreeThinning].Script.DoThin(0.03062);
            2024-01-22  [TreeThinning].Script.DoThin(0.0);
          Operations ExptFert
            2022-09-09  [Fertiliser].Apply(amount: 400, type: "NH4N", depth: 100)
          Soil SLGAmodWisbey: same as W._.t1.WisbeyResp.SLGAmodWisbey
    Simulation WA
      Weather: FileName=LakeJasperRates.met
      Clock: Start=2004-06-01; End=2024-10-30
      Summary
      SoilArbitrator Soil Arbitrator
      MicroClimate: a_interception=0; b_interception=1; c_interception=0; d_interception=0; SoilHeatFluxFraction=0.4; MinimumHeightDiffForNewLayer=0; NightInterceptionFraction=0.5; ReferenceHeight=2
      Zone Plantation: Area=1; Slope=0; AspectAngle=0; Altitude=50
        Fertiliser
        SurfaceOrganicMatter: InitialResidueName=Eucalyptus; InitialResidueType=Eucalyptus; InitialResidueMass=2000; InitialStandingFraction=0; InitialCPR=0; InitialCNR=80
        Plant Eucalyptus
        Manager TreeManagement: same as T.TAS.Plantation.TreeManagement
        Manager TreeThinning: same as T.TAS.Plantation.TreeThinning
        Operations
          2013-05-31  [TreeThinning].Script.DoThin(0.00);
        Manager WaterTableManager
          WaterTableDepth = 11000
          InSeasonWaterTableDepth = 11000
          StartDate = 1-Jan
          EndDate = 31-Dec
          script: same as in V._.t7.ConveyResp.WaterTableManager
        Manager NO3inAquifer
          EachYear = True
          Dates = 15-jan, 15-apr, 15-jul, 15-oct
          UseCritNThreshold = False
          CritNThreshold = 10500
          CritNDepth = 10000
          Depth = 3500
          Amount = 0
          FertiliserType = NO3N
          script: same as in V._.t7.ConveyResp.NO3inAquifer
        Report HarvestReport: EventNames=[Eucalyptus].Harvesting
          VariableNames:
            [Clock].Today
            [Eucalyptus].Population*10000 as sph
            [Eucalyptus].Stem.Ht
            [Eucalyptus].Stem.DBH
            [Eucalyptus].Stem.MAI
        Operations ExptFert
        Report AnnualReport: EventNames=[Clock].EndOfYear
          VariableNames:
            [Clock].Today
            [Eucalyptus].Age
            [Eucalyptus].Population*10000 as sph
            [Eucalyptus].Stem.DBH
            [Eucalyptus].Stem.Ht
            [Eucalyptus].Stem.MAIub
            [Eucalyptus].Stem.BA
            [Eucalyptus].Stem.Volub
            [Eucalyptus].Stem.WoodDensity
        Soil Synthetic Soil Derived from the SLGA: ASCOrder=NA; ASCSubOrder=NA; SoilType=Loamy Sand over Sandy Loam; Site=29243_3216; NearestTown=PEMBERTON; Region=Warren; State=Western Australia; NaturalVegetation=Banksia woodlands; ApsoilNumber=9999; Latitude=-34.37; Longitude=115.68; LocationAccuracy=+- 90m; YearOfSampling=2024; Comments=Landuse is Grazing modified pastures
          DataSource=Soil and Landscape Grid of Australia. This soil parameter file was automatically generated from the GSM National Surfaces using pedotransfer functions.
          Water: Thickness=[150, 150, 150, 150, 200, 200, 200]; FilledFromTop=false
            InitialValues=[0.33104, 0.180596, 0.168849, 0.159974, 0.168893, 0.185806, 0.198793]
          Physical
            Thickness  ParticleSizeSand  ParticleSizeSilt  ParticleSizeClay  Rocks  BD       AirDry     LL15       DUL       SAT       KS
            150        5                 65                30                0      1.38811  0.0568957  0.170687   0.33104   0.399764  167.633
            150        5                 65                30                0      1.40745  0.0307507  0.092252   0.180596  0.394714  151.249
            150        5                 65                30                0      1.39699  0.0289658  0.0868974  0.168849  0.399253  134.785
            150        5                 65                30                0      1.39857  0.0277185  0.0831555  0.159974  0.40029   116.457
            200        5                 65                30                0      1.40325  0.0303003  0.0909009  0.168893  0.401394  90.9303
            200        5                 65                30                0      1.41132  0.0348409  0.104523   0.185806  0.40209   66.3047
            200        5                 65                30                0      1.42223  0.0388283  0.116485   0.198793  0.40177   48.5735
            Rocks, ParticleSizeSand, ParticleSizeSilt, ParticleSizeClay source: Calculated
            SoilCrop WheatSoil
              LL=[0.180308, 0.0975526, 0.0917877, 0.0873821, 0.0946461, 0.107776, 0.11912]
              KL=[0.06, 0.06, 0.0596733, 0.05502, 0.04802, 0.04002, 0.03202]
              XF=[1, 1, 1, 1, 1, 1, 1]
            SoilCrop EucalyptusSoil: same as W.WA.Plantation.Synthetic Soil Derived from the SLGA.Physical.WheatSoil
            SoilCrop PinusSoil: same as W.WA.Plantation.Synthetic Soil Derived from the SLGA.Physical.WheatSoil
            SoilCrop SCRUMSoil: same as W.WA.Plantation.Synthetic Soil Derived from the SLGA.Physical.WheatSoil
            SoilCrop OatsSoil: same as W.WA.Plantation.Synthetic Soil Derived from the SLGA.Physical.WheatSoil
            SoilCrop SorghumSoil
              LL=[0.181912, 0.0984361, 0.0926105, 0.0881981, 0.0955428, 0.108792, 0.120231]
              KL=[0.07, 0.07, 0.0697142, 0.0656425, 0.0595175, 0.0525175, 0.0455175]
              XF=[1, 1, 1, 1, 1, 1, 1]
            SoilCrop BarleySoil
              LL=[0.181912, 0.0984361, 0.0926064, 0.0881391, 0.0953986, 0.108541, 0.119876]
              KL=[0.07, 0.07, 0.0696637, 0.0648735, 0.0576676, 0.0494324, 0.0411971]
              XF=[1, 1, 1, 1, 1, 1, 1]
            SoilCrop ChickpeaSoil
              LL=[0.180308, 0.0975526, 0.0918144, 0.0877647, 0.0952223, 0.108276, 0.119526]
              KL=[0.06, 0.06, 0.06, 0.06, 0.0554077, 0.0461769, 0.0369462]
              XF=[1, 1, 1, 1, 1, 1, 1]
            SoilCrop MungbeanSoil
              LL=[0.180308, 0.0975526, 0.0918144, 0.0876126, 0.0946469, 0.107451, 0.118463]
              KL=[0.06, 0.06, 0.06, 0.05802, 0.04803, 0.03603, 0.02403]
              XF=[1, 1, 1, 1, 1, 1, 1]
            SoilCrop CottonSoil
              LL=[0.186722, 0.101086, 0.0950925, 0.0908374, 0.0987002, 0.112202, 0.123346]
              KL=[0.1, 0.1, 0.1, 0.1, 0.1, 0.0944722, 0.0833611]
              XF=[1, 1, 1, 1, 1, 1, 1]
            SoilCrop CanolaSoil: same as W.WA.Plantation.Synthetic Soil Derived from the SLGA.Physical.WheatSoil
            SoilCrop Pigeon PeaSoil
              LL=[0.180308, 0.0975526, 0.0918144, 0.0877647, 0.0951925, 0.108183, 0.119368]
              KL=[0.06, 0.06, 0.06, 0.06, 0.055025, 0.045025, 0.035025]
              XF=[1, 1, 1, 1, 1, 1, 1]
            SoilCrop MaizeSoil: same as W.WA.Plantation.Synthetic Soil Derived from the SLGA.Physical.WheatSoil
            SoilCrop CowpeasSoil: same as W.WA.Plantation.Synthetic Soil Derived from the SLGA.Physical.WheatSoil
            SoilCrop SunflowerSoil
              LL=[0.186645, 0.100439, 0.0937692, 0.0889192, 0.0959498, 0.108828, 0.119876]
              KL=[0.0995196, 0.0926765, 0.0838529, 0.0750294, 0.0647353, 0.0529706, 0.0412059]
              XF=[1, 1, 1, 1, 1, 1, 1]
            SoilCrop FababeanSoil
              LL=[0.183515, 0.0993195, 0.0934535, 0.0893011, 0.09703, 0.110099, 0.121191]
              KL=[0.08, 0.08, 0.08, 0.08, 0.0785857, 0.0686, 0.0571714]
              XF=[1, 1, 1, 1, 1, 1, 1]
            SoilCrop LucerneSoil
              LL=[0.186722, 0.101086, 0.0950925, 0.0908374, 0.0987002, 0.112651, 0.124716]
              KL=[0.1, 0.1, 0.1, 0.1, 0.1, 0.1, 0.1]
              XF=[1, 1, 1, 1, 1, 1, 1]
            SoilCrop PerennialsSoil: same as W.WA.Plantation.Synthetic Soil Derived from the SLGA.Physical.CottonSoil
            SoilCrop LupinsSoil: same as W.WA.Plantation.Synthetic Soil Derived from the SLGA.Physical.WheatSoil
            SoilCrop LentilsSoil: same as W.WA.Plantation.Synthetic Soil Derived from the SLGA.Physical.WheatSoil
            SoilCrop TriticaleSoil
              LL=[0.181912, 0.0984361, 0.0922454, 0.0874354, 0.0943776, 0.107112, 0.118059]
              KL=[0.07, 0.07, 0.0652591, 0.0557136, 0.0445773, 0.03185, 0.0191227]
              XF=[1, 1, 1, 1, 1, 1, 1]
            SoilCrop MilletSoil: same as W.WA.Plantation.Synthetic Soil Derived from the SLGA.Physical.SorghumSoil
            SoilCrop SoybeansSoil: same as W.WA.Plantation.Synthetic Soil Derived from the SLGA.Physical.WheatSoil
            SoilCrop Pasture grasses & legumesSoil: same as W.WA.Plantation.Synthetic Soil Derived from the SLGA.Physical.WheatSoil
          WaterBalance SoilWater: SummerDate=1-nov; SummerU=6; SummerCona=6; WinterDate=1-apr; WinterU=2; WinterCona=2; DiffusConst=226.781; DiffusSlope=46.7391; Salb=0.16; CN2Bare=80; CNRed=20; CNCov=0; DischargeWidth=10; CatchmentArea=864766.625; PSIDul=-100; Thickness=[150, 150, 150, 150, 200, 200, 200]
            SWCON=[0.67037, 0.573358, 0.559554, 0.543528, 0.469097, 0.433114, 0.397438]
          Organic: FOMCNRatio=40; CarbonUnits=Total
            Thickness  Carbon  SoilCNRatio  FBiom  FInert  FOM
            150        5.703   14           0.04   0.118   417.668
            150        1.736   14           0.031  0.317   287.059
            150        1.219   14           0.014  0.458   197.293
            150        0.706   14           0.01   0.787   135.597
            200        0.561   14           0.01   0.987   82.244
            200        0.582   14           0.01   0.953   49.883
            200        0.55    14           0.01   0.989   30.256
          Chemical: Thickness=[150, 150, 150, 150, 200, 200, 200]; PHUnits=Water
            PH=[4.75901, 4.82081, 4.89554, 4.96594, 5.08058, 5.17533, 5.1929]
          Solute NO3: Thickness=[150, 150, 150, 150, 200, 200, 200]; InitialValues=[0, 0, 0, 0, 0, 0, 0]; InitialValuesUnits=ppm; WaterTableConcentration=0; D0=0; DepthConstant=0; MaxDepthSoluteAccessible=0; RunoffEffectivenessAtMovingSolute=0; MaxEffectiveRunoff=0
          Solute NH4: same as W.WA.Plantation.Synthetic Soil Derived from the SLGA.NO3
          Solute Urea: same as W.WA.Plantation.Synthetic Soil Derived from the SLGA.NO3
          Nutrient
          SoilTemperature
        Report DailyReport: same as Replacements.DailyReport
  Memo Genotype note
    This genotype specification was originally planned to be for the species E. grandis in general, but we did not actually provide any specific parameters. As no parameter values were changed here, generic Eucalyptus parameters were used where this genotype was specified in a simulation.
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