Simulations: Version=167
  Memo TitlePage
    # The APSIM Grapevine Model

    Junqi Zhu, Hamish Edward Brown

    The New Zealand Institute for Plant & Food Research Limited (PFR), PO Box 845 Blenheim 7240, New Zealand

    Correspondance: junqi.zhu@plantandfood.co.nz;Hamish.brown@plantandfood.co.nz

    ##Introduction
    Grapevine is one of the most economically important fruit crops worldwide, and its use in wine production has played an important cultural role in many parts of the world. Grapevines are now cultivated in more than 90 countries for wine, distilled liquors, juice, table grapes, and raisin production. Because of its global economic importance, the climate diversity of the producing regions, and a large amount of studies (from genomics to production practices), grapevine has emerged as a model perennial fruit crop species.

    ##Objective
    The model presented here was built to simulate the phenology of the vines, canopy development and light interception by the vine row, carbohydrate allocation, carbohydrate storage and remobilisation, and yield formation of grapevine (*Vitis vinifera*) as a model perennial crop.
    It has the following objectives initially:
    - Capture the seasonal yield variations
    - Understand the long-term dynamics of yield and carbohydrate reserves under certain pruning systems
    - Capture the effects of vineyard management on yield and carbohydrate dynamics, e.g. summer and winter pruning, irrigation

    ##Model construction

    The APSIM Grapevine model was developed using the Plant Modelling Framework (PMF) of [brown_plant_2014]. This new framework provides a library of plant organ and process submodels that can be coupled, at runtime, to construct a model in much the same way that models can be coupled to construct a simulation. This means that dynamic composition of lower level process and organ classes (e.g. photosynthesis, leaf) into larger constructions (e.g. maize, wheat, sorghum) can be achieved by the model developer without additional coding.

    A series of development was taken to adapt the source code to simulate the perennial woody plants. The current model including the following features:

    - A new carbohydrate allocation method to distribute carbohydrates to structural and non-structural organ components simultaneously based on sink strength and priority.

    - A yield module that uses the weather conditions in both the previous and current season as well as the carbohydrate status to determine potential bunch number per shoot, berry number per bunch and berry mass [zhu2020quantifying].For getting a reliable estimation of yield, simulations should start one season before the season in question.

    - A row and alley strip configuration to represent a typical vineyard setup with rows of grape vines growing in a strip of bare ground, interspersed with alleys of short grass. Roots from each strip are present beneath their neighbouring strip and compete for water and nutrients.

    - An adapted row crop light interception method based on Goudriaan (1977) to partition light interception between the row canopyies and the alley.

    - Flexibility in simulating different training systems by controlling the bud number per vine, dynamics of canopy height, canopy width and depth as user inputs.

    - An adapted phenology method that defines the start of endo-dormancy by critical photoperiod and then goes through each phenology phases progressively. Budburst was used for triggering canopy growth instead of crop emergence as in annual crops.

    - A flexible parameter optimization procedure that calls APSIM Next Generation through R bash command and optimises model parameters through using an R package.
  Memo Cautions for new users
    ## Cautions for running the model
    - Vineyard conditions differ from one to the other due to differences in local climatic conditions, soil, rootstock, varieity, irrigtation, fertilization and canopy management practice. The current grapevine model rather provide a modelling framework to simulate phenology, canopy development, radiation interception, dry matter production and allocation, non-structural carbohydrate dynamics, yield components, soil water and nitrogen uptake in vineyard, than a universal model that can be applied anywhere without adjustments.
    - The current grapevine model was developed based on a rich phenology and yield dataset of Sauvignon blanc in New Zealand in five regions, mainly in the Marlborough region. The dataset were collected in irrigated and fertilized vineyards where water and nutrient stress were minimized. This was reflected in the simulation through irrigation and fertilization management script as well. For conditions with water and nutrient stress, further calibration based on local dataset would be needed.
    - Parameters for potential bunch number, berry number and berry mass determination were derived based on the long-term Sauvignon blanc trial in Marlborough. The general framework would hold for other varieties as well, but actual parameters needed to be refitted based on robust dataset for other varieties.
    - The current model can allocate vine roots to the alley and allocate the root of the alley crop to the vine row. However, the water and nitrogen competition between the vine and alley crop is based on the value of KL of each species, not based on the amount of root and root density presented in the soil zone. One option is change the KL as a function of root density or directly use root density in the source code. A good dataset of root distribution in different layor would be required. Further calibration of soil water, nitrogen and organic matter dynamics are needed.
    - Currently alley crop was represented by a generic plant model ‘Slurp’. The ‘Slurp’ model can take up water and nitrogen, but does not predict crop growth or yields. We forced its leaf area index to follow a reasonable growth pattern under the vineyard management in Marlborough New Zealand with periodic mowing events. Four different types were provided for the Slurp model: static crop, static tree, pasture, lurcern. see details in the Slurp node by right click and expanding the model structure.
    - The row crop light interception method assume the canopy shape is like a cube. So it is more suitable to use for verticle shoot prunned canopy.
    - Water stress was turned on for leaf expansion and photosynthesis, but nitrogen stress was turned off in the current model. However, nitrogen uptake and availability will still affect the organ development as the arbitrator is conducting biomass and nitrogen allocation automatically in the background.
  Folder Replacements
    Report: EventNames=[Clock].DoReport
      VariableNames:
        [Clock].Today
        [Clock].Today.Year
        [Clock].Today.DayOfYear
        [Weather].DaysSinceWinterSolstice   as DAWS
        [PlantVariables].Script.Height 		as height
        [PlantVariables].Script.LAI         as LAIStrip
        [PlantVariables].Script.FRadInt     as f.rad.int
        [PlantVariables].Script.ET          as transpiration
        [PlantVariables].Script.ES          as Es
        [PlantVariables].Script.PET         as PET
        [PlantVariables].Script.RootDepth   as rootDepth
        [Soil].OutputLayers.SW
        sum([Soil].OutputLayers.SWmm)       as psw
        [Weather].Rain
        [Irrigation].IrrigationApplied
        [Soil].SoilWater.Drainage
        [Grapevine].Phenology.CurrentSeason as CurrentSeason
        [Grapevine].Phenology.Stage
        [Grapevine].Phenology.AccumulatedEmergedTT
        [Grapevine].Phenology.BudBurstDOY      as BudBurstDAWS
        [Grapevine].Phenology.FloweringDOY     as FloweringDAWS
        [Grapevine].Phenology.VeraisonDOY      as VeraisonDAWS
        [Grapevine].Phenology.CurrentStageName as CurrentStageName
        [Grapevine].Phenology.AccumulatedChillingUnitBeforeWinterPruning
        [Grapevine].Structure.PrimaryBudNo
        [Grapevine].Structure.MainStemPopn
        [Grapevine].Structure.LeafTipsAppeared
        [Grapevine].Structure.TotalLeavesPerShoot as leaf.no.shoot
        [Grapevine].Leaf.InitialisedCohortNo
        [Grapevine].Leaf.DeadCohortNo
        [Grapevine].Leaf.AppearedCohortNo as leaf.no.shoot.main
        [Grapevine].Leaf.CohortSize
        [Grapevine].Leaf.Live.NConc
        [Grapevine].Leaf.Transpiration
        [Grapevine].Leaf.LAI/[Grapevine].Population             as leaf.area.vine
        [Grapevine].Leaf.LAI/[Grapevine].Structure.MainStemPopn as leaf.area.shoot
        [Grapevine].Leaf.LAIMainStem/[Grapevine].Structure.MainStemPopn as leaf.area.shoot.main
        [Grapevine].Leaf.LAIBranch/[Grapevine].Structure.MainStemPopn as leaf.area.shoot.lateral
        [Grapevine].Leaf.Fn
        [Grapevine].Leaf.Fw
        [Grapevine].Leaf.Live.Wt
        [Grapevine].Leaf.Live.Wt/[Grapevine].Population as leaf.dw.vine
        [Grapevine].Leaf.Live.Wt/[Grapevine].Structure.MainStemPopn as leaf.dw.shoot
        [Grapevine].Shoot.Live.Wt
        [Grapevine].Shoot.Live.Wt/[Grapevine].Structure.MainStemPopn as shoot.dw.mean
        [Grapevine].Shoot.Live.StructuralWt
        [Grapevine].Shoot.Live.StorageWt
        [Grapevine].Cane.Live.Wt
        [Grapevine].Cane.Live.StructuralWt
        [Grapevine].Cane.Live.StorageWt
        [Grapevine].Trunk.Live.Wt
        [Grapevine].Trunk.Live.StructuralWt
        [Grapevine].Trunk.Live.StorageWt
        [Grapevine].Trunk.Live.StorageWt/[Grapevine].Trunk.Live.Wt as total.NSC.concentration.trunk
        [Grapevine].Root.Live.Wt
        [Grapevine].StructuralRoot.Live.Wt
        [Grapevine].StructuralRoot.Live.StructuralWt
        [Grapevine].StructuralRoot.Live.StorageWt
        [Grapevine].StructuralRoot.Live.StorageWt/[Grapevine].StructuralRoot.Live.Wt as total.NSC.concentration.root
        [Grapevine].Root.NTakenUp
        [Grapevine].StructuralRoot.N
        [Grapevine].Arbitrator.FDM
        [Grapevine].Arbitrator.DM.TotalFixationSupply
        [Grapevine].Berry.Live.Wt
        [Grapevine].Berry.Live.Wt/[Grapevine].Population as TotalBerryDW
        [Grapevine].Berry.SingleBerryDW
        [Grapevine].Berry.SingleBerryFW     as berry.fw.mean
        [Grapevine].Berry.TotalBerryFW/[Grapevine].Population as TotalBerryFW
        [Grapevine].Berry.NumberFunction
        [Grapevine].Berry.ThermalTimeAfterFlowering
        [Grapevine].Berry.WaterContent
        [Grapevine].Berry.N
        [Grapevine].Berry.NFillingRate
        [Grapevine].Berry.Brix 				as brix
        [Grapevine].Berry.TitratableAcid 	as ta
        [Grapevine].Berry.MetFactors.BUN_TmaxIni_Record    as BUN_TmaxIni
        [Grapevine].Berry.MetFactors.BUN_RadIni_Record     as BUN_RadIni
        [Grapevine].Berry.MetFactors.BEN_RainTotFlow as BEN_RainTotFlow
        [Grapevine].Berry.MetFactors.BEN_TmaxIni_Record    as BEN_TmaxIni_Record
        [Grapevine].Berry.MetFactors.BEN_TmaxFlow   as BEN_TmaxFlow
        [Grapevine].Berry.MetFactors.BEN_TminFlow   as BEN_TminFlow
        [Grapevine].Berry.MetFactors.BM_RadFlow      as BM_RadFlow
        [Grapevine].Berry.MetFactors.BM_RainTotFlow  as BM_RainTotFlow
        [Grapevine].Berry.MetFactors.BM_RainTotVer   as BM_RainTotVer
        [Grapevine].Berry.MetFactors.BM_TmaxFlow    as BM_TmaxFlow
        [Grapevine].Berry.YieldComponent.BunchesPerShoot as bunch.no.shoot
        [Grapevine].Berry.YieldComponent.BunchesPerVine  as bunch.no.vine
        [Grapevine].Berry.YieldComponent.BerryNum    as BerryNum
        [Grapevine].Berry.YieldComponent.BerryMass   as berry.fw.est
        [Grapevine].Berry.YieldPerVine               as yield.per.vine
        // Note: for converting into field scale, need the strip area, this could be done by multiplying all by Ai/At = Ai/(A1+A2)
        [Row].Area
        [Alley].Area
        [Row].Area/([Alley].Area+[Row].Area) as Row.FractionArea
        [Alley].Area/([Alley].Area+[Row].Area) as Alley.FractionArea
        [Weather].Radn as TotalRadiation
        [Row].Grapevine.Leaf.RadiationIntercepted
        [Alley].Slurp.Leaf.RadiationIntercepted
        // Carbon balance (basic)
        [Row].Grapevine.AboveGround.Wt
        [Row].Grapevine.BelowGround.Wt
        ([Row].Grapevine.Leaf.Removed.Wt+[Row].Grapevine.Shoot.Removed.Wt+[Row].Grapevine.Cane.Removed.Wt+[Row].Grapevine.Trunk.Removed.Wt+[Row].Grapevine.Berry.Removed.Wt+[Row].Grapevine.StructuralRoot.Removed.Wt+[Row].Grapevine.Root.Removed.Wt) as Row.Grapevine.Removed.Wt
        ([Row].Grapevine.Leaf.Detached.Wt+[Row].Grapevine.Shoot.Detached.Wt+[Row].Grapevine.Cane.Detached.Wt+[Row].Grapevine.Trunk.Detached.Wt+[Row].Grapevine.Berry.Detached.Wt+[Row].Grapevine.StructuralRoot.Detached.Wt+[Row].Grapevine.Root.Detached.Wt) as Row.Grapevine.Detached.Wt
        [Row].SurfaceOrganicMatter.C as Row.SurfaceOM.C
        sum([Row].Soil.Nutrient.FOM.C) as Row.SoilFOM.C
        sum([Row].Soil.Nutrient.Microbial.C)+sum([Row].Soil.Nutrient.Humic.C) as Row.SoilOM.C
        // Water balance (basic)
        [Weather].Rain as Rainfall
        [Row].Irrigation.IrrigationApplied as Row.Irrigation
        [Row].Soil.SoilWater.Runoff as Row.Runoff
        [Row].Soil.SoilWater.Es as Row.Evaporation
        [Row].Grapevine.Leaf.Transpiration as Row.Transpiration
        [Row].Soil.SoilWater.Drainage as Row.Drainage
        sum([Row].Soil.SoilWater.SWmm) as Row.TotalSWC
        [Alley].Irrigation.IrrigationApplied as Alley.Irrigation
        [Alley].Soil.SoilWater.Runoff as Alley.Runoff
        [Alley].Soil.SoilWater.Es as Alley.Evaporation
        [Alley].Slurp.Leaf.Transpiration as Alley.Transpiration
        [Alley].Soil.SoilWater.Drainage as Alley.Drainage
        sum([Alley].Soil.SoilWater.SWmm) as Alley.TotalSWC
        sum([Row].Soil.Physical.SATmm) as TotalSAT
        sum([Row].Soil.Physical.DULmm) as TotalDUL
        sum([Row].Soil.Physical.LL15mm) as TotalLL15
        // Nitrogen balance (basic)
        [Row].SurfaceOrganicMatter.N as Row.SurfaceOM.N
        sum([Row].Soil.Nutrient.FOM.N) as Row.SoilFOM.N
        sum([Row].Soil.Nutrient.Microbial.N)+sum([Row].Soil.Nutrient.Humic.C) as Row.SoilOM.N
        [Row].Fertiliser.NitrogenApplied as Row.FertiliserN
        sum([Row].Soil.SoilWater.LeachUrea)+sum([Row].Soil.SoilWater.LeachNO3) as Row.LeachedN
        sum([Row].Soil.Nutrient.Natm) as Row.DenitrifiedN
        [Row].Grapevine.Root.NTakenUp*10.0 as Row.UptakeN
        sum([Row].Soil.Nutrient.MineralN) as Row.Mineral_N
        sum([Alley].Soil.Nutrient.MineralN) as Alley.Mineral_N
        [Alley].SurfaceOrganicMatter.N as Alley.SurfaceOM.N
        sum([Alley].Soil.Nutrient.FOM.N) as Alley.SoilFOM.N
        sum([Alley].Soil.Nutrient.Microbial.N)+sum([Alley].Soil.Nutrient.Humic.C) as Alley.SoilOM.N
        [Alley].Fertiliser.NitrogenApplied as Alley.FertiliserN
        sum([Alley].Soil.SoilWater.LeachUrea)+sum([Alley].Soil.SoilWater.LeachNO3) as Alley.LeachedN
        sum([Alley].Soil.Nutrient.Natm) as Alley.DenitrifiedN
        [Alley].Slurp.Root.NTakenUp*10.0 as Alley.UptakeN
        sum([Alley].Slurp.Arbitrator.N.Fixation)*10.0 as Alley.FixedN
    Report ReportAlley: EventNames=[Clock].DoReport
      VariableNames:
        [Clock].Today
        [Clock].Today.Year
        [Clock].Today.DayOfYear
        [Weather].DaysSinceWinterSolstice   as DAWS
        [PlantVariables].Script.Height 		as height
        [PlantVariables].Script.LAI         as LAIStrip
        [PlantVariables].Script.FRadInt     as f.rad.int
        [PlantVariables].Script.ET          as transpiration
        [PlantVariables].Script.ES          as Es
        [PlantVariables].Script.PET         as PET
        [PlantVariables].Script.RootDepth   as rootDepth
        [Soil].OutputLayers.SW
        sum([Soil].OutputLayers.SWmm)       as psw
        [Weather].Rain
        [Irrigation].IrrigationApplied
        [Soil].SoilWater.Drainage
        [Alley].Slurp.Leaf.Live.N
        [Alley].Slurp.Root.NUptake
        [Alley].Slurp.Root.NTakenUp
    Manager PlantVariables
      FRadInt = 0
      ET = 0
      ES = 0
      PET = 0
      LAI = 0
      Height = 0
      RootDepth = 0
      PlantWidth = 0
```csharp
using Models.Climate;
using System;
using Models.Core;
using Models.PMF;
using System.Collections.Generic;
using Models.Soils;
using APSIM.Shared.Utilities;
using Models.Zones;
using Models.PMF.Organs;

namespace Models
{
    [Serializable]
    public class Script : Model
    {
        [Link] private Weather weather;
        private RectangularZone AlleyZone {get; set; }
        private RectangularZone RowZone {get; set;}
        private RectangularZone ThisZone {get; set;}
        private double AreaWidth {get; set;}

        public double FRadInt {get; set;}
        public double ET {get; set;}
        public double ES {get; set;}
        public double PET {get; set;}
        public double LAI {get; set;}
        public double Height {get; set;}
        public double RootDepth {get; set;}
        public double PlantWidth {get; set;}

        [EventSubscribe("StartOfSimulation")]
        private void DoStartOfSimulation(object sender, EventArgs e)
        {
               
               ThisZone = this.Parent.Parent as RectangularZone;
               RowZone = this.Parent.Parent.Parent.FindInScope("Row") as RectangularZone;
               AlleyZone = (RectangularZone)this.Parent.Parent.Parent.FindInScope("Alley") as RectangularZone;
               AreaWidth = AlleyZone.Width + RowZone.Width;
               PlantWidth = 0;
        }
        
        [EventSubscribe("DoReportCalculations")]
        private void OnDoReportCalculations(object sender, EventArgs e)
        {
            if (ThisZone.Name == "Row")
                {
                FRadInt = ((double)RowZone.Get("Grapevine.Leaf.RadiationIntercepted") * RowZone.Width)/(weather.Radn * AreaWidth);
                ET = (double)RowZone.Get("Grapevine.Leaf.Transpiration") * RowZone.Width/AreaWidth;
                LAI = (double)RowZone.Get("Grapevine.Leaf.LAI");
                //LAIPerVine =  LAI*RowZone.Width*1.8;
                //TreeInitialisation.Script.VineDistance;
                //(double)RowZone.Get("Grapevine.Leaf.LAI");
                Height = (double)RowZone.Get("Grapevine.Leaf.Height");
                RootDepth = (double)RowZone.Get("Grapevine.Root.Depth");
                PlantWidth = (double)RowZone.Get("Grapevine.Leaf.Width");
                }
            else
                {
                FRadInt = ((double)AlleyZone.Get("Slurp.Leaf.RadiationIntercepted") * ThisZone.Width)/ (weather.Radn * AreaWidth);
                ET = (double)AlleyZone.Get("Slurp.Leaf.Transpiration") * ThisZone.Width/AreaWidth;
                LAI = (double)AlleyZone.Get("Slurp.Leaf.LAI");
                Height = (double)AlleyZone.Get("Slurp.Leaf.Height");
                RootDepth = (double)AlleyZone.Get("Slurp.Root.Depth");
                }

            ES = (double)ThisZone.Get("Soil.SoilWater.Es") * ThisZone.Width/AreaWidth;
            double PETWidth = Math.Min(Math.Max(PlantWidth,ThisZone.Width),AreaWidth);
            PET = (double)ThisZone.Get("Soil.SoilWater.Eo") * PETWidth/AreaWidth;
        }
    }
}
```
    Manager AutoIrrigationBasedOnWaterDeficit
      FASW = 0
      WaterDeficit = 0
      StartDate = 1-nov
      EndDate = 1-mar
      FASWThreshold = 0.8
      FASWDepth = 2000
      Amount = 20
```csharp
using Models.Interfaces;
using System;
using Models.Core;
using System.Collections.Generic;
using System.Text;
using Models.Soils;
using Models.PMF;
using Models;
using System.Xml.Serialization;
using APSIM.Shared.Utilities;

namespace Models
{
    [Serializable] 
    public class Script : Model
    {
        [Link] private Zone zone;
        [Link] private Irrigation irrigation;
        [Link] private Soil soil;
        [Link] private Clock clock;
        [Link]
        private IPhysical soilPhysical;
        [Link]
        private ISoilWater waterBalance;
        public double FASW { get; set; }
        public double WaterDeficit  { get; set; } 
        
        [Description("Irrigation start window (d-mmm)")]
        public string StartDate { get; set; }
        [Description("Irrigation end window (d-mmm)")]
        public string EndDate { get; set; }

        [Description("Threshold fraction available water (0-1)")]
        public double FASWThreshold { get; set; }

        [Description("Soil depth (mm) to which fraction available water is calculated")]
        public double FASWDepth { get; set; }

        [Description("Amount of water (mm) applied each irrigation")]
        public double Amount { get; set; }

        [EventSubscribe("DoManagement")]
        private void OnDoManagement(object sender, EventArgs e)
        {
            CalculateFASW();
            if (DateUtilities.WithinDates(StartDate, clock.Today, EndDate))
            {
                if (FASW < FASWThreshold)
                {
                    irrigation.Apply(Amount, depth: 0);
                }
            }
        }
        
        private void CalculateFASW()
        {
            double[] LL15 = MathUtilities.Multiply(soilPhysical.LL15, soilPhysical.Thickness);
            double[] DUL = MathUtilities.Multiply(soilPhysical.DUL, soilPhysical.Thickness);
        
            int nlayr = GetLayerIndex();
            double cumdep = MathUtilities.Sum(soilPhysical.Thickness, 0, nlayr, 0.0);

            double excess_fr = MathUtilities.Divide((cumdep - FASWDepth), soilPhysical.Thickness[nlayr], 0.0);

            // note that results may be strange if swdep < ll15
            double avail_sw = (MathUtilities.Sum(waterBalance.SWmm, 0, nlayr, 0.0)
                              - excess_fr * waterBalance.SWmm[nlayr])
                              - (MathUtilities.Sum(LL15, 0, nlayr, 0.0)
                              - excess_fr * LL15[nlayr]);


            double pot_avail_sw = (MathUtilities.Sum(DUL, 0, nlayr, 0.0)
                                  - excess_fr * DUL[nlayr])
                                  - (MathUtilities.Sum(LL15, 0, nlayr, 0.0)
                                  - excess_fr * LL15[nlayr]);

            FASW = MathUtilities.Divide(avail_sw, pot_avail_sw, 0.0);
            WaterDeficit = MathUtilities.Constrain(pot_avail_sw - avail_sw, 0.0, 100000);
        }

        private int GetLayerIndex()
        {
            double[] cumThickness = soilPhysical.ThicknessCumulative;
            for (int i = 1; i < cumThickness.Length; i++)
            {
                if (FASWDepth < cumThickness[i])
                    return i - 1;
            }
            
            return cumThickness.Length - 1;
        }

    }
}
```
    Manager Fertilise on fixed dates
      FertiliserType = NH4NO3N
      FertiliserDates = 10-Nov, 10-Jan
      Amount = 30
      AmountType = True
```csharp
using Models.Soils;
using System;
using Models.Core;
using Models.PMF;
using APSIM.Shared.Utilities;
namespace Models
{
    [Serializable]
    public class Script : Model
    {
        [Link] Clock Clock;
        [Link] Fertiliser Fertiliser;
        
        [Separator("A component to apply fertiliser on one or more dates on every year of the simulation")]

        [Description("Type of fertiliser to apply? ")] 
        public Fertiliser.Types FertiliserType { get; set; }

        [Description("Enter the fertilisation dates as dd-mmm with comma separation (any year information entered will be ignored): ")] 
        public string[] FertiliserDates { get; set; } 

        [Description("Amount of fertiliser to be applied (kg /ha)")] 
        public double Amount { get; set; }

        [Description("Is the above amount to be applied each time? (yes/ticked)? Or is it the total annual amount across all dates (no/unticked)")] 
        public bool AmountType { get; set; }
        
        [EventSubscribe("DoManagement")]
        private void OnDoManagement(object sender, EventArgs e)
        {
            foreach (string ddMMM in FertiliserDates)
            {
                if (DateUtilities.DatesEqual(ddMMM, Clock.Today))
                {
                    if (AmountType)
                        Fertiliser.Apply(Amount: Amount, Type: FertiliserType);
                    else
                        Fertiliser.Apply(Amount: Amount / FertiliserDates.Length, Type: FertiliserType);
                }
            }
        }
    }
}
```
    SurfaceOrganicMatter: InitialResidueName=wheat_stubble; InitialResidueType=wheat; InitialResidueMass=0; InitialStandingFraction=0; InitialCPR=0; InitialCNR=100; FractionFaecesAdded=1
    Manager Reset on date
      ResetDate = 10-Jul
      ResetWater = Yes
      ResetNutrients = Yes
      ResetSOM = Yes
```csharp
using APSIM.Shared.Utilities;
using Models.Surface;
using Models.Utilities;
using Models.Soils.Nutrients;
using Models.Soils;
using Models.Soils.Nutrients;
using Models.PMF;
using Models.Core;
using System;
using Models.Interfaces;

namespace Models
{
    [Serializable]
    public class Script : Model
    {
        [Link] private Clock Clock;
        [Link] private Plant Wheat;
        [Link] private ISoilWater SoilWater;
        [Link] private Nutrient nitrogen;
        [Link] private SurfaceOrganicMatter SOM;
        [Link] private Summary Summary;
        [Link]
        private Nutrient Nutrient;
        [Link(Path="[SurfaceOrganicMatter].SurfaceResidue.Decomposition")]
        private CarbonFlow ResidueDecomposition;

        [Description("Date to reset on:")]
        public string ResetDate {get;set;}

        [Description("Reset Water? (Yes or No)")]
        public string ResetWater {get;set;}

        [Description("Reset Soil Nutrients ? (Yes or No)")]
        public string ResetNutrients {get;set;}

        [Description("Reset Surface Organic Matter? (Yes or No)")]
        public string ResetSOM {get;set;}

        [EventSubscribe("DoManagement")]
        private void OnDoManagement(object sender, EventArgs e)
        {
            if (DateUtilities.WithinDates(ResetDate, Clock.Today, ResetDate))
            {
                if (ResetWater == "Yes")
                {
                    Summary.WriteMessage(this, "Reset Water", MessageType.Diagnostic);
                    SoilWater.Reset();
                }
               
                 if (ResetNutrients == "Yes")
                {
                    Summary.WriteMessage(this, "Reset Nitrogen", MessageType.Diagnostic);
                    nitrogen.Reset();
                }

                if (ResetSOM == "Yes")
                {
                    Summary.WriteMessage(this, "Reset Surface OM", MessageType.Diagnostic);
                    SOM.Reset();
                }
            }
        }
    }
}
```
    Manager Fertilise topup
      FertiliserType = NH4NO3N
      Threshold = 50
```csharp
using Models.Soils;
using Models.Soils.Nutrients;
using System;
using Models.Core;
using Models.PMF;
using Models.Soils.Nutrients;
using APSIM.Shared.Utilities;
namespace Models
{
    [Serializable]
    public class Script : Model
    {
        [Link] private Clock Clock;
        [Link] private Fertiliser Fertiliser;
        [Link(Path="[NO3]")] private Solute SoilNitrogenNO3;
        [Link]
        private Nutrient Nutrient;
        [Link(Path="[SurfaceOrganicMatter].SurfaceResidue.Decomposition")]
        private CarbonFlow ResidueDecomposition;

        [Description("Type of fertiliser to apply? ")] 
        public Fertiliser.Types FertiliserType { get; set; }
    
        [Description("Threshold amount of NO3 to topup to (kg/ha)")]
        public double Threshold { get; set;}
        
        [EventSubscribe("DoManagement")]
        private void OnDoManagement(object sender, EventArgs e)
        {
            double Amount = Threshold - MathUtilities.Sum(SoilNitrogenNO3.kgha);
            Fertiliser.Apply(Amount: Amount, Type: FertiliserType);
        }
    }
}
```
  DataStore
    ExcelInput PhenoObs: FileNames=[Observations\Observed.xlsx]; SheetNames=[Observed]
    PredictedObserved: PredictedTableName=Report; ObservedTableName=Observed; FieldNameUsedForMatch=SimulationName; FieldName2UsedForMatch=Zone; FieldName3UsedForMatch=Clock.Today; FieldName4UsedForMatch=CurrentSeason; AllColumns=false
      Tests: POName=PredictedObserved
        AcceptedStats:
          Name            n     Slope      Intercept  SEslope    SEintercept  R2         RMSE      NSE        ME         MAE        RSR
          BerryMass       47    0.498705   1.29291    0.140453   0.287119     0.218851   0.304353  -4.38478   0.270254   0.273544   2.29569
          BerryNum        46    0.326969   44.1227    0.172749   10.9368      0.0752897  15.2196   -0.803752  2.20099    12.4745    1.32836
          BudBurstDOY     52    0.363747   69.8711    0.292194   31.0835      0.0300629  11.5841   -3.86018   2.26923    9          2.18328
          BunchesPerVine  47    0.223697   49.3808    0.0459706  2.9971       0.344776   7.30888   0.29425    -0.778388  5.55235    0.831104
          f.rad.int       1319  0.592548   0.149686   0.021119   0.00898466   0.374117   0.126271  0.238098   -0.013327  0.0910711  0.872539
          FloweringDOY    52    0.59547    70.0874    0.166426   28.9438      0.203846   6.83599   -0.550296  -0.230769  5.57692    1.23308
          psw             578   0.694401   102.257    0.020363   4.48738      0.668753   52.6501   0.315113   37.7803    44.4182    0.826863
          transpiration   965   0.0900816  0.733349   0.0153528  0.0304933    0.0345158  1.28969   -0.904386  -0.861343  1.00372    1.37928
          VeraisonDOY     52    0.69358    72.749     0.121745   28.9877      0.393614   6.94622   0.164497   -0.173077  5.36538    0.905227
        AcceptedStatsName=Name n Slope Intercept SEslope SEintercept R2 RMSE NSE ME MAE RSR
  Folder Validation
    Folder Sauvignonblanc
      Experiment RetainedNodeNum
        Factors
          Factor Node: Specification=[TreeInitialisation].Script.BudNumber = 24, 36, 48, 60, 72
        Simulation RetainedNodNum
          Clock: Start=2005-02-25; End=2012-05-02
          Summary SummaryFile
          Weather: FileName=Blenheim.met
          MicroClimate: a_interception=0; b_interception=1; c_interception=0; d_interception=0; SoilHeatFluxFraction=0.4; MinimumHeightDiffForNewLayer=0; NightInterceptionFraction=0.5; ReferenceHeight=2
          SoilArbitrator Soil Arbitrator
          RectangularZone Row: Length=100; Width=0.9; Slope=0; AspectAngle=0; Altitude=50
            Report: EventNames=[Clock].DoReport
            Memo
              Double Guyôt-trained vines, pruned each year to retain 24 nodes were monitored. Vines were trained using vertical shoot positioning (VSP), with an exposed leaf area height of 1.2 m, and trimmed to maintain a compact canopy. Vines were planted 1.8 m apart within the row, and 2.4 m apart between rows. Average flowering date was determined by monitoring all the inflorescences on one cane on a vine in each plot on a regular basis throughout flowering. Likewise, regular berry samples (at least weekly) were taken from before the date of véraison until harvest at a soluble solids concentration value of 21.5 oBrix.
            Plant Grapevine: PlantType=Grapevine; IsEnding=false; DaysAfterEnding=0
            Manager TreeInitialisation
              CultivarName = SauvignonBlanc
              SowingDate = 02/25/2005 00:00:00
              VineDistance = 1.8
              BudNumber = 48
              CaneNumber = 4
              CaneDiameter = 10
              CaneLength = 0.9
              TrunkDiameter = 40
              TrunkLength = 0.8
              RootTrunkRatio = 1
              RootNSC = 0.2
              TrunkNSC = 0.2
              CaneNSC = 0.2
              StartAge = 3
```csharp
using Models.PMF.Phen;
using Models.Zones;
using Models.Soils;
using APSIM.Shared.Utilities;
using Models.PMF;
using Models.Core;
using System;
using Models.PMF.Struct;
        
namespace Models
{
    [Serializable] 
    [System.Xml.Serialization.XmlInclude(typeof(Model))]
    public class Script : Model
    {
        [Link] private Plant Grapevine;
        [Link] private Clock Clock;
        [Link] private Soil Soil;
        [Link] private Zone zone;
        [Link]
        private Structure structure;
        [Link]
        private Phenology phenology;

        [Display(Type = DisplayType.CultivarName)]
        [Description("Plant Type")]
        public string CultivarName { get; set; }

        [Description("Initialisation Date")]
        public DateTime SowingDate { get; set; }

        [Description("Vine distance(m)")]
        public double VineDistance { get; set; }
        //number of buds lay down in cane and spur. there is a function inside to calculate the number of buds per vine based on bud burst and from cane head
        [Description("Bud number(#)")]
        public double BudNumber { get; set; }
        //cane or spur biomass
        [Description("Cane number(#)")]
        public double CaneNumber { get; set; }
      
        [Description("Cane diameter(mm)")]
        public double CaneDiameter { get; set; }

        [Description("Cane length(m)")]
        public double CaneLength { get; set; }
        //trunk information
        [Description("Trunk diameter(mm)")]
        public double TrunkDiameter { get; set; }

        [Description("Trunk length(m)")]
        public double TrunkLength { get; set; }
        //root dry matter
        [Description("Fibrous root trunk ratio")]
        public double RootTrunkRatio { get; set; }
             
        //total nonstructural fraction in dry matter 
        [Description("Fibrous root nonstructural carbon fraction")]
        public double RootNSC { get; set; }

        [Description("Trunk nonstructural carbon fraction")]
        public double TrunkNSC { get; set; }

        [Description("Cane nonstructural carbon fraction")]
        public double CaneNSC { get; set; }

        [Description("Age of trees (in Years) at start of simulation)")]
        public int StartAge {get;set;}

        private RectangularZone RowZone {get; set;}

        [EventSubscribe("DoManagement")]
        private void OnDoManagement(object sender, EventArgs e)
        {
            if (Clock.Today.Date == SowingDate)
            {
                RowZone = this.Parent.Parent.Parent.FindInScope("Row") as RectangularZone;
                double pop = 1/RowZone.Width/VineDistance;  
                //sowing method
                Grapevine.Sow(cultivar: CultivarName,population: pop, 
                depth: 2000, rowSpacing: RowZone.Width, budNumber:BudNumber);
                double budsPerMeterRow = BudNumber/VineDistance; 
                zone.Set("[Grapevine].Structure.BudsPerMeterRow.FixedValue", budsPerMeterRow); 
                //cane biomass
                //calculate the biomass by length 1 meter time number of canes time wood density (0.5 g/mm2/m) * pop to covert the biomass into g/m2
                double woodDensity = 0.4; //g/mm2/m
                double CaneNumber = BudNumber/12; //recalculating cane number as we 
                double caneBiomass = 3.1415926*(CaneDiameter/2)*(CaneDiameter/2)*CaneLength*CaneNumber *woodDensity * pop; 
                double caneNSC = caneBiomass * CaneNSC;
                zone.Set("[Grapevine].Cane.CaneDiameter.FixedValue", CaneDiameter);
                zone.Set("[Grapevine].Cane.CaneLength.FixedValue", CaneLength);
                zone.Set("[Grapevine].Cane.CaneNumber.FixedValue", CaneNumber);

                zone.Set("[Grapevine].Cane.Live.StorageWt", caneNSC);                
                zone.Set("[Grapevine].Cane.Live.StructuralWt", caneBiomass - caneNSC);                

                //trunk biomass
                double trunkDensity = 0.5; //g/mm2/m
                double trunkBiomass = 3.1415926*(TrunkDiameter/2)*(TrunkDiameter/2)*TrunkLength *trunkDensity * pop; 
                double trunkNSC = trunkBiomass * TrunkNSC;

                zone.Set("[Grapevine].Trunk.TrunkDiameter.FixedValue", TrunkDiameter);
                zone.Set("[Grapevine].Trunk.TrunkLength.FixedValue", TrunkLength);

                zone.Set("[Grapevine].Trunk.Live.StorageWt", trunkNSC); 
                zone.Set("[Grapevine].Trunk.Live.StructuralWt", trunkBiomass - trunkNSC);              
                

                //Fibrous Root biomass is  per plant
                double rootBiomass = RootTrunkRatio * trunkBiomass; 
                double rootNSC = rootBiomass * RootNSC; 
                // zone.Set("[Grapevine].StructuralRoot.DMDemands.Structural.RootTrunkRatio",  RootTrunkRatio); 
                
                 zone.Set("[Grapevine].StructuralRoot.Live.StorageWt",    rootNSC ); //rootNSC*pop
                 zone.Set("[Grapevine].StructuralRoot.Live.StructuralWt", rootBiomass - rootNSC); 

                object StartAgeValue = StartAge;
                zone.Set("[Grapevine].Phenology.Age.Years",StartAgeValue);


            }
        }
    }
}
```
            Irrigation
            Fertiliser
              Definitions:
                Name         Description                            FractionNO3  FractionNH4  FractionUrea  FractionRockP  FractionBandedP  FractionLabileP  FractionCa
                CalciteCA    Ca as finely ground Agricultural Lime  0            0            0             0              0                0                1
                CalciteFine  finely ground Agricultural Lime        0            0            0             0              0                0                0.4
                Dolomite     finely ground dolomite                 0            0            0             0              0                0                0.22
                NO3N         N as nitrate                           1            0            0             0              0                0                0
                NH4N         N as ammonium                          0            1            0             0              0                0                0
                NH4NO3N      ammonium nitrate                       0.5          0.5          0             0              0                0                0
                DAP          di-ammonium phosphate                  0            0.18         0             0              0                0                0
                MAP          mono-ammonium phosphate                0            0.11         0             0              0                0                0
                UAN_N        N as Urea-AmmoniumNitrate              0.25         0.25         0.5           0              0                0                0
                UreaN        N as urea                              0            0            1             0              0                0                0
                UreaNO3      N as urea                              0.5          0            0.5           0              0                0                0
                Urea         Urea fertiliser                        0            0            0.46          0              0                0                0
                NH4SO4N      ammonium sulphate                      0            1            0             0              0                0                0
                RockP        Rock phosphorus                        0            0            0             0.8            0                0.2              0
                BandedP      Banded phosphorus                      0            0            0             0              1                0                0
                BroadcastP   Broadcast phosphorus                   0            0            0             0              0                1                0
            SurfaceOrganicMatter: InitialResidueName=wheat_stubble; InitialResidueType=wheat; InitialResidueMass=10000; InitialStandingFraction=0; InitialCPR=0; InitialCNR=20; FractionFaecesAdded=1
            Manager SetupTreeRootZones
              UseExtraZone = True
```csharp
using Models.Soils;
using Models.Functions;
using APSIM.Shared.Utilities;
using System.Xml.Serialization;
using Models;
using Models.PMF;
using System.Text;
using System.Collections.Generic;
using Models.Core;
using System;
using Models.PMF.Organs;

namespace Models
{
    [Serializable] 
    public class Script : Model
    {
        [Link] private Plant Grapevine;
        [Link] private Clock Clock;
        [Link] private Zone zone;
        [Link(Type = LinkType.Path, Path = "[Grapevine].Root")]
        private Root root;

        [Description("Use extra root zone")]
        public bool UseExtraZone { get; set; }

        
        [EventSubscribe("StartOfSimulation")]
        private void OnSimulationCommencing(object sender, EventArgs e)
        {
            if (UseExtraZone)
            {
            root.ZoneNamesToGrowRootsIn.Add("Alley");
            root.ZoneRootDepths.Add(2600);
NutrientPoolFunctions InitialDM = new NutrientPoolFunctions();
Constant InitStruct = new Constant();
InitStruct.FixedValue = 10;
InitialDM.Structural = InitStruct;
Constant InitMetab = new Constant();
InitMetab.FixedValue = 0;
InitialDM.Metabolic = InitMetab;
Constant InitStor = new Constant();
InitStor.FixedValue = 0;
InitialDM.Storage = InitStor;
            root.ZoneInitialDM.Add(InitialDM);

            }
        }
    }
}
```
            Operations VineIrrigation
            Operations WinterRainfall
              2006-08-26  [Irrigation].Apply(45);
            Manager PlantVariables
              FRadInt = 0
              ET = 0
              ES = 0
              PET = 0
              LAI = 0
              LAIPerVine = 0
              Height = 0
              RootDepth = 0
              PlantWidth = 0
```csharp
using Models.PMF.Organs;
using Models.Zones;
using APSIM.Shared.Utilities;
using Models.Soils;
using System.Collections.Generic;
using Models.PMF;
using Models.Core;
using System;
using Models.Climate;

namespace Models
{
    [Serializable]
    public class Script : Model
    {
        [Link] private Weather weather;
        [Link(Type = LinkType.Path, Path = "[Grapevine].Root")]
        private Root root;
        private RectangularZone AlleyZone {get; set; }
        private RectangularZone RowZone {get; set;}
        private RectangularZone ThisZone {get; set;}
        private double AreaWidth {get; set;}

        public double FRadInt {get; set;}
        public double ET {get; set;}
        public double ES {get; set;}
        public double PET {get; set;}
        public double LAI {get; set;}
        public double LAIPerVine {get; set;}
        public double Height {get; set;}
        public double RootDepth {get; set;}
        public double PlantWidth {get; set;}

        [EventSubscribe("StartOfSimulation")]
        private void DoStartOfSimulation(object sender, EventArgs e)
        {
               
               ThisZone = this.Parent.Parent as RectangularZone;
               RowZone = this.Parent.Parent.Parent.FindInScope("Row") as RectangularZone;
               AlleyZone = (RectangularZone)this.Parent.Parent.Parent.FindInScope("Alley") as RectangularZone;
               AreaWidth = AlleyZone.Width + RowZone.Width;
               PlantWidth = 0;
        }
        
        [EventSubscribe("DoReportCalculations")]
        private void OnDoReportCalculations(object sender, EventArgs e)
        {
            if (ThisZone.Name == "Row")
                {
                FRadInt = ((double)RowZone.Get("Grapevine.Leaf.RadIntTot") * RowZone.Width)/(weather.Radn * AreaWidth);
                ET = (double)RowZone.Get("Grapevine.Leaf.Transpiration") * RowZone.Width/AreaWidth;
                LAI = (double)RowZone.Get("Grapevine.Leaf.LAI");
                LAIPerVine =  LAI*RowZone.Width*1.8;
                //TreeInitialisation.Script.VineDistance;
                //(double)RowZone.Get("Grapevine.Leaf.LAI");
                Height = (double)RowZone.Get("Grapevine.Leaf.Height");
                RootDepth = (double)RowZone.Get("Grapevine.Root.Depth");
                PlantWidth = (double)RowZone.Get("Grapevine.Leaf.Width");
                }
            else
                {
                FRadInt = ((double)AlleyZone.Get("Slurp.Leaf.RadIntTot") * ThisZone.Width)/ (weather.Radn * AreaWidth);
                ET = (double)AlleyZone.Get("Slurp.Leaf.Transpiration") * ThisZone.Width/AreaWidth;
                LAI = (double)AlleyZone.Get("Slurp.Leaf.LAI");
                Height = (double)AlleyZone.Get("Slurp.Leaf.Height");
                RootDepth = (double)AlleyZone.Get("Slurp.Root.Depth");
                }

            ES = (double)ThisZone.Get("Soil.SoilWater.Es") * ThisZone.Width/AreaWidth;
            double PETWidth = Math.Min(Math.Max(PlantWidth,ThisZone.Width),AreaWidth);
            PET = (double)ThisZone.Get("Soil.SoilWater.Eo") * PETWidth/AreaWidth;
        }
    }
}
```
            Manager HarvestNPruning
              LeafPluckingDAWS = 205
              HarvestDAWS = 305
              PruningDAWS = 341
              FrostDate1 = 10/03/2002 00:00:00
              FrostDate2 = 11/18/2002 00:00:00
```csharp
using Models.PMF.Interfaces;
using Newtonsoft.Json;
using Models.PMF.Struct;
using Models.Climate;
using System;
using System.Collections.Generic;
using Models.Core;
using Models.PMF;
using Models.PMF.Interfaces;
using System.Xml.Serialization;
using Models.PMF.Organs;
using Models.PMF.Phen;
using Models.Soils;

namespace Models
{
    [Serializable] 
    [System.Xml.Serialization.XmlInclude(typeof(Model))]
    public class Script : Model
    {
        [Link] private Plant Grapevine;
        [Link] private Clock Clock;
        [Link] private Zone zone;
        [Link] private Weather weather;
        [Link]
        private Root root;
        [Link(Type = LinkType.Path, Path = "[Grapevine].Structure")]
        private Structure structure;
        [Link(Type = LinkType.Path, Path = "[Grapevine].Phenology")]
        private Phenology phenology;
       
        public event EventHandler LeafPlucking;
           public event EventHandler Pruning;       
       
        [Description("SummerPruning_DAWS")]         
        public int LeafPluckingDAWS { get; set; }  //day

        [Description("Harvest_DAWS")]
        public int HarvestDAWS { get; set; }

        [Description("Pruning_DAWS")]         
        public int PruningDAWS { get; set; }  //day

        [Description("Frost Date 1")]
        public DateTime FrostDate1 { get; set; }
        [Description("Frost Date 2")]
        public DateTime FrostDate2 { get; set; }







        [EventSubscribe("StartOfSimulation")]
        private void OnSimulationCommencing(object sender, EventArgs e)
        {
            
          
            zone.Set("[Grapevine].Phenology.AccumulatedChillingUnitBeforeWinterPruning.ChillBeforePrune.PruningTime.FixedValue", PruningDAWS);
        }
        
        [EventSubscribe("DoManagement")]
        private void OnDoManagement(object sender, EventArgs e)
        {
            var Leaf = Grapevine.FindChild<IHasDamageableBiomass>("Leaf");
            var Shoot = Grapevine.FindChild<IHasDamageableBiomass>("Shoot");
            var Cane = Grapevine.FindChild<IHasDamageableBiomass>("Cane");
            var Trunk = Grapevine.FindChild<IHasDamageableBiomass>("Trunk");
            var Root = Grapevine.FindChild<IHasDamageableBiomass>("Root");
            var StructuralRoot = Grapevine.FindChild<IHasDamageableBiomass>("StructuralRoot");
            var Berry = Grapevine.FindChild<IHasDamageableBiomass>("Berry");
                
             //Set up  array of remove fractions to send with Cut method.  Each member in the array corresponds to an organ in the same order they are set up in.
             //PruneDate = DateTime.Parse(PruneDateString);
             if (weather.DaysSinceWinterSolstice == LeafPluckingDAWS && phenology.Stage >= 3)
             {
                //int TargetLeafRank = 20;    
                //int LeafTipsAppeared = 25;//(int)structure.LeafTipsAppeared;

                //int NodesToRemove = (int)Math.Max(LeafTipsAppeared - TargetLeafRank, 1); 
                double FractionToRemove = 0.2;//1- TargetLeafRank/LeafTipsAppeared;
            
               // Remove_1.NodesToRemove = NodesToRemove;
                LeafPlucking?.Invoke(this, EventArgs.Empty);
             }

           if (weather.DaysSinceWinterSolstice == HarvestDAWS && phenology.Stage >= 3)
           {
               LeafPlucking?.Invoke(this, EventArgs.Empty);
               Leaf.RemoveBiomass(liveToResidue: 0.1);
               Berry.RemoveBiomass(liveToRemove: 1);
               zone.Set("[Grapevine].Berry.Brix.AfterVeraison.LessThanFunction.HarvestTime.FixedValue",HarvestDAWS); 

           }
                                   
            if (weather.DaysSinceWinterSolstice == PruningDAWS&& phenology.Stage >= 3)
            {
                Grapevine.Phenology?.SetToStage(1);

                Pruning?.Invoke(this, EventArgs.Empty);
                  Leaf.RemoveBiomass(liveToResidue: 1);
                  Shoot.RemoveBiomass(liveToResidue: 1);
                  Cane.RemoveBiomass(liveToResidue: 1);
                Berry.RemoveBiomass(liveToResidue: 1);

                double budNumber = (double)zone.Get("Grapevine.Structure.BudsPerMeterRow.FixedValue"); 
                double caneNum = budNumber*1.8/12;
                double caneBiomass = 17.5 * caneNum; //g/m2 reset the cane biomass to the original value 
                double caneNSC = caneBiomass * 0.18;

                zone.Set("[Grapevine].Cane.Live.StorageWt", caneNSC);                
                zone.Set("[Grapevine].Cane.Live.StructuralWt", caneBiomass - caneNSC); 
                zone.Set("[Grapevine].Phenology.AccumulatedChillingUnitBeforeWinterPruning.ChillBeforePrune.PruningTime.FixedValue",PruningDAWS); 
                //zone.Set("[Grapevine].Trunk.Live.StructuralWt", 280);     
               // zone.Set("[Grapevine].Trunk.Live.StorageWt", 70);     

               // zone.Set("[Grapevine].Root.Live.StructuralWt", 1531);     
               // zone.Set("[Grapevine].Root.Live.StorageWt",  349);     

            }
           if (Clock.Today.Date == FrostDate1)      
           {
               LeafPlucking?.Invoke(this, EventArgs.Empty);
               Leaf.RemoveBiomass(liveToResidue: 0.2);
              //zone.Set("[Grapevine].Structure.FinalLeafNumber.FixedValue", 28); 
           //
           }  

           if (Clock.Today.Date == FrostDate2)      
           {
               LeafPlucking?.Invoke(this, EventArgs.Empty);
               Leaf.RemoveBiomass(liveToResidue: 0.2);          
           }  

        }
    }
}
```
            Manager DripIrrigator
              FertilizeDAWS = 100
              Amount = 40
              totalIrrigation = 0
```csharp
using Models.Climate;
using System;
using Models.Core;
using System.Collections.Generic;
using System.Text;
using Models.Soils;
using Models.PMF;
using Models;
using System.Xml.Serialization;
using APSIM.Shared.Utilities;

namespace Models
{
    [Serializable] 
    public class Script : Model
    {
       [Link] Irrigation irrigation;
       [Link] Clock Clock;
       [Link] Fertiliser Fertiliser;
       [Link] Summary Summary;
       [Link] Weather weather;

        [Description("Fertilize_DAWS")]
         public int FertilizeDAWS { get; set; }
        [Description("Amount of fertiliser to be applied")]
        public double Amount { get; set; }

       [EventSubscribe("DoManagement")]
        private void OnDoManagement(object sender, EventArgs e)
        {
          if (weather.DaysSinceWinterSolstice == FertilizeDAWS)
           Fertiliser.Apply(Amount: Amount, Type: Fertiliser.Types.NO3N);
        }


 void applyDripIrri(double amount)
        {
            double layerAmount = amount/4;
            irrigation.Apply(layerAmount, 0);
            irrigation.Apply(layerAmount*2, 220);
            irrigation.Apply(layerAmount, 420);

        }
        public double totalIrrigation {get; set;}
        [EventSubscribe("Irrigated")]
        private void OnIrrigated(object sender, 
        IrrigationApplicationType irrigData)
        {
            totalIrrigation += irrigData.Amount;
         }
    }
}
```
            Manager AutoIrrigationBasedOnWaterDeficit
              FASW = 0
              WaterDeficit = 0
              StartDate = 1-nov
              EndDate = 1-mar
              FASWThreshold = 0.6
              FASWDepth = 1500
              Amount = 20
              script: same as in Replacements.AutoIrrigationBasedOnWaterDeficit
            Manager Fertilise on fixed dates
              FertiliserType = NH4NO3N
              FertiliserDates = 1-Nov, 1-Feb
              Amount = 20
              AmountType = True
              script: same as in Replacements.Fertilise on fixed dates
            Manager Reset on date
              ResetDate = 10-Jul
              ResetWater = Yes
              ResetNutrients = Yes
              ResetSOM = Yes
```csharp
using APSIM.Shared.Utilities;
using Models.Surface;
using Models.Utilities;
using Models.Soils.Nutrients;
using Models.Soils;
using Models.Soils.Nutrients;
using Models.PMF;
using Models.Core;
using System;
using Models.Interfaces;

namespace Models
{
    [Serializable]
    public class Script : Model
    {
        [Link] private Clock Clock;
        [Link] private Plant Wheat;
        [Link] private ISoilWater SoilWater;
        [Link] private Nutrient nutrient;
        [Link] private Nutrient nitrogen;
        [Link] private SurfaceOrganicMatter SOM;
        [Link] private Summary Summary;
        [Link]
        private Nutrient Nutrient;
        [Link(Path="[SurfaceOrganicMatter].SurfaceResidue.Decomposition")]
        private CarbonFlow ResidueDecomposition;

        [Description("Date to reset on:")]
        public string ResetDate {get;set;}

        [Description("Reset Water? (Yes or No)")]
        public string ResetWater {get;set;}

        [Description("Reset Soil Nutrients ? (Yes or No)")]
        public string ResetNutrients {get;set;}

        [Description("Reset Surface Organic Matter? (Yes or No)")]
        public string ResetSOM {get;set;}

        [EventSubscribe("DoManagement")]
        private void OnDoManagement(object sender, EventArgs e)
        {
            if (DateUtilities.WithinDates(ResetDate, Clock.Today, ResetDate))
            {
                if (ResetWater == "Yes")
                {
                    Summary.WriteMessage(this, "Reset Water", MessageType.Diagnostic);
                    SoilWater.Reset();
                }
                if (ResetNutrients == "Yes")
                {
                    Summary.WriteMessage(this, "Reset Nitrogen", MessageType.Diagnostic);
                    nutrient.Reset();
                }
                 if (ResetNutrients == "Yes")
                {
                    Summary.WriteMessage(this, "Reset Nitrogen", MessageType.Diagnostic);
                    nitrogen.Reset();
                }

                if (ResetSOM == "Yes")
                {
                    Summary.WriteMessage(this, "Reset Surface OM", MessageType.Diagnostic);
                    SOM.Reset();
                }
            }
        }
    }
}
```
            Manager Fertilise topup
              FertiliserType = NO3N
              Threshold = 200
              script: same as in Replacements.Fertilise topup
            Soil: Latitude=0; Longitude=0
              LayerStructure: Thickness=[200, 200, 200, 200, 200, 200, 400, 400, 400, 600]
              Physical
                Thickness  BD    AirDry  LL15  DUL   SAT
                200        1.35  0.1     0.2   0.35  0.45
                250        1.35  0.1     0.2   0.35  0.45
                300        1.4   0.15    0.15  0.35  0.4
                150        1.4   0.13    0.13  0.33  0.35
                150        1.4   0.1     0.1   0.28  0.35
                1950       1.59  0.06    0.06  0.1   0.3
                SoilCrop GrapevineSoil: LL=[0.2, 0.2, 0.15, 0.13, 0.1, 0.06]; KL=[0.25, 0.1, 0.08, 0.05, 0.05, 0.01]; XF=[1, 1, 1, 1, 1, 1]
                SoilCrop SlurpSoil: LL=[0.2, 0.2, 0.15, 0.13, 0.1, 0.06]; KL=[0.11, 0.11, 0.02, 0, 0, 0]; XF=[1, 1, 1, 1, 1, 1]
              WaterBalance SoilWater: SummerDate=1-Nov; SummerU=4; SummerCona=1; WinterDate=1-Apr; WinterU=4; WinterCona=1; DiffusConst=88; DiffusSlope=35.4; Salb=0.18; CN2Bare=68; CNRed=20; CNCov=0.8; DischargeWidth=0; CatchmentArea=0; PSIDul=-100
                Thickness  SWCON  KLAT
                150        0.55   0
                150        0.55   0
                100        0.55   0
                200        0.55   0
                200        0.55   0
                200        0.55   0
                200        0.55   0
                200        0.55   0
                200        0.55   0
                200        0.55   0
                200        0.55   0
                200        0.55   0
                400        0.55   0
                400        0.55   0
              Organic: FOMCNRatio=30; CarbonUnits=Total
                Thickness  Carbon  SoilCNRatio  FBiom  FInert  FOM
                100        1.82    11.5         0.025  0.3     1243.93
                200        1.47    11.5         0.025  0.4     833.832
                300        1.2     11.5         0.015  0.75    457.617
                300        1.03    11.5         0.01   0.9     251.145
                300        0.47    11.5         0.01   0.96    137.831
                300        0.47    11.5         0.01   0.96    75.6435
              Chemical: Thickness=[100, 200, 300, 300, 300, 300]; PH=[6.6, 6.2, 5.7, 5.5, 5.5, 5.5]; PHUnits=Water
              CERESSoilTemperature Temperature
              Water: Thickness=[200, 250, 300, 150, 150, 1950]; InitialValues=[0.35, 0.35, 0.35, 0.33, 0.28, 0.1]; InitialPAWmm=262.5; RelativeTo=LL15; FilledFromTop=true
              OutputLayers: Thickness=[150, 150, 150, 150, 150, 150, 150]
              Solute NO3: Thickness=[100, 200, 300, 300, 300, 300]; InitialValues=[3, 2, 1, 1, 0, 0]; InitialValuesUnits=ppm; WaterTableConcentration=0; D0=0; DepthConstant=0; MaxDepthSoluteAccessible=0; RunoffEffectivenessAtMovingSolute=0; MaxEffectiveRunoff=0
              Solute NH4: Thickness=[100, 200, 300, 300, 300, 300]; InitialValues=[3, 1.5, 1.2, 1.1, 0, 0]; InitialValuesUnits=ppm; WaterTableConcentration=0; D0=0; DepthConstant=0; MaxDepthSoluteAccessible=0; RunoffEffectivenessAtMovingSolute=0; MaxEffectiveRunoff=0
              Solute Urea: Thickness=[100, 200, 300, 300, 300, 300]; InitialValues=[0, 0, 0, 0, 0, 0]; InitialValuesUnits=kg/ha; WaterTableConcentration=0; D0=0; DepthConstant=0; MaxDepthSoluteAccessible=0; RunoffEffectivenessAtMovingSolute=0; MaxEffectiveRunoff=0
              Nutrient
                DirectedGraphInfo={Nodes=[{Name=Inert, OutlineColour=Black}, {Name=FOMLignin, OutlineColour=Black}, {Name=FOMCellulose, OutlineColour=Black}, {Name=FOMCarbohydrate, OutlineColour=Black}, {Name=Microbial, OutlineColour=Black}, {Name=Humic, OutlineColour=Black}, {Name=NO3, OutlineColour=Black}, {Name=NH4, OutlineColour=Black}, {Name=Urea, OutlineColour=Black}, {Name=Atmosphere, OutlineColour=Black}], Arcs=[{SourceName=FOMLignin, DestinationName=Microbial}, {SourceName=FOMLignin, DestinationName=Humic}, {SourceName=FOMCellulose, DestinationName=Microbial}, {SourceName=FOMCellulose, DestinationName=Humic}, {SourceName=FOMCarbohydrate, DestinationName=Microbial}, {SourceName=FOMCarbohydrate, DestinationName=Humic}, {SourceName=Microbial, DestinationName=Microbial}, {SourceName=Microbial, DestinationName=Humic}, {SourceName=Humic, DestinationName=Microbial}, {SourceName=NO3, DestinationName=Atmosphere}, {SourceName=NH4, DestinationName=NO3}, {SourceName=Urea, DestinationName=NH4}]}
          RectangularZone Alley: Length=100; Width=1.9; Slope=0; AspectAngle=0; Altitude=50
            SurfaceOrganicMatter: InitialResidueName=wheat_stubble; InitialResidueType=wheat; InitialResidueMass=500; InitialStandingFraction=0; InitialCPR=0; InitialCNR=100; FractionFaecesAdded=1
            Plant Slurp: PlantType=Slurp; IsEnding=false; DaysAfterEnding=0
            Fertiliser: same as Validation.Sauvignonblanc.RetainedNodeNum.RetainedNodNum.Row.Fertiliser
            Irrigation
            Manager PastureInitialisation
              CultivarName = StaticCrop
              InitialRootDepth = 2000
              SowingDate = 02/25/2005 00:00:00
              RootDepth = 2000
              RFV = 10
              KLReductionFactor = -0.001
              KLReductionDepth = 150
              YKLModifiers =
              XDepth =
              MaxG = 0.004
              R50 = 150
```csharp
using Models.Interfaces;
using Models.Soils;
using APSIM.Shared.Utilities;
using Models.PMF;
using Models.Core;
using System;
using Models.PMF.Organs;
        
namespace Models
{
    [Serializable] 
    [System.Xml.Serialization.XmlInclude(typeof(Model))]
    public class Script : Model
    {
        [Link] private Plant Slurp;
        [Link] private Clock Clock;
        [Link] private Soil Soil;
        [Link] private Zone zone;
        [Link(Type = LinkType.Path, Path = "[Slurp].Root")]
        private Root root;
        [Link]
        private IPhysical soilPhysical;

        [Display(Type = DisplayType.CultivarName)]
        [Description("Plant Type")]
        public string CultivarName { get; set; }
        [Description("Initial Root Depth")]
        public double InitialRootDepth { get; set; }
        [Description("Initialisation Date")]
        public DateTime SowingDate { get; set; }
        [Description("Maximum Root Depth")]
        public double RootDepth { get; set; }
        [Description("Roof Front Velocity")]
        public double RFV { get; set; }
        [Description("Factor to change Kl modifier with Depth")]
        public double KLReductionFactor { get; set; }
        [Description("Depth that KL starts to decline")]
        public double KLReductionDepth { get; set; }
        
        public double[] YKLModifiers { get; set; }
        public double[] XDepth { get; set; }
        private double Depth { get; set; }
        
        [Description("Maximum Stomatal Conductance")]
        public double MaxG { get; set; }
        [Description("Stomatal Radn response")]
        public double R50 { get; set; }
        
        [EventSubscribe("DoManagement")]
        private void OnDoManagement(object sender, EventArgs e)
        {
            if (Clock.Today.Date == SowingDate)
            {
                Slurp.Sow(cultivar: CultivarName, population: 1, depth: InitialRootDepth, rowSpacing: 150);
                
                YKLModifiers = new double[soilPhysical.Thickness.Length];
                XDepth = new double[soilPhysical.Thickness.Length];
                Depth = 0;
                for (int layer = 0; layer < soilPhysical.Thickness.Length; layer++)
                {
                    Depth += soilPhysical.Thickness[layer] / 2;  //Add half of the thickness of the current layer so depth is the mid depth of that layer
                    if (Depth <= KLReductionDepth)
                    {
                        YKLModifiers[layer] = 1;
                        XDepth[layer] = Depth;
                    }
                    else
                    {
                        double KLMod = 1 * Math.Exp(-KLReductionFactor * (Depth - KLReductionDepth));
                        YKLModifiers[layer] = KLMod;
                        XDepth[layer] = Depth;
                    }
                    Depth += soilPhysical.Thickness[layer] / 2;  //Add the other half of the current layer so depth is the top of the next layer
                }
                object KLMods = YKLModifiers;
                zone.Set("Slurp.Root.KLModifier.XYPairs.Y", KLMods);
                object Depths = XDepth;
                zone.Set("Slurp.Root.KLModifier.XYPairs.X", Depths);
                object RD = RootDepth;
                zone.Set("Slurp.Root.MaximumRootDepth.FixedValue", RD);
                object RV = RFV;
                zone.Set("Slurp.Root.RootFrontVelocity.Potential.FixedValue", RV);
                object GMaxValue = MaxG;
                zone.Set("Slurp.Leaf.Gsmax350", GMaxValue); 
                object R50Value = R50; 
                zone.Set("Slurp.Leaf.R50", R50Value); 
                
            }
        }
    }
}
```
            Manager SetPastureVariables
              Ext_coef = 0.6
              MaximumHeight = 300
              MinimumHeight = 100
              Cover = 0
              LAI = 0
```csharp
using Models.Soils;
using System.Data;
using APSIM.Shared.Utilities;
using System.Xml.Serialization;
using Models;
using Models.PMF;
using System.Text;
using System.Collections.Generic;
using Models.Core;
using System;
using Models.Climate;

namespace Models
{
    [Serializable] 
    //[System.Xml.Serialization.XmlInclude(typeof(Model))]
    public class Script : Model
    {
        [Link] Plant Slurp;
        [Link] Clock Clock;
        [Link] Zone zone;
        [Link] Weather weather;

        
        [Description("Extinction coefficient")]
        public  double Ext_coef { get; set; }
        [Description("Maximum height of leaves")]
        public double MaximumHeight { get; set; }
        [Description("Minimum height of leaves")]
        public double MinimumHeight { get; set; }
        
        public double Cover {get; private set;}
        public double LAI { get; private set; }
                
        [EventSubscribe("StartOfSimulation")]
        private void OnStartOfSimulation(object sender, EventArgs e)
        {
            Cover = 0.5;
        }
        
        [EventSubscribe("StartOfDay")]
        private void OnStartOfDay(object sender, EventArgs e)
        {
            Cover += weather.MeanT * 0.001;

            if (Cover >= 1.0)
            {
                Cover = 0.5;        
            }

              LAI = Math.Log(1 - Cover) / -Ext_coef;

            object LAIResetValue = LAI;
            zone.Set("Slurp.Leaf.Area.FixedValue", LAIResetValue);  
            object HeightResetValue = MinimumHeight + Cover * (MaximumHeight-MinimumHeight);
            zone.Set("Slurp.Leaf.HeightFunction.FixedValue", HeightResetValue);  
        }
    }
}
```
            Manager SetupPastureRootZones
              UseExtraZone = False
```csharp
using Models.Soils;
using Models.Functions;
using APSIM.Shared.Utilities;
using System.Xml.Serialization;
using Models;
using Models.PMF;
using System.Text;
using System.Collections.Generic;
using Models.Core;
using System;
using Models.PMF.Organs;

namespace Models
{
    [Serializable] 
    public class Script : Model
    {
        [Link] private Plant Slurp;
        [Link] private Clock Clock;
        [Link] private Zone zone;
        [Link(Type = LinkType.Path, Path = "[Slurp].Root")]
        private Root root;

        [Description("Use extra root zone")]
        public bool UseExtraZone { get; set; }

        
        [EventSubscribe("StartOfSimulation")]
        private void OnSimulationCommencing(object sender, EventArgs e)
        {
            if (UseExtraZone)
            {
            root.ZoneNamesToGrowRootsIn.Add("Row");
            root.ZoneRootDepths.Add(600);
NutrientPoolFunctions InitialDM = new NutrientPoolFunctions();
Constant InitStruct = new Constant();
InitStruct.FixedValue = 10;
InitialDM.Structural = InitStruct;
Constant InitMetab = new Constant();
InitMetab.FixedValue = 0;
InitialDM.Metabolic = InitMetab;
Constant InitStor = new Constant();
InitStor.FixedValue = 0;
InitialDM.Storage = InitStor;
            root.ZoneInitialDM.Add(InitialDM);

            }
        }
    }
}
```
            Operations WinterRainfall
              2006-08-26  [Irrigation].Apply(45);
            Manager PlantVariables
              FRadInt = 0
              ET = 0
              ES = 0
              PET = 0
              LAI = 0
              Height = 0
              RootDepth = 0
              PlantWidth = 0
```csharp
using Models.PMF.Organs;
using Models.Zones;
using APSIM.Shared.Utilities;
using Models.Soils;
using System.Collections.Generic;
using Models.PMF;
using Models.Core;
using System;
using Models.Climate;

namespace Models
{
    [Serializable]
    public class Script : Model
    {
        [Link] private Weather weather;
        [Link]
        private Root root;
        private RectangularZone AlleyZone {get; set; }
        private RectangularZone RowZone {get; set;}
        private RectangularZone ThisZone {get; set;}
        private double AreaWidth {get; set;}

        public double FRadInt {get; set;}
        public double ET {get; set;}
        public double ES {get; set;}
        public double PET {get; set;}
        public double LAI {get; set;}
        public double Height {get; set;}
        public double RootDepth {get; set;}
        public double PlantWidth {get; set;}

        [EventSubscribe("StartOfSimulation")]
        private void DoStartOfSimulation(object sender, EventArgs e)
        {
               
               ThisZone = this.Parent.Parent as RectangularZone;
               RowZone = this.Parent.Parent.Parent.FindInScope("Row") as RectangularZone;
               AlleyZone = (RectangularZone)this.Parent.Parent.Parent.FindInScope("Alley") as RectangularZone;
               AreaWidth = AlleyZone.Width + RowZone.Width;
               PlantWidth = 0;
        }
        
        [EventSubscribe("DoReportCalculations")]
        private void OnDoReportCalculations(object sender, EventArgs e)
        {
            if (ThisZone.Name == "Row")
                {
                FRadInt = ((double)RowZone.Get("Grapevine.Leaf.RadIntTot") * RowZone.Width)/(weather.Radn * AreaWidth);
                ET = (double)RowZone.Get("Grapevine.Leaf.Transpiration") * RowZone.Width/AreaWidth;
                LAI = (double)RowZone.Get("Grapevine.Leaf.LAI");
                Height = (double)RowZone.Get("Grapevine.Leaf.Height");
                RootDepth = (double)RowZone.Get("Grapevine.Root.Depth");
                PlantWidth = (double)RowZone.Get("Grapevine.Leaf.Width");
                }
            else
                {
                FRadInt = ((double)AlleyZone.Get("Slurp.Leaf.RadIntTot") * ThisZone.Width)/ (weather.Radn * AreaWidth);
                ET = (double)AlleyZone.Get("Slurp.Leaf.Transpiration") * ThisZone.Width/AreaWidth;
                LAI = (double)AlleyZone.Get("Slurp.Leaf.LAI");
                Height = (double)AlleyZone.Get("Slurp.Leaf.Height");
                RootDepth = (double)AlleyZone.Get("Slurp.Root.Depth");
                }

            ES = (double)ThisZone.Get("Soil.SoilWater.Es") * ThisZone.Width/AreaWidth;
            double PETWidth = Math.Min(Math.Max(PlantWidth,ThisZone.Width),AreaWidth);
            PET = (double)ThisZone.Get("Soil.SoilWater.Eo") * PETWidth/AreaWidth;
        }
    }
}
```
            Report ReportAlley: EventNames=[Clock].DoReport
              VariableNames:
                [Clock].Today
                [Clock].Today.Year
                [Clock].Today.DayOfYear
                [Weather].DaysSinceWinterSolstice   as DAWS
                [PlantVariables].Script.Height 		as height
                [PlantVariables].Script.LAI         as lai
                [PlantVariables].Script.FRadInt     as f.rad.int
                [PlantVariables].Script.ET          as transpiration
                [PlantVariables].Script.ES          as Es
                [PlantVariables].Script.PET         as PET
                [PlantVariables].Script.RootDepth   as rootDepth
                [Soil].OutputLayers.SW
                sum([Soil].OutputLayers.SWmm)       as psw
                [Weather].Rain
                [Irrigation].IrrigationApplied
                [Soil].SoilWater.Drainage
            Manager Reset on date: same as Validation.Sauvignonblanc.RetainedNodeNum.RetainedNodNum.Row.Reset on date
            Soil: same as Validation.Sauvignonblanc.RetainedNodeNum.RetainedNodNum.Row.Soil
      Experiment Marlborough_2Cane
        Factors
          Factor Climate
            Specification=[Weather].FileName = Site1001_BRA.met,Site1002_OYB.met,Site1003_SEA.met,Site1004_RPC.met
        Simulation VineFacts1
          Weather: FileName=Site1002_OYB.met
          Clock: Start=2003-02-25; End=2020-05-01
          Summary
          SoilArbitrator Soil Arbitrator
          MicroClimate: a_interception=0; b_interception=1; c_interception=0; d_interception=0; SoilHeatFluxFraction=0.4; MinimumHeightDiffForNewLayer=0; NightInterceptionFraction=0.5; ReferenceHeight=2
          RectangularZone Row: Length=100; Width=0.9; Slope=0; AspectAngle=0; Altitude=50
            Report: EventNames=[Clock].DoReport
            Memo: same as Validation.Sauvignonblanc.RetainedNodeNum.RetainedNodNum.Row.Memo
            Plant Grapevine: PlantType=Grapevine; IsEnding=false; DaysAfterEnding=0
            Manager TreeInitialisation
              CultivarName = SauvignonBlanc
              SowingDate = 02/25/2003 00:00:00
              VineDistance = 1.8
              BudNumber = 24
              CaneNumber = 2
              CaneDiameter = 10
              CaneLength = 0.9
              TrunkDiameter = 65
              TrunkLength = 0.8
              RootTrunkRatio = 1
              RootNSC = 0.2
              TrunkNSC = 0.2
              CaneNSC = 0.2
              StartAge = 8
              script: same as in Validation.Sauvignonblanc.RetainedNodeNum.RetainedNodNum.Row.TreeInitialisation
            Irrigation
            Fertiliser: same as Validation.Sauvignonblanc.RetainedNodeNum.RetainedNodNum.Row.Fertiliser
            SurfaceOrganicMatter: InitialResidueName=wheat_stubble; InitialResidueType=Grapevine; InitialResidueMass=20; InitialStandingFraction=0; InitialCPR=0; InitialCNR=30; FractionFaecesAdded=1
            Manager SetupTreeRootZones: same as Validation.Sauvignonblanc.RetainedNodeNum.RetainedNodNum.Row.SetupTreeRootZones
            Operations VineIrrigation
            Operations WinterRainfall
              2002-05-28  [Irrigation].Apply(200);
            Manager PlantVariables
              FRadInt = 0
              ET = 0
              ES = 0
              PET = 0
              LAI = 0
              Height = 0
              RootDepth = 0
              PlantWidth = 0
```csharp
using Models.PMF.Organs;
using Models.Zones;
using APSIM.Shared.Utilities;
using Models.Soils;
using System.Collections.Generic;
using Models.PMF;
using Models.Core;
using System;
using Models.Climate;

namespace Models
{
    [Serializable]
    public class Script : Model
    {
        [Link] private Weather weather;
        [Link(Type = LinkType.Path, Path = "[Grapevine].Root")]
        private Root root;
        private RectangularZone AlleyZone {get; set; }
        private RectangularZone RowZone {get; set;}
        private RectangularZone ThisZone {get; set;}
        private double AreaWidth {get; set;}

        public double FRadInt {get; set;}
        public double ET {get; set;}
        public double ES {get; set;}
        public double PET {get; set;}
        public double LAI {get; set;}
        public double Height {get; set;}
        public double RootDepth {get; set;}
        public double PlantWidth {get; set;}

        [EventSubscribe("StartOfSimulation")]
        private void DoStartOfSimulation(object sender, EventArgs e)
        {
               
               ThisZone = this.Parent.Parent as RectangularZone;
               RowZone = this.Parent.Parent.Parent.FindInScope("Row") as RectangularZone;
               AlleyZone = (RectangularZone)this.Parent.Parent.Parent.FindInScope("Alley") as RectangularZone;
               AreaWidth = AlleyZone.Width + RowZone.Width;
               PlantWidth = 0;
        }
        
        [EventSubscribe("DoReportCalculations")]
        private void OnDoReportCalculations(object sender, EventArgs e)
        {
            if (ThisZone.Name == "Row")
                {
                FRadInt = ((double)RowZone.Get("Grapevine.Leaf.RadIntTot") * RowZone.Width)/(weather.Radn * AreaWidth);
                ET = (double)RowZone.Get("Grapevine.Leaf.Transpiration") * RowZone.Width/AreaWidth;
                LAI = (double)RowZone.Get("Grapevine.Leaf.LAI");
                //LAIPerVine =  LAI*RowZone.Width*1.8;
                //TreeInitialisation.Script.VineDistance;
                //(double)RowZone.Get("Grapevine.Leaf.LAI");
                Height = (double)RowZone.Get("Grapevine.Leaf.Height");
                RootDepth = (double)RowZone.Get("Grapevine.Root.Depth");
                PlantWidth = (double)RowZone.Get("Grapevine.Leaf.Width");
                }
            else
                {
                FRadInt = ((double)AlleyZone.Get("Slurp.Leaf.RadIntTot") * ThisZone.Width)/ (weather.Radn * AreaWidth);
                ET = (double)AlleyZone.Get("Slurp.Leaf.Transpiration") * ThisZone.Width/AreaWidth;
                LAI = (double)AlleyZone.Get("Slurp.Leaf.LAI");
                Height = (double)AlleyZone.Get("Slurp.Leaf.Height");
                RootDepth = (double)AlleyZone.Get("Slurp.Root.Depth");
                }

            ES = (double)ThisZone.Get("Soil.SoilWater.Es") * ThisZone.Width/AreaWidth;
            double PETWidth = Math.Min(Math.Max(PlantWidth,ThisZone.Width),AreaWidth);
            PET = (double)ThisZone.Get("Soil.SoilWater.Eo") * PETWidth/AreaWidth;
        }
    }
}
```
            Manager DripIrrigator
              totalIrrigation = 0
```csharp
using Models.Climate;
using System;
using Models.Core;
using System.Collections.Generic;
using System.Text;
using Models.Soils;
using Models.PMF;
using Models;
using System.Xml.Serialization;
using APSIM.Shared.Utilities;

namespace Models
{
    [Serializable] 
    public class Script : Model
    {
       [Link] Irrigation irrigation;
       [Link] Clock Clock;
       [Link] Fertiliser Fertiliser;
       [Link] Summary Summary;
       [Link] Weather weather;
//
//        [Description("Fertilize_DAWS")]
//         public int FertilizeDAWS { get; set; }
//        [Description("Amount of fertiliser to be applied")]
//        public double Amount { get; set; }
//
//       [EventSubscribe("DoManagement")]
//        private void OnDoManagement(object sender, EventArgs e)
//        {
//          if (weather.DaysSinceWinterSolstice == FertilizeDAWS)
//           Fertiliser.Apply(Amount: Amount, Type: Fertiliser.Types.NO3N);
//        }


       public void applyDripIrri(double amount)
        {
            double layerAmount = amount/4;
            irrigation.Apply(layerAmount, 0);
            irrigation.Apply(layerAmount*2, 220);
            irrigation.Apply(layerAmount, 420);

        }
        public double totalIrrigation {get; set;}
        [EventSubscribe("Irrigated")]
        private void OnIrrigated(object sender, 
        IrrigationApplicationType irrigData)
        {
            totalIrrigation += irrigData.Amount;
         }
    }
}
```
            Manager HarvestNPruning
              LeafPluckingDAWS = 205
              HarvestDAWS = 305
              PruningDAWS = 341
              FrostDate1 = 10/03/2002 00:00:00
              FrostDate2 = 11/18/2002 00:00:00
              script: same as in Validation.Sauvignonblanc.RetainedNodeNum.RetainedNodNum.Row.HarvestNPruning
            Manager AutoIrrigationBasedOnWaterDeficit
              FASW = 0
              WaterDeficit = 0
              StartDate = 1-nov
              EndDate = 1-mar
              FASWThreshold = 0.7
              FASWDepth = 2000
              Amount = 20
              script: same as in Replacements.AutoIrrigationBasedOnWaterDeficit
            Manager Fertilise on fixed dates
              FertiliserType = NH4NO3N
              FertiliserDates = 1-Nov, 1-Feb
              Amount = 15
              AmountType = True
              script: same as in Replacements.Fertilise on fixed dates
            Manager Reset on date: same as Replacements.Reset on date
            Manager Fertilise topup: same as Replacements.Fertilise topup
            Soil: same as Validation.Sauvignonblanc.RetainedNodeNum.RetainedNodNum.Row.Soil
          RectangularZone Alley: Length=100; Width=1.5; Slope=0; AspectAngle=0; Altitude=50
            SurfaceOrganicMatter: InitialResidueName=wheat_stubble; InitialResidueType=Grapevine; InitialResidueMass=20; InitialStandingFraction=0; InitialCPR=0; InitialCNR=30; FractionFaecesAdded=1
            Plant Slurp: PlantType=Slurp; IsEnding=false; DaysAfterEnding=0
            Fertiliser: same as Validation.Sauvignonblanc.RetainedNodeNum.RetainedNodNum.Row.Fertiliser
            Irrigation
            Manager PastureInitialisation
              CultivarName = StaticCrop
              InitialRootDepth = 2000
              SowingDate = 02/25/2003 00:00:00
              RootDepth = 2000
              RFV = 10
              KLReductionFactor = -0.001
              KLReductionDepth = 150
              YKLModifiers =
              XDepth =
              MaxG = 0.004
              R50 = 150
              script: same as in Validation.Sauvignonblanc.RetainedNodeNum.RetainedNodNum.Alley.PastureInitialisation
            Manager SetPastureVariables: same as Validation.Sauvignonblanc.RetainedNodeNum.RetainedNodNum.Alley.SetPastureVariables
            Manager SetupPastureRootZones: same as Validation.Sauvignonblanc.RetainedNodeNum.RetainedNodNum.Alley.SetupPastureRootZones
            Operations WinterRainfall
              2002-05-28  [Irrigation].Apply(200);
            Manager PlantVariables
```csharp
using Models.Soils;
using System;
using Models.Core;

namespace Models
{
    [Serializable]
    public class Script : Model
    {
        
    }
}
```
            Report ReportAlley: same as Validation.Sauvignonblanc.RetainedNodeNum.RetainedNodNum.Alley.ReportAlley
            Manager Reset on date: same as Replacements.Reset on date
            Manager Fertilise topup: same as Replacements.Fertilise topup
            Soil: same as Validation.Sauvignonblanc.RetainedNodeNum.RetainedNodNum.Row.Soil
      Experiment Marlborough_3Cane
        Factors
          Factor Climate: Specification=[Weather].FileName = TOH.met, WRV.met
        Simulation MRL3Cane
          Weather: FileName=Site1003_SEA.met
          Clock: Start=2014-02-25; End=2020-05-01
          Summary
          SoilArbitrator Soil Arbitrator
          MicroClimate: a_interception=0; b_interception=1; c_interception=0; d_interception=0; SoilHeatFluxFraction=0.4; MinimumHeightDiffForNewLayer=0; NightInterceptionFraction=0.5; ReferenceHeight=2
          RectangularZone Row: Length=100; Width=0.9; Slope=0; AspectAngle=0; Altitude=50
            Report: EventNames=[Clock].DoReport
            Memo: same as Validation.Sauvignonblanc.RetainedNodeNum.RetainedNodNum.Row.Memo
            Plant Grapevine: PlantType=Grapevine; IsEnding=false; DaysAfterEnding=0
            Manager TreeInitialisation
              CultivarName = SauvignonBlanc
              SowingDate = 02/25/2014 00:00:00
              VineDistance = 1.8
              BudNumber = 32
              CaneNumber = 3
              CaneDiameter = 10
              CaneLength = 0.9
              TrunkDiameter = 65
              TrunkLength = 0.8
              RootTrunkRatio = 1
              RootNSC = 0.2
              TrunkNSC = 0.2
              CaneNSC = 0.2
              StartAge = 8
              script: same as in Validation.Sauvignonblanc.RetainedNodeNum.RetainedNodNum.Row.TreeInitialisation
            Irrigation
            Fertiliser: same as Validation.Sauvignonblanc.RetainedNodeNum.RetainedNodNum.Row.Fertiliser
            SurfaceOrganicMatter: InitialResidueName=wheat_stubble; InitialResidueType=wheat; InitialResidueMass=500; InitialStandingFraction=0; InitialCPR=0; InitialCNR=100; FractionFaecesAdded=1
            Manager SetupTreeRootZones: same as Validation.Sauvignonblanc.RetainedNodeNum.RetainedNodNum.Row.SetupTreeRootZones
            Operations VineIrrigation
            Operations WinterRainfall
              2002-05-28  [Irrigation].Apply(200);
            Manager PlantVariables: same as Validation.Sauvignonblanc.Marlborough_2Cane.VineFacts1.Row.PlantVariables
            Manager DripIrrigator
              FertilizeDAWS = 100
              Amount = 20
              totalIrrigation = 0
```csharp
using Models.Climate;
using System;
using Models.Core;
using System.Collections.Generic;
using System.Text;
using Models.Soils;
using Models.PMF;
using Models;
using System.Xml.Serialization;
using APSIM.Shared.Utilities;

namespace Models
{
    [Serializable] 
    public class Script : Model
    {
       [Link] Irrigation irrigation;
       [Link] Clock Clock;
       [Link] Fertiliser Fertiliser;
       [Link] Summary Summary;
       [Link] Weather weather;

        [Description("Fertilize_DAWS")]
         public int FertilizeDAWS { get; set; }
        [Description("Amount of fertiliser to be applied")]
        public double Amount { get; set; }

       [EventSubscribe("DoManagement")]
        private void OnDoManagement(object sender, EventArgs e)
        {
          if (weather.DaysSinceWinterSolstice == FertilizeDAWS)
           Fertiliser.Apply(Amount: Amount, Type: Fertiliser.Types.NO3N);
        }


       public void applyDripIrri(double amount)
        {
            double layerAmount = amount/4;
            irrigation.Apply(layerAmount, 0);
            irrigation.Apply(layerAmount*2, 220);
            irrigation.Apply(layerAmount, 420);

        }
        public double totalIrrigation {get; set;}
        [EventSubscribe("Irrigated")]
        private void OnIrrigated(object sender, 
        IrrigationApplicationType irrigData)
        {
            totalIrrigation += irrigData.Amount;
         }
    }
}
```
            Manager HarvestNPruning: same as Validation.Sauvignonblanc.Marlborough_2Cane.VineFacts1.Row.HarvestNPruning
            Manager AutoIrrigationBasedOnWaterDeficit: same as Validation.Sauvignonblanc.RetainedNodeNum.RetainedNodNum.Row.AutoIrrigationBasedOnWaterDeficit
            Manager Fertilise on fixed dates: same as Validation.Sauvignonblanc.Marlborough_2Cane.VineFacts1.Row.Fertilise on fixed dates
            Manager Reset on date: same as Replacements.Reset on date
            Manager Fertilise topup: same as Replacements.Fertilise topup
            Soil: same as Validation.Sauvignonblanc.RetainedNodeNum.RetainedNodNum.Row.Soil
          RectangularZone Alley: Length=100; Width=1.5; Slope=0; AspectAngle=0; Altitude=50
            SurfaceOrganicMatter: InitialResidueName=wheat_stubble; InitialResidueType=wheat; InitialResidueMass=500; InitialStandingFraction=0; InitialCPR=0; InitialCNR=100; FractionFaecesAdded=1
            Plant Slurp: PlantType=Slurp; IsEnding=false; DaysAfterEnding=0
            Fertiliser: same as Validation.Sauvignonblanc.RetainedNodeNum.RetainedNodNum.Row.Fertiliser
            Irrigation
            Manager PastureInitialisation
              CultivarName = StaticCrop
              InitialRootDepth = 2000
              SowingDate = 02/25/2014 00:00:00
              RootDepth = 2000
              RFV = 10
              KLReductionFactor = -0.001
              KLReductionDepth = 150
              YKLModifiers =
              XDepth =
              MaxG = 0.004
              R50 = 150
              script: same as in Validation.Sauvignonblanc.RetainedNodeNum.RetainedNodNum.Alley.PastureInitialisation
            Manager SetPastureVariables: same as Validation.Sauvignonblanc.RetainedNodeNum.RetainedNodNum.Alley.SetPastureVariables
            Manager SetupPastureRootZones
              UseExtraZone = True
              script: same as in Validation.Sauvignonblanc.RetainedNodeNum.RetainedNodNum.Alley.SetupPastureRootZones
            Operations WinterRainfall
              2002-05-28  [Irrigation].Apply(200);
            Manager PlantVariables
              script: same as in Validation.Sauvignonblanc.Marlborough_2Cane.VineFacts1.Alley.PlantVariables
            Report ReportAlley: same as Validation.Sauvignonblanc.RetainedNodeNum.RetainedNodNum.Alley.ReportAlley
            Manager Reset on date: same as Replacements.Reset on date
            Manager Fertilise topup: same as Replacements.Fertilise topup
            Soil: same as Validation.Sauvignonblanc.RetainedNodeNum.RetainedNodNum.Row.Soil
      Experiment Marlborough_4Cane
        Factors
          Factor Climate
            Specification=[Weather].FileName = Site1001_BRA.met,Site1002_OYB.met,Site1003_SEA.met,Site1004_RPC.met
        Simulation VineFacts2
          Weather: FileName=Site1003_SEA.met
          Clock: Start=2003-02-25; End=2020-05-01
          Summary
          SoilArbitrator Soil Arbitrator
          MicroClimate: a_interception=0; b_interception=1; c_interception=0; d_interception=0; SoilHeatFluxFraction=0.4; MinimumHeightDiffForNewLayer=0; NightInterceptionFraction=0.5; ReferenceHeight=2
          RectangularZone Row: Length=100; Width=0.9; Slope=0; AspectAngle=0; Altitude=50
            Report: EventNames=[Clock].DoReport
            Memo: same as Validation.Sauvignonblanc.RetainedNodeNum.RetainedNodNum.Row.Memo
            Plant Grapevine: PlantType=Grapevine; IsEnding=false; DaysAfterEnding=0
            Manager TreeInitialisation
              CultivarName = SauvignonBlanc
              SowingDate = 02/25/2003 00:00:00
              VineDistance = 1.8
              BudNumber = 40
              CaneNumber = 4
              CaneDiameter = 10
              CaneLength = 0.9
              TrunkDiameter = 65
              TrunkLength = 0.8
              RootTrunkRatio = 1
              RootNSC = 0.2
              TrunkNSC = 0.2
              CaneNSC = 0.2
              StartAge = 8
              script: same as in Validation.Sauvignonblanc.RetainedNodeNum.RetainedNodNum.Row.TreeInitialisation
            Irrigation
            Fertiliser: same as Validation.Sauvignonblanc.RetainedNodeNum.RetainedNodNum.Row.Fertiliser
            SurfaceOrganicMatter: InitialResidueName=wheat_stubble; InitialResidueType=wheat; InitialResidueMass=500; InitialStandingFraction=0; InitialCPR=0; InitialCNR=100; FractionFaecesAdded=1
            Manager SetupTreeRootZones: same as Validation.Sauvignonblanc.RetainedNodeNum.RetainedNodNum.Row.SetupTreeRootZones
            Operations VineIrrigation
            Operations WinterRainfall
              2002-05-28  [Irrigation].Apply(200);
            Manager PlantVariables: same as Validation.Sauvignonblanc.Marlborough_2Cane.VineFacts1.Row.PlantVariables
            Manager DripIrrigator
              FertilizeDAWS = 100
              Amount = 20
              script: same as in Validation.Sauvignonblanc.Marlborough_3Cane.MRL3Cane.Row.DripIrrigator
            Manager HarvestNPruning: same as Validation.Sauvignonblanc.Marlborough_2Cane.VineFacts1.Row.HarvestNPruning
            Manager AutoIrrigationBasedOnWaterDeficit: same as Validation.Sauvignonblanc.Marlborough_2Cane.VineFacts1.Row.AutoIrrigationBasedOnWaterDeficit
            Manager Fertilise on fixed dates: same as Validation.Sauvignonblanc.Marlborough_2Cane.VineFacts1.Row.Fertilise on fixed dates
            Manager Reset on date: same as Replacements.Reset on date
            Manager Fertilise topup: same as Replacements.Fertilise topup
            Soil: same as Validation.Sauvignonblanc.RetainedNodeNum.RetainedNodNum.Row.Soil
          RectangularZone Alley: Length=100; Width=1.5; Slope=0; AspectAngle=0; Altitude=50
            SurfaceOrganicMatter: InitialResidueName=wheat_stubble; InitialResidueType=wheat; InitialResidueMass=500; InitialStandingFraction=0; InitialCPR=0; InitialCNR=100; FractionFaecesAdded=1
            Plant Slurp: PlantType=Slurp; IsEnding=false; DaysAfterEnding=0
            Fertiliser: same as Validation.Sauvignonblanc.RetainedNodeNum.RetainedNodNum.Row.Fertiliser
            Irrigation
            Manager PastureInitialisation: same as Validation.Sauvignonblanc.Marlborough_2Cane.VineFacts1.Alley.PastureInitialisation
            Manager SetPastureVariables: same as Validation.Sauvignonblanc.RetainedNodeNum.RetainedNodNum.Alley.SetPastureVariables
            Manager SetupPastureRootZones: same as Validation.Sauvignonblanc.RetainedNodeNum.RetainedNodNum.Alley.SetupPastureRootZones
            Operations WinterRainfall
              2002-05-28  [Irrigation].Apply(200);
            Manager PlantVariables
              script: same as in Validation.Sauvignonblanc.Marlborough_2Cane.VineFacts1.Alley.PlantVariables
            Report ReportAlley: same as Validation.Sauvignonblanc.RetainedNodeNum.RetainedNodNum.Alley.ReportAlley
            Manager Fertilise topup: same as Replacements.Fertilise topup
            Manager Reset on date: same as Replacements.Reset on date
            Soil: same as Validation.Sauvignonblanc.RetainedNodeNum.RetainedNodNum.Row.Soil
      Experiment RPC_2000_2002
        DisabledSimNames=[Grape_Squire_1Irri70, Grape_Squire_1Irri80, Grape_SquireIrri20, Grape_SquireIrri40, Grape_SquireIrri70, Grape_SquireIrri80]
        Memo
          RPC corresponding to Central Rapaura in the manuscript "Developing perennial fruit crop models in APSIM Next Generation using grapevine as an example" that we just submitted.
        Factors
          Factor Irri: Specification=[VineIrrigation]
            Operations 100
              2002-02-14  [DripIrrigator].Script.applyDripIrri(10.6);
              2002-02-17  [DripIrrigator].Script.applyDripIrri(10.6);
              2002-02-19  [DripIrrigator].Script.applyDripIrri(10.6);
              2002-02-21  [DripIrrigator].Script.applyDripIrri(10.6);
              2002-02-25  [DripIrrigator].Script.applyDripIrri(10.6);
              2002-02-26  [DripIrrigator].Script.applyDripIrri(10.6);
              2002-03-03  [DripIrrigator].Script.applyDripIrri(10.6);
              2002-03-05  [DripIrrigator].Script.applyDripIrri(10.6);
              2002-03-07  [DripIrrigator].Script.applyDripIrri(10.6);
              2002-03-10  [DripIrrigator].Script.applyDripIrri(10.6);
              2002-03-12  [DripIrrigator].Script.applyDripIrri(10.6);
              2002-03-14  [DripIrrigator].Script.applyDripIrri(10.6);
              2002-03-19  [DripIrrigator].Script.applyDripIrri(10.6);
              2002-03-21  [DripIrrigator].Script.applyDripIrri(10.6);
              2002-03-24  [DripIrrigator].Script.applyDripIrri(10.6);
              2002-03-26  [DripIrrigator].Script.applyDripIrri(10.6);
              2002-04-01  [DripIrrigator].Script.applyDripIrri(10.6);
              2002-04-07  [DripIrrigator].Script.applyDripIrri(10.6);
              2002-04-10  [DripIrrigator].Script.applyDripIrri(10.6);
              2002-04-18  [DripIrrigator].Script.applyDripIrri(10.6);
              2002-04-21  [DripIrrigator].Script.applyDripIrri(10.6);
              2002-10-05  [DripIrrigator].Script.applyDripIrri(7.3);
              2002-10-08  [DripIrrigator].Script.applyDripIrri(7.3);
              2002-10-10  [DripIrrigator].Script.applyDripIrri(7.3);
              2002-10-12  [DripIrrigator].Script.applyDripIrri(7.3);
              2002-10-18  [DripIrrigator].Script.applyDripIrri(7.3);
              2002-10-23  [DripIrrigator].Script.applyDripIrri(7.3);
              2002-10-26  [DripIrrigator].Script.applyDripIrri(7.3);
              2002-10-28  [DripIrrigator].Script.applyDripIrri(7.3);
              2002-11-05  [DripIrrigator].Script.applyDripIrri(7.3);
              2002-11-08  [DripIrrigator].Script.applyDripIrri(7.3);
              2002-11-11  [DripIrrigator].Script.applyDripIrri(7.3);
              2002-11-18  [DripIrrigator].Script.applyDripIrri(7.3);
              2002-11-20  [DripIrrigator].Script.applyDripIrri(7.3);
              2002-11-23  [DripIrrigator].Script.applyDripIrri(7.3);
              2002-11-25  [DripIrrigator].Script.applyDripIrri(7.3);
              2002-11-29  [DripIrrigator].Script.applyDripIrri(7.3);
              2002-12-04  [DripIrrigator].Script.applyDripIrri(7.3);
              2002-12-09  [DripIrrigator].Script.applyDripIrri(7.3);
              2002-12-11  [DripIrrigator].Script.applyDripIrri(7.3);
              2002-12-19  [DripIrrigator].Script.applyDripIrri(7.3);
              2002-12-27  [DripIrrigator].Script.applyDripIrri(7.3);
              2002-12-31  [DripIrrigator].Script.applyDripIrri(7.3);
              2003-01-03  [DripIrrigator].Script.applyDripIrri(7.3);
              2003-01-08  [DripIrrigator].Script.applyDripIrri(7.3);
              2003-01-09  [DripIrrigator].Script.applyDripIrri(7.3);
              2003-01-11  [DripIrrigator].Script.applyDripIrri(7.3);
              2003-01-15  [DripIrrigator].Script.applyDripIrri(7.3);
              2003-01-18  [DripIrrigator].Script.applyDripIrri(7.3);
              2003-01-23  [DripIrrigator].Script.applyDripIrri(7.3);
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              2003-12-03  [DripIrrigator].Script.applyDripIrri(5.2);
              2003-12-07  [DripIrrigator].Script.applyDripIrri(7);
              2004-02-05  [DripIrrigator].Script.applyDripIrri(3.5);
              2005-02-26  [DripIrrigator].Script.applyDripIrri(6.9);
            Operations 60
              2002-02-14  [DripIrrigator].Script.applyDripIrri(6.3);
              2002-02-17  [DripIrrigator].Script.applyDripIrri(6.3);
              2002-02-19  [DripIrrigator].Script.applyDripIrri(6.3);
              2002-02-21  [DripIrrigator].Script.applyDripIrri(6.3);
              2002-02-25  [DripIrrigator].Script.applyDripIrri(6.3);
              2002-02-26  [DripIrrigator].Script.applyDripIrri(6.3);
              2002-03-03  [DripIrrigator].Script.applyDripIrri(6.3);
              2002-03-05  [DripIrrigator].Script.applyDripIrri(6.3);
              2002-03-07  [DripIrrigator].Script.applyDripIrri(6.3);
              2002-03-10  [DripIrrigator].Script.applyDripIrri(6.3);
              2002-03-12  [DripIrrigator].Script.applyDripIrri(6.3);
              2002-03-14  [DripIrrigator].Script.applyDripIrri(6.3);
              2002-03-19  [DripIrrigator].Script.applyDripIrri(6.3);
              2002-03-21  [DripIrrigator].Script.applyDripIrri(6.3);
              2002-03-24  [DripIrrigator].Script.applyDripIrri(6.3);
              2002-03-26  [DripIrrigator].Script.applyDripIrri(6.3);
              2002-04-01  [DripIrrigator].Script.applyDripIrri(6.3);
              2002-04-07  [DripIrrigator].Script.applyDripIrri(6.3);
              2002-04-10  [DripIrrigator].Script.applyDripIrri(6.3);
              2002-04-18  [DripIrrigator].Script.applyDripIrri(6.3);
              2002-04-21  [DripIrrigator].Script.applyDripIrri(6.3);
              2002-10-05  [DripIrrigator].Script.applyDripIrri(4.4);
              2002-10-08  [DripIrrigator].Script.applyDripIrri(4.4);
              2002-10-10  [DripIrrigator].Script.applyDripIrri(4.4);
              2002-10-12  [DripIrrigator].Script.applyDripIrri(4.4);
              2002-10-18  [DripIrrigator].Script.applyDripIrri(4.4);
              2002-10-23  [DripIrrigator].Script.applyDripIrri(4.4);
              2002-10-26  [DripIrrigator].Script.applyDripIrri(4.4);
              2002-10-28  [DripIrrigator].Script.applyDripIrri(4.4);
              2002-11-05  [DripIrrigator].Script.applyDripIrri(4.4);
              2002-11-08  [DripIrrigator].Script.applyDripIrri(4.4);
              2002-11-11  [DripIrrigator].Script.applyDripIrri(4.4);
              2002-11-18  [DripIrrigator].Script.applyDripIrri(4.4);
              2002-11-20  [DripIrrigator].Script.applyDripIrri(4.4);
              2002-11-23  [DripIrrigator].Script.applyDripIrri(4.4);
              2002-11-25  [DripIrrigator].Script.applyDripIrri(4.4);
              2002-11-29  [DripIrrigator].Script.applyDripIrri(4.4);
              2002-12-04  [DripIrrigator].Script.applyDripIrri(4.4);
              2002-12-09  [DripIrrigator].Script.applyDripIrri(4.4);
              2002-12-11  [DripIrrigator].Script.applyDripIrri(4.4);
              2002-12-19  [DripIrrigator].Script.applyDripIrri(4.4);
              2002-12-27  [DripIrrigator].Script.applyDripIrri(4.4);
              2002-12-31  [DripIrrigator].Script.applyDripIrri(4.4);
              2003-01-03  [DripIrrigator].Script.applyDripIrri(4.4);
              2003-01-08  [DripIrrigator].Script.applyDripIrri(4.4);
              2003-01-09  [DripIrrigator].Script.applyDripIrri(4.4);
              2003-01-11  [DripIrrigator].Script.applyDripIrri(4.4);
              2003-01-15  [DripIrrigator].Script.applyDripIrri(4.4);
              2003-01-18  [DripIrrigator].Script.applyDripIrri(4.4);
              2003-01-23  [DripIrrigator].Script.applyDripIrri(4.4);
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              2003-12-03  [DripIrrigator].Script.applyDripIrri(3.1);
              2003-12-07  [DripIrrigator].Script.applyDripIrri(4.2);
              2004-02-05  [DripIrrigator].Script.applyDripIrri(2.1);
              2005-02-26  [DripIrrigator].Script.applyDripIrri(4.1);
        Simulation RPC_1
          Clock: Start=2000-02-25; End=2002-05-02
          Summary SummaryFile
          Weather: FileName=Site1004_RPC.met
          MicroClimate: a_interception=0; b_interception=1; c_interception=0; d_interception=0; SoilHeatFluxFraction=0.4; MinimumHeightDiffForNewLayer=0; NightInterceptionFraction=0.5; ReferenceHeight=2
          SoilArbitrator Soil Arbitrator
          RectangularZone Row: Length=100; Width=0.9; Slope=0; AspectAngle=0; Altitude=50
            Report: EventNames=[Clock].DoReport
            Memo: same as Validation.Sauvignonblanc.RetainedNodeNum.RetainedNodNum.Row.Memo
            Plant Grapevine: PlantType=Grapevine; IsEnding=false; DaysAfterEnding=0
            Irrigation
            Fertiliser: same as Validation.Sauvignonblanc.RetainedNodeNum.RetainedNodNum.Row.Fertiliser
            SurfaceOrganicMatter: InitialResidueName=wheat_stubble; InitialResidueType=wheat; InitialResidueMass=500; InitialStandingFraction=0; InitialCPR=0; InitialCNR=100; FractionFaecesAdded=1
            Soil: Latitude=0; Longitude=0
              LayerStructure: Thickness=[200, 200, 200, 200, 200, 200, 400, 400, 400, 600]
              Chemical: Thickness=[100, 200, 300, 300, 300, 300]; PH=[6.6, 6.2, 5.7, 5.5, 5.5, 5.5]; PHUnits=Water
              Water: Thickness=[200, 250, 300, 150, 150, 1950]; InitialValues=[0.35, 0.35, 0.35, 0.33, 0.28, 0.1]; InitialPAWmm=262.5; RelativeTo=LL15; FilledFromTop=false
              Physical
                Thickness  BD    AirDry  LL15  DUL   SAT
                200        1.35  0.1     0.2   0.35  0.45
                250        1.35  0.1     0.2   0.35  0.45
                300        1.4   0.15    0.15  0.35  0.4
                150        1.4   0.13    0.13  0.33  0.35
                150        1.4   0.1     0.1   0.28  0.35
                1950       1.59  0.06    0.06  0.1   0.3
                SoilCrop GrapevineSoil: LL=[0.2, 0.2, 0.15, 0.13, 0.1, 0.06]; KL=[0.25, 0.1, 0.08, 0.05, 0.05, 0.01]; XF=[1, 1, 1, 1, 1, 1]
                SoilCrop SlurpSoil: LL=[0.2, 0.2, 0.15, 0.13, 0.1, 0.06]; KL=[0.11, 0.11, 0.11, 0.11, 0.11, 0.11]; XF=[1, 1, 1, 1, 1, 1]
              WaterBalance SoilWater: SummerDate=1-Nov; SummerU=4; SummerCona=1; WinterDate=1-Apr; WinterU=4; WinterCona=1; DiffusConst=88; DiffusSlope=35.4; Salb=0.18; CN2Bare=68; CNRed=20; CNCov=0.8; DischargeWidth=0; CatchmentArea=0; PSIDul=-100
                Thickness  SWCON  KLAT
                150        0.55   0
                150        0.55   0
                100        0.55   0
                200        0.55   0
                200        0.55   0
                200        0.55   0
                200        0.55   0
                200        0.55   0
                200        0.55   0
                200        0.55   0
                200        0.55   0
                200        0.55   0
                400        0.55   0
              Organic: same as Validation.Sauvignonblanc.RetainedNodeNum.RetainedNodNum.Row.Soil.Organic
              CERESSoilTemperature Temperature
              OutputLayers: Thickness=[150, 150, 150, 150, 150, 150, 150]
              Solute NO3: Thickness=[100, 200, 300, 300, 300, 300]; InitialValues=[10, 11.1111, 1.21212, 1.19048, 0, 0]; InitialValuesUnits=ppm; WaterTableConcentration=0; D0=0; DepthConstant=0; MaxDepthSoluteAccessible=0; RunoffEffectivenessAtMovingSolute=0; MaxEffectiveRunoff=0
              Solute NH4: Thickness=[100, 200, 300, 300, 300, 300]; InitialValues=[0, 0, 0, 0, 0, 0]; InitialValuesUnits=ppm; WaterTableConcentration=0; D0=0; DepthConstant=0; MaxDepthSoluteAccessible=0; RunoffEffectivenessAtMovingSolute=0; MaxEffectiveRunoff=0
              Solute Urea: same as Validation.Sauvignonblanc.RetainedNodeNum.RetainedNodNum.Row.Soil.Urea
              Nutrient: same as Validation.Sauvignonblanc.RetainedNodeNum.RetainedNodNum.Row.Soil.Nutrient
            Manager SetupTreeRootZones
              UseExtraZone = True
```csharp
using Models.Soils;
using Models.Functions;
using APSIM.Shared.Utilities;
using System.Xml.Serialization;
using Models;
using Models.PMF;
using System.Text;
using System.Collections.Generic;
using Models.Core;
using System;
using Models.PMF.Organs;

namespace Models
{
    [Serializable] 
    public class Script : Model
    {
        [Link] private Plant Grapevine;
        [Link] private Clock Clock;
        [Link] private Zone zone;
        [Link(Type = LinkType.Path, Path = "[Grapevine].Root")]
        private Root root;

        [Description("Use extra root zone")]
        public bool UseExtraZone { get; set; }

        
        [EventSubscribe("StartOfSimulation")]
        private void OnSimulationCommencing(object sender, EventArgs e)
        {
            if (UseExtraZone)
            {
            root.ZoneNamesToGrowRootsIn.Add("Alley");
            root.ZoneRootDepths.Add(2600);
NutrientPoolFunctions InitialDM = new NutrientPoolFunctions();
Constant InitStruct = new Constant();
InitStruct.FixedValue = 500;
InitialDM.Structural = InitStruct;
Constant InitMetab = new Constant();
InitMetab.FixedValue = 0;
InitialDM.Metabolic = InitMetab;
Constant InitStor = new Constant();
InitStor.FixedValue = 100;
InitialDM.Storage = InitStor;
            root.ZoneInitialDM.Add(InitialDM);

            }
        }
    }
}
```
            Operations VineIrrigation
            Operations WinterRainfall
              2002-05-28  [Irrigation].Apply(200);
            Manager PlantVariables
              FRadInt = 0
              ET = 0
              ES = 0
              PET = 0
              LAI = 0
              LAIPerVine = 0
              Height = 0
              RootDepth = 0
              PlantWidth = 0
```csharp
using Models.Climate;
using System;
using Models.Core;
using Models.PMF;
using System.Collections.Generic;
using Models.Soils;
using APSIM.Shared.Utilities;
using Models.Zones;
using Models.PMF.Organs;

namespace Models
{
    [Serializable]
    public class Script : Model
    {
        [Link] private Weather weather;
        [Link(Type = LinkType.Path, Path = "[Grapevine].Root")]
        private Root root;
        private RectangularZone AlleyZone {get; set; }
        private RectangularZone RowZone {get; set;}
        private RectangularZone ThisZone {get; set;}
        private double AreaWidth {get; set;}

        public double FRadInt {get; set;}
        public double ET {get; set;}
        public double ES {get; set;}
        public double PET {get; set;}
        public double LAI {get; set;}
        public double LAIPerVine {get; set;}
        public double Height {get; set;}
        public double RootDepth {get; set;}
        public double PlantWidth {get; set;}

        [EventSubscribe("StartOfSimulation")]
        private void DoStartOfSimulation(object sender, EventArgs e)
        {
               
               ThisZone = this.Parent.Parent as RectangularZone;
               RowZone = this.Parent.Parent.Parent.FindInScope("Row") as RectangularZone;
               AlleyZone = (RectangularZone)this.Parent.Parent.Parent.FindInScope("Alley") as RectangularZone;
               AreaWidth = AlleyZone.Width + RowZone.Width;
               PlantWidth = 0;
        }
        
        [EventSubscribe("DoReportCalculations")]
        private void OnDoReportCalculations(object sender, EventArgs e)
        {
            if (ThisZone.Name == "Row")
                {
                FRadInt = ((double)RowZone.Get("Grapevine.Leaf.RadIntTot") * RowZone.Width)/(weather.Radn * AreaWidth);
                ET = (double)RowZone.Get("Grapevine.Leaf.Transpiration") * RowZone.Width/AreaWidth;
                LAI = (double)RowZone.Get("Grapevine.Leaf.LAI");
                LAIPerVine =  LAI*RowZone.Width*1.8;
                //TreeInitialisation.Script.VineDistance;
                //(double)RowZone.Get("Grapevine.Leaf.LAI");
                Height = (double)RowZone.Get("Grapevine.Leaf.Height");
                RootDepth = (double)RowZone.Get("Grapevine.Root.Depth");
                PlantWidth = (double)RowZone.Get("Grapevine.Leaf.Width");
                }
            else
                {
                FRadInt = ((double)AlleyZone.Get("Slurp.Leaf.RadIntTot") * ThisZone.Width)/ (weather.Radn * AreaWidth);
                ET = (double)AlleyZone.Get("Slurp.Leaf.Transpiration") * ThisZone.Width/AreaWidth;
                LAI = (double)AlleyZone.Get("Slurp.Leaf.LAI");
                Height = (double)AlleyZone.Get("Slurp.Leaf.Height");
                RootDepth = (double)AlleyZone.Get("Slurp.Root.Depth");
                }

            ES = (double)ThisZone.Get("Soil.SoilWater.Es") * ThisZone.Width/AreaWidth;
            double PETWidth = Math.Min(Math.Max(PlantWidth,ThisZone.Width),AreaWidth);
            PET = (double)ThisZone.Get("Soil.SoilWater.Eo") * PETWidth/AreaWidth;
        }
    }
}
```
            Manager DripIrrigator
              FertilizeDAWS = 100
              Amount = 50
              totalIrrigation = 0
              script: same as in Validation.Sauvignonblanc.Marlborough_3Cane.MRL3Cane.Row.DripIrrigator
            Manager TreeInitialisation
              CultivarName = SauvignonBlanc
              SowingDate = 02/25/2000 00:00:00
              VineDistance = 1.8
              BudNumber = 44
              CaneNumber = 4
              CaneDiameter = 10
              CaneLength = 0.9
              TrunkDiameter = 65
              TrunkLength = 0.8
              RootTrunkRatio = 1
              RootNSC = 0.2
              TrunkNSC = 0.2
              CaneNSC = 0.2
              StartAge = 8
              script: same as in Validation.Sauvignonblanc.RetainedNodeNum.RetainedNodNum.Row.TreeInitialisation
            Manager HarvestNPruning
              LeafPluckingDAWS = 209
              HarvestDAWS = 305
              PruningDAWS = 341
              FrostDate1 = 10/03/2002 00:00:00
              FrostDate2 = 11/18/2002 00:00:00
```csharp
using Models.PMF.Interfaces;
using Newtonsoft.Json;
using Models.PMF.Struct;
using Models.Climate;
using System;
using System.Collections.Generic;
using Models.Core;
using Models.PMF;
using Models.PMF.Interfaces;
using System.Xml.Serialization;
using Models.PMF.Organs;
using Models.PMF.Phen;
using Models.Soils;

namespace Models
{
    [Serializable] 
    [System.Xml.Serialization.XmlInclude(typeof(Model))]
    public class Script : Model
    {
        [Link] private Plant Grapevine;
        [Link] private Clock Clock;
        [Link] private Zone zone;
        [Link] private Weather weather;
        [Link]
        private Root root;
        [Link(Type = LinkType.Path, Path = "[Grapevine].Structure")]
        private Structure structure;
        [Link(Type = LinkType.Path, Path = "[Grapevine].Phenology")]
        private Phenology phenology;
       
        public event EventHandler LeafPlucking;
           public event EventHandler Pruning;       
       
        [Description("SummerPruning_DAWS")]         
        public int LeafPluckingDAWS { get; set; }  //day

        [Description("Harvest_DAWS")]
        public int HarvestDAWS { get; set; }

        [Description("Pruning_DAWS")]         
        public int PruningDAWS { get; set; }  //day

        [Description("Frost Date 1")]
        public DateTime FrostDate1 { get; set; }
        [Description("Frost Date 2")]
        public DateTime FrostDate2 { get; set; }







        [EventSubscribe("StartOfSimulation")]
        private void OnSimulationCommencing(object sender, EventArgs e)
        {
            
          
            zone.Set("[Grapevine].Phenology.AccumulatedChillingUnitBeforeWinterPruning.ChillBeforePrune.PruningTime.FixedValue", PruningDAWS);
        }
        
        [EventSubscribe("DoManagement")]
        private void OnDoManagement(object sender, EventArgs e)
        {
            var Leaf = Grapevine.FindChild<IHasDamageableBiomass>("Leaf");
            var Shoot = Grapevine.FindChild<IHasDamageableBiomass>("Shoot");
            var Cane = Grapevine.FindChild<IHasDamageableBiomass>("Cane");
            var Trunk = Grapevine.FindChild<IHasDamageableBiomass>("Trunk");
            var Root = Grapevine.FindChild<IHasDamageableBiomass>("Root");
            var StructuralRoot = Grapevine.FindChild<IHasDamageableBiomass>("StructuralRoot");
            var Berry = Grapevine.FindChild<IHasDamageableBiomass>("Berry");
                
             //Set up  array of remove fractions to send with Cut method.  Each member in the array corresponds to an organ in the same order they are set up in.
             //PruneDate = DateTime.Parse(PruneDateString);
             if (weather.DaysSinceWinterSolstice == LeafPluckingDAWS && phenology.Stage >= 3)
             {
                //int TargetLeafRank = 20;    
                //int LeafTipsAppeared = 25;//(int)structure.LeafTipsAppeared;

                //int NodesToRemove = (int)Math.Max(LeafTipsAppeared - TargetLeafRank, 1); 
                double FractionToRemove = 0.2;//1- TargetLeafRank/LeafTipsAppeared;
            
               // Remove_1.NodesToRemove = NodesToRemove;
                LeafPlucking?.Invoke(this, EventArgs.Empty);
             }

           if (weather.DaysSinceWinterSolstice == HarvestDAWS && phenology.Stage >= 3)
           {
               LeafPlucking?.Invoke(this, EventArgs.Empty);
               Leaf.RemoveBiomass(liveToResidue: 0.1);
               Berry.RemoveBiomass(liveToRemove: 1);

           }
                                   
            if (weather.DaysSinceWinterSolstice == PruningDAWS&& phenology.Stage >= 3)
            {
                Grapevine.Phenology?.SetToStage(1);

                Pruning?.Invoke(this, EventArgs.Empty);
                  Leaf.RemoveBiomass(liveToResidue: 1);
                  Shoot.RemoveBiomass(liveToResidue: 1);
                  Cane.RemoveBiomass(liveToResidue: 1);
                Berry.RemoveBiomass(liveToResidue: 1);

                double budNumber = (double)zone.Get("Grapevine.Structure.BudsPerMeterRow.FixedValue"); 
                double caneNum = budNumber*1.8/12;
                double caneBiomass = 17.5 * caneNum; //g/m2 reset the cane biomass to the original value 
                double caneNSC = caneBiomass * 0.18;

                zone.Set("[Grapevine].Cane.Live.StorageWt", caneNSC);                
                zone.Set("[Grapevine].Cane.Live.StructuralWt", caneBiomass - caneNSC); 
                zone.Set("[Grapevine].Phenology.AccumulatedChillingUnitBeforeWinterPruning.ChillBeforePrune.PruningTime.FixedValue",PruningDAWS); 
                //zone.Set("[Grapevine].Trunk.Live.StructuralWt", 280);     
               // zone.Set("[Grapevine].Trunk.Live.StorageWt", 70);     

               // zone.Set("[Grapevine].Root.Live.StructuralWt", 1531);     
               // zone.Set("[Grapevine].Root.Live.StorageWt",  349);     

            }
           if (Clock.Today.Date == FrostDate1)      
           {
               LeafPlucking?.Invoke(this, EventArgs.Empty);
               Leaf.RemoveBiomass(liveToResidue: 0.2);
              //zone.Set("[Grapevine].Structure.FinalLeafNumber.FixedValue", 28); 
           //
           }  

           if (Clock.Today.Date == FrostDate2)      
           {
               LeafPlucking?.Invoke(this, EventArgs.Empty);
               Leaf.RemoveBiomass(liveToResidue: 0.2);          
           }  

        }
    }
}
```
            Manager Fertilise on fixed dates: same as Validation.Sauvignonblanc.Marlborough_2Cane.VineFacts1.Row.Fertilise on fixed dates
            Manager Fertilise topup: same as Replacements.Fertilise topup
          RectangularZone Alley: Length=100; Width=1.5; Slope=0; AspectAngle=0; Altitude=50
            Report ReportAlley: EventNames=[Clock].DoReport
              VariableNames:
                [Clock].Today
                [Clock].Today.Year
                [Clock].Today.DayOfYear
                [Weather].DaysSinceWinterSolstice as DAWS
                [PlantVariables].Script.Height as height
                [PlantVariables].Script.LAI as lai
                [PlantVariables].Script.FRadInt as f.rad.int
                [PlantVariables].Script.ET as transpiration
                [PlantVariables].Script.ES as Es
                [PlantVariables].Script.PET as PET
                [PlantVariables].Script.RootDepth as rootDepth
                [Soil].OutputLayers.SW
                sum([Soil].OutputLayers.SWmm) as psw
                [Weather].Rain
                [Irrigation].IrrigationApplied
                [Soil].SoilWater.Drainage
            SurfaceOrganicMatter: InitialResidueName=wheat_stubble; InitialResidueType=wheat; InitialResidueMass=500; InitialStandingFraction=0; InitialCPR=0; InitialCNR=100; FractionFaecesAdded=1
            Plant Slurp: PlantType=Slurp; IsEnding=false; DaysAfterEnding=0
            Fertiliser: same as Validation.Sauvignonblanc.RetainedNodeNum.RetainedNodNum.Row.Fertiliser
            Irrigation
            Manager PastureInitialisation
              CultivarName = StaticCrop
              InitialRootDepth = 2000
              SowingDate = 02/25/2000 00:00:00
              RootDepth = 2000
              RFV = 10
              KLReductionFactor = -0.001
              KLReductionDepth = 150
              YKLModifiers =
              XDepth =
              MaxG = 0.004
              R50 = 150
```csharp
using Models.Interfaces;
using Models.PMF.Organs;
using System;
using Models.Core;
using Models.PMF;
using APSIM.Shared.Utilities;
using Models.Soils;
        
namespace Models
{
    [Serializable] 
    [System.Xml.Serialization.XmlInclude(typeof(Model))]
    public class Script : Model
    {
        [Link] private Plant Slurp;
        [Link] private Clock Clock;
        [Link] private Soil Soil;
        [Link] private Zone zone;
        [Link(Type = LinkType.Path, Path = "[Slurp].Root")]
        private Root root;
        [Link]
        private IPhysical soilPhysical;

        [Display(Type = DisplayType.CultivarName)]
        [Description("Plant Type")]
        public string CultivarName { get; set; }
        [Description("Initial Root Depth")]
        public double InitialRootDepth { get; set; }
        [Description("Initialisation Date")]
        public DateTime SowingDate { get; set; }
        [Description("Maximum Root Depth")]
        public double RootDepth { get; set; }
        [Description("Roof Front Velocity")]
        public double RFV { get; set; }
        [Description("Factor to change Kl modifier with Depth")]
        public double KLReductionFactor { get; set; }
        [Description("Depth that KL starts to decline")]
        public double KLReductionDepth { get; set; }
        
        public double[] YKLModifiers { get; set; }
        public double[] XDepth { get; set; }
        private double Depth { get; set; }
        
        [Description("Maximum Stomatal Conductance")]
        public double MaxG { get; set; }
        [Description("Stomatal Radn response")]
        public double R50 { get; set; }
        
        [EventSubscribe("DoManagement")]
        private void OnDoManagement(object sender, EventArgs e)
        {
            if (Clock.Today.Date == SowingDate)
            {
                Slurp.Sow(cultivar: CultivarName, population: 1, depth: InitialRootDepth, rowSpacing: 150);
                
                YKLModifiers = new double[soilPhysical.Thickness.Length];
                XDepth = new double[soilPhysical.Thickness.Length];
                Depth = 0;
                for (int layer = 0; layer < soilPhysical.Thickness.Length; layer++)
                {
                    Depth += soilPhysical.Thickness[layer] / 2;  //Add half of the thickness of the current layer so depth is the mid depth of that layer
                    if (Depth <= KLReductionDepth)
                    {
                        YKLModifiers[layer] = 1;
                        XDepth[layer] = Depth;
                    }
                    else
                    {
                        double KLMod = 1 * Math.Exp(-KLReductionFactor * (Depth - KLReductionDepth));
                        YKLModifiers[layer] = KLMod;
                        XDepth[layer] = Depth;
                    }
                    Depth += soilPhysical.Thickness[layer] / 2;  //Add the other half of the current layer so depth is the top of the next layer
                }
                object KLMods = YKLModifiers;
                zone.Set("Slurp.Root.KLModifier.XYPairs.Y", KLMods);
                object Depths = XDepth;
                zone.Set("Slurp.Root.KLModifier.XYPairs.X", Depths);
                object RD = RootDepth;
                zone.Set("Slurp.Root.MaximumRootDepth.FixedValue", RD);
                object RV = RFV;
                zone.Set("Slurp.Root.RootFrontVelocity.Potential.FixedValue", RV);
                object GMaxValue = MaxG;
                zone.Set("Slurp.Leaf.Gsmax350", GMaxValue); 
                object R50Value = R50; 
                zone.Set("Slurp.Leaf.R50", R50Value); 
                
            }
        }
    }
}
```
            Manager SetPastureVariables: same as Validation.Sauvignonblanc.RetainedNodeNum.RetainedNodNum.Alley.SetPastureVariables
            Manager SetupPastureRootZones: same as Validation.Sauvignonblanc.RetainedNodeNum.RetainedNodNum.Alley.SetupPastureRootZones
            Soil: Latitude=0; Longitude=0
              LayerStructure: Thickness=[200, 200, 200, 200, 200, 200, 400, 400, 400, 600]
              Chemical: Thickness=[100, 200, 300, 300, 300, 300]; PH=[6.6, 6.2, 5.7, 5.5, 5.5, 5.5]; PHUnits=Water
              Water: Thickness=[200, 250, 300, 150, 150, 1950]; InitialValues=[0.35, 0.35, 0.35, 0.33, 0.28, 0.1]; InitialPAWmm=262.5; RelativeTo=LL15; FilledFromTop=false
              WaterBalance SoilWater: same as Validation.Sauvignonblanc.RPC_2000_2002.RPC_1.Row.Soil.SoilWater
              Organic: same as Validation.Sauvignonblanc.RetainedNodeNum.RetainedNodNum.Row.Soil.Organic
              CERESSoilTemperature Temperature
              OutputLayers: Thickness=[150, 150, 150, 150, 150, 150, 150]
              Physical: same as Validation.Sauvignonblanc.RPC_2000_2002.RPC_1.Row.Soil.Physical
              Solute NO3: Thickness=[100, 200, 300, 300, 300, 300]; InitialValues=[160.741, 11.1111, 1.21212, 1.19048, 0, 0]; InitialValuesUnits=ppm; WaterTableConcentration=0; D0=0; DepthConstant=0; MaxDepthSoluteAccessible=0; RunoffEffectivenessAtMovingSolute=0; MaxEffectiveRunoff=0
              Solute NH4: same as Validation.Sauvignonblanc.RPC_2000_2002.RPC_1.Row.Soil.NH4
              Solute Urea: same as Validation.Sauvignonblanc.RetainedNodeNum.RetainedNodNum.Row.Soil.Urea
              Nutrient: same as Validation.Sauvignonblanc.RetainedNodeNum.RetainedNodNum.Row.Soil.Nutrient
            Operations WinterRainfall
              2002-05-28  [Irrigation].Apply(200);
            Manager PlantVariables
              FRadInt = 0
              ET = 0
              ES = 0
              PET = 0
              LAI = 0
              Height = 0
              RootDepth = 0
              PlantWidth = 0
```csharp
using Models.Climate;
using System;
using Models.Core;
using Models.PMF;
using System.Collections.Generic;
using Models.Soils;
using APSIM.Shared.Utilities;
using Models.Zones;
using Models.PMF.Organs;

namespace Models
{
    [Serializable]
    public class Script : Model
    {
        [Link] private Weather weather;
        [Link(Type = LinkType.Path, Path = "[Grapevine].Root")]
        private Root root;
        private RectangularZone AlleyZone {get; set; }
        private RectangularZone RowZone {get; set;}
        private RectangularZone ThisZone {get; set;}
        private double AreaWidth {get; set;}

        public double FRadInt {get; set;}
        public double ET {get; set;}
        public double ES {get; set;}
        public double PET {get; set;}
        public double LAI {get; set;}
        public double Height {get; set;}
        public double RootDepth {get; set;}
        public double PlantWidth {get; set;}

        [EventSubscribe("StartOfSimulation")]
        private void DoStartOfSimulation(object sender, EventArgs e)
        {
               
               ThisZone = this.Parent.Parent as RectangularZone;
               RowZone = this.Parent.Parent.Parent.FindInScope("Row") as RectangularZone;
               AlleyZone = (RectangularZone)this.Parent.Parent.Parent.FindInScope("Alley") as RectangularZone;
               AreaWidth = AlleyZone.Width + RowZone.Width;
               PlantWidth = 0;
        }
        
        [EventSubscribe("DoReportCalculations")]
        private void OnDoReportCalculations(object sender, EventArgs e)
        {
            if (ThisZone.Name == "Row")
                {
                FRadInt = ((double)RowZone.Get("Grapevine.Leaf.RadIntTot") * RowZone.Width)/(weather.Radn * AreaWidth);
                ET = (double)RowZone.Get("Grapevine.Leaf.Transpiration") * RowZone.Width/AreaWidth;
                LAI = (double)RowZone.Get("Grapevine.Leaf.LAI");
                Height = (double)RowZone.Get("Grapevine.Leaf.Height");
                RootDepth = (double)RowZone.Get("Grapevine.Root.Depth");
                PlantWidth = (double)RowZone.Get("Grapevine.Leaf.Width");
                }
            else
                {
                FRadInt = ((double)AlleyZone.Get("Slurp.Leaf.RadIntTot") * ThisZone.Width)/ (weather.Radn * AreaWidth);
                ET = (double)AlleyZone.Get("Slurp.Leaf.Transpiration") * ThisZone.Width/AreaWidth;
                LAI = (double)AlleyZone.Get("Slurp.Leaf.LAI");
                Height = (double)AlleyZone.Get("Slurp.Leaf.Height");
                RootDepth = (double)AlleyZone.Get("Slurp.Root.Depth");
                }

            ES = (double)ThisZone.Get("Soil.SoilWater.Es") * ThisZone.Width/AreaWidth;
            double PETWidth = Math.Min(Math.Max(PlantWidth,ThisZone.Width),AreaWidth);
            PET = (double)ThisZone.Get("Soil.SoilWater.Eo") * PETWidth/AreaWidth;
        }
    }
}
```
            Manager Fertilise topup: same as Replacements.Fertilise topup
      Experiment RPC_2002_2006
        DisabledSimNames=[Grape_Squire_1Irri70, Grape_Squire_1Irri80, Grape_SquireIrri20, Grape_SquireIrri40, Grape_SquireIrri70, Grape_SquireIrri80]
        Factors
          Factor Irri: Specification=[VineIrrigation]
            Operations 20
              2002-02-14  [DripIrrigator].Script.applyDripIrri(2.1);
              2002-02-17  [DripIrrigator].Script.applyDripIrri(2.1);
              2002-02-19  [DripIrrigator].Script.applyDripIrri(2.1);
              2002-02-21  [DripIrrigator].Script.applyDripIrri(2.1);
              2002-02-25  [DripIrrigator].Script.applyDripIrri(2.1);
              2002-02-26  [DripIrrigator].Script.applyDripIrri(2.1);
              2002-03-03  [DripIrrigator].Script.applyDripIrri(2.1);
              2002-03-05  [DripIrrigator].Script.applyDripIrri(2.1);
              2002-03-07  [DripIrrigator].Script.applyDripIrri(2.1);
              2002-03-10  [DripIrrigator].Script.applyDripIrri(2.1);
              2002-03-12  [DripIrrigator].Script.applyDripIrri(2.1);
              2002-03-14  [DripIrrigator].Script.applyDripIrri(2.1);
              2002-03-19  [DripIrrigator].Script.applyDripIrri(2.1);
              2002-03-21  [DripIrrigator].Script.applyDripIrri(2.1);
              2002-03-24  [DripIrrigator].Script.applyDripIrri(2.1);
              2002-03-26  [DripIrrigator].Script.applyDripIrri(2.1);
              2002-04-01  [DripIrrigator].Script.applyDripIrri(2.1);
              2002-04-07  [DripIrrigator].Script.applyDripIrri(2.1);
              2002-04-10  [DripIrrigator].Script.applyDripIrri(2.1);
              2002-04-18  [DripIrrigator].Script.applyDripIrri(2.1);
              2002-04-21  [DripIrrigator].Script.applyDripIrri(2.1);
              2002-10-05  [DripIrrigator].Script.applyDripIrri(1.5);
              2002-10-08  [DripIrrigator].Script.applyDripIrri(1.5);
              2002-10-10  [DripIrrigator].Script.applyDripIrri(1.5);
              2002-10-12  [DripIrrigator].Script.applyDripIrri(1.5);
              2002-10-18  [DripIrrigator].Script.applyDripIrri(1.5);
              2002-10-23  [DripIrrigator].Script.applyDripIrri(1.5);
              2002-10-26  [DripIrrigator].Script.applyDripIrri(1.5);
              2002-10-28  [DripIrrigator].Script.applyDripIrri(1.5);
              2002-11-05  [DripIrrigator].Script.applyDripIrri(1.5);
              2002-11-08  [DripIrrigator].Script.applyDripIrri(1.5);
              2002-11-11  [DripIrrigator].Script.applyDripIrri(1.5);
              2002-11-18  [DripIrrigator].Script.applyDripIrri(1.5);
              2002-11-20  [DripIrrigator].Script.applyDripIrri(1.5);
              2002-11-23  [DripIrrigator].Script.applyDripIrri(1.5);
              2002-11-25  [DripIrrigator].Script.applyDripIrri(1.5);
              2002-11-29  [DripIrrigator].Script.applyDripIrri(1.5);
              2002-12-04  [DripIrrigator].Script.applyDripIrri(1.5);
              2002-12-09  [DripIrrigator].Script.applyDripIrri(1.5);
              2002-12-11  [DripIrrigator].Script.applyDripIrri(1.5);
              2002-12-19  [DripIrrigator].Script.applyDripIrri(1.5);
              2002-12-27  [DripIrrigator].Script.applyDripIrri(1.5);
              2002-12-31  [DripIrrigator].Script.applyDripIrri(1.5);
              2003-01-03  [DripIrrigator].Script.applyDripIrri(1.5);
              2003-01-08  [DripIrrigator].Script.applyDripIrri(1.5);
              2003-01-09  [DripIrrigator].Script.applyDripIrri(1.5);
              2003-01-11  [DripIrrigator].Script.applyDripIrri(1.5);
              2003-01-15  [DripIrrigator].Script.applyDripIrri(1.5);
              2003-01-18  [DripIrrigator].Script.applyDripIrri(1.5);
              2003-01-23  [DripIrrigator].Script.applyDripIrri(1.5);
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              2003-12-03  [DripIrrigator].Script.applyDripIrri(1);
              2003-12-07  [DripIrrigator].Script.applyDripIrri(1.4);
              2004-02-05  [DripIrrigator].Script.applyDripIrri(0.7);
              2004-12-18  [DripIrrigator].Script.applyDripIrri(1.6);
            Operations 100
              2002-02-14  [DripIrrigator].Script.applyDripIrri(6.3);
              2002-02-17  [DripIrrigator].Script.applyDripIrri(6.3);
              2002-02-19  [DripIrrigator].Script.applyDripIrri(6.3);
              2002-02-21  [DripIrrigator].Script.applyDripIrri(6.3);
              2002-02-25  [DripIrrigator].Script.applyDripIrri(6.3);
              2002-02-26  [DripIrrigator].Script.applyDripIrri(6.3);
              2002-03-03  [DripIrrigator].Script.applyDripIrri(6.3);
              2002-03-05  [DripIrrigator].Script.applyDripIrri(6.3);
              2002-03-07  [DripIrrigator].Script.applyDripIrri(6.3);
              2002-03-10  [DripIrrigator].Script.applyDripIrri(6.3);
              2002-03-12  [DripIrrigator].Script.applyDripIrri(6.3);
              2002-03-14  [DripIrrigator].Script.applyDripIrri(6.3);
              2002-03-19  [DripIrrigator].Script.applyDripIrri(6.3);
              2002-03-21  [DripIrrigator].Script.applyDripIrri(6.3);
              2002-03-24  [DripIrrigator].Script.applyDripIrri(6.3);
              2002-03-26  [DripIrrigator].Script.applyDripIrri(6.3);
              2002-04-01  [DripIrrigator].Script.applyDripIrri(6.3);
              2002-04-07  [DripIrrigator].Script.applyDripIrri(6.3);
              2002-04-10  [DripIrrigator].Script.applyDripIrri(6.3);
              2002-04-18  [DripIrrigator].Script.applyDripIrri(6.3);
              2002-04-21  [DripIrrigator].Script.applyDripIrri(6.3);
              2002-10-05  [DripIrrigator].Script.applyDripIrri(4.4);
              2002-10-08  [DripIrrigator].Script.applyDripIrri(4.4);
              2002-10-10  [DripIrrigator].Script.applyDripIrri(4.4);
              2002-10-12  [DripIrrigator].Script.applyDripIrri(4.4);
              2002-10-18  [DripIrrigator].Script.applyDripIrri(4.4);
              2002-10-23  [DripIrrigator].Script.applyDripIrri(4.4);
              2002-10-26  [DripIrrigator].Script.applyDripIrri(4.4);
              2002-10-28  [DripIrrigator].Script.applyDripIrri(4.4);
              2002-11-05  [DripIrrigator].Script.applyDripIrri(4.4);
              2002-11-08  [DripIrrigator].Script.applyDripIrri(4.4);
              2002-11-11  [DripIrrigator].Script.applyDripIrri(4.4);
              2002-11-18  [DripIrrigator].Script.applyDripIrri(4.4);
              2002-11-20  [DripIrrigator].Script.applyDripIrri(4.4);
              2002-11-23  [DripIrrigator].Script.applyDripIrri(4.4);
              2002-11-25  [DripIrrigator].Script.applyDripIrri(4.4);
              2002-11-29  [DripIrrigator].Script.applyDripIrri(4.4);
              2002-12-04  [DripIrrigator].Script.applyDripIrri(4.4);
              2002-12-09  [DripIrrigator].Script.applyDripIrri(4.4);
              2002-12-11  [DripIrrigator].Script.applyDripIrri(4.4);
              2002-12-19  [DripIrrigator].Script.applyDripIrri(4.4);
              2002-12-27  [DripIrrigator].Script.applyDripIrri(4.4);
              2002-12-31  [DripIrrigator].Script.applyDripIrri(4.4);
              2003-01-03  [DripIrrigator].Script.applyDripIrri(4.4);
              2003-01-08  [DripIrrigator].Script.applyDripIrri(4.4);
              2003-01-09  [DripIrrigator].Script.applyDripIrri(4.4);
              2003-01-11  [DripIrrigator].Script.applyDripIrri(4.4);
              2003-01-15  [DripIrrigator].Script.applyDripIrri(4.4);
              2003-01-18  [DripIrrigator].Script.applyDripIrri(4.4);
              2003-01-23  [DripIrrigator].Script.applyDripIrri(4.4);
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              2003-12-03  [DripIrrigator].Script.applyDripIrri(3.1);
              2003-12-07  [DripIrrigator].Script.applyDripIrri(4.2);
              2004-02-05  [DripIrrigator].Script.applyDripIrri(2.1);
              2005-02-26  [DripIrrigator].Script.applyDripIrri(4.1);
            Operations 60
              2002-02-14  [DripIrrigator].Script.applyDripIrri(6.3);
              2002-02-17  [DripIrrigator].Script.applyDripIrri(6.3);
              2002-02-19  [DripIrrigator].Script.applyDripIrri(6.3);
              2002-02-21  [DripIrrigator].Script.applyDripIrri(6.3);
              2002-02-25  [DripIrrigator].Script.applyDripIrri(6.3);
              2002-02-26  [DripIrrigator].Script.applyDripIrri(6.3);
              2002-03-03  [DripIrrigator].Script.applyDripIrri(6.3);
              2002-03-05  [DripIrrigator].Script.applyDripIrri(6.3);
              2002-03-07  [DripIrrigator].Script.applyDripIrri(6.3);
              2002-03-10  [DripIrrigator].Script.applyDripIrri(6.3);
              2002-03-12  [DripIrrigator].Script.applyDripIrri(6.3);
              2002-03-14  [DripIrrigator].Script.applyDripIrri(6.3);
              2002-03-19  [DripIrrigator].Script.applyDripIrri(6.3);
              2002-03-21  [DripIrrigator].Script.applyDripIrri(6.3);
              2002-03-24  [DripIrrigator].Script.applyDripIrri(6.3);
              2002-03-26  [DripIrrigator].Script.applyDripIrri(6.3);
              2002-04-01  [DripIrrigator].Script.applyDripIrri(6.3);
              2002-04-07  [DripIrrigator].Script.applyDripIrri(6.3);
              2002-04-10  [DripIrrigator].Script.applyDripIrri(6.3);
              2002-04-18  [DripIrrigator].Script.applyDripIrri(6.3);
              2002-04-21  [DripIrrigator].Script.applyDripIrri(6.3);
              2002-10-05  [DripIrrigator].Script.applyDripIrri(4.4);
              2002-10-08  [DripIrrigator].Script.applyDripIrri(4.4);
              2002-10-10  [DripIrrigator].Script.applyDripIrri(4.4);
              2002-10-12  [DripIrrigator].Script.applyDripIrri(4.4);
              2002-10-18  [DripIrrigator].Script.applyDripIrri(4.4);
              2002-10-23  [DripIrrigator].Script.applyDripIrri(4.4);
              2002-10-26  [DripIrrigator].Script.applyDripIrri(4.4);
              2002-10-28  [DripIrrigator].Script.applyDripIrri(4.4);
              2002-11-05  [DripIrrigator].Script.applyDripIrri(4.4);
              2002-11-08  [DripIrrigator].Script.applyDripIrri(4.4);
              2002-11-11  [DripIrrigator].Script.applyDripIrri(4.4);
              2002-11-18  [DripIrrigator].Script.applyDripIrri(4.4);
              2002-11-20  [DripIrrigator].Script.applyDripIrri(4.4);
              2002-11-23  [DripIrrigator].Script.applyDripIrri(4.4);
              2002-11-25  [DripIrrigator].Script.applyDripIrri(4.4);
              2002-11-29  [DripIrrigator].Script.applyDripIrri(4.4);
              2002-12-04  [DripIrrigator].Script.applyDripIrri(4.4);
              2002-12-09  [DripIrrigator].Script.applyDripIrri(4.4);
              2002-12-11  [DripIrrigator].Script.applyDripIrri(4.4);
              2002-12-19  [DripIrrigator].Script.applyDripIrri(4.4);
              2002-12-27  [DripIrrigator].Script.applyDripIrri(4.4);
              2002-12-31  [DripIrrigator].Script.applyDripIrri(4.4);
              2003-01-03  [DripIrrigator].Script.applyDripIrri(4.4);
              2003-01-08  [DripIrrigator].Script.applyDripIrri(4.4);
              2003-01-09  [DripIrrigator].Script.applyDripIrri(4.4);
              2003-01-11  [DripIrrigator].Script.applyDripIrri(4.4);
              2003-01-15  [DripIrrigator].Script.applyDripIrri(4.4);
              2003-01-18  [DripIrrigator].Script.applyDripIrri(4.4);
              2003-01-23  [DripIrrigator].Script.applyDripIrri(4.4);
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              2003-12-03  [DripIrrigator].Script.applyDripIrri(3.1);
              2003-12-07  [DripIrrigator].Script.applyDripIrri(4.2);
              2004-02-05  [DripIrrigator].Script.applyDripIrri(2.1);
              2005-02-26  [DripIrrigator].Script.applyDripIrri(4.1);
              2004-12-18  [DripIrrigator].Script.applyDripIrri(4.8);
        Simulation RPC_2
          Clock: Start=2002-02-25; End=2006-07-01
          Summary SummaryFile
          Weather: FileName=Site1004_RPC.met
          MicroClimate: a_interception=0; b_interception=1; c_interception=0; d_interception=0; SoilHeatFluxFraction=0.4; MinimumHeightDiffForNewLayer=0; NightInterceptionFraction=0.5; ReferenceHeight=2
          SoilArbitrator Soil Arbitrator
          RectangularZone Row: Length=100; Width=0.9; Slope=0; AspectAngle=0; Altitude=50
            Report: EventNames=[Clock].DoReport
            Memo: same as Validation.Sauvignonblanc.RetainedNodeNum.RetainedNodNum.Row.Memo
            Plant Grapevine: PlantType=Grapevine; IsEnding=false; DaysAfterEnding=0
            Irrigation
            Fertiliser: same as Validation.Sauvignonblanc.RetainedNodeNum.RetainedNodNum.Row.Fertiliser
            SurfaceOrganicMatter: InitialResidueName=wheat_stubble; InitialResidueType=wheat; InitialResidueMass=500; InitialStandingFraction=0; InitialCPR=0; InitialCNR=100; FractionFaecesAdded=1
            Manager SetupTreeRootZones: same as Validation.Sauvignonblanc.RetainedNodeNum.RetainedNodNum.Row.SetupTreeRootZones
            Operations VineIrrigation
            Operations WinterRainfall
              2002-05-28  [Irrigation].Apply(200);
            Soil: Latitude=0; Longitude=0
              LayerStructure: Thickness=[200, 200, 200, 200, 200, 200, 400, 400, 400, 600]
              Chemical: Thickness=[100, 200, 300, 300, 300, 300]; PH=[6.6, 6.2, 5.7, 5.5, 5.5, 5.5]; PHUnits=Water
              Physical
                Thickness  BD    AirDry  LL15  DUL   SAT
                150        1.35  0.06    0.12  0.28  0.36
                750        1.4   0.1     0.1   0.28  0.36
                150        1.4   0.005   0.05  0.28  0.35
                150        1.4   0.05    0.05  0.28  0.35
                1950       1.5   0.06    0.06  0.15  0.3
                SoilCrop GrapevineSoil: LL=[0.12, 0.1, 0.05, 0.05, 0.06]; KL=[0.1, 0.04, 0.03, 0.03, 0.02]; XF=[1, 1, 1, 1, 1]
                SoilCrop SlurpSoil: LL=[0.12, 0.1, 0.05, 0.05, 0.06]; KL=[0.1, 0.04, 0.01, 0, 0]; XF=[1, 1, 1, 1, 1]
              WaterBalance SoilWater: same as Validation.Sauvignonblanc.RPC_2000_2002.RPC_1.Row.Soil.SoilWater
              Organic: same as Validation.Sauvignonblanc.RetainedNodeNum.RetainedNodNum.Row.Soil.Organic
              CERESSoilTemperature Temperature
              OutputLayers: Thickness=[150, 150, 150, 150, 150, 150, 150]
              Water: Thickness=[150, 750, 150, 150, 1950]; InitialValues=[0.28, 0.28, 0.28, 0.28, 0.108615]; InitialPAWmm=322.8; RelativeTo=LL15; FilledFromTop=true
              Solute NO3: Thickness=[100, 200, 300, 300, 300, 300]; InitialValues=[160.741, 10.8108, 1.19048, 1.19048, 0, 0]; InitialValuesUnits=ppm; WaterTableConcentration=0; D0=0; DepthConstant=0; MaxDepthSoluteAccessible=0; RunoffEffectivenessAtMovingSolute=0; MaxEffectiveRunoff=0
              Solute NH4: same as Validation.Sauvignonblanc.RPC_2000_2002.RPC_1.Row.Soil.NH4
              Solute Urea: same as Validation.Sauvignonblanc.RetainedNodeNum.RetainedNodNum.Row.Soil.Urea
              Nutrient: same as Validation.Sauvignonblanc.RetainedNodeNum.RetainedNodNum.Row.Soil.Nutrient
            Manager PlantVariables: same as Validation.Sauvignonblanc.RPC_2000_2002.RPC_1.Row.PlantVariables
            Manager DripIrrigator
              totalIrrigation = 0
```csharp
using APSIM.Shared.Utilities;
using System.Xml.Serialization;
using Models;
using Models.PMF;
using Models.Soils;
using System.Text;
using System.Collections.Generic;
using Models.Core;
using System;

namespace Models
{
    [Serializable] 
    public class Script : Model
    {
       [Link] Irrigation irrigation;
        public void applyDripIrri(double amount)
        {
            double layerAmount = amount/4;
            irrigation.Apply(layerAmount, 0);
            irrigation.Apply(layerAmount*2, 220);
            irrigation.Apply(layerAmount, 420);

        }
        public double totalIrrigation {get; set;}
        [EventSubscribe("Irrigated")]
        private void OnIrrigated(object sender, 
        IrrigationApplicationType irrigData)
        {
            totalIrrigation += irrigData.Amount;
         }
    }
}
```
            Manager TreeInitialisation
              CultivarName = SauvignonBlanc
              SowingDate = 02/25/2002 00:00:00
              VineDistance = 1.8
              BudNumber = 48
              CaneNumber = 4
              CaneDiameter = 10
              CaneLength = 0.9
              TrunkDiameter = 65
              TrunkLength = 0.8
              RootTrunkRatio = 1
              RootNSC = 0.2
              TrunkNSC = 0.2
              CaneNSC = 0.2
              StartAge = 8
              script: same as in Validation.Sauvignonblanc.RetainedNodeNum.RetainedNodNum.Row.TreeInitialisation
            Manager HarvestNPruning: same as Validation.Sauvignonblanc.RPC_2000_2002.RPC_1.Row.HarvestNPruning
            Manager Fertilise on fixed dates: same as Validation.Sauvignonblanc.Marlborough_2Cane.VineFacts1.Row.Fertilise on fixed dates
          RectangularZone Alley: Length=100; Width=1.5; Slope=0; AspectAngle=0; Altitude=50
            SurfaceOrganicMatter: InitialResidueName=wheat_stubble; InitialResidueType=wheat; InitialResidueMass=500; InitialStandingFraction=0; InitialCPR=0; InitialCNR=100; FractionFaecesAdded=1
            Plant Slurp: PlantType=Slurp; IsEnding=false; DaysAfterEnding=0
            Fertiliser: same as Validation.Sauvignonblanc.RetainedNodeNum.RetainedNodNum.Row.Fertiliser
            Irrigation
            Manager PastureInitialisation
              CultivarName = StaticCrop
              InitialRootDepth = 2000
              SowingDate = 02/25/2002 00:00:00
              RootDepth = 2000
              RFV = 10
              KLReductionFactor = -0.001
              KLReductionDepth = 150
              YKLModifiers =
              XDepth =
              MaxG = 0.004
              R50 = 150
              script: same as in Validation.Sauvignonblanc.RPC_2000_2002.RPC_1.Alley.PastureInitialisation
            Manager SetPastureVariables: same as Validation.Sauvignonblanc.RetainedNodeNum.RetainedNodNum.Alley.SetPastureVariables
            Manager SetupPastureRootZones: same as Validation.Sauvignonblanc.Marlborough_3Cane.MRL3Cane.Alley.SetupPastureRootZones
            Operations WinterRainfall
              2002-05-28  [Irrigation].Apply(200);
            Soil: Latitude=0; Longitude=0
              LayerStructure: Thickness=[200, 200, 200, 200, 200, 200, 400, 400, 400, 600]
              Chemical: Thickness=[100, 200, 300, 300, 300, 300]; PH=[6.6, 6.2, 5.7, 5.5, 5.5, 5.5]; PHUnits=Water
              WaterBalance SoilWater: same as Validation.Sauvignonblanc.RPC_2000_2002.RPC_1.Row.Soil.SoilWater
              Organic: same as Validation.Sauvignonblanc.RetainedNodeNum.RetainedNodNum.Row.Soil.Organic
              CERESSoilTemperature Temperature
              OutputLayers: Thickness=[150, 150, 150, 150, 150, 150, 150]
              Water: Thickness=[150, 750, 150, 150, 1950]; InitialValues=[0.28, 0.28, 0.28, 0.28, 0.108615]; InitialPAWmm=322.8; RelativeTo=LL15; FilledFromTop=true
              Physical
                Thickness  BD    AirDry  LL15  DUL   SAT
                150        1.35  0.06    0.12  0.28  0.36
                750        1.4   0.1     0.1   0.28  0.36
                150        1.4   0.005   0.05  0.28  0.35
                150        1.4   0.05    0.05  0.28  0.35
                1950       1.5   0.06    0.06  0.15  0.3
                SoilCrop GrapevineSoil: LL=[0.12, 0.1, 0.05, 0.05, 0.06]; KL=[0.12, 0.05, 0.03, 0.03, 0.02]; XF=[1, 1, 1, 1, 1]
                SoilCrop SlurpSoil: LL=[0.12, 0.1, 0.05, 0.05, 0.06]; KL=[0.11, 0.11, 0.11, 0.11, 0.11]; XF=[1, 1, 1, 1, 1]
              Solute NO3: Thickness=[100, 200, 300, 300, 300, 300]; InitialValues=[10, 10.8108, 1.19048, 1.19048, 0, 0]; InitialValuesUnits=ppm; WaterTableConcentration=0; D0=0; DepthConstant=0; MaxDepthSoluteAccessible=0; RunoffEffectivenessAtMovingSolute=0; MaxEffectiveRunoff=0
              Solute NH4: same as Validation.Sauvignonblanc.RPC_2000_2002.RPC_1.Row.Soil.NH4
              Solute Urea: same as Validation.Sauvignonblanc.RetainedNodeNum.RetainedNodNum.Row.Soil.Urea
              Nutrient: same as Validation.Sauvignonblanc.RetainedNodeNum.RetainedNodNum.Row.Soil.Nutrient
            Manager PlantVariables: same as Validation.Sauvignonblanc.RPC_2000_2002.RPC_1.Alley.PlantVariables
            Report ReportAlley: same as Validation.Sauvignonblanc.RetainedNodeNum.RetainedNodNum.Alley.ReportAlley
      Experiment Renwick_2002_2007
        DisabledSimNames=[Grape_Squire_1Irri70, Grape_Squire_1Irri80, Grape_SquireIrri20, Grape_SquireIrri40, Grape_SquireIrri70, Grape_SquireIrri80]
        Factors
          Factor Irri: Specification=[VineIrrigation]
            Operations 100
              2004-11-25  [DripIrrigator].Script.applyDripIrri(0.3);
              2004-12-02  [DripIrrigator].Script.applyDripIrri(32.3);
              2004-12-09  [DripIrrigator].Script.applyDripIrri(32.1);
              2004-12-23  [DripIrrigator].Script.applyDripIrri(10.6);
              2004-12-30  [DripIrrigator].Script.applyDripIrri(29.5);
              2005-01-06  [DripIrrigator].Script.applyDripIrri(9.4);
              2005-01-27  [DripIrrigator].Script.applyDripIrri(11.4);
              2005-02-03  [DripIrrigator].Script.applyDripIrri(12);
              2005-02-10  [DripIrrigator].Script.applyDripIrri(20.1);
              2005-02-17  [DripIrrigator].Script.applyDripIrri(32.1);
              2005-02-24  [DripIrrigator].Script.applyDripIrri(16);
              2005-03-03  [DripIrrigator].Script.applyDripIrri(24.1);
              2005-03-10  [DripIrrigator].Script.applyDripIrri(24.1);
              2005-03-17  [DripIrrigator].Script.applyDripIrri(23.9);
              2005-03-24  [DripIrrigator].Script.applyDripIrri(23.9);
              2005-03-31  [DripIrrigator].Script.applyDripIrri(15.9);
              2005-04-28  [DripIrrigator].Script.applyDripIrri(15.9);
              2005-11-03  [DripIrrigator].Script.applyDripIrri(0.8);
              2005-11-10  [DripIrrigator].Script.applyDripIrri(15.9);
              2005-11-17  [DripIrrigator].Script.applyDripIrri(15.9);
              2005-11-24  [DripIrrigator].Script.applyDripIrri(23.9);
              2005-12-01  [DripIrrigator].Script.applyDripIrri(23.6);
              2005-12-08  [DripIrrigator].Script.applyDripIrri(23.6);
              2005-12-15  [DripIrrigator].Script.applyDripIrri(15.9);
              2005-12-22  [DripIrrigator].Script.applyDripIrri(15.9);
              2005-12-29  [DripIrrigator].Script.applyDripIrri(35.5);
              2006-01-05  [DripIrrigator].Script.applyDripIrri(31.3);
              2006-01-12  [DripIrrigator].Script.applyDripIrri(32.4);
              2006-01-19  [DripIrrigator].Script.applyDripIrri(48.8);
              2006-01-26  [DripIrrigator].Script.applyDripIrri(8);
              2006-02-09  [DripIrrigator].Script.applyDripIrri(16);
              2006-02-16  [DripIrrigator].Script.applyDripIrri(16);
              2006-02-23  [DripIrrigator].Script.applyDripIrri(16);
              2006-03-02  [DripIrrigator].Script.applyDripIrri(24.1);
              2006-03-09  [DripIrrigator].Script.applyDripIrri(24.1);
              2006-03-16  [DripIrrigator].Script.applyDripIrri(24.1);
            Operations 50
              2004-11-25  [DripIrrigator].Script.applyDripIrri(0.5);
              2004-12-02  [DripIrrigator].Script.applyDripIrri(39.4);
              2004-12-09  [DripIrrigator].Script.applyDripIrri(21.5);
              2004-12-23  [DripIrrigator].Script.applyDripIrri(9.4);
              2004-12-30  [DripIrrigator].Script.applyDripIrri(20.4);
              2005-02-10  [DripIrrigator].Script.applyDripIrri(8.2);
              2005-02-17  [DripIrrigator].Script.applyDripIrri(16.2);
              2005-02-24  [DripIrrigator].Script.applyDripIrri(8);
              2005-03-03  [DripIrrigator].Script.applyDripIrri(8.2);
              2005-03-10  [DripIrrigator].Script.applyDripIrri(8.2);
              2005-03-17  [DripIrrigator].Script.applyDripIrri(8);
              2005-03-24  [DripIrrigator].Script.applyDripIrri(8.2);
              2005-11-03  [DripIrrigator].Script.applyDripIrri(0.9);
              2005-11-17  [DripIrrigator].Script.applyDripIrri(16.2);
              2005-11-24  [DripIrrigator].Script.applyDripIrri(24.2);
              2005-12-01  [DripIrrigator].Script.applyDripIrri(24.1);
              2005-12-08  [DripIrrigator].Script.applyDripIrri(23.9);
              2005-12-15  [DripIrrigator].Script.applyDripIrri(16);
              2005-12-22  [DripIrrigator].Script.applyDripIrri(15.9);
              2005-12-29  [DripIrrigator].Script.applyDripIrri(8.2);
              2006-01-05  [DripIrrigator].Script.applyDripIrri(9.3);
              2006-01-12  [DripIrrigator].Script.applyDripIrri(24.4);
              2006-01-19  [DripIrrigator].Script.applyDripIrri(9.9);
              2006-01-26  [DripIrrigator].Script.applyDripIrri(8);
              2006-02-09  [DripIrrigator].Script.applyDripIrri(8);
              2006-02-16  [DripIrrigator].Script.applyDripIrri(8);
              2006-02-23  [DripIrrigator].Script.applyDripIrri(8);
              2006-03-02  [DripIrrigator].Script.applyDripIrri(11.7);
              2006-03-09  [DripIrrigator].Script.applyDripIrri(12.3);
              2006-03-16  [DripIrrigator].Script.applyDripIrri(11.7);
            Operations 40
              2004-11-25  [DripIrrigator].Script.applyDripIrri(0.3);
              2004-12-02  [DripIrrigator].Script.applyDripIrri(15.1);
              2004-12-23  [DripIrrigator].Script.applyDripIrri(9.7);
              2005-02-17  [DripIrrigator].Script.applyDripIrri(15.7);
              2005-03-03  [DripIrrigator].Script.applyDripIrri(8);
              2005-03-10  [DripIrrigator].Script.applyDripIrri(7.9);
              2005-03-17  [DripIrrigator].Script.applyDripIrri(8);
              2005-03-24  [DripIrrigator].Script.applyDripIrri(8);
              2005-11-03  [DripIrrigator].Script.applyDripIrri(0.8);
              2005-11-24  [DripIrrigator].Script.applyDripIrri(23.6);
              2005-12-08  [DripIrrigator].Script.applyDripIrri(23.8);
              2005-12-15  [DripIrrigator].Script.applyDripIrri(15.7);
              2005-12-22  [DripIrrigator].Script.applyDripIrri(8);
              2005-12-29  [DripIrrigator].Script.applyDripIrri(15.7);
              2006-01-05  [DripIrrigator].Script.applyDripIrri(7.4);
              2006-01-12  [DripIrrigator].Script.applyDripIrri(16.5);
              2006-01-19  [DripIrrigator].Script.applyDripIrri(8);
              2006-01-26  [DripIrrigator].Script.applyDripIrri(8);
              2006-03-02  [DripIrrigator].Script.applyDripIrri(8);
              2006-03-09  [DripIrrigator].Script.applyDripIrri(8);
              2006-03-16  [DripIrrigator].Script.applyDripIrri(8);
            Operations 30
              2004-11-25  [DripIrrigator].Script.applyDripIrri(0.3);
              2004-12-23  [DripIrrigator].Script.applyDripIrri(10.2);
              2004-12-30  [DripIrrigator].Script.applyDripIrri(20.1);
              2005-02-24  [DripIrrigator].Script.applyDripIrri(8);
              2005-03-10  [DripIrrigator].Script.applyDripIrri(8.2);
              2005-03-24  [DripIrrigator].Script.applyDripIrri(8.2);
              2005-11-03  [DripIrrigator].Script.applyDripIrri(0.8);
              2005-11-24  [DripIrrigator].Script.applyDripIrri(22.1);
              2005-12-08  [DripIrrigator].Script.applyDripIrri(16);
              2005-12-29  [DripIrrigator].Script.applyDripIrri(12.7);
              2006-01-05  [DripIrrigator].Script.applyDripIrri(1.4);
              2006-01-12  [DripIrrigator].Script.applyDripIrri(16.8);
              2006-01-19  [DripIrrigator].Script.applyDripIrri(0.6);
              2006-03-02  [DripIrrigator].Script.applyDripIrri(8);
              2006-03-09  [DripIrrigator].Script.applyDripIrri(8);
              2006-03-16  [DripIrrigator].Script.applyDripIrri(8);
        Simulation Renwick
          Clock: Start=2002-02-25; End=2007-07-01
          Summary SummaryFile
          Weather: FileName=Site1004_RPC.met
          MicroClimate: a_interception=0; b_interception=1; c_interception=0; d_interception=0; SoilHeatFluxFraction=0.4; MinimumHeightDiffForNewLayer=0; NightInterceptionFraction=0.5; ReferenceHeight=2
          SoilArbitrator Soil Arbitrator
          RectangularZone Row: Length=100; Width=0.9; Slope=0; AspectAngle=0; Altitude=50
            Report: EventNames=[Clock].DoReport
            Memo: same as Validation.Sauvignonblanc.RetainedNodeNum.RetainedNodNum.Row.Memo
            Plant Grapevine: PlantType=Grapevine; IsEnding=false; DaysAfterEnding=0
            Irrigation
            Fertiliser: same as Validation.Sauvignonblanc.RetainedNodeNum.RetainedNodNum.Row.Fertiliser
            SurfaceOrganicMatter: InitialResidueName=wheat_stubble; InitialResidueType=wheat; InitialResidueMass=500; InitialStandingFraction=0; InitialCPR=0; InitialCNR=100; FractionFaecesAdded=1
            Soil: Latitude=0; Longitude=0
              LayerStructure: Thickness=[200, 200, 200, 200, 200, 200, 400, 400, 400, 600]
              Chemical: Thickness=[100, 200, 300, 300, 300, 300]; PH=[6.6, 6.2, 5.7, 5.5, 5.5, 5.5]; PHUnits=Water
              Water: Thickness=[200, 300, 300, 200, 200, 1800]; InitialValues=[0.3, 0.27, 0.16, 0.14, 0.12, 0.12]; InitialPAWmm=179; RelativeTo=LL15; FilledFromTop=false
              Physical
                Thickness  BD    AirDry  LL15  DUL   SAT
                200        1.35  0.1     0.12  0.3   0.32
                300        1.35  0.1     0.12  0.27  0.32
                300        1.4   0.1     0.12  0.16  0.2
                200        1.4   0.1     0.11  0.14  0.2
                200        1.4   0.08    0.08  0.12  0.2
                1800       1.59  0.06    0.08  0.12  0.2
                SoilCrop GrapevineSoil: LL=[0.12, 0.12, 0.12, 0.11, 0.08, 0.08]; KL=[0.25, 0.1, 0.08, 0.05, 0.05, 0.01]; XF=[1, 1, 1, 1, 1, 1]
                SoilCrop SlurpSoil: LL=[0.12, 0.12, 0.12, 0.11, 0.08, 0.08]; KL=[0.11, 0.11, 0.11, 0.11, 0.11, 0.11]; XF=[1, 1, 1, 1, 1, 1]
              WaterBalance SoilWater: same as Validation.Sauvignonblanc.RPC_2000_2002.RPC_1.Row.Soil.SoilWater
              Organic: same as Validation.Sauvignonblanc.RetainedNodeNum.RetainedNodNum.Row.Soil.Organic
              CERESSoilTemperature Temperature
              OutputLayers: Thickness=[200, 100, 100, 100, 100, 200, 200, 200]
              Solute NO3: same as Validation.Sauvignonblanc.RPC_2000_2002.RPC_1.Alley.Soil.NO3
              Solute NH4: same as Validation.Sauvignonblanc.RPC_2000_2002.RPC_1.Row.Soil.NH4
              Solute Urea: same as Validation.Sauvignonblanc.RetainedNodeNum.RetainedNodNum.Row.Soil.Urea
              Nutrient: same as Validation.Sauvignonblanc.RetainedNodeNum.RetainedNodNum.Row.Soil.Nutrient
            Manager SetupTreeRootZones: same as Validation.Sauvignonblanc.RetainedNodeNum.RetainedNodNum.Row.SetupTreeRootZones
            Operations VineIrrigation
            Operations WinterRainfall
              2002-05-28  [Irrigation].Apply(200);
            Manager PlantVariables: same as Validation.Sauvignonblanc.RPC_2000_2002.RPC_1.Row.PlantVariables
            Manager DripIrrigator: same as Validation.Sauvignonblanc.Marlborough_3Cane.MRL3Cane.Row.DripIrrigator
            Manager TreeInitialisation
              CultivarName = SauvignonBlanc
              SowingDate = 02/25/2002 00:00:00
              VineDistance = 1.8
              BudNumber = 44
              CaneNumber = 4
              CaneDiameter = 10
              CaneLength = 0.9
              TrunkDiameter = 65
              TrunkLength = 0.8
              RootTrunkRatio = 1
              RootNSC = 0.2
              TrunkNSC = 0.2
              CaneNSC = 0.2
              StartAge = 8
              script: same as in Validation.Sauvignonblanc.RetainedNodeNum.RetainedNodNum.Row.TreeInitialisation
            Manager HarvestNPruning: same as Validation.Sauvignonblanc.RPC_2000_2002.RPC_1.Row.HarvestNPruning
            Manager AutoIrrigationBasedOnWaterDeficit: same as Validation.Sauvignonblanc.RetainedNodeNum.RetainedNodNum.Row.AutoIrrigationBasedOnWaterDeficit
            Manager Fertilise on fixed dates: same as Validation.Sauvignonblanc.Marlborough_2Cane.VineFacts1.Row.Fertilise on fixed dates
            Manager Reset on date: same as Replacements.Reset on date
          RectangularZone Alley: Length=100; Width=1.8; Slope=0; AspectAngle=0; Altitude=50
            SurfaceOrganicMatter: InitialResidueName=wheat_stubble; InitialResidueType=wheat; InitialResidueMass=500; InitialStandingFraction=0; InitialCPR=0; InitialCNR=100; FractionFaecesAdded=1
            Plant Slurp: PlantType=Slurp; IsEnding=false; DaysAfterEnding=0
            Fertiliser: same as Validation.Sauvignonblanc.RetainedNodeNum.RetainedNodNum.Row.Fertiliser
            Irrigation
            Manager PastureInitialisation: same as Validation.Sauvignonblanc.RPC_2002_2006.RPC_2.Alley.PastureInitialisation
            Manager SetPastureVariables: same as Validation.Sauvignonblanc.RetainedNodeNum.RetainedNodNum.Alley.SetPastureVariables
            Manager SetupPastureRootZones: same as Validation.Sauvignonblanc.Marlborough_3Cane.MRL3Cane.Alley.SetupPastureRootZones
            Operations WinterRainfall
              2002-05-28  [Irrigation].Apply(200);
            Manager PlantVariables: same as Validation.Sauvignonblanc.RPC_2000_2002.RPC_1.Alley.PlantVariables
            Soil: same as Validation.Sauvignonblanc.Renwick_2002_2007.Renwick.Row.Soil
            Report ReportAlley: same as Validation.Sauvignonblanc.RetainedNodeNum.RetainedNodNum.Alley.ReportAlley
      Simulation Seaview_2Cane
        Clock: Start=2006-02-25; End=2007-07-01
        Summary SummaryFile
        Weather: FileName=Site1003_SEA.met
        MicroClimate: a_interception=0; b_interception=1; c_interception=0; d_interception=0; SoilHeatFluxFraction=0.4; MinimumHeightDiffForNewLayer=0; NightInterceptionFraction=0.5; ReferenceHeight=2
        SoilArbitrator Soil Arbitrator
        RectangularZone Row: Length=100; Width=0.9; Slope=0; AspectAngle=0; Altitude=50
          Report: EventNames=[Clock].DoReport
          Memo: same as Validation.Sauvignonblanc.RetainedNodeNum.RetainedNodNum.Row.Memo
          Plant Grapevine: PlantType=Grapevine; IsEnding=false; DaysAfterEnding=0
          Irrigation
          Fertiliser: same as Validation.Sauvignonblanc.RetainedNodeNum.RetainedNodNum.Row.Fertiliser
          SurfaceOrganicMatter: InitialResidueName=wheat_stubble; InitialResidueType=wheat; InitialResidueMass=500; InitialStandingFraction=0; InitialCPR=0; InitialCNR=100; FractionFaecesAdded=1
          Manager SetupTreeRootZones: same as Validation.Sauvignonblanc.RetainedNodeNum.RetainedNodNum.Row.SetupTreeRootZones
          Operations VineIrrigation
          Operations WinterRainfall
            2006-08-26  [Irrigation].Apply(45);
          Manager PlantVariables: same as Validation.Sauvignonblanc.RPC_2000_2002.RPC_1.Row.PlantVariables
          Manager DripIrrigator: same as Validation.Sauvignonblanc.Marlborough_3Cane.MRL3Cane.Row.DripIrrigator
          Soil: Latitude=0; Longitude=0
            LayerStructure: Thickness=[200, 200, 200, 200, 200, 200, 400, 400, 400, 600]
            Chemical: Thickness=[100, 200, 300, 300, 300, 300]; PH=[6.6, 6.2, 5.7, 5.5, 5.5, 5.5]; PHUnits=Water
            Physical
              Thickness  BD  AirDry  LL15  DUL   SAT
              300        1   0.3     0.3   0.5   0.6
              300        1   0.32    0.32  0.5   0.6
              300        1   0.18    0.18  0.35  0.5
              300        1   0.05    0.05  0.1   0.3
              1950       1   0.05    0.05  0.1   0.3
              SoilCrop GrapevineSoil: LL=[0.3, 0.32, 0.18, 0.05, 0.05]; KL=[0.1, 0.01, 0.05, 0.005, 0]; XF=[1, 1, 1, 1, 1]
              SoilCrop SlurpSoil: LL=[0.3, 0.32, 0.18, 0.05, 0.05]; KL=[0.11, 0.11, 0.11, 0.11, 0.11]; XF=[1, 1, 1, 1, 1]
            WaterBalance SoilWater: SummerDate=1-Nov; SummerU=9; SummerCona=4.4; WinterDate=1-Apr; WinterU=9; WinterCona=4.4; DiffusConst=88; DiffusSlope=35.4; Salb=0.18; CN2Bare=68; CNRed=20; CNCov=0.8; DischargeWidth=0; CatchmentArea=0; PSIDul=-100
              Thickness  SWCON  KLAT
              150        0.55   0
              150        0.55   0
              100        0.55   0
              200        0.55   0
              200        0.55   0
              200        0.55   0
              200        0.55   0
              200        0.55   0
              200        0.55   0
              200        0.55   0
              200        0.55   0
              200        0.55   0
              400        0.55   0
            Organic: same as Validation.Sauvignonblanc.RetainedNodeNum.RetainedNodNum.Row.Soil.Organic
            CERESSoilTemperature Temperature
            OutputLayers: Thickness=[300, 300, 300]
            Water: Thickness=[300, 300, 300, 300, 1950]; InitialValues=[0.5, 0.5, 0.35, 0.1, 0.1]; InitialPAWmm=277.5; RelativeTo=LL15; FilledFromTop=true
            Solute NO3: Thickness=[100, 200, 300, 300, 300, 300]; InitialValues=[217, 15, 1.66667, 1.66667, 0, 0]; InitialValuesUnits=ppm; WaterTableConcentration=0; D0=0; DepthConstant=0; MaxDepthSoluteAccessible=0; RunoffEffectivenessAtMovingSolute=0; MaxEffectiveRunoff=0
            Solute NH4: same as Validation.Sauvignonblanc.RPC_2000_2002.RPC_1.Row.Soil.NH4
            Solute Urea: same as Validation.Sauvignonblanc.RetainedNodeNum.RetainedNodNum.Row.Soil.Urea
            Nutrient: same as Validation.Sauvignonblanc.RetainedNodeNum.RetainedNodNum.Row.Soil.Nutrient
          Manager HarvestNPruning: same as Validation.Sauvignonblanc.RPC_2000_2002.RPC_1.Row.HarvestNPruning
          Manager TreeInitialisation
            CultivarName = SauvignonBlanc
            SowingDate = 02/25/2006 00:00:00
            VineDistance = 1.8
            BudNumber = 24
            CaneNumber = 2
            CaneDiameter = 10
            CaneLength = 0.9
            TrunkDiameter = 65
            TrunkLength = 0.8
            RootTrunkRatio = 1
            RootNSC = 0.2
            TrunkNSC = 0.2
            CaneNSC = 0.2
            StartAge = 3
            script: same as in Validation.Sauvignonblanc.RetainedNodeNum.RetainedNodNum.Row.TreeInitialisation
          Manager Fertilise on fixed dates: same as Validation.Sauvignonblanc.Marlborough_2Cane.VineFacts1.Row.Fertilise on fixed dates
        RectangularZone Alley: Length=100; Width=1.5; Slope=0; AspectAngle=0; Altitude=50
          SurfaceOrganicMatter: InitialResidueName=wheat_stubble; InitialResidueType=wheat; InitialResidueMass=500; InitialStandingFraction=0; InitialCPR=0; InitialCNR=100; FractionFaecesAdded=1
          Plant Slurp: PlantType=Slurp; IsEnding=false; DaysAfterEnding=0
          Fertiliser: same as Validation.Sauvignonblanc.RetainedNodeNum.RetainedNodNum.Row.Fertiliser
          Irrigation
          Manager PastureInitialisation
            CultivarName = StaticCrop
            InitialRootDepth = 2000
            SowingDate = 02/25/2006 00:00:00
            RootDepth = 2000
            RFV = 10
            KLReductionFactor = -0.001
            KLReductionDepth = 150
            YKLModifiers =
            XDepth =
            MaxG = 0.004
            R50 = 150
            script: same as in Validation.Sauvignonblanc.RPC_2000_2002.RPC_1.Alley.PastureInitialisation
          Manager SetPastureVariables: same as Validation.Sauvignonblanc.RetainedNodeNum.RetainedNodNum.Alley.SetPastureVariables
          Manager SetupPastureRootZones: same as Validation.Sauvignonblanc.Marlborough_3Cane.MRL3Cane.Alley.SetupPastureRootZones
          Operations WinterRainfall
            2006-08-26  [Irrigation].Apply(45);
          Manager PlantVariables: same as Validation.Sauvignonblanc.RPC_2000_2002.RPC_1.Alley.PlantVariables
          Soil: Latitude=0; Longitude=0
            LayerStructure: Thickness=[200, 200, 200, 200, 200, 200, 400, 400, 400, 600]
            Chemical: Thickness=[100, 200, 300, 300, 300, 300]; PH=[6.6, 6.2, 5.7, 5.5, 5.5, 5.5]; PHUnits=Water
            WaterBalance SoilWater: same as Validation.Sauvignonblanc.Seaview_2Cane.Row.Soil.SoilWater
            Organic: same as Validation.Sauvignonblanc.RetainedNodeNum.RetainedNodNum.Row.Soil.Organic
            CERESSoilTemperature Temperature
            OutputLayers: Thickness=[300, 300, 300]
            Water: Thickness=[300, 300, 300, 300, 1950]; InitialValues=[0.458, 0.4622, 0.3143, 0.0895, 0.0895]; InitialPAWmm=219.225; RelativeTo=LL15; FilledFromTop=false
            Physical: same as Validation.Sauvignonblanc.Seaview_2Cane.Row.Soil.Physical
            Solute NO3: same as Validation.Sauvignonblanc.Seaview_2Cane.Row.Soil.NO3
            Solute NH4: same as Validation.Sauvignonblanc.RPC_2000_2002.RPC_1.Row.Soil.NH4
            Solute Urea: same as Validation.Sauvignonblanc.RetainedNodeNum.RetainedNodNum.Row.Soil.Urea
            Nutrient: same as Validation.Sauvignonblanc.RetainedNodeNum.RetainedNodNum.Row.Soil.Nutrient
          Report ReportAlley: same as Validation.Sauvignonblanc.RetainedNodeNum.RetainedNodNum.Alley.ReportAlley
      Simulation Seaview_4Cane
        Clock: Start=2006-02-25; End=2007-07-01
        Summary SummaryFile
        Weather: FileName=Site1003_SEA.met
        MicroClimate: a_interception=0; b_interception=1; c_interception=0; d_interception=0; SoilHeatFluxFraction=0.4; MinimumHeightDiffForNewLayer=0; NightInterceptionFraction=0.5; ReferenceHeight=2
        SoilArbitrator Soil Arbitrator
        RectangularZone Row: Length=100; Width=0.9; Slope=0; AspectAngle=0; Altitude=50
          Report: EventNames=[Clock].DoReport
          Memo: same as Validation.Sauvignonblanc.RetainedNodeNum.RetainedNodNum.Row.Memo
          Plant Grapevine: PlantType=Grapevine; IsEnding=false; DaysAfterEnding=0
          Irrigation
          Fertiliser: same as Validation.Sauvignonblanc.RetainedNodeNum.RetainedNodNum.Row.Fertiliser
          SurfaceOrganicMatter: InitialResidueName=wheat_stubble; InitialResidueType=wheat; InitialResidueMass=500; InitialStandingFraction=0; InitialCPR=0; InitialCNR=100; FractionFaecesAdded=1
          Manager SetupTreeRootZones: same as Validation.Sauvignonblanc.RetainedNodeNum.RetainedNodNum.Row.SetupTreeRootZones
          Operations VineIrrigation
          Operations WinterRainfall
            2006-08-26  [Irrigation].Apply(45);
          Manager PlantVariables: same as Validation.Sauvignonblanc.RPC_2000_2002.RPC_1.Row.PlantVariables
          Manager DripIrrigator: same as Validation.Sauvignonblanc.Marlborough_3Cane.MRL3Cane.Row.DripIrrigator
          Soil: same as Validation.Sauvignonblanc.Seaview_2Cane.Row.Soil
          Manager HarvestNPruning: same as Validation.Sauvignonblanc.RPC_2000_2002.RPC_1.Row.HarvestNPruning
          Manager TreeInitialisation
            CultivarName = SauvignonBlanc
            SowingDate = 02/25/2006 00:00:00
            VineDistance = 1.8
            BudNumber = 40
            CaneNumber = 4
            CaneDiameter = 10
            CaneLength = 0.9
            TrunkDiameter = 65
            TrunkLength = 0.8
            RootTrunkRatio = 1
            RootNSC = 0.2
            TrunkNSC = 0.2
            CaneNSC = 0.2
            StartAge = 3
            script: same as in Validation.Sauvignonblanc.RetainedNodeNum.RetainedNodNum.Row.TreeInitialisation
          Manager Fertilise on fixed dates: same as Validation.Sauvignonblanc.Marlborough_2Cane.VineFacts1.Row.Fertilise on fixed dates
        RectangularZone Alley: same as Validation.Sauvignonblanc.Seaview_2Cane.Alley
      Simulation Seaview_4Cane08
        Clock: Start=2007-02-25; End=2008-07-01
        Summary SummaryFile
        Weather: FileName=Site1003_SEA.met
        MicroClimate: a_interception=0; b_interception=1; c_interception=0; d_interception=0; SoilHeatFluxFraction=0.4; MinimumHeightDiffForNewLayer=0; NightInterceptionFraction=0.5; ReferenceHeight=2
        SoilArbitrator Soil Arbitrator
        RectangularZone Row: Length=100; Width=0.9; Slope=0; AspectAngle=0; Altitude=50
          Report: EventNames=[Clock].DoReport
          Memo: same as Validation.Sauvignonblanc.RetainedNodeNum.RetainedNodNum.Row.Memo
          Plant Grapevine: PlantType=Grapevine; IsEnding=false; DaysAfterEnding=0
          Irrigation
          Fertiliser: same as Validation.Sauvignonblanc.RetainedNodeNum.RetainedNodNum.Row.Fertiliser
          SurfaceOrganicMatter: InitialResidueName=wheat_stubble; InitialResidueType=wheat; InitialResidueMass=500; InitialStandingFraction=0; InitialCPR=0; InitialCNR=100; FractionFaecesAdded=1
          Manager SetupTreeRootZones: same as Validation.Sauvignonblanc.RetainedNodeNum.RetainedNodNum.Row.SetupTreeRootZones
          Operations VineIrrigation
          Operations WinterRainfall
            2006-08-26  [Irrigation].Apply(45);
          Manager PlantVariables: same as Validation.Sauvignonblanc.RPC_2000_2002.RPC_1.Row.PlantVariables
          Manager DripIrrigator: same as Validation.Sauvignonblanc.Marlborough_3Cane.MRL3Cane.Row.DripIrrigator
          Soil: Latitude=0; Longitude=0
            LayerStructure: Thickness=[200, 200, 200, 200, 200, 200, 400, 400, 400, 600]
            Chemical: Thickness=[100, 200, 300, 300, 300, 300]; PH=[6.6, 6.2, 5.7, 5.5, 5.5, 5.5]; PHUnits=Water
            Physical
              Thickness  BD    AirDry  LL15  DUL   SAT
              300        1.35  0.06    0.12  0.3   0.4
              300        1.4   0.1     0.12  0.3   0.4
              300        1.4   0.005   0.16  0.3   0.4
              300        1.4   0.05    0.05  0.28  0.35
              1950       1.5   0.06    0.06  0.15  0.3
              SoilCrop GrapevineSoil: LL=[0.12, 0.12, 0.16, 0.05, 0.06]; KL=[0.12, 0.04, 0.03, 0.03, 0.02]; XF=[1, 1, 1, 1, 1]
              SoilCrop SlurpSoil: LL=[0.12, 0.12, 0.16, 0.05, 0.06]; KL=[0.11, 0.11, 0.11, 0.11, 0.11]; XF=[1, 1, 1, 1, 1]
            WaterBalance SoilWater: same as Validation.Sauvignonblanc.RPC_2000_2002.RPC_1.Row.Soil.SoilWater
            Organic: same as Validation.Sauvignonblanc.RetainedNodeNum.RetainedNodNum.Row.Soil.Organic
            CERESSoilTemperature Temperature
            OutputLayers: Thickness=[300, 300, 300]
            Water: Thickness=[300, 300, 300, 300, 1950]; InitialValues=[0.3, 0.3, 0.3, 0.28, 0.15]; InitialPAWmm=394.5; RelativeTo=LL15; FilledFromTop=false
            Solute NO3: Thickness=[100, 200, 300, 300, 300, 300]; InitialValues=[160.741, 11.1111, 1.19048, 1.19048, 0, 0]; InitialValuesUnits=ppm; WaterTableConcentration=0; D0=0; DepthConstant=0; MaxDepthSoluteAccessible=0; RunoffEffectivenessAtMovingSolute=0; MaxEffectiveRunoff=0
            Solute NH4: same as Validation.Sauvignonblanc.RPC_2000_2002.RPC_1.Row.Soil.NH4
            Solute Urea: same as Validation.Sauvignonblanc.RetainedNodeNum.RetainedNodNum.Row.Soil.Urea
            Nutrient: same as Validation.Sauvignonblanc.RetainedNodeNum.RetainedNodNum.Row.Soil.Nutrient
          Manager HarvestNPruning
            LeafPluckingDAWS = 209
            HarvestDAWS = 305
            PruningDAWS = 341
            FrostDate1 = 10/03/2002 00:00:00
            FrostDate2 = 11/18/2002 00:00:00
            script: same as in Validation.Sauvignonblanc.RetainedNodeNum.RetainedNodNum.Row.HarvestNPruning
          Manager TreeInitialisation
            CultivarName = SauvignonBlanc
            SowingDate = 02/25/2007 00:00:00
            VineDistance = 1.8
            BudNumber = 48
            CaneNumber = 4
            CaneDiameter = 10
            CaneLength = 0.9
            TrunkDiameter = 40
            TrunkLength = 0.8
            RootTrunkRatio = 1
            RootNSC = 0.2
            TrunkNSC = 0.2
            CaneNSC = 0.2
            StartAge = 3
            script: same as in Validation.Sauvignonblanc.RetainedNodeNum.RetainedNodNum.Row.TreeInitialisation
          Manager Fertilise on fixed dates: same as Validation.Sauvignonblanc.Marlborough_2Cane.VineFacts1.Row.Fertilise on fixed dates
        RectangularZone Alley: Length=100; Width=1.5; Slope=0; AspectAngle=0; Altitude=50
          SurfaceOrganicMatter: InitialResidueName=wheat_stubble; InitialResidueType=wheat; InitialResidueMass=500; InitialStandingFraction=0; InitialCPR=0; InitialCNR=100; FractionFaecesAdded=1
          Plant Slurp: PlantType=Slurp; IsEnding=false; DaysAfterEnding=0
          Fertiliser: same as Validation.Sauvignonblanc.RetainedNodeNum.RetainedNodNum.Row.Fertiliser
          Irrigation
          Manager PastureInitialisation
            CultivarName = StaticCrop
            InitialRootDepth = 2000
            SowingDate = 02/25/2007 00:00:00
            RootDepth = 2000
            RFV = 10
            KLReductionFactor = -0.001
            KLReductionDepth = 150
            YKLModifiers =
            XDepth =
            MaxG = 0.004
            R50 = 150
            script: same as in Validation.Sauvignonblanc.RPC_2000_2002.RPC_1.Alley.PastureInitialisation
          Manager SetPastureVariables: same as Validation.Sauvignonblanc.RetainedNodeNum.RetainedNodNum.Alley.SetPastureVariables
          Manager SetupPastureRootZones: same as Validation.Sauvignonblanc.Marlborough_3Cane.MRL3Cane.Alley.SetupPastureRootZones
          Operations WinterRainfall
            2006-08-26  [Irrigation].Apply(45);
          Manager PlantVariables: same as Validation.Sauvignonblanc.RPC_2000_2002.RPC_1.Alley.PlantVariables
          Soil: Latitude=0; Longitude=0
            LayerStructure: Thickness=[200, 200, 200, 200, 200, 200, 400, 400, 400, 600]
            Chemical: Thickness=[100, 200, 300, 300, 300, 300]; PH=[6.6, 6.2, 5.7, 5.5, 5.5, 5.5]; PHUnits=Water
            WaterBalance SoilWater: same as Validation.Sauvignonblanc.RPC_2000_2002.RPC_1.Row.Soil.SoilWater
            Organic: same as Validation.Sauvignonblanc.RetainedNodeNum.RetainedNodNum.Row.Soil.Organic
            CERESSoilTemperature Temperature
            OutputLayers: Thickness=[300, 300, 300]
            Water: Thickness=[300, 300, 300, 300, 1950]; InitialValues=[0.3, 0.3, 0.3, 0.28, 0.15]; InitialPAWmm=394.5; RelativeTo=LL15; FilledFromTop=false
            Physical: same as Validation.Sauvignonblanc.Seaview_4Cane08.Row.Soil.Physical
            Solute NO3: same as Validation.Sauvignonblanc.Seaview_4Cane08.Row.Soil.NO3
            Solute NH4: same as Validation.Sauvignonblanc.RPC_2000_2002.RPC_1.Row.Soil.NH4
            Solute Urea: same as Validation.Sauvignonblanc.RetainedNodeNum.RetainedNodNum.Row.Soil.Urea
            Nutrient: same as Validation.Sauvignonblanc.RetainedNodeNum.RetainedNodNum.Row.Soil.Nutrient
          Report ReportAlley: same as Validation.Sauvignonblanc.RetainedNodeNum.RetainedNodNum.Alley.ReportAlley
      Experiment OtherRegions
        Factors
          Factor Climate
            Specification=[Weather].FileName = Longlands.met, WAP.met, TOH.met, Dashwood.met, WRV.met
        Simulation OtherRegions
          Weather: FileName=WRV.met
          Clock: Start=2014-02-25; End=2020-05-01
          Summary
          SoilArbitrator Soil Arbitrator
          MicroClimate: a_interception=0; b_interception=1; c_interception=0; d_interception=0; SoilHeatFluxFraction=0.4; MinimumHeightDiffForNewLayer=0; NightInterceptionFraction=0.5; ReferenceHeight=2
          RectangularZone Row: Length=100; Width=0.9; Slope=0; AspectAngle=0; Altitude=50
            Report: EventNames=[Clock].DoReport
            Memo: same as Validation.Sauvignonblanc.RetainedNodeNum.RetainedNodNum.Row.Memo
            Plant Grapevine: PlantType=Grapevine; IsEnding=false; DaysAfterEnding=0
            Irrigation
            Fertiliser: same as Validation.Sauvignonblanc.RetainedNodeNum.RetainedNodNum.Row.Fertiliser
            SurfaceOrganicMatter: InitialResidueName=wheat_stubble; InitialResidueType=wheat; InitialResidueMass=500; InitialStandingFraction=0; InitialCPR=0; InitialCNR=100; FractionFaecesAdded=1
            Soil: Latitude=0; Longitude=0
              LayerStructure: Thickness=[200, 200, 200, 200, 200, 200, 400, 400, 400, 600]
              Chemical: Thickness=[100, 200, 300, 300, 300, 300]; PH=[6.6, 6.2, 5.7, 5.5, 5.5, 5.5]; PHUnits=Water
              Water: Thickness=[200, 250, 300, 150, 150, 1950]; InitialValues=[0.35, 0.35, 0.35, 0.33, 0.28, 0.1]; InitialPAWmm=262.5; RelativeTo=LL15; FilledFromTop=false
              Physical: same as Validation.Sauvignonblanc.RPC_2000_2002.RPC_1.Row.Soil.Physical
              WaterBalance SoilWater: same as Validation.Sauvignonblanc.RPC_2000_2002.RPC_1.Row.Soil.SoilWater
              Organic: same as Validation.Sauvignonblanc.RetainedNodeNum.RetainedNodNum.Row.Soil.Organic
              CERESSoilTemperature Temperature
              OutputLayers: Thickness=[150, 150, 150, 150, 150, 150, 150]
              Solute NO3: same as Validation.Sauvignonblanc.RPC_2000_2002.RPC_1.Alley.Soil.NO3
              Solute NH4: same as Validation.Sauvignonblanc.RPC_2000_2002.RPC_1.Row.Soil.NH4
              Solute Urea: same as Validation.Sauvignonblanc.RetainedNodeNum.RetainedNodNum.Row.Soil.Urea
              Nutrient: same as Validation.Sauvignonblanc.RetainedNodeNum.RetainedNodNum.Row.Soil.Nutrient
            Manager SetupTreeRootZones: same as Validation.Sauvignonblanc.RetainedNodeNum.RetainedNodNum.Row.SetupTreeRootZones
            Operations VineIrrigation
            Operations WinterRainfall
              2002-05-28  [Irrigation].Apply(200);
            Manager PlantVariables: same as Validation.Sauvignonblanc.RPC_2000_2002.RPC_1.Row.PlantVariables
            Manager DripIrrigator: same as Validation.Sauvignonblanc.Marlborough_3Cane.MRL3Cane.Row.DripIrrigator
            Manager HarvestNPruning: same as Validation.Sauvignonblanc.Seaview_4Cane08.Row.HarvestNPruning
            Manager TreeInitialisation
              CultivarName = SauvignonBlanc
              SowingDate = 02/25/2014 00:00:00
              VineDistance = 1.8
              BudNumber = 48
              CaneNumber = 4
              CaneDiameter = 10
              CaneLength = 0.9
              TrunkDiameter = 40
              TrunkLength = 0.8
              RootTrunkRatio = 1
              RootNSC = 0.2
              TrunkNSC = 0.2
              CaneNSC = 0.2
              StartAge = 3
              script: same as in Validation.Sauvignonblanc.RetainedNodeNum.RetainedNodNum.Row.TreeInitialisation
            Manager Fertilise on fixed dates: same as Validation.Sauvignonblanc.Marlborough_2Cane.VineFacts1.Row.Fertilise on fixed dates
            Manager AutoIrrigationBasedOnWaterDeficit: same as Validation.Sauvignonblanc.Marlborough_2Cane.VineFacts1.Row.AutoIrrigationBasedOnWaterDeficit
            Manager Fertilise topup: same as Replacements.Fertilise topup
            Manager Reset on date: same as Replacements.Reset on date
          RectangularZone Alley: Length=100; Width=1.5; Slope=0; AspectAngle=0; Altitude=50
            Manager PastureInitialisation
              CultivarName = StaticCrop
              InitialRootDepth = 2000
              SowingDate = 02/25/2014 00:00:00
              RootDepth = 2000
              RFV = 10
              KLReductionFactor = -0.001
              KLReductionDepth = 150
              YKLModifiers =
              XDepth =
              MaxG = 0.004
              R50 = 150
              script: same as in Validation.Sauvignonblanc.RPC_2000_2002.RPC_1.Alley.PastureInitialisation
            SurfaceOrganicMatter: InitialResidueName=wheat_stubble; InitialResidueType=wheat; InitialResidueMass=500; InitialStandingFraction=0; InitialCPR=0; InitialCNR=100; FractionFaecesAdded=1
            Plant Slurp: PlantType=Slurp; IsEnding=false; DaysAfterEnding=0
            Fertiliser: same as Validation.Sauvignonblanc.RetainedNodeNum.RetainedNodNum.Row.Fertiliser
            Irrigation
            Manager SetPastureVariables: same as Validation.Sauvignonblanc.RetainedNodeNum.RetainedNodNum.Alley.SetPastureVariables
            Manager SetupPastureRootZones: same as Validation.Sauvignonblanc.Marlborough_3Cane.MRL3Cane.Alley.SetupPastureRootZones
            Soil: same as Validation.Sauvignonblanc.RPC_2000_2002.RPC_1.Alley.Soil
            Operations WinterRainfall
              2002-05-28  [Irrigation].Apply(200);
            Manager PlantVariables
              script: same as in Validation.Sauvignonblanc.Marlborough_2Cane.VineFacts1.Alley.PlantVariables
            Report ReportAlley: same as Validation.Sauvignonblanc.RetainedNodeNum.RetainedNodNum.Alley.ReportAlley
            Manager Reset on date: same as Replacements.Reset on date
    Folder Chardonnay
      Experiment Chardonnay
        Factors
          Factor Climate
            Specification=[Weather].FileName = Dashwood.met, Crownthorpe.met, LawnRoad.met, Hexton.met, Site1002_OYB.met, Matawhero.met
        Simulation Chardonnay
          Weather: FileName=Site1001_BRA.met
          Clock: Start=2014-02-25; End=2020-05-01
          Summary
          SoilArbitrator Soil Arbitrator
          MicroClimate: a_interception=0; b_interception=1; c_interception=0; d_interception=0; SoilHeatFluxFraction=0.4; MinimumHeightDiffForNewLayer=0; NightInterceptionFraction=0.5; ReferenceHeight=2
          RectangularZone Row: Length=100; Width=0.9; Slope=0; AspectAngle=0; Altitude=50
            Memo: same as Validation.Sauvignonblanc.RetainedNodeNum.RetainedNodNum.Row.Memo
            Report: EventNames=[Clock].DoReport
            Plant Grapevine: PlantType=Grapevine; IsEnding=false; DaysAfterEnding=0
            Irrigation
            Fertiliser: same as Validation.Sauvignonblanc.RetainedNodeNum.RetainedNodNum.Row.Fertiliser
            SurfaceOrganicMatter: InitialResidueName=wheat_stubble; InitialResidueType=wheat; InitialResidueMass=500; InitialStandingFraction=0; InitialCPR=0; InitialCNR=100; FractionFaecesAdded=1
            Soil: same as Validation.Sauvignonblanc.OtherRegions.OtherRegions.Row.Soil
            Manager SetupTreeRootZones: same as Validation.Sauvignonblanc.RetainedNodeNum.RetainedNodNum.Row.SetupTreeRootZones
            Operations VineIrrigation
            Operations WinterRainfall
              2002-05-28  [Irrigation].Apply(200);
            Manager PlantVariables: same as Validation.Sauvignonblanc.RPC_2000_2002.RPC_1.Row.PlantVariables
            Manager DripIrrigator: same as Validation.Sauvignonblanc.Marlborough_3Cane.MRL3Cane.Row.DripIrrigator
            Manager TreeInitialisation
              CultivarName = Chardonnay
              SowingDate = 02/25/2014 00:00:00
              VineDistance = 1.8
              BudNumber = 48
              CaneNumber = 4
              CaneDiameter = 10
              CaneLength = 0.9
              TrunkDiameter = 40
              TrunkLength = 0.8
              RootTrunkRatio = 1
              RootNSC = 0.2
              TrunkNSC = 0.2
              CaneNSC = 0.2
              StartAge = 3
              script: same as in Validation.Sauvignonblanc.RetainedNodeNum.RetainedNodNum.Row.TreeInitialisation
            Manager HarvestNPruning: same as Validation.Sauvignonblanc.Seaview_4Cane08.Row.HarvestNPruning
            Manager Fertilise on fixed dates: same as Validation.Sauvignonblanc.Marlborough_2Cane.VineFacts1.Row.Fertilise on fixed dates
            Manager AutoIrrigationBasedOnWaterDeficit: same as Validation.Sauvignonblanc.Marlborough_2Cane.VineFacts1.Row.AutoIrrigationBasedOnWaterDeficit
          RectangularZone Alley: Length=100; Width=1.5; Slope=0; AspectAngle=0; Altitude=50
            Report ReportAlley: EventNames=[Row].Grapevine.Pruning
              VariableNames:
                [Clock].Today
                [Clock].Today.Year
                [Clock].Today.DayOfYear
                [Weather].DaysSinceWinterSolstice as DAWS
            SurfaceOrganicMatter: InitialResidueName=wheat_stubble; InitialResidueType=wheat; InitialResidueMass=500; InitialStandingFraction=0; InitialCPR=0; InitialCNR=100; FractionFaecesAdded=1
            Plant Slurp: PlantType=Slurp; IsEnding=false; DaysAfterEnding=0
            Fertiliser: same as Validation.Sauvignonblanc.RetainedNodeNum.RetainedNodNum.Row.Fertiliser
            Irrigation
            Manager PastureInitialisation: same as Validation.Sauvignonblanc.OtherRegions.OtherRegions.Alley.PastureInitialisation
            Manager SetPastureVariables: same as Validation.Sauvignonblanc.RetainedNodeNum.RetainedNodNum.Alley.SetPastureVariables
            Manager SetupPastureRootZones: same as Validation.Sauvignonblanc.Marlborough_3Cane.MRL3Cane.Alley.SetupPastureRootZones
            Soil: same as Validation.Sauvignonblanc.RPC_2000_2002.RPC_1.Alley.Soil
            Operations WinterRainfall
              2002-05-28  [Irrigation].Apply(200);
            Manager PlantVariables
              script: same as in Validation.Sauvignonblanc.Marlborough_2Cane.VineFacts1.Alley.PlantVariables
    Folder Merlot
      Experiment Merlot
        Factors
          Factor Climate: Specification=[Weather].FileName = Longlands.met, Twyford.met
        Simulation Merlot
          Weather: FileName=LongLands.met
          Clock: Start=2014-02-25; End=2020-05-01
          Summary
          SoilArbitrator Soil Arbitrator
          MicroClimate: a_interception=0; b_interception=1; c_interception=0; d_interception=0; SoilHeatFluxFraction=0.4; MinimumHeightDiffForNewLayer=0; NightInterceptionFraction=0.5; ReferenceHeight=2
          RectangularZone Row: Length=100; Width=0.9; Slope=0; AspectAngle=0; Altitude=50
            Memo: same as Validation.Sauvignonblanc.RetainedNodeNum.RetainedNodNum.Row.Memo
            Report: EventNames=[Clock].DoReport
            Plant Grapevine: PlantType=Grapevine; IsEnding=false; DaysAfterEnding=0
            Irrigation
            Fertiliser: same as Validation.Sauvignonblanc.RetainedNodeNum.RetainedNodNum.Row.Fertiliser
            SurfaceOrganicMatter: InitialResidueName=wheat_stubble; InitialResidueType=wheat; InitialResidueMass=500; InitialStandingFraction=0; InitialCPR=0; InitialCNR=100; FractionFaecesAdded=1
            Soil: same as Validation.Sauvignonblanc.OtherRegions.OtherRegions.Row.Soil
            Manager SetupTreeRootZones: same as Validation.Sauvignonblanc.RetainedNodeNum.RetainedNodNum.Row.SetupTreeRootZones
            Operations VineIrrigation
            Operations WinterRainfall
              2002-05-28  [Irrigation].Apply(200);
            Manager PlantVariables: same as Validation.Sauvignonblanc.RPC_2000_2002.RPC_1.Row.PlantVariables
            Manager DripIrrigator: same as Validation.Sauvignonblanc.Marlborough_3Cane.MRL3Cane.Row.DripIrrigator
            Manager TreeInitialisation
              CultivarName = Merlot
              SowingDate = 02/25/2014 00:00:00
              VineDistance = 1.8
              BudNumber = 48
              CaneNumber = 4
              CaneDiameter = 10
              CaneLength = 0.9
              TrunkDiameter = 40
              TrunkLength = 0.8
              RootTrunkRatio = 1
              RootNSC = 0.2
              TrunkNSC = 0.2
              CaneNSC = 0.2
              StartAge = 3
              script: same as in Validation.Sauvignonblanc.RetainedNodeNum.RetainedNodNum.Row.TreeInitialisation
            Manager HarvestNPruning: same as Validation.Sauvignonblanc.RPC_2000_2002.RPC_1.Row.HarvestNPruning
            Manager Fertilise on fixed dates: same as Validation.Sauvignonblanc.Marlborough_2Cane.VineFacts1.Row.Fertilise on fixed dates
            Manager AutoIrrigationBasedOnWaterDeficit: same as Validation.Sauvignonblanc.Marlborough_2Cane.VineFacts1.Row.AutoIrrigationBasedOnWaterDeficit
            Manager Reset on date: same as Replacements.Reset on date
          RectangularZone Alley: Length=100; Width=1.5; Slope=0; AspectAngle=0; Altitude=50
            Report ReportAlley: EventNames=[Row].Grapevine.Pruning
              VariableNames:
                [Clock].Today
                [Clock].Today.Year
                [Clock].Today.DayOfYear
                [Weather].DaysSinceWinterSolstice as DAWS
            SurfaceOrganicMatter: InitialResidueName=wheat_stubble; InitialResidueType=wheat; InitialResidueMass=500; InitialStandingFraction=0; InitialCPR=0; InitialCNR=100; FractionFaecesAdded=1
            Plant Slurp: PlantType=Slurp; IsEnding=false; DaysAfterEnding=0
            Fertiliser: same as Validation.Sauvignonblanc.RetainedNodeNum.RetainedNodNum.Row.Fertiliser
            Irrigation
            Manager PastureInitialisation: same as Validation.Sauvignonblanc.OtherRegions.OtherRegions.Alley.PastureInitialisation
            Manager SetPastureVariables: same as Validation.Sauvignonblanc.RetainedNodeNum.RetainedNodNum.Alley.SetPastureVariables
            Manager SetupPastureRootZones: same as Validation.Sauvignonblanc.Marlborough_3Cane.MRL3Cane.Alley.SetupPastureRootZones
            Soil: same as Validation.Sauvignonblanc.RPC_2000_2002.RPC_1.Alley.Soil
            Operations WinterRainfall
              2002-05-28  [Irrigation].Apply(200);
            Manager PlantVariables
              script: same as in Validation.Sauvignonblanc.Marlborough_2Cane.VineFacts1.Alley.PlantVariables
            Manager Reset on date: same as Replacements.Reset on date
    Folder PinotNoir
      Experiment PinotNoir
        Factors
          Factor Climate
            Specification=[Weather].FileName = Site1001_BRA.met, Site1003_SEA.met, WAP.met, McArthur.met, Bannockburn.met, Gibbston.met, Pisa.met
        Simulation PinotNoir
          Weather: FileName=Pisa.met
          Clock: Start=2014-02-25; End=2020-05-01
          Summary
          SoilArbitrator Soil Arbitrator
          MicroClimate: a_interception=0; b_interception=1; c_interception=0; d_interception=0; SoilHeatFluxFraction=0.4; MinimumHeightDiffForNewLayer=0; NightInterceptionFraction=0.5; ReferenceHeight=2
          RectangularZone Row: Length=100; Width=0.9; Slope=0; AspectAngle=0; Altitude=50
            Memo: same as Validation.Sauvignonblanc.RetainedNodeNum.RetainedNodNum.Row.Memo
            Report: EventNames=[Clock].DoReport
            Plant Grapevine: PlantType=Grapevine; IsEnding=false; DaysAfterEnding=0
            Irrigation
            Fertiliser: same as Validation.Sauvignonblanc.RetainedNodeNum.RetainedNodNum.Row.Fertiliser
            SurfaceOrganicMatter: InitialResidueName=wheat_stubble; InitialResidueType=wheat; InitialResidueMass=500; InitialStandingFraction=0; InitialCPR=0; InitialCNR=100; FractionFaecesAdded=1
            Soil: same as Validation.Sauvignonblanc.OtherRegions.OtherRegions.Row.Soil
            Manager SetupTreeRootZones: same as Validation.Sauvignonblanc.RetainedNodeNum.RetainedNodNum.Row.SetupTreeRootZones
            Operations VineIrrigation
            Operations WinterRainfall
              2002-05-28  [Irrigation].Apply(200);
            Manager PlantVariables: same as Validation.Sauvignonblanc.RPC_2000_2002.RPC_1.Row.PlantVariables
            Manager DripIrrigator: same as Validation.Sauvignonblanc.Marlborough_3Cane.MRL3Cane.Row.DripIrrigator
            Manager TreeInitialisation
              CultivarName = PinotNoir
              SowingDate = 02/25/2014 00:00:00
              VineDistance = 1.8
              BudNumber = 48
              CaneNumber = 4
              CaneDiameter = 10
              CaneLength = 0.9
              TrunkDiameter = 40
              TrunkLength = 0.8
              RootTrunkRatio = 1
              RootNSC = 0.2
              TrunkNSC = 0.2
              CaneNSC = 0.2
              StartAge = 3
              script: same as in Validation.Sauvignonblanc.RetainedNodeNum.RetainedNodNum.Row.TreeInitialisation
            Manager HarvestNPruning: same as Validation.Sauvignonblanc.RPC_2000_2002.RPC_1.Row.HarvestNPruning
            Manager AutoIrrigationBasedOnWaterDeficit: same as Validation.Sauvignonblanc.Marlborough_2Cane.VineFacts1.Row.AutoIrrigationBasedOnWaterDeficit
            Manager Fertilise on fixed dates: same as Validation.Sauvignonblanc.Marlborough_2Cane.VineFacts1.Row.Fertilise on fixed dates
            Manager Reset on date: same as Replacements.Reset on date
          RectangularZone Alley: Length=100; Width=1.5; Slope=0; AspectAngle=0; Altitude=50
            Report ReportAlley: EventNames=[Row].Grapevine.Pruning
              VariableNames:
                [Clock].Today
                [Clock].Today.Year
                [Clock].Today.DayOfYear
                [Weather].DaysSinceWinterSolstice as DAWS
            SurfaceOrganicMatter: InitialResidueName=wheat_stubble; InitialResidueType=wheat; InitialResidueMass=500; InitialStandingFraction=0; InitialCPR=0; InitialCNR=100; FractionFaecesAdded=1
            Plant Slurp: PlantType=Slurp; IsEnding=false; DaysAfterEnding=0
            Fertiliser: same as Validation.Sauvignonblanc.RetainedNodeNum.RetainedNodNum.Row.Fertiliser
            Irrigation
            Manager PastureInitialisation
              CultivarName = StaticCrop
              InitialRootDepth = 2000
              SowingDate = 01/01/2014 00:00:00
              RootDepth = 2000
              RFV = 10
              KLReductionFactor = -0.001
              KLReductionDepth = 150
              YKLModifiers =
              XDepth =
              MaxG = 0.004
              R50 = 150
              script: same as in Validation.Sauvignonblanc.RPC_2000_2002.RPC_1.Alley.PastureInitialisation
            Manager SetPastureVariables: same as Validation.Sauvignonblanc.RetainedNodeNum.RetainedNodNum.Alley.SetPastureVariables
            Manager SetupPastureRootZones: same as Validation.Sauvignonblanc.Marlborough_3Cane.MRL3Cane.Alley.SetupPastureRootZones
            Soil: same as Validation.Sauvignonblanc.RPC_2000_2002.RPC_1.Alley.Soil
            Operations WinterRainfall
              2002-05-28  [Irrigation].Apply(200);
            Manager PlantVariables
              script: same as in Validation.Sauvignonblanc.Marlborough_2Cane.VineFacts1.Alley.PlantVariables
    Folder PinotGris
      Experiment PinotGris
        Factors
          Factor Climate
            Specification=[Weather].FileName = Crownthorpe.met, Site1003_SEA.met, Site1004_RPC.met
        Simulation PinotGris
          Weather: FileName=LongLands.met
          Clock: Start=2014-02-25; End=2020-05-01
          Summary
          SoilArbitrator Soil Arbitrator
          MicroClimate: a_interception=0; b_interception=1; c_interception=0; d_interception=0; SoilHeatFluxFraction=0.4; MinimumHeightDiffForNewLayer=0; NightInterceptionFraction=0.5; ReferenceHeight=2
          RectangularZone Row: Length=100; Width=0.9; Slope=0; AspectAngle=0; Altitude=50
            Memo: same as Validation.Sauvignonblanc.RetainedNodeNum.RetainedNodNum.Row.Memo
            Report: EventNames=[Clock].DoReport
            Plant Grapevine: PlantType=Grapevine; IsEnding=false; DaysAfterEnding=0
            Irrigation
            Fertiliser: same as Validation.Sauvignonblanc.RetainedNodeNum.RetainedNodNum.Row.Fertiliser
            SurfaceOrganicMatter: InitialResidueName=wheat_stubble; InitialResidueType=wheat; InitialResidueMass=500; InitialStandingFraction=0; InitialCPR=0; InitialCNR=100; FractionFaecesAdded=1
            Soil: same as Validation.Sauvignonblanc.OtherRegions.OtherRegions.Row.Soil
            Manager SetupTreeRootZones: same as Validation.Sauvignonblanc.RetainedNodeNum.RetainedNodNum.Row.SetupTreeRootZones
            Operations VineIrrigation
            Operations WinterRainfall
              2002-05-28  [Irrigation].Apply(200);
            Manager PlantVariables: same as Validation.Sauvignonblanc.RPC_2000_2002.RPC_1.Row.PlantVariables
            Manager DripIrrigator: same as Validation.Sauvignonblanc.Marlborough_3Cane.MRL3Cane.Row.DripIrrigator
            Manager TreeInitialisation: same as Validation.PinotNoir.PinotNoir.PinotNoir.Row.TreeInitialisation
            Manager HarvestNPruning: same as Validation.Sauvignonblanc.RPC_2000_2002.RPC_1.Row.HarvestNPruning
            Manager Fertilise on fixed dates: same as Validation.Sauvignonblanc.Marlborough_2Cane.VineFacts1.Row.Fertilise on fixed dates
            Manager AutoIrrigationBasedOnWaterDeficit: same as Validation.Sauvignonblanc.Marlborough_2Cane.VineFacts1.Row.AutoIrrigationBasedOnWaterDeficit
            Manager Reset on date: same as Replacements.Reset on date
          RectangularZone Alley: same as Validation.Merlot.Merlot.Merlot.Alley
    Folder newCanopySyste
      Simulation BRI_4Cane
        Clock: Start=2005-02-25; End=2022-07-01
        Summary SummaryFile
        Weather: FileName=Site1004_RPC.met
        MicroClimate: a_interception=0; b_interception=1; c_interception=0; d_interception=0; SoilHeatFluxFraction=0.4; MinimumHeightDiffForNewLayer=0; NightInterceptionFraction=0.5; ReferenceHeight=2
        SoilArbitrator Soil Arbitrator
        RectangularZone Row: Length=100; Width=0.9; Slope=0; AspectAngle=0; Altitude=50
          Report: EventNames=[Clock].DoReport
          Memo: same as Validation.Sauvignonblanc.RetainedNodeNum.RetainedNodNum.Row.Memo
          Plant Grapevine: PlantType=Grapevine; IsEnding=false; DaysAfterEnding=0
          Manager TreeInitialisation
            CultivarName = SauvignonBlanc
            SowingDate = 02/25/2005 00:00:00
            VineDistance = 1.8
            BudNumber = 48
            CaneNumber = 4
            CaneDiameter = 10
            CaneLength = 0.9
            TrunkDiameter = 65
            TrunkLength = 0.8
            RootTrunkRatio = 1
            RootNSC = 0.2
            TrunkNSC = 0.2
            CaneNSC = 0.2
            StartAge = 8
            script: same as in Validation.Sauvignonblanc.RetainedNodeNum.RetainedNodNum.Row.TreeInitialisation
          Irrigation
          Fertiliser: same as Validation.Sauvignonblanc.RetainedNodeNum.RetainedNodNum.Row.Fertiliser
          SurfaceOrganicMatter: InitialResidueName=wheat_stubble; InitialResidueType=wheat; InitialResidueMass=10000; InitialStandingFraction=0; InitialCPR=0; InitialCNR=20; FractionFaecesAdded=1
          Manager SetupTreeRootZones: same as Validation.Sauvignonblanc.RetainedNodeNum.RetainedNodNum.Row.SetupTreeRootZones
          Operations VineIrrigation
          Operations WinterRainfall
            2006-08-26  [Irrigation].Apply(45);
          Manager PlantVariables
            script: same as in Validation.Sauvignonblanc.RetainedNodeNum.RetainedNodNum.Row.PlantVariables
          Manager HarvestNPruning: same as Validation.Sauvignonblanc.RetainedNodeNum.RetainedNodNum.Row.HarvestNPruning
          Manager DripIrrigator
            FertilizeDAWS = 100
            Amount = 40
            script: same as in Validation.Sauvignonblanc.RetainedNodeNum.RetainedNodNum.Row.DripIrrigator
          Manager AutoIrrigationBasedOnWaterDeficit
            StartDate = 1-nov
            EndDate = 1-mar
            FASWThreshold = 0.6
            FASWDepth = 1500
            Amount = 20
            script: same as in Replacements.AutoIrrigationBasedOnWaterDeficit
          Manager Fertilise on fixed dates
            FertiliserType = NH4NO3N
            FertiliserDates = 1-Nov, 1-Feb
            Amount = 30
            AmountType = True
            script: same as in Replacements.Fertilise on fixed dates
          Manager Reset on date: same as Validation.Sauvignonblanc.RetainedNodeNum.RetainedNodNum.Row.Reset on date
          Manager Fertilise topup: same as Replacements.Fertilise topup
          Soil: same as Validation.Sauvignonblanc.RetainedNodeNum.RetainedNodNum.Row.Soil
          Manager ReviseCanopyHeight
```csharp
using Models.Soils;
using Models.Functions;
using APSIM.Shared.Utilities;
using System.Xml.Serialization;
using Models;
using Models.PMF;
using System.Text;
using System.Collections.Generic;
using Models.Core;
using System;
using Models.PMF.Organs;

namespace Models
{
    [Serializable] 
    public class Script : Model
    {
        [Link] private Plant Grapevine;
        [Link] private Clock Clock;
        [Link] private Zone zone;
        
                
        [EventSubscribe("StartOfSimulation")]
        private void OnSimulationCommencing(object sender, EventArgs e)
        {
          zone.Set("Grapevine.Berry.YieldComponent.BerryMass.PostEventValue.BerryMassFun.LowerLimit.FixedValue", 1.8);
          zone.Set("Grapevine.Berry.YieldComponent.BerryNum.PostEventValue.BerryNumFun.Minimum.FixedValue", 1);
          zone.Set("Grapevine.Berry.YieldComponent.BunchesPerShoot.PostEventValue.MaximumFunc.one.FixedValue", 0);
          
        }
     }
}
```
        RectangularZone Alley: Length=100; Width=1.5; Slope=0; AspectAngle=0; Altitude=50
          SurfaceOrganicMatter: InitialResidueName=wheat_stubble; InitialResidueType=Grapevine; InitialResidueMass=20; InitialStandingFraction=0; InitialCPR=0; InitialCNR=30; FractionFaecesAdded=1
          Plant Slurp: PlantType=Slurp; IsEnding=false; DaysAfterEnding=0
          Fertiliser: same as Validation.Sauvignonblanc.RetainedNodeNum.RetainedNodNum.Row.Fertiliser
          Irrigation
          Manager PastureInitialisation
            CultivarName = StaticCrop
            InitialRootDepth = 2000
            SowingDate = 02/25/2005 00:00:00
            RootDepth = 2000
            RFV = 10
            KLReductionFactor = -0.001
            KLReductionDepth = 150
            MaxG = 0.004
            R50 = 150
            script: same as in Validation.Sauvignonblanc.RetainedNodeNum.RetainedNodNum.Alley.PastureInitialisation
          Manager SetPastureVariables
            Ext_coef = 0.6
            MaximumHeight = 300
            MinimumHeight = 100
            script: same as in Validation.Sauvignonblanc.RetainedNodeNum.RetainedNodNum.Alley.SetPastureVariables
          Manager SetupPastureRootZones: same as Validation.Sauvignonblanc.RetainedNodeNum.RetainedNodNum.Alley.SetupPastureRootZones
          Operations WinterRainfall
            2002-05-28  [Irrigation].Apply(200);
          Manager PlantVariables
            script: same as in Validation.Sauvignonblanc.Marlborough_2Cane.VineFacts1.Alley.PlantVariables
          Report ReportAlley: same as Validation.Sauvignonblanc.RetainedNodeNum.RetainedNodNum.Alley.ReportAlley
          Manager Reset on date: same as Replacements.Reset on date
          Manager Fertilise topup: same as Replacements.Fertilise topup
          Soil: same as Validation.Sauvignonblanc.RetainedNodeNum.RetainedNodNum.Row.Soil
      Simulation PFR_T3L1_Up
        Clock: Start=2005-02-25; End=2022-07-01
        Summary SummaryFile
        Weather: FileName=Site1004_RPC.met
        MicroClimate: a_interception=0; b_interception=1; c_interception=0; d_interception=0; SoilHeatFluxFraction=0.4; MinimumHeightDiffForNewLayer=0; NightInterceptionFraction=0.5; ReferenceHeight=2
        SoilArbitrator Soil Arbitrator
        RectangularZone Row: Length=100; Width=0.9; Slope=0; AspectAngle=0; Altitude=50
          Report: EventNames=[Clock].DoReport
          Memo: same as Validation.Sauvignonblanc.RetainedNodeNum.RetainedNodNum.Row.Memo
          Plant Grapevine: PlantType=Grapevine; IsEnding=false; DaysAfterEnding=0
          Manager TreeInitialisation
            CultivarName = SauvignonBlanc
            SowingDate = 02/25/2005 00:00:00
            VineDistance = 1.8
            BudNumber = 24
            CaneNumber = 2
            CaneDiameter = 10
            CaneLength = 0.9
            TrunkDiameter = 40
            TrunkLength = 0.6
            RootTrunkRatio = 0.8
            RootNSC = 0.2
            TrunkNSC = 0.2
            CaneNSC = 0.2
            StartAge = 8
            script: same as in Validation.Sauvignonblanc.RetainedNodeNum.RetainedNodNum.Row.TreeInitialisation
          Irrigation
          Fertiliser: same as Validation.Sauvignonblanc.RetainedNodeNum.RetainedNodNum.Row.Fertiliser
          SurfaceOrganicMatter: InitialResidueName=wheat_stubble; InitialResidueType=Grapevine; InitialResidueMass=20; InitialStandingFraction=0; InitialCPR=0; InitialCNR=30; FractionFaecesAdded=1
          Manager SetupTreeRootZones: same as Validation.Sauvignonblanc.RetainedNodeNum.RetainedNodNum.Row.SetupTreeRootZones
          Operations VineIrrigation
          Operations WinterRainfall
            2002-05-28  [Irrigation].Apply(200);
          Manager PlantVariables
            script: same as in Validation.Sauvignonblanc.Marlborough_2Cane.VineFacts1.Row.PlantVariables
          Manager DripIrrigator
            script: same as in Validation.Sauvignonblanc.Marlborough_2Cane.VineFacts1.Row.DripIrrigator
          Manager HarvestNPruning: same as Validation.Sauvignonblanc.RetainedNodeNum.RetainedNodNum.Row.HarvestNPruning
          Manager AutoIrrigationBasedOnWaterDeficit
            StartDate = 1-nov
            EndDate = 1-mar
            FASWThreshold = 0.7
            FASWDepth = 2000
            Amount = 20
            script: same as in Replacements.AutoIrrigationBasedOnWaterDeficit
          Manager Fertilise on fixed dates: same as Validation.Sauvignonblanc.Marlborough_2Cane.VineFacts1.Row.Fertilise on fixed dates
          Manager Reset on date: same as Replacements.Reset on date
          Manager Fertilise topup: same as Replacements.Fertilise topup
          Soil: same as Validation.Sauvignonblanc.RetainedNodeNum.RetainedNodNum.Row.Soil
          Manager ReviseCanopyHeight
```csharp
using Models.Soils;
using Models.Functions;
using APSIM.Shared.Utilities;
using System.Xml.Serialization;
using Models;
using Models.PMF;
using System.Text;
using System.Collections.Generic;
using Models.Core;
using System;
using Models.PMF.Organs;

namespace Models
{
    [Serializable] 
    public class Script : Model
    {
        [Link] private Plant Grapevine;
        [Link] private Clock Clock;
        [Link] private Zone zone;
        
                
        [EventSubscribe("StartOfSimulation")]
        private void OnSimulationCommencing(object sender, EventArgs e)
        {
          zone.Set("Grapevine.Structure.BranchingRate.Potential_Branching_Rate.XYPairs.Y[1]", 0.01 );
          zone.Set("Grapevine.Structure.BranchingRate.Potential_Branching_Rate.XYPairs.Y[2]", 0.02 );
          zone.Set("Grapevine.Structure.BranchingRate.Potential_Branching_Rate.XYPairs.Y[3]", 0.02 );
          zone.Set("Grapevine.Structure.BranchingRate.Potential_Branching_Rate.XYPairs.Y[4]", 0.02 );
          zone.Set("Grapevine.Structure.BranchingRate.Potential_Branching_Rate.XYPairs.Y[5]", 0.02 );
          zone.Set("Grapevine.Structure.BranchingRate.Potential_Branching_Rate.XYPairs.Y[6]", 0.01 );
          zone.Set("Grapevine.Berry.YieldComponent.BerryMass.PostEventValue.BerryMassFun.LowerLimit.FixedValue", 1.8);
          zone.Set("Grapevine.Berry.YieldComponent.BerryNum.PostEventValue.BerryNumFun.Minimum.FixedValue", 1);
          zone.Set("Grapevine.Berry.YieldComponent.BunchesPerShoot.PostEventValue.MaximumFunc.one.FixedValue", 0);
          
        }
     }
}
```
        RectangularZone Alley: Length=100; Width=0.6; Slope=0; AspectAngle=0; Altitude=50
          SurfaceOrganicMatter: InitialResidueName=wheat_stubble; InitialResidueType=Grapevine; InitialResidueMass=20; InitialStandingFraction=0; InitialCPR=0; InitialCNR=30; FractionFaecesAdded=1
          Plant Slurp: PlantType=Slurp; IsEnding=false; DaysAfterEnding=0
          Fertiliser: same as Validation.Sauvignonblanc.RetainedNodeNum.RetainedNodNum.Row.Fertiliser
          Irrigation
          Manager PastureInitialisation: same as Validation.newCanopySyste.BRI_4Cane.Alley.PastureInitialisation
          Manager SetPastureVariables: same as Validation.newCanopySyste.BRI_4Cane.Alley.SetPastureVariables
          Manager SetupPastureRootZones: same as Validation.Sauvignonblanc.RetainedNodeNum.RetainedNodNum.Alley.SetupPastureRootZones
          Operations WinterRainfall
            2002-05-28  [Irrigation].Apply(200);
          Manager PlantVariables
            script: same as in Validation.Sauvignonblanc.Marlborough_2Cane.VineFacts1.Alley.PlantVariables
          Report ReportAlley: same as Validation.Sauvignonblanc.RetainedNodeNum.RetainedNodNum.Alley.ReportAlley
          Manager Reset on date: same as Replacements.Reset on date
          Manager Fertilise topup: same as Replacements.Fertilise topup
          Soil: same as Validation.Sauvignonblanc.RetainedNodeNum.RetainedNodNum.Row.Soil
      Simulation PFR_T3L1_Mid
        Clock: Start=2005-02-25; End=2022-07-01
        Summary SummaryFile
        Weather: FileName=Site1004_RPC-Mid.met
        MicroClimate: a_interception=0; b_interception=1; c_interception=0; d_interception=0; SoilHeatFluxFraction=0.4; MinimumHeightDiffForNewLayer=0; NightInterceptionFraction=0.5; ReferenceHeight=2
        SoilArbitrator Soil Arbitrator
        RectangularZone Row: Length=100; Width=0.9; Slope=0; AspectAngle=0; Altitude=50
          Report: EventNames=[Clock].DoReport
          Memo: same as Validation.Sauvignonblanc.RetainedNodeNum.RetainedNodNum.Row.Memo
          Plant Grapevine: PlantType=Grapevine; IsEnding=false; DaysAfterEnding=0
          Manager TreeInitialisation
            CultivarName = SauvignonBlanc
            SowingDate = 02/25/2005 00:00:00
            VineDistance = 1.8
            BudNumber = 24
            CaneNumber = 2
            CaneDiameter = 10
            CaneLength = 0.9
            TrunkDiameter = 20
            TrunkLength = 0.6
            RootTrunkRatio = 0.7
            RootNSC = 0.2
            TrunkNSC = 0.2
            CaneNSC = 0.2
            StartAge = 8
            script: same as in Validation.Sauvignonblanc.RetainedNodeNum.RetainedNodNum.Row.TreeInitialisation
          Irrigation
          Fertiliser: same as Validation.Sauvignonblanc.RetainedNodeNum.RetainedNodNum.Row.Fertiliser
          SurfaceOrganicMatter: InitialResidueName=wheat_stubble; InitialResidueType=Grapevine; InitialResidueMass=20; InitialStandingFraction=0; InitialCPR=0; InitialCNR=30; FractionFaecesAdded=1
          Manager SetupTreeRootZones: same as Validation.Sauvignonblanc.RetainedNodeNum.RetainedNodNum.Row.SetupTreeRootZones
          Operations VineIrrigation
          Operations WinterRainfall
            2002-05-28  [Irrigation].Apply(200);
          Manager PlantVariables: same as Validation.newCanopySyste.PFR_T3L1_Up.Row.PlantVariables
          Manager DripIrrigator: same as Validation.newCanopySyste.PFR_T3L1_Up.Row.DripIrrigator
          Manager HarvestNPruning: same as Validation.Sauvignonblanc.Marlborough_2Cane.VineFacts1.Row.HarvestNPruning
          Manager AutoIrrigationBasedOnWaterDeficit: same as Validation.newCanopySyste.PFR_T3L1_Up.Row.AutoIrrigationBasedOnWaterDeficit
          Manager Fertilise on fixed dates: same as Validation.Sauvignonblanc.Marlborough_2Cane.VineFacts1.Row.Fertilise on fixed dates
          Manager Reset on date: same as Replacements.Reset on date
          Manager Fertilise topup: same as Replacements.Fertilise topup
          Soil: same as Validation.Sauvignonblanc.RetainedNodeNum.RetainedNodNum.Row.Soil
          Manager ReviseCanopyHeight
```csharp
using Models.Soils;
using Models.Functions;
using APSIM.Shared.Utilities;
using System.Xml.Serialization;
using Models;
using Models.PMF;
using System.Text;
using System.Collections.Generic;
using Models.Core;
using System;
using Models.PMF.Organs;

namespace Models
{
    [Serializable] 
    public class Script : Model
    {
        [Link] private Plant Grapevine;
        [Link] private Clock Clock;
        [Link] private Zone zone;
        
                
        [EventSubscribe("StartOfSimulation")]
        private void OnSimulationCommencing(object sender, EventArgs e)
        {
              
          zone.Set("Grapevine.Structure.BranchingRate.Potential_Branching_Rate.XYPairs.Y[1]", 0.01 );
          zone.Set("Grapevine.Structure.BranchingRate.Potential_Branching_Rate.XYPairs.Y[2]", 0.02 );
          zone.Set("Grapevine.Structure.BranchingRate.Potential_Branching_Rate.XYPairs.Y[3]", 0.02 );
          zone.Set("Grapevine.Structure.BranchingRate.Potential_Branching_Rate.XYPairs.Y[4]", 0.02 );
          zone.Set("Grapevine.Structure.BranchingRate.Potential_Branching_Rate.XYPairs.Y[5]", 0.02 );
          zone.Set("Grapevine.Structure.BranchingRate.Potential_Branching_Rate.XYPairs.Y[6]", 0.01 );
          zone.Set("Grapevine.Berry.YieldComponent.BerryNum.PostEventValue.BerryNumFun.Minimum.FixedValue", 1);
          zone.Set("Grapevine.Berry.YieldComponent.BerryMass.PostEventValue.BerryMassFun.LowerLimit.FixedValue", 1.8);
          zone.Set("Grapevine.Berry.YieldComponent.BunchesPerShoot.PostEventValue.MaximumFunc.one.FixedValue", 0);
          
        }
     }
}
```
        RectangularZone Alley: same as Validation.newCanopySyste.PFR_T3L1_Up.Alley
      Simulation PFR_T3L1_Low
        Clock: Start=2005-02-25; End=2022-07-01
        Summary SummaryFile
        Weather: FileName=Site1004_RPC-Low.met
        MicroClimate: a_interception=0; b_interception=1; c_interception=0; d_interception=0; SoilHeatFluxFraction=0.4; MinimumHeightDiffForNewLayer=0; NightInterceptionFraction=0.5; ReferenceHeight=2
        SoilArbitrator Soil Arbitrator
        RectangularZone Row: Length=100; Width=0.9; Slope=0; AspectAngle=0; Altitude=50
          Report: EventNames=[Clock].DoReport
          Memo: same as Validation.Sauvignonblanc.RetainedNodeNum.RetainedNodNum.Row.Memo
          Plant Grapevine: PlantType=Grapevine; IsEnding=false; DaysAfterEnding=0
          Manager TreeInitialisation: same as Validation.newCanopySyste.PFR_T3L1_Mid.Row.TreeInitialisation
          Irrigation
          Fertiliser: same as Validation.Sauvignonblanc.RetainedNodeNum.RetainedNodNum.Row.Fertiliser
          SurfaceOrganicMatter: InitialResidueName=wheat_stubble; InitialResidueType=Grapevine; InitialResidueMass=20; InitialStandingFraction=0; InitialCPR=0; InitialCNR=30; FractionFaecesAdded=1
          Manager SetupTreeRootZones: same as Validation.Sauvignonblanc.RetainedNodeNum.RetainedNodNum.Row.SetupTreeRootZones
          Operations VineIrrigation
          Operations WinterRainfall
            2002-05-28  [Irrigation].Apply(200);
          Manager PlantVariables: same as Validation.newCanopySyste.PFR_T3L1_Up.Row.PlantVariables
          Manager DripIrrigator: same as Validation.newCanopySyste.PFR_T3L1_Up.Row.DripIrrigator
          Manager HarvestNPruning: same as Validation.Sauvignonblanc.Marlborough_2Cane.VineFacts1.Row.HarvestNPruning
          Manager AutoIrrigationBasedOnWaterDeficit: same as Validation.newCanopySyste.PFR_T3L1_Up.Row.AutoIrrigationBasedOnWaterDeficit
          Manager Fertilise on fixed dates: same as Validation.Sauvignonblanc.Marlborough_2Cane.VineFacts1.Row.Fertilise on fixed dates
          Manager Reset on date: same as Replacements.Reset on date
          Manager Fertilise topup: same as Replacements.Fertilise topup
          Soil: same as Validation.Sauvignonblanc.RetainedNodeNum.RetainedNodNum.Row.Soil
          Manager ReviseCanopyHeight
```csharp
using Models.Soils;
using Models.Functions;
using APSIM.Shared.Utilities;
using System.Xml.Serialization;
using Models;
using Models.PMF;
using System.Text;
using System.Collections.Generic;
using Models.Core;
using System;
using Models.PMF.Organs;

namespace Models
{
    [Serializable] 
    public class Script : Model
    {
        [Link] private Plant Grapevine;
        [Link] private Clock Clock;
        [Link] private Zone zone;
        
                
        [EventSubscribe("StartOfSimulation")]
        private void OnSimulationCommencing(object sender, EventArgs e)
        {
              
          zone.Set("Grapevine.Structure.BranchingRate.Potential_Branching_Rate.XYPairs.Y[1]", 0.01 );
          zone.Set("Grapevine.Structure.BranchingRate.Potential_Branching_Rate.XYPairs.Y[2]", 0.02 );
          zone.Set("Grapevine.Structure.BranchingRate.Potential_Branching_Rate.XYPairs.Y[3]", 0.02 );
          zone.Set("Grapevine.Structure.BranchingRate.Potential_Branching_Rate.XYPairs.Y[4]", 0.02 );
          zone.Set("Grapevine.Structure.BranchingRate.Potential_Branching_Rate.XYPairs.Y[5]", 0.02 );
          zone.Set("Grapevine.Structure.BranchingRate.Potential_Branching_Rate.XYPairs.Y[6]", 0.01 );
          zone.Set("Grapevine.Berry.YieldComponent.BerryNum.PostEventValue.BerryNumFun.Minimum.FixedValue", 1);
          
          zone.Set("Grapevine.Berry.YieldComponent.BunchesPerShoot.PostEventValue.MaximumFunc.one.FixedValue", 0);
           zone.Set("Grapevine.Berry.YieldComponent.BerryMass.PostEventValue.BerryMassFun.LowerLimit.FixedValue", 1.8);
          
        }
     }
}
```
        RectangularZone Alley: same as Validation.newCanopySyste.PFR_T3L1_Up.Alley
      Simulation BRI_6Cane
        Clock: Start=2005-02-25; End=2022-07-01
        Summary SummaryFile
        Weather: FileName=Site1004_RPC.met
        MicroClimate: a_interception=0; b_interception=1; c_interception=0; d_interception=0; SoilHeatFluxFraction=0.4; MinimumHeightDiffForNewLayer=0; NightInterceptionFraction=0.5; ReferenceHeight=2
        SoilArbitrator Soil Arbitrator
        RectangularZone Row: Length=100; Width=0.9; Slope=0; AspectAngle=0; Altitude=50
          Report: EventNames=[Clock].DoReport
          Memo: same as Validation.Sauvignonblanc.RetainedNodeNum.RetainedNodNum.Row.Memo
          Plant Grapevine: PlantType=Grapevine; IsEnding=false; DaysAfterEnding=0
          Manager TreeInitialisation
            CultivarName = SauvignonBlanc
            SowingDate = 02/25/2005 00:00:00
            VineDistance = 1.8
            BudNumber = 72
            CaneNumber = 6
            CaneDiameter = 20
            CaneLength = 0.9
            TrunkDiameter = 65
            TrunkLength = 0.8
            RootTrunkRatio = 1
            RootNSC = 0.2
            TrunkNSC = 0.2
            CaneNSC = 0.2
            StartAge = 8
            script: same as in Validation.Sauvignonblanc.RetainedNodeNum.RetainedNodNum.Row.TreeInitialisation
          Irrigation
          Fertiliser: same as Validation.Sauvignonblanc.RetainedNodeNum.RetainedNodNum.Row.Fertiliser
          SurfaceOrganicMatter: InitialResidueName=wheat_stubble; InitialResidueType=wheat; InitialResidueMass=10000; InitialStandingFraction=0; InitialCPR=0; InitialCNR=20; FractionFaecesAdded=1
          Manager SetupTreeRootZones: same as Validation.Sauvignonblanc.RetainedNodeNum.RetainedNodNum.Row.SetupTreeRootZones
          Operations VineIrrigation
          Operations WinterRainfall
            2006-08-26  [Irrigation].Apply(45);
          Manager PlantVariables: same as Validation.newCanopySyste.BRI_4Cane.Row.PlantVariables
          Manager HarvestNPruning
            LeafPluckingDAWS = 205
            HarvestDAWS = 305
            PruningDAWS = 341
            FrostDate1 = 10/03/2002 00:00:00
            FrostDate2 = 11/18/2002 00:00:00
```csharp
using Models.PMF.Interfaces;
using Newtonsoft.Json;
using Models.PMF.Struct;
using Models.Climate;
using System;
using System.Collections.Generic;
using Models.Core;
using Models.PMF;
using Models.PMF.Interfaces;
using System.Xml.Serialization;
using Models.PMF.Organs;
using Models.PMF.Phen;
using Models.Soils;

namespace Models
{
    [Serializable] 
    [System.Xml.Serialization.XmlInclude(typeof(Model))]
    public class Script : Model
    {
        [Link] private Plant Grapevine;
        [Link] private Clock Clock;
        [Link] private Zone zone;
        [Link] private Weather weather;
        [Link]
        private Root root;
        [Link(Type = LinkType.Path, Path = "[Grapevine].Structure")]
        private Structure structure;
        [Link(Type = LinkType.Path, Path = "[Grapevine].Phenology")]
        private Phenology phenology;
       
        public event EventHandler LeafPlucking;
           public event EventHandler Pruning;       
       
        [Description("SummerPruning_DAWS")]         
        public int LeafPluckingDAWS { get; set; }  //day

        [Description("Harvest_DAWS")]
        public int HarvestDAWS { get; set; }

        [Description("Pruning_DAWS")]         
        public int PruningDAWS { get; set; }  //day

        [Description("Frost Date 1")]
        public DateTime FrostDate1 { get; set; }
        [Description("Frost Date 2")]
        public DateTime FrostDate2 { get; set; }







        [EventSubscribe("StartOfSimulation")]
        private void OnSimulationCommencing(object sender, EventArgs e)
        {
            
          
            zone.Set("[Grapevine].Phenology.AccumulatedChillingUnitBeforeWinterPruning.ChillBeforePrune.PruningTime.FixedValue", PruningDAWS);
        }
        
        [EventSubscribe("DoManagement")]
        private void OnDoManagement(object sender, EventArgs e)
        {
            var Leaf = Grapevine.FindChild<IHasDamageableBiomass>("Leaf");
            var Shoot = Grapevine.FindChild<IHasDamageableBiomass>("Shoot");
            var Cane = Grapevine.FindChild<IHasDamageableBiomass>("Cane");
            var Trunk = Grapevine.FindChild<IHasDamageableBiomass>("Trunk");
            var Root = Grapevine.FindChild<IHasDamageableBiomass>("Root");
            var StructuralRoot = Grapevine.FindChild<IHasDamageableBiomass>("StructuralRoot");
            var Berry = Grapevine.FindChild<IHasDamageableBiomass>("Berry");
                
             //Set up  array of remove fractions to send with Cut method.  Each member in the array corresponds to an organ in the same order they are set up in.
             //PruneDate = DateTime.Parse(PruneDateString);
             if (weather.DaysSinceWinterSolstice == LeafPluckingDAWS && phenology.Stage >= 3)
             {
                //int TargetLeafRank = 20;    
                //int LeafTipsAppeared = 25;//(int)structure.LeafTipsAppeared;

                //int NodesToRemove = (int)Math.Max(LeafTipsAppeared - TargetLeafRank, 1); 
                double FractionToRemove = 0.2;//1- TargetLeafRank/LeafTipsAppeared;
            
               // Remove_1.NodesToRemove = NodesToRemove;
                LeafPlucking?.Invoke(this, EventArgs.Empty);
             }

           if (weather.DaysSinceWinterSolstice == HarvestDAWS && phenology.Stage >= 3)
           {
               LeafPlucking?.Invoke(this, EventArgs.Empty);
               Leaf.RemoveBiomass(liveToResidue: 0.1);
               Berry.RemoveBiomass(liveToRemove: 1);
               zone.Set("[Grapevine].Berry.Brix.AfterVeraison.LessThanFunction.HarvestTime.FixedValue",HarvestDAWS); 

           }
                                   
            if (weather.DaysSinceWinterSolstice == PruningDAWS&& phenology.Stage >= 3)
            {
                Grapevine.Phenology?.SetToStage(1);

                Pruning?.Invoke(this, EventArgs.Empty);
                  Leaf.RemoveBiomass(liveToResidue: 1);
                  Shoot.RemoveBiomass(liveToResidue: 1);
                  Cane.RemoveBiomass(liveToResidue: 1);
                Berry.RemoveBiomass(liveToResidue: 1);

                double budNumber = (double)zone.Get("Grapevine.Structure.BudsPerMeterRow.FixedValue"); 
                //double caneNum = budNumber*1.8/12;
                //double caneBiomass = 4*17.5 * caneNum; //g/m2 reset the cane biomass to the original value 
                //double caneNSC = caneBiomass * 0.18;

                //zone.Set("[Grapevine].Cane.Live.StorageWt", caneNSC);                
                //zone.Set("[Grapevine].Cane.Live.StructuralWt", caneBiomass - caneNSC); 
                zone.Set("[Grapevine].Phenology.AccumulatedChillingUnitBeforeWinterPruning.ChillBeforePrune.PruningTime.FixedValue",PruningDAWS); 
                //zone.Set("[Grapevine].Trunk.Live.StructuralWt", 280);     
               // zone.Set("[Grapevine].Trunk.Live.StorageWt", 70);     

               // zone.Set("[Grapevine].Root.Live.StructuralWt", 1531);     
               // zone.Set("[Grapevine].Root.Live.StorageWt",  349);     

            }


        }
    }
}
```
          Manager DripIrrigator: same as Validation.newCanopySyste.BRI_4Cane.Row.DripIrrigator
          Manager AutoIrrigationBasedOnWaterDeficit: same as Validation.newCanopySyste.BRI_4Cane.Row.AutoIrrigationBasedOnWaterDeficit
          Manager Fertilise on fixed dates
            FertiliserType = NH4NO3N
            FertiliserDates = 1-Nov, 1-Feb
            Amount = 60
            AmountType = True
            script: same as in Replacements.Fertilise on fixed dates
          Manager Reset on date: same as Validation.Sauvignonblanc.RetainedNodeNum.RetainedNodNum.Row.Reset on date
          Manager Fertilise topup: same as Replacements.Fertilise topup
          Soil: same as Validation.Sauvignonblanc.RetainedNodeNum.RetainedNodNum.Row.Soil
          Manager ReviseCanopyHeight
```csharp
using Models.Soils;
using Models.Functions;
using APSIM.Shared.Utilities;
using System.Xml.Serialization;
using Models;
using Models.PMF;
using System.Text;
using System.Collections.Generic;
using Models.Core;
using System;
using Models.PMF.Organs;

namespace Models
{
    [Serializable] 
    public class Script : Model
    {
        [Link] private Plant Grapevine;
        [Link] private Clock Clock;
        [Link] private Zone zone;
        
                
        [EventSubscribe("StartOfSimulation")]
        private void OnSimulationCommencing(object sender, EventArgs e)
        {
          
          zone.Set("Grapevine.Structure.HeightModel.ShootHeight.ShootLength.SeasonalPattern.XYPairs.Y[1]", 1000);
          zone.Set("Grapevine.Structure.HeightModel.ShootHeight.ShootLength.SeasonalPattern.XYPairs.Y[2]", 1000);
          zone.Set("Grapevine.Structure.HeightModel.ShootHeight.ShootLength.SeasonalPattern.XYPairs.Y[3]", 1500);
          zone.Set("Grapevine.Structure.HeightModel.ShootHeight.ShootLength.SeasonalPattern.XYPairs.Y[4]", 1500);
          zone.Set("Grapevine.Structure.HeightModel.ShootHeight.ShootLength.SeasonalPattern.XYPairs.Y[5]", 1000);
          zone.Set("Grapevine.Structure.HeightModel.ShootHeight.TrimShootHeight.FixedValue", 1500);
          
          zone.Set("Grapevine.Berry.YieldComponent.BerryNum.PostEventValue.BerryNumFun.Minimum.FixedValue", 1);
          zone.Set("Grapevine.Berry.YieldComponent.BunchesPerShoot.PostEventValue.MaximumFunc.one.FixedValue", 0);
          zone.Set("Grapevine.Berry.YieldComponent.BerryMass.PostEventValue.BerryMassFun.LowerLimit.FixedValue", 1.8);
        }
     }
}
```
        RectangularZone Alley: same as Validation.newCanopySyste.BRI_4Cane.Alley
      Simulation BRI_6Cane_N
        Clock: Start=2005-02-25; End=2022-07-01
        Summary SummaryFile
        Weather: FileName=Site1004_RPC.met
        MicroClimate: a_interception=0; b_interception=1; c_interception=0; d_interception=0; SoilHeatFluxFraction=0.4; MinimumHeightDiffForNewLayer=0; NightInterceptionFraction=0.5; ReferenceHeight=2
        SoilArbitrator Soil Arbitrator
        RectangularZone Row: Length=100; Width=0.9; Slope=0; AspectAngle=0; Altitude=50
          Report: EventNames=[Clock].DoReport
          Memo: same as Validation.Sauvignonblanc.RetainedNodeNum.RetainedNodNum.Row.Memo
          Plant Grapevine: PlantType=Grapevine; IsEnding=false; DaysAfterEnding=0
          Manager TreeInitialisation: same as Validation.newCanopySyste.BRI_6Cane.Row.TreeInitialisation
          Irrigation
          Fertiliser: same as Validation.Sauvignonblanc.RetainedNodeNum.RetainedNodNum.Row.Fertiliser
          SurfaceOrganicMatter: InitialResidueName=wheat_stubble; InitialResidueType=wheat; InitialResidueMass=10000; InitialStandingFraction=0; InitialCPR=0; InitialCNR=20; FractionFaecesAdded=1
          Manager SetupTreeRootZones: same as Validation.Sauvignonblanc.RetainedNodeNum.RetainedNodNum.Row.SetupTreeRootZones
          Operations VineIrrigation
          Operations WinterRainfall
            2006-08-26  [Irrigation].Apply(45);
          Manager PlantVariables: same as Validation.newCanopySyste.BRI_4Cane.Row.PlantVariables
          Manager HarvestNPruning: same as Validation.newCanopySyste.BRI_6Cane.Row.HarvestNPruning
          Manager DripIrrigator: same as Validation.newCanopySyste.BRI_4Cane.Row.DripIrrigator
          Manager AutoIrrigationBasedOnWaterDeficit: same as Validation.newCanopySyste.BRI_4Cane.Row.AutoIrrigationBasedOnWaterDeficit
          Manager Fertilise on fixed dates: same as Validation.newCanopySyste.BRI_6Cane.Row.Fertilise on fixed dates
          Manager Reset on date: same as Validation.Sauvignonblanc.RetainedNodeNum.RetainedNodNum.Row.Reset on date
          Manager Fertilise topup
            FertiliserType = NH4NO3N
            Threshold = 40
            script: same as in Replacements.Fertilise topup
          Soil: same as Validation.Sauvignonblanc.RetainedNodeNum.RetainedNodNum.Row.Soil
          Manager ReviseCanopyHeight
            script: same as in Validation.newCanopySyste.BRI_6Cane.Row.ReviseCanopyHeight
        RectangularZone Alley: Length=100; Width=1.1; Slope=0; AspectAngle=0; Altitude=50
          SurfaceOrganicMatter: InitialResidueName=wheat_stubble; InitialResidueType=Grapevine; InitialResidueMass=20; InitialStandingFraction=0; InitialCPR=0; InitialCNR=30; FractionFaecesAdded=1
          Plant Slurp: PlantType=Slurp; IsEnding=false; DaysAfterEnding=0
          Fertiliser: same as Validation.Sauvignonblanc.RetainedNodeNum.RetainedNodNum.Row.Fertiliser
          Irrigation
          Manager PastureInitialisation: same as Validation.newCanopySyste.BRI_4Cane.Alley.PastureInitialisation
          Manager SetPastureVariables: same as Validation.newCanopySyste.BRI_4Cane.Alley.SetPastureVariables
          Manager SetupPastureRootZones: same as Validation.Sauvignonblanc.RetainedNodeNum.RetainedNodNum.Alley.SetupPastureRootZones
          Operations WinterRainfall
            2002-05-28  [Irrigation].Apply(200);
          Manager PlantVariables
            script: same as in Validation.Sauvignonblanc.Marlborough_2Cane.VineFacts1.Alley.PlantVariables
          Report ReportAlley: same as Validation.Sauvignonblanc.RetainedNodeNum.RetainedNodNum.Alley.ReportAlley
          Manager Reset on date: same as Replacements.Reset on date
          Manager Fertilise topup: same as Replacements.Fertilise topup
          Soil: same as Validation.Sauvignonblanc.RetainedNodeNum.RetainedNodNum.Row.Soil
      Simulation PFR_T3Whole_N
        Clock: Start=2005-02-25; End=2022-07-01
        Summary SummaryFile
        Weather: FileName=Site1004_RPC.met
        MicroClimate: a_interception=0; b_interception=1; c_interception=0; d_interception=0; SoilHeatFluxFraction=0.4; MinimumHeightDiffForNewLayer=0; NightInterceptionFraction=0.5; ReferenceHeight=2
        SoilArbitrator Soil Arbitrator
        RectangularZone Row: Length=100; Width=0.9; Slope=0; AspectAngle=0; Altitude=50
          Report: EventNames=[Clock].DoReport
          Memo: same as Validation.Sauvignonblanc.RetainedNodeNum.RetainedNodNum.Row.Memo
          Plant Grapevine: PlantType=Grapevine; IsEnding=false; DaysAfterEnding=0
          Manager TreeInitialisation: same as Validation.newCanopySyste.BRI_6Cane.Row.TreeInitialisation
          Irrigation
          Fertiliser: same as Validation.Sauvignonblanc.RetainedNodeNum.RetainedNodNum.Row.Fertiliser
          SurfaceOrganicMatter: InitialResidueName=wheat_stubble; InitialResidueType=wheat; InitialResidueMass=10000; InitialStandingFraction=0; InitialCPR=0; InitialCNR=20; FractionFaecesAdded=1
          Manager SetupTreeRootZones: same as Validation.Sauvignonblanc.RetainedNodeNum.RetainedNodNum.Row.SetupTreeRootZones
          Operations VineIrrigation
          Operations WinterRainfall
            2006-08-26  [Irrigation].Apply(45);
          Manager PlantVariables: same as Validation.newCanopySyste.BRI_4Cane.Row.PlantVariables
          Manager HarvestNPruning: same as Validation.newCanopySyste.BRI_6Cane.Row.HarvestNPruning
          Manager DripIrrigator: same as Validation.newCanopySyste.BRI_4Cane.Row.DripIrrigator
          Manager AutoIrrigationBasedOnWaterDeficit: same as Validation.newCanopySyste.BRI_4Cane.Row.AutoIrrigationBasedOnWaterDeficit
          Manager Fertilise on fixed dates: same as Validation.newCanopySyste.BRI_6Cane.Row.Fertilise on fixed dates
          Manager Reset on date: same as Validation.Sauvignonblanc.RetainedNodeNum.RetainedNodNum.Row.Reset on date
          Manager Fertilise topup
            FertiliserType = NH4NO3N
            Threshold = 30
            script: same as in Replacements.Fertilise topup
          Soil: same as Validation.Sauvignonblanc.RetainedNodeNum.RetainedNodNum.Row.Soil
          Manager ReviseCanopyHeight
```csharp
using Models.Soils;
using Models.Functions;
using APSIM.Shared.Utilities;
using System.Xml.Serialization;
using Models;
using Models.PMF;
using System.Text;
using System.Collections.Generic;
using Models.Core;
using System;
using Models.PMF.Organs;

namespace Models
{
    [Serializable] 
    public class Script : Model
    {
        [Link] private Plant Grapevine;
        [Link] private Clock Clock;
        [Link] private Zone zone;
        
                
        [EventSubscribe("StartOfSimulation")]
        private void OnSimulationCommencing(object sender, EventArgs e)
        {
          
          zone.Set("Grapevine.Structure.HeightModel.ShootHeight.ShootLength.SeasonalPattern.XYPairs.Y[1]", 2000);
          zone.Set("Grapevine.Structure.HeightModel.ShootHeight.ShootLength.SeasonalPattern.XYPairs.Y[2]", 2000);
          zone.Set("Grapevine.Structure.HeightModel.ShootHeight.ShootLength.SeasonalPattern.XYPairs.Y[3]", 2400);
          zone.Set("Grapevine.Structure.HeightModel.ShootHeight.ShootLength.SeasonalPattern.XYPairs.Y[4]", 2400);
          zone.Set("Grapevine.Structure.HeightModel.ShootHeight.ShootLength.SeasonalPattern.XYPairs.Y[5]", 2000);
          zone.Set("Grapevine.Structure.HeightModel.ShootHeight.TrimShootHeight.FixedValue", 2400);
          
          zone.Set("Grapevine.Berry.YieldComponent.BerryNum.PostEventValue.BerryNumFun.Minimum.FixedValue", 1);
          zone.Set("Grapevine.Berry.YieldComponent.BunchesPerShoot.PostEventValue.MaximumFunc.one.FixedValue", 0);
          zone.Set("Grapevine.Berry.YieldComponent.BerryMass.PostEventValue.BerryMassFun.LowerLimit.FixedValue", 1.8);
        }
     }
}
```
        RectangularZone Alley: same as Validation.newCanopySyste.PFR_T3L1_Up.Alley
      Simulation PFR_T3Whole_wide
        Clock: Start=2005-02-25; End=2022-07-01
        Summary SummaryFile
        Weather: FileName=Site1004_RPC.met
        MicroClimate: a_interception=0; b_interception=1; c_interception=0; d_interception=0; SoilHeatFluxFraction=0.4; MinimumHeightDiffForNewLayer=0; NightInterceptionFraction=0.5; ReferenceHeight=2
        SoilArbitrator Soil Arbitrator
        RectangularZone Row: Length=100; Width=0.9; Slope=0; AspectAngle=0; Altitude=50
          Report: EventNames=[Clock].DoReport
          Memo: same as Validation.Sauvignonblanc.RetainedNodeNum.RetainedNodNum.Row.Memo
          Plant Grapevine: PlantType=Grapevine; IsEnding=false; DaysAfterEnding=0
          Manager TreeInitialisation: same as Validation.newCanopySyste.BRI_6Cane.Row.TreeInitialisation
          Irrigation
          Fertiliser: same as Validation.Sauvignonblanc.RetainedNodeNum.RetainedNodNum.Row.Fertiliser
          SurfaceOrganicMatter: InitialResidueName=wheat_stubble; InitialResidueType=wheat; InitialResidueMass=10000; InitialStandingFraction=0; InitialCPR=0; InitialCNR=20; FractionFaecesAdded=1
          Manager SetupTreeRootZones: same as Validation.Sauvignonblanc.RetainedNodeNum.RetainedNodNum.Row.SetupTreeRootZones
          Operations VineIrrigation
          Operations WinterRainfall
            2006-08-26  [Irrigation].Apply(45);
          Manager PlantVariables: same as Validation.newCanopySyste.BRI_4Cane.Row.PlantVariables
          Manager HarvestNPruning: same as Validation.newCanopySyste.BRI_6Cane.Row.HarvestNPruning
          Manager DripIrrigator: same as Validation.newCanopySyste.BRI_4Cane.Row.DripIrrigator
          Manager AutoIrrigationBasedOnWaterDeficit: same as Validation.newCanopySyste.BRI_4Cane.Row.AutoIrrigationBasedOnWaterDeficit
          Manager Fertilise on fixed dates: same as Validation.newCanopySyste.BRI_6Cane.Row.Fertilise on fixed dates
          Manager Reset on date: same as Validation.Sauvignonblanc.RetainedNodeNum.RetainedNodNum.Row.Reset on date
          Manager Fertilise topup: same as Validation.newCanopySyste.PFR_T3Whole_N.Row.Fertilise topup
          Soil: same as Validation.Sauvignonblanc.RetainedNodeNum.RetainedNodNum.Row.Soil
          Manager ReviseCanopyHeight
            script: same as in Validation.newCanopySyste.PFR_T3Whole_N.Row.ReviseCanopyHeight
        RectangularZone Alley: same as Validation.newCanopySyste.BRI_6Cane_N.Alley
      Simulation RPC_2Cane
        Clock: Start=2005-02-25; End=2022-07-01
        Summary SummaryFile
        Weather: FileName=Site1004_RPC.met
        MicroClimate: a_interception=0; b_interception=1; c_interception=0; d_interception=0; SoilHeatFluxFraction=0.4; MinimumHeightDiffForNewLayer=0; NightInterceptionFraction=0.5; ReferenceHeight=2
        SoilArbitrator Soil Arbitrator
        RectangularZone Row: Length=100; Width=0.9; Slope=0; AspectAngle=0; Altitude=50
          Report: EventNames=[Clock].DoReport
          Memo: same as Validation.Sauvignonblanc.RetainedNodeNum.RetainedNodNum.Row.Memo
          Plant Grapevine: PlantType=Grapevine; IsEnding=false; DaysAfterEnding=0
          Manager TreeInitialisation
            CultivarName = SauvignonBlanc
            SowingDate = 02/25/2005 00:00:00
            VineDistance = 1.8
            BudNumber = 24
            CaneNumber = 2
            CaneDiameter = 10
            CaneLength = 0.9
            TrunkDiameter = 65
            TrunkLength = 0.8
            RootTrunkRatio = 1
            RootNSC = 0.2
            TrunkNSC = 0.2
            CaneNSC = 0.2
            StartAge = 8
            script: same as in Validation.Sauvignonblanc.RetainedNodeNum.RetainedNodNum.Row.TreeInitialisation
          Irrigation
          Fertiliser: same as Validation.Sauvignonblanc.RetainedNodeNum.RetainedNodNum.Row.Fertiliser
          SurfaceOrganicMatter: InitialResidueName=wheat_stubble; InitialResidueType=wheat; InitialResidueMass=10000; InitialStandingFraction=0; InitialCPR=0; InitialCNR=20; FractionFaecesAdded=1
          Manager SetupTreeRootZones: same as Validation.Sauvignonblanc.RetainedNodeNum.RetainedNodNum.Row.SetupTreeRootZones
          Operations VineIrrigation
          Operations WinterRainfall
            2006-08-26  [Irrigation].Apply(45);
          Manager PlantVariables: same as Validation.newCanopySyste.BRI_4Cane.Row.PlantVariables
          Manager HarvestNPruning: same as Validation.Sauvignonblanc.RetainedNodeNum.RetainedNodNum.Row.HarvestNPruning
          Manager DripIrrigator: same as Validation.newCanopySyste.BRI_4Cane.Row.DripIrrigator
          Manager AutoIrrigationBasedOnWaterDeficit: same as Validation.newCanopySyste.BRI_4Cane.Row.AutoIrrigationBasedOnWaterDeficit
          Manager Fertilise on fixed dates: same as Validation.newCanopySyste.BRI_4Cane.Row.Fertilise on fixed dates
          Manager Reset on date: same as Validation.Sauvignonblanc.RetainedNodeNum.RetainedNodNum.Row.Reset on date
          Manager Fertilise topup: same as Replacements.Fertilise topup
          Soil: same as Validation.Sauvignonblanc.RetainedNodeNum.RetainedNodNum.Row.Soil
          Manager ReviseCanopyHeight: same as Validation.newCanopySyste.BRI_4Cane.Row.ReviseCanopyHeight
        RectangularZone Alley: same as Validation.newCanopySyste.BRI_4Cane.Alley
  Folder SheepInVineyard
    Memo Notes
      This simulation example was made based on the Stock.apsimx AgistmentGrazing simulation.
      Agistment Grazing refers to a practise of bringing stock onto and then off a paddock based on a set of criteria. The location and management of the stock when not on the paddock are ignored.
      Bring sheep to vineyard is a common practice in NZ especially in winter to graze the interrows. Sometimes growers also use sheep a leaf plucking method. This simulation is more to test whether there is issues with adding sheep into the grapevine model due to the row structure and see what components will the sheep eat.

      Because we are not concerned with the disposition of the stock while not grazing the forage crop, this a single-paddock simulation. The paddock contains a forage crop, in this example we use plantain, that is irrigated and fertilised. The forage is sown in spring of the first year and is rejuvenated thereafter at the frequency set on the sowing rule in the paddock. In this simulation a new mob of animals are bought every time the forage is ready to be grazed and sold after each grazing event (note that here bought and sold only refer to acquiring and  disposing of animals not the financial transactions of such actions). The user sets the characteristics of the stock, the grazing rules and if/how any supplementary feeding is done.

      This example includes:

      * setting several commonly-needed stock characteristics
      * buying stock
      * finding out the current location of the stock
      * changing the location of the stock
      * feeding supplements based on a range of criteria
      * selling stock
    Simulation SheepInVineyard
      Weather: FileName=Site1003_SEA.met
      Clock: Start=2003-02-25; End=2008-05-01
      Summary
      SoilArbitrator Soil Arbitrator
      MicroClimate: a_interception=0; b_interception=1; c_interception=0; d_interception=0; SoilHeatFluxFraction=0.4; MinimumHeightDiffForNewLayer=0; NightInterceptionFraction=0.5; ReferenceHeight=2
      RectangularZone Row: Length=1000; Width=0.9; Slope=0; AspectAngle=0; Altitude=50
        SurfaceOrganicMatter: InitialResidueName=Grapevine_residue; InitialResidueType=Grapevine; InitialResidueMass=10; InitialStandingFraction=0; InitialCPR=0; InitialCNR=30; FractionFaecesAdded=1
        Memo: same as Validation.Sauvignonblanc.RetainedNodeNum.RetainedNodNum.Row.Memo
        Plant Grapevine: PlantType=Grapevine; IsEnding=false; DaysAfterEnding=0
        Manager TreeInitialisation
          CultivarName = SauvignonBlanc
          SowingDate = 02/25/2003 00:00:00
          VineDistance = 1.8
          BudNumber = 24
          CaneNumber = 2
          CaneDiameter = 10
          CaneLength = 1
          TrunkDiameter = 40
          TrunkHeight = 0.9
          RootDM = 2000
          RootNSC = 0.3
          TrunkNSC = 0.3
          CaneNSC = 0.3
          StartAge = 10
```csharp
using Models.Zones;
using Models.Soils;
using APSIM.Shared.Utilities;
using Models.PMF;
using Models.Core;
using System;
        
namespace Models
{
    [Serializable] 
    [System.Xml.Serialization.XmlInclude(typeof(Model))]
    public class Script : Model
    {
        [Link] Plant Grapevine;
        [Link] Clock Clock;
        [Link] Soil Soil;
        [Link] Zone zone;

        [Display(Type = DisplayType.CultivarName)]
        [Description("Plant Type")]
        public string CultivarName { get; set; }

        [Description("Initialisation Date")]
        public DateTime SowingDate { get; set; }

        [Description("Vine distance(m)")]
        public double VineDistance { get; set; }
        //number of buds lay down in cane and spur. there is a function inside to calculate the number of buds per vine based on bud burst and from cane head
        [Description("Bud number(#)")]
        public double BudNumber { get; set; }
        //cane or spur biomass
        [Description("Cane number(#)")]
        public double CaneNumber { get; set; }
      
        [Description("Cane diameter(mm)")]
        public double CaneDiameter { get; set; }

        [Description("Cane length(m)")]
        public double CaneLength { get; set; }
        //trunk information
        [Description("Trunk diameter(mm)")]
        public double TrunkDiameter { get; set; }

        [Description("Trunk height(m)")]
        public double TrunkHeight { get; set; }
        //root dry matter
        [Description("Fibrous Root dry matter(g/vine)")]
        public double RootDM { get; set; }

        //total nonstructural fraction in dry matter 
        [Description("Fibrous root nonstructural carbon fraction")]
        public double RootNSC { get; set; }

        [Description("Trunk nonstructural carbon fraction")]
        public double TrunkNSC { get; set; }

        [Description("Cane nonstructural carbon fraction")]
        public double CaneNSC { get; set; }

        [Description("Age of trees (in Years) at start of simulation)")]
        public int StartAge {get;set;}

        private RectangularZone RowZone {get; set;}

        [EventSubscribe("DoManagement")]
        private void OnDoManagement(object sender, EventArgs e)
        {
            if (Clock.Today.Date == SowingDate)
            {
                RowZone = this.Parent.Parent.Parent.FindInScope("Row") as RectangularZone;
                double pop = 1/RowZone.Width/VineDistance;  
                //sowing method
                Grapevine.Sow(cultivar: CultivarName,population: pop, 
                depth: 2000, rowSpacing: RowZone.Width, budNumber:BudNumber);

                //cane biomass
                //calculate the biomass by length 1 meter time number of canes time wood density (0.5 g/mm2/m) * pop to covert the biomass into g/m2
                double caneBiomass = 3.1415926*(CaneDiameter/2)*(CaneDiameter/2)*CaneLength*CaneNumber*0.5 * pop; 
                double caneNSC = caneBiomass * CaneNSC;

                zone.Set("[Grapevine].Cane.Live.StorageWt", caneNSC);                
                zone.Set("[Grapevine].Cane.Live.StructuralWt", caneBiomass - caneNSC);                

                //trunk biomass
                double trunkBiomass = 3.1415926*(TrunkDiameter/2)*(TrunkDiameter/2)*TrunkHeight*0.5 * pop; 
                double trunkNSC = trunkBiomass * TrunkNSC;
               
                zone.Set("[Grapevine].Trunk.Live.StorageWt", trunkNSC); 
                zone.Set("[Grapevine].Trunk.Live.StructuralWt", trunkBiomass - trunkNSC);              
                

                //Root biomass is  per plant
                double rootBiomass = RootDM * pop;
                double rootNSC = RootDM * pop * RootNSC; 
                 zone.Set("[Grapevine].StructuralRoot.Live.StorageWt",    rootNSC ); //rootNSC*pop
                 zone.Set("[Grapevine].StructuralRoot.Live.StructuralWt", rootBiomass - rootNSC); 
               
            }
        }
    }
}
```
        Irrigation
        Fertiliser: same as Validation.Sauvignonblanc.RetainedNodeNum.RetainedNodNum.Row.Fertiliser
        Manager SetupTreeRootZones
          UseExtraZone = True
          script: same as in Validation.Sauvignonblanc.RetainedNodeNum.RetainedNodNum.Row.SetupTreeRootZones
        Operations VineIrrigation
        Operations WinterRainfall
          2002-05-28  [Irrigation].Apply(200);
        Manager PlantVariables
          FRadInt = 0
          ET = 0
          ES = 0
          PET = 0
          LAI = 0
          Height = 0
          RootDepth = 0
          PlantWidth = 0
```csharp
using Models.Climate;
using System;
using Models.Core;
using Models.PMF;
using System.Collections.Generic;
using Models.Soils;
using APSIM.Shared.Utilities;
using Models.Zones;
using Models.PMF.Organs;

namespace Models
{
    [Serializable]
    public class Script : Model
    {
        [Link] private Weather weather;
        [Link(Type = LinkType.Path, Path = "[Grapevine].Root")]
        private Root root;
        private RectangularZone AlleyZone {get; set; }
        private RectangularZone RowZone {get; set;}
        private RectangularZone ThisZone {get; set;}
        private double AreaWidth {get; set;}

        public double FRadInt {get; set;}
        public double ET {get; set;}
        public double ES {get; set;}
        public double PET {get; set;}
        public double LAI {get; set;}
        public double Height {get; set;}
        public double RootDepth {get; set;}
        public double PlantWidth {get; set;}

        [EventSubscribe("StartOfSimulation")]
        private void DoStartOfSimulation(object sender, EventArgs e)
        {
               
               ThisZone = this.Parent.Parent as RectangularZone;
               RowZone = this.Parent.Parent.Parent.FindInScope("Row") as RectangularZone;
               AlleyZone = (RectangularZone)this.Parent.Parent.Parent.FindInScope("Alley") as RectangularZone;
               AreaWidth = AlleyZone.Width + RowZone.Width;
               PlantWidth = 0;
        }
        
        [EventSubscribe("DoReportCalculations")]
        private void OnDoReportCalculations(object sender, EventArgs e)
        {
            if (ThisZone.Name == "Row")
                {
                FRadInt = ((double)RowZone.Get("Grapevine.Leaf.RadiationIntercepted") * RowZone.Width)/(weather.Radn * AreaWidth);
                ET = (double)RowZone.Get("Grapevine.Leaf.Transpiration") * RowZone.Width/AreaWidth;
                LAI = (double)RowZone.Get("Grapevine.Leaf.LAI");
                //LAIPerVine =  LAI*RowZone.Width*1.8;
                //TreeInitialisation.Script.VineDistance;
                //(double)RowZone.Get("Grapevine.Leaf.LAI");
                Height = (double)RowZone.Get("Grapevine.Leaf.Height");
                RootDepth = (double)RowZone.Get("Grapevine.Root.Depth");
                PlantWidth = (double)RowZone.Get("Grapevine.Leaf.Width");
                }
            else
                {
                FRadInt = ((double)AlleyZone.Get("Slurp.Leaf.RadiationIntercepted") * ThisZone.Width)/ (weather.Radn * AreaWidth);
                ET = (double)AlleyZone.Get("Slurp.Leaf.Transpiration") * ThisZone.Width/AreaWidth;
                LAI = (double)AlleyZone.Get("Slurp.Leaf.LAI");
                Height = (double)AlleyZone.Get("Slurp.Leaf.Height");
                RootDepth = (double)AlleyZone.Get("Slurp.Root.Depth");
                }

            ES = (double)ThisZone.Get("Soil.SoilWater.Es") * ThisZone.Width/AreaWidth;
            double PETWidth = Math.Min(Math.Max(PlantWidth,ThisZone.Width),AreaWidth);
            PET = (double)ThisZone.Get("Soil.SoilWater.Eo") * PETWidth/AreaWidth;
        }
    }
}
```
        Manager DripIrrigator
          FertilizeDAWS = 100
          Amount = 30
          script: same as in Validation.Sauvignonblanc.Marlborough_3Cane.MRL3Cane.Row.DripIrrigator
        Manager HarvestNPruning
          LeafPluckingDAWS = 205
          HarvestDAWS = 290
          PruningDAWS = 314
          FrostDate1 = 10/03/2002 00:00:00
          FrostDate2 = 11/18/2002 00:00:00
```csharp
using Models.PMF.Interfaces;
using Newtonsoft.Json;
using Models.PMF.Struct;
using Models.Climate;
using System;
using System.Collections.Generic;
using Models.Core;
using Models.PMF;
using Models.PMF.Interfaces;
using System.Xml.Serialization;
using Models.PMF.Organs;
using Models.PMF.Phen;
using Models.Soils;

namespace Models
{
    [Serializable] 
    [System.Xml.Serialization.XmlInclude(typeof(Model))]
    public class Script : Model
    {
        [Link] private Plant Grapevine;
        [Link] private Clock Clock;
        [Link] private Zone zone;
        [Link] private Weather weather;
        [Link]
        private Root root;
        [Link(Type = LinkType.Path, Path = "[Grapevine].Structure")]
        private Structure structure;
        [Link(Type = LinkType.Path, Path = "[Grapevine].Phenology")]
        private Phenology phenology;
       
        public event EventHandler LeafPlucking;
           public event EventHandler Pruning;       
       
        [Description("SummerPruning_DAWS")]         
        public int LeafPluckingDAWS { get; set; }  //day

        [Description("Harvest_DAWS")]
        public int HarvestDAWS { get; set; }

        [Description("Pruning_DAWS")]         
        public int PruningDAWS { get; set; }  //day

        [Description("Frost Date 1")]
        public DateTime FrostDate1 { get; set; }
        [Description("Frost Date 2")]
        public DateTime FrostDate2 { get; set; }

        [EventSubscribe("StartOfSimulation")]
        private void OnSimulationCommencing(object sender, EventArgs e)
        {
            
          
            zone.Set("[Grapevine].Phenology.AccumulatedChillingUnitBeforeWinterPruning.ChillBeforePrune.PruningTime.FixedValue", PruningDAWS);
        }
        
        [EventSubscribe("DoManagement")]
        private void OnDoManagement(object sender, EventArgs e)
        {
            var Leaf = Grapevine.FindChild<IHasDamageableBiomass>("Leaf");
            var Shoot = Grapevine.FindChild<IHasDamageableBiomass>("Shoot");
            var Cane = Grapevine.FindChild<IHasDamageableBiomass>("Cane");
            var Trunk = Grapevine.FindChild<IHasDamageableBiomass>("Trunk");
            var Root = Grapevine.FindChild<IHasDamageableBiomass>("Root");
            var StructuralRoot = Grapevine.FindChild<IHasDamageableBiomass>("StructuralRoot");
            var Berry = Grapevine.FindChild<IHasDamageableBiomass>("Berry");
                

        
        

           if (weather.DaysSinceWinterSolstice == HarvestDAWS && phenology.Stage >= 3)
           {
               LeafPlucking?.Invoke(this, EventArgs.Empty);
               Leaf.RemoveBiomass(liveToResidue: 0.1);
               Berry.RemoveBiomass(liveToRemove: 1);
               zone.Set("[Grapevine].Berry.Brix.AfterVeraison.LessThanFunction.HarvestTime.FixedValue",HarvestDAWS); 

           }
                                   
            if (weather.DaysSinceWinterSolstice == PruningDAWS&& phenology.Stage >= 3)
            {
                Grapevine.Phenology?.SetToStage(1);

                Pruning?.Invoke(this, EventArgs.Empty);
                  Leaf.RemoveBiomass(liveToResidue: 1);
                  Shoot.RemoveBiomass(liveToResidue: 1);
                  Cane.RemoveBiomass(liveToResidue: 1);
                Berry.RemoveBiomass(liveToResidue: 1);


                double caneBiomass = 96.9; //g/m2 reset the cane biomass to the original value 
                double caneNSC = caneBiomass * 0.18;

                zone.Set("[Grapevine].Cane.Live.StorageWt", caneNSC);                
                zone.Set("[Grapevine].Cane.Live.StructuralWt", caneBiomass - caneNSC); 

                //zone.Set("[Grapevine].Trunk.Live.StructuralWt", 280);     
               // zone.Set("[Grapevine].Trunk.Live.StorageWt", 70);     

               // zone.Set("[Grapevine].Root.Live.StructuralWt", 1531);     
               // zone.Set("[Grapevine].Root.Live.StorageWt",  349);     

            }
           if (Clock.Today.Date == FrostDate1)      
           {
               LeafPlucking?.Invoke(this, EventArgs.Empty);
               Leaf.RemoveBiomass(liveToResidue: 0.2);
              //zone.Set("[Grapevine].Structure.FinalLeafNumber.FixedValue", 28); 
           //
           }  

           if (Clock.Today.Date == FrostDate2)      
           {
               LeafPlucking?.Invoke(this, EventArgs.Empty);
               Leaf.RemoveBiomass(liveToResidue: 0.2);          
           }  

        }
    }
}
```
        Manager AutoIrrigationBasedOnWaterDeficit: same as Validation.Sauvignonblanc.RetainedNodeNum.RetainedNodNum.Row.AutoIrrigationBasedOnWaterDeficit
        Manager Fertilise on fixed dates: same as Validation.Sauvignonblanc.Marlborough_2Cane.VineFacts1.Row.Fertilise on fixed dates
        Manager Reset on date: same as Replacements.Reset on date
        Soil: Latitude=0; Longitude=0
          LayerStructure: Thickness=[200, 200, 200, 200, 200, 200, 400, 400, 400, 600]
          Physical
            Thickness  BD    AirDry  LL15  DUL   SAT
            200        1.35  0.1     0.2   0.35  0.45
            250        1.35  0.1     0.2   0.35  0.45
            300        1.4   0.15    0.15  0.35  0.4
            150        1.4   0.13    0.13  0.33  0.35
            150        1.4   0.1     0.1   0.28  0.35
            1950       1.59  0.06    0.06  0.1   0.3
            SoilCrop GrapevineSoil: LL=[0.2, 0.2, 0.15, 0.13, 0.1, 0.06]; KL=[0.25, 0.1, 0.08, 0.05, 0.05, 0.01]; XF=[1, 1, 1, 1, 1, 1]
            SoilCrop SlurpSoil: LL=[0.2, 0.2, 0.15, 0.13, 0.1, 0.06]; KL=[0.11, 0.11, 0.02, 0, 0, 0]; XF=[1, 1, 1, 1, 1, 1]
            SoilCrop PlantainForageSoil: LL=[0.15, 0.17, 0.19, 0.17, 0.1, 0.1]; KL=[0.1, 0.08, 0.05, 0.02, 0.01, 0.01]; XF=[1, 1, 1, 1, 1, 0.5]
          WaterBalance SoilWater: same as Validation.Sauvignonblanc.RetainedNodeNum.RetainedNodNum.Row.Soil.SoilWater
          Organic: same as Validation.Sauvignonblanc.RetainedNodeNum.RetainedNodNum.Row.Soil.Organic
          Chemical: Thickness=[100, 200, 300, 300, 300, 300]; PH=[6.6, 6.2, 5.7, 5.5, 5.5, 5.5]; PHUnits=Water
          CERESSoilTemperature Temperature
          Water: Thickness=[200, 250, 300, 150, 150, 1950]; InitialValues=[0.35, 0.35, 0.35, 0.33, 0.28, 0.1]; InitialPAWmm=262.5; RelativeTo=LL15; FilledFromTop=true
          OutputLayers: Thickness=[150, 150, 150, 150, 150, 150, 150]
          Solute NO3: same as Validation.Sauvignonblanc.RetainedNodeNum.RetainedNodNum.Row.Soil.NO3
          Solute NH4: same as Validation.Sauvignonblanc.RetainedNodeNum.RetainedNodNum.Row.Soil.NH4
          Solute Urea: same as Validation.Sauvignonblanc.RetainedNodeNum.RetainedNodNum.Row.Soil.Urea
          Nutrient: same as Validation.Sauvignonblanc.RetainedNodeNum.RetainedNodNum.Row.Soil.Nutrient
        Manager GrazeVineyardRow
          Genotype = Medium Merino
          Sex = Female
          Age = 12
          Weight = 50
          Pregnant = 0
          Lactating = 0
          YoungNumber = 0
          YoungWt = 0
          StockingRate = 50
          CurrentLocation = Away
          PreGrazingDM = 1200
          MinGrazingDays = 7
          PostGrazingDM = 800
          DoNoGrazingWindow = True
          NoGrazeStartSpring = 05-sep
          NoGrazeEndSpring = 01-dec
          NoGrazeStartSummer = 15-jan
          NoGrazeEndSummer = 1-feb
          SupplementName = silage
          SupplementFirst = False
          SupplementEveryDay = 0
          SupplementOnPastureMass = 0
          TriggerPastureMass = 1200
```csharp
using Models.PMF.Interfaces;
using System.Diagnostics;
using Models.AgPasture;
using System.Linq;
using System.Collections.Generic;
using System.Collections;
using Models.Soils;
using Models.PMF;
using System.Xml.Serialization;
using APSIM.Shared.Utilities;
using Models.GrazPlan;
using Models.Utilities;
using Models.Core;
using Models;
using System;

namespace Models
{

    [Serializable]
    public class Script : Model
    {
        [Link] Clock clock;
        [Link] Stock stock;
        [Link] Supplement supplement;
        [Link] List<Zone> paddocks;
        [Link] ISummary summary;
        [Link] Simulation farm;
        [Link] List<IOrganDamage> forages = null;

        private int CurrentGroupNum = 1;    // animal group number
        private int CurrentLocationNum { get; set; }

        [Separator("Stock type info, the same type of stock are brought onto the paddock at each grazing")]

        [Description("Stock: genotype (e.g. Small Merino, Angus, Friesian):")] 
        [Display(Values="GetGenotypes")]
        public string Genotype { get; set; }

        [Description("Stock: sex (Female, Male, Castrate):")] 
        public ReproductiveType Sex { get; set; }

        [Description("Stock: age (months):")] 
        public double Age { get; set; }

        [Description("Stock: weight (kg liveweight /head):")] 
        public double Weight { get; set; }

        [Description("Stock: fertility status (0 if non-pregnant or days since conception):")] 
        public int Pregnant { get; set; }

        [Description("Stock: lactation status (0 if non-lactating or days since parturition):")]
        public int Lactating { get; set; }

        [Description("Stock: number of unweaned young:")]
        public int YoungNumber { get; set; }

        [Description("Stock: weight of unweaned young:")] 
        public double YoungWt { get; set; }

        [Separator("Grazing event information")]

        [Description("Paddock stocking rate (head/ha): ")] 
        public double StockingRate { get; set; }

        [Description("Initial location of the stock (give either the paddock name or 'Away'): ")] 
        public string CurrentLocation { get; set; }

        [Description("Standing biomass at which to bring the stock into the simulation (kg DM/ha): ")] 
        public double PreGrazingDM { get; set; }

        [Description("Require > X days of grazable forage before moving stock: ")] 
        [Tooltip("To prevent stock being moved too often, require that there be a minimum number of grazing-days of forage available before moving the stock on. The forage needed is very simply set as 3% of the stock liveweight")] 
        public int MinGrazingDays { get; set; }

        [Description("Standing biomass at which to exit  stock from the simulation (kg DM/ha): ")] 
        public double PostGrazingDM { get; set; }

        [Description("Implement a no-grazing window? (tick for yes): ")] 
        public bool DoNoGrazingWindow { get; set; }

        [Description("Start of the no-grazing window spring (dd-MMM)")] 
        public string NoGrazeStartSpring { get; set; }

        [Description("End of the no-grazing window spring (dd-MMM)")] 
        public string NoGrazeEndSpring { get; set; }

        [Description("Start of the no-grazing window Summer (dd-MMM)")] 
        public string NoGrazeStartSummer { get; set; }

        [Description("End of the no-grazing window Summer(dd-MMM)")] 
        public string NoGrazeEndSummer { get; set; }

        [Separator("Supplementary feeding")]

        [Description("Name of the supplement to feed: ")] 
        public string SupplementName { get; set; }

        [Description("Feed the supplement first (i.e. before the new forage is available to the stock)?: ")] 
        public bool SupplementFirst { get; set; }

        [Description("Amount of supplementary feeding offered every day (kg DM /head /day): ")] 
        public double SupplementEveryDay { get; set; }

        [Description("Additional amount of supplement offered when available biomass is low (kg DM /head /day): ")] 
        public double SupplementOnPastureMass { get; set; }

        [Description("Trigger biomass for above rule (kg DM /ha): ")] 
        public double TriggerPastureMass { get; set; }

        public int NumStock { get; set; }
        public bool GrazingSeasonIsOpen { get; set; } // number of stock on the whole farm
        public double HarvestableBiomass { get; set; }
        public double HarvestableBiomassYesterday { get; set; }

        // Return a list of genotypes to the properties tab.
        public string[] GetGenotypes()
        {
            if (stock != null)
                return stock.Genotypes.Names.ToArray();
            return null;
        }

        [EventSubscribe("StartOfSimulation")]
        private void OnStartOfSimulation(object sender, EventArgs e)
        {

            //Debugger.Break();

            summary.WriteMessage(this, "Initialising the paddock information", MessageType.Diagnostic);

            NumStock = (int)(Math.Round(StockingRate * farm.Area, 0));

            if (CurrentLocation.ToLower() != "away")
            {
                BuyStock();
                stock.Move(CurrentLocation);
                summary.WriteMessage(this, " The Stock have been moved to " + CurrentLocation, MessageType.Diagnostic);
            }

            summary.WriteMessage(this, "     The number of animals has been rounded to " + NumStock + " from " + (StockingRate * farm.Area), MessageType.Diagnostic);
            summary.WriteMessage(this, "     The animals will begin in " + CurrentLocation + " which is paddock number " + CurrentLocationNum + " in the simulation", MessageType.Diagnostic);
            summary.WriteMessage(this, "     The area of the whole farm is " + farm.Area + " ha", MessageType.Diagnostic);

        }

        [EventSubscribe("DoManagement")]
        private void OnDoManagement(object sender, EventArgs e)
        {
            GrazingSeasonIsOpen = true;
            if (DoNoGrazingWindow)
                GrazingSeasonIsOpen = !(DateUtilities.WithinDates(NoGrazeStartSpring, clock.Today, NoGrazeEndSpring) | DateUtilities.WithinDates(NoGrazeStartSummer, clock.Today, NoGrazeEndSummer));

            
            bool sellSomeStock = false;
            if (!GrazingSeasonIsOpen)
                sellSomeStock = true;

            // Calculate forage mass in the paddock
 			HarvestableBiomass = forages.Where(forage => forage.IsAboveGround)
            						    .Sum(forage => forage.Live.Wt + forage.Dead.Wt);
            
            HarvestableBiomass *= 10;  // Convert to kg/ha

            if (clock.Today == clock.StartDate)
                HarvestableBiomassYesterday = HarvestableBiomass;

            double deltaHarvestableBiomass = Math.Max(0.0, HarvestableBiomass - HarvestableBiomassYesterday);

            if (HarvestableBiomass <= PostGrazingDM)
                sellSomeStock = true;

            if (CurrentLocation == "Away")
                sellSomeStock = false;

            // The 0.03 is the propostion of body mass that the stock might eat
            double minFodder = Math.Max(PreGrazingDM, Math.Max(0.0, (0.03 * MinGrazingDays * NumStock * Weight) - (deltaHarvestableBiomass * MinGrazingDays))); 
            HarvestableBiomassYesterday = HarvestableBiomass;

            if (CurrentLocation == "Away" && (HarvestableBiomass >= PreGrazingDM) && HarvestableBiomass >= (PostGrazingDM + minFodder) && GrazingSeasonIsOpen)
            {
                CurrentLocation = paddocks[0].Name;
                CurrentLocationNum = paddocks[0].Index;
                BuyStock();
                stock.Move(CurrentLocation);
                summary.WriteMessage(this, "     Buying stock ", MessageType.Diagnostic);
            }

            if (sellSomeStock)
            {
                CurrentLocation = "Away";
                CurrentLocationNum = -1;
                SellStock();
                summary.WriteMessage(this, "     Selling stock ", MessageType.Diagnostic);
            }

            if (CurrentLocation != "Away")
            {
                if (SupplementEveryDay > 0)
                {
                    double silageOnHand = supplement.Stores[2 - 1].Stored;
                    if (silageOnHand < SupplementEveryDay * stock.NumberAll)
                    {
                        supplement.Buy(SupplementEveryDay * 30.0 * stock.NumberAll, SupplementName);  // i.e. 1 months worth
                        summary.WriteMessage(this, "SupplementEveryDay: Buying " + SupplementName + " of total amount : " + (SupplementEveryDay * 90 * stock.NumberAll) + " kg DM", MessageType.Diagnostic);
                    }
                    supplement.Feed(SupplementName, SupplementEveryDay * stock.NumberAll, CurrentLocation, SupplementFirst);
                }

                if (SupplementOnPastureMass > 0 && HarvestableBiomass <= TriggerPastureMass)
                {
                    double silageOnHand = supplement.Stores[2 - 1].Stored;
                    if (silageOnHand < SupplementOnPastureMass * stock.NumberAll)
                    {
                        supplement.Buy(SupplementOnPastureMass * 30.0 * stock.NumberAll, SupplementName);  // i.e. 1 months worth
                        summary.WriteMessage(this, "SupplementOnBiomass: Buying " + SupplementName + " of total amount : " + (SupplementOnPastureMass * 90 * stock.NumberAll) + " kg DM", MessageType.Diagnostic);
                    }
                    supplement.Feed(SupplementName, SupplementOnPastureMass * stock.NumberAll, CurrentLocation, SupplementFirst);
                }
            }
        }


        public void BuyStock()
        {
            CurrentGroupNum = stock.NoGroups + 1;
            StockBuy purchase = new StockBuy();
            purchase.Genotype = Genotype;
            purchase.Number = NumStock;
            purchase.Sex = Sex;
            purchase.Age = Age;       // age in months
            purchase.Weight = Weight;  // live weight in kg
            purchase.UseTag = CurrentGroupNum + 1;
            purchase.MatedTo = purchase.Genotype;
            purchase.Pregnant = Pregnant;  // days pregnant, 0 = non pregnant, 1 = pregnant
            purchase.Lactating = Lactating;  // 0 for dry, 1 for lactating
            purchase.NumYoung = YoungNumber;
            purchase.YoungWt = YoungWt;

            stock.Buy(purchase);
        }

        public void SellStock()
        {
            int NumGroups = stock.NoGroups;

            NumGroups = stock.NoGroups;
            for (int gg = 1; gg <= NumGroups; gg++)
            {
                stock.Sell(stock.Number[gg - 1]);
            }
        }
    }
}
```
        Supplement: SpoilageTime=0
          Stores:
            Name    Stored  IsRoughage  DMContent  DMD   MEContent  CPConc  ProtDg  PConc   SConc   EEConc  ADIP2CP  AshAlk  MaxPassage
            fodder  0       true        0.85       0     0          0       0       0       0       0       0        0       0
            silage  0       true        1          0.75  12         0.18    0.8     0.0032  0.0024  0.02    0.06     0.6     0
        Stock: RandSeed=9999
        Memo SupplementMemo
          **Supplement store**

          The script GrazeForageCrop allows for optional supplementary feeding. In order to support that feeding it is necessary to include the Supplement model in the simulation. All the buying and feeding out is handled in GrazeForageCrop but here we name the supplement (“silage”) and give it some properties including the quality parameters of the supplement.

          In the quality parameters, note that we set the dry matter percentage to 100. This is does not affect the feeding quality of the supplement but means that all buy, sell, feed, etc. commands are given on a dry matter rather than wet matter basis. Once these quality parameters are set against a named supplement they are retained and all that is needed is to buy, sell or feed the named supplement.
        Memo Stock Memo
          **Stock**

          All the paramters for Stock are set in GrazeForageCrop.
        Memo GrazeForageCrop Memo
          **GrazeForageCrop**

          This is a Manager script that undertakes several duties.

          The first stack of parameters in GrazeForageCrop sets the type of animals that will be bought and then managed during the simulation. The available options are accessible using a combination of dropdown boxes and data entry fields.

          The middle stack of parameters sets:

          * The paddock stocking rate – the number of head bought is this times the area of the paddock (click on “Field” to set this away from its default of 1 ha).
          * At the start of the simulation the stock can be on the simulated paddock (enter the name of the paddock) absent from the simulation (enter “Away”). If the paddock name is given the stock will be bought at the beginning of the first day and drafted to the paddock.
          * The third parameter sets the forage crop biomass that triggers the buying of stock and drafting them onto the paddock. If there are multiple forage species in the paddock the biomass will be the sum of all.
          * When forage crop growth rates closely match animal demand, the simulation can oscillate with stock bought just above the grazing trigger and then during that day they graze below the exit value and are sold with the pattern repeating a few days later. To prevent this it is desirable to set a minimum gazing duration. Here this is done very simply by assuming a maximum intake of 3% of liveweight per day.
          * The fifth parameter is the biomass at which t terminate the grazing event and sell the stock.
          * The last three parameters allow the user to set a no-grazing window of time that overrides the parameters above. To enable this set a tick in the box and enter the date range as dd-mmm. The same window is used each year. Windows can cross year boundaries (e.g. 15-Dec to 10-Jan).

          The final stack of parameters set some options for supplementary feeding. As noted above, a type of silage has been set up in the supplement store. In this stack of parameters:

          * Give the name (case matters) of the supplement type.
          * Indicate if the supplement is to be fed before the stock have access to the crop. The alternative is that it is available day-long and the stock can select between supplement and crop. Ticking the box for feeding first will increase the intake of supplement and decrease the intake of crop. The magnitude of this will depend on the stock, the total feed on offer and the qualities of the supplement and crop.
          * The third parameter allows the user to feed the stock supplement on a per head basis every day regardless of the amount of forage crop available.
          * The last two parameters allow for feeding only when the forage crop biomass is low with an additional amount of supplement per head per day when the crop biomass is below a given value.
        Report ReportStockRow: EventNames=[Clock].EndOfDay
          VariableNames:
            [Clock].Today as Date
            [Stock].NumberAll as NumStockRow
            [Stock].IntakeAll.Weight as DMIntakeRow
            [Stock].SuppIntakeAll.Weight as SilageIntakeRow
            [Stock].CondScoreAll as ConditionScoreRow
            [GrazeVineyardRow].Script.HarvestableBiomass as HarvestableBiomassRow
            [GrazeVineyardRow].Script.CurrentLocation as StockLocationRow
            [Row].Grapevine.AboveGround.Wt as TotalAboveGroundRow
            [Row].Grapevine.Leaf.Removed.Wt
            [Row].Grapevine.Shoot.Removed.Wt
            [Row].Grapevine.Cane.Removed.Wt
            [Row].Grapevine.Trunk.Removed.Wt
            [Row].Grapevine.Berry.Removed.Wt
            [Row].Grapevine.Root.Removed.Wt
      RectangularZone Alley: Length=1000; Width=1.5; Slope=0; AspectAngle=0; Altitude=50
        SurfaceOrganicMatter: InitialResidueName=wheat_stubble; InitialResidueType=Grapevine; InitialResidueMass=10; InitialStandingFraction=0; InitialCPR=0; InitialCNR=30; FractionFaecesAdded=1
        Fertiliser: same as Validation.Sauvignonblanc.RetainedNodeNum.RetainedNodNum.Row.Fertiliser
        Irrigation
        Manager AutoIrrigationBasedOnWaterDeficit: same as Validation.Sauvignonblanc.RetainedNodeNum.RetainedNodNum.Row.AutoIrrigationBasedOnWaterDeficit
        Manager SowingRule
          StartDate = 1-oct
          EndDate = 30-oct
          MinESW = 50
          MinRain = 30
          RainDays = 5
          mustSow = yes
          SowingFreq = 1
          CultivarName = Tonic
          SowingDepth = 10
          RowSpacing = 150
          Population = 200
          Amount = 60
          CropAge = 0
```csharp
using Models.Interfaces;
using System.Linq;
using System;
using Models.Core;
using Models.PMF;
using Models.Soils;
using Models.Utilities;
using APSIM.Shared.Utilities;
using Models.Climate;

namespace Models
{
    [Serializable]
    public class Script : Model
    {
        [Link] private Clock Clock;
        [Link] private Fertiliser Fertiliser;
        [Link] private Summary Summary;
        [Link] private Plant PlantainForage;
        //[Link] private Plant AGPWhiteClover;
        //[Link] Plant WhiteClover;
        [Link] private Soil Soil;
        private Accumulator accumulatedRain;
        [Link]
        private ISoilWater waterBalance;

        [Separator("======= Sowing conditions =======")]
        [Description("Start of sowing window (dd-mmm)")] public string StartDate { get; set;}
        [Description("End of sowing window (dd-mmm)")] public string EndDate { get; set;}
        [Description("Minimum extractable soil water for sowing (mm)")] public double MinESW { get; set;}
        [Description("Accumulated rainfall required for sowing (mm)")] public double MinRain { get; set;}
        [Description("Duration of rainfall accumulation (d)")] public int RainDays { get; set;}
        [Description("Must sow at the end of the window?")] public answerType mustSow { get; set; }
        [Description("Frequency of sowing (years)")] public int SowingFreq { get; set; }
    

        [Separator("======= Sowing data =======")]
        [Description("Cultivar to be sown")] public string CultivarName { get; set;}
        [Description("Sowing depth (mm)")] public double SowingDepth { get; set;}        
        [Description("Row spacing (mm)")] public double RowSpacing { get; set;}    
        [Description("Plant population (/m2)")] public double Population { get; set;}    

        [Separator("======= Sowing fertiliser =======")]
        [Description("Amount of fertiliser to be applied (kg/ha)")] public double Amount { get; set;}


        public double CropAge { get; set; }

           public enum answerType
        {
            /// <summary>a positive answer</summary>
            yes,
            /// <summary>a negative answer</summary>
            no
        }

        
        [EventSubscribe("StartOfSimulation")]
        private void OnSimulationCommencing(object sender, EventArgs e)
        {
            accumulatedRain = new Accumulator(this, "[Weather].Rain", RainDays);
            CropAge = SowingFreq + 1.0;
        }
        

        [EventSubscribe("DoManagement")]
        private void OnDoManagement(object sender, EventArgs e)
        {
            accumulatedRain.Update();
            CropAge += 1.0 / 365.25;

            bool doSowing = false;
            if (DateUtilities.WithinDates(StartDate,Clock.Today,EndDate)&& !PlantainForage.IsAlive)
                doSowing = true;
            if ((MathUtilities.Sum(waterBalance.ESW) < MinESW) || (accumulatedRain.Sum < MinRain))
                doSowing = false;
            if ((mustSow == answerType.yes) && (DateUtilities.DatesEqual(EndDate, Clock.Today)))
                doSowing = true;
            if (CropAge < SowingFreq)
                doSowing = false;
            
            if (doSowing)
            {
               //WhiteClover.Sow(population: 500, cultivar: "Kopu", depth: 5, rowSpacing: 150);
               PlantainForage.Sow(population:Population, cultivar:CultivarName, depth:SowingDepth, rowSpacing:RowSpacing);
               Fertiliser.Apply(Amount: Amount, Type: Fertiliser.Types.NO3N);    
               CropAge = 0.0;
            }
        
        }
        
    }
}
```
        Plant PlantainForage: PlantType=PlantainForage; IsEnding=false; DaysAfterEnding=0
        Soil: Latitude=0; Longitude=0
          LayerStructure: Thickness=[200, 200, 200, 200, 200, 200, 400, 400, 400, 600]
          Physical
            Thickness  BD    AirDry  LL15  DUL   SAT
            200        1.35  0.1     0.2   0.35  0.45
            250        1.35  0.1     0.2   0.35  0.45
            300        1.4   0.15    0.15  0.35  0.4
            150        1.4   0.13    0.13  0.33  0.35
            150        1.4   0.1     0.1   0.28  0.35
            1950       1.59  0.06    0.06  0.1   0.3
            SoilCrop GrapevineSoil: LL=[0.2, 0.2, 0.15, 0.13, 0.1, 0.06]; KL=[0.25, 0.1, 0.08, 0.05, 0.05, 0.01]; XF=[1, 1, 1, 1, 1, 1]
            SoilCrop SlurpSoil: LL=[0.2, 0.2, 0.15, 0.13, 0.1, 0.06]; KL=[0.11, 0.11, 0.02, 0, 0, 0]; XF=[1, 1, 1, 1, 1, 1]
            SoilCrop PlantainForageSoil: LL=[0.15, 0.17, 0.19, 0.17, 0.1, 0.1]; KL=[0.1, 0.08, 0.05, 0.02, 0.01, 0.01]; XF=[1, 1, 1, 1, 1, 0.5]
            SoilCrop AGPWhiteCloverSoil: LL=[0.2, 0.2, 0.15, 0.13, 0.1, 0.06]; KL=[0.1, 0.05, 0, 0, 0, 0]; XF=[1, 0.75, 0, 0, 0, 0.5]
            SoilCrop AGPRyegrassSoil: LL=[0.2, 0.2, 0.15, 0.13, 0.1, 0.06]; KL=[0.1, 0.08, 0.05, 0.02, 0, 0]; XF=[1, 1, 1, 0.5, 0, 0.5]
            SoilCrop WhiteCloverSoil: LL=[0.15, 0.17, 0.19, 0.17, 0.1, 0.1]; KL=[0.1, 0.08, 0.04, 0.01, 0, 0]; XF=[1, 1, 1, 1, 0, 0]
          WaterBalance SoilWater: same as Validation.Sauvignonblanc.RetainedNodeNum.RetainedNodNum.Row.Soil.SoilWater
          Organic: same as Validation.Sauvignonblanc.RetainedNodeNum.RetainedNodNum.Row.Soil.Organic
          Chemical: Thickness=[100, 200, 300, 300, 300, 300]; PH=[6.6, 6.2, 5.7, 5.5, 5.5, 5.5]; PHUnits=Water
          CERESSoilTemperature Temperature
          Water: Thickness=[200, 250, 300, 150, 150, 1950]; InitialValues=[0.35, 0.35, 0.35, 0.33, 0.28, 0.1]; InitialPAWmm=262.5; RelativeTo=LL15; FilledFromTop=true
          OutputLayers: Thickness=[150, 150, 150, 150, 150, 150, 150]
          Solute NO3: same as Validation.Sauvignonblanc.RetainedNodeNum.RetainedNodNum.Row.Soil.NO3
          Solute NH4: same as Validation.Sauvignonblanc.RetainedNodeNum.RetainedNodNum.Row.Soil.NH4
          Solute Urea: same as Validation.Sauvignonblanc.RetainedNodeNum.RetainedNodNum.Row.Soil.Urea
          Nutrient: same as Validation.Sauvignonblanc.RetainedNodeNum.RetainedNodNum.Row.Soil.Nutrient
        Supplement: same as SheepInVineyard.SheepInVineyard.Row.Supplement
        Manager GrazeVineyardAlley
          Genotype = Medium Merino
          Sex = Castrate
          Age = 12
          Weight = 50
          Pregnant = 0
          Lactating = 0
          YoungNumber = 0
          YoungWt = 0
          StockingRate = 50
          CurrentLocation = Away
          PreGrazingDM = 1500
          MinGrazingDays = 1
          PostGrazingDM = 1000
          DoNoGrazingWindow = True
          NoGrazeStartSpring = 05-sep
          NoGrazeEndSpring = 01-dec
          NoGrazeStartSummer = 15-jan
          NoGrazeEndSummer = 10-apr
          SupplementName = silage
          SupplementFirst = False
          SupplementEveryDay = 0
          SupplementOnPastureMass = 0
          TriggerPastureMass = 1500
          script: same as in SheepInVineyard.SheepInVineyard.Row.GrazeVineyardRow
        Stock: RandSeed=9999
        Report ReportStockAlley: EventNames=[Clock].EndOfDay
          VariableNames:
            [Clock].Today as Date
            [Stock].NumberAll as NumStockAlley
            [Stock].IntakeAll.Weight as DMIntakeAlley
            [Stock].SuppIntakeAll.Weight as SilageIntakeAlley
            [Stock].CondScoreAll as ConditionScoreAlley
            [GrazeVineyardAlley].Script.HarvestableBiomass as HarvestableBiomassAlley
            [GrazeVineyardAlley].Script.CurrentLocation as StockLocationAlley
            [PlantainForage].AboveGround.Wt
      Forages
  Folder Sensibility
    Experiment IrrigationResponse
      Memo Notes
        This simulation experiment is set up to test the sensibility of the model output to water stress. The days of interval between two irrigation events was set as the experimental factor. The results show the model present reasonable water stress responses for leaf area, biomass dynamics of different organ, profile soil water storage, and non-structural carbohydrate. one caution should be note is for the Brix values. Brix was calculated based on water content, which is related to the berry dry weight and fresh weight. Dry weight response strongly to the water stress as carbon assimilation was reduced. For the response of fresh weight to water stress, only a emipirical function based on our rule of thumb was added. The effects of carbon status on berry fresh weight needed to be added based on experimental data as well.
      Factors
        Factor Node: Specification=[AutomaticIrrigation].Script.returndays = 1, 3, 5, 10, 20
      Simulation IrrigResponse
        Clock: Start=2005-02-25; End=2012-05-02
        Summary SummaryFile
        Weather: FileName=Blenheim.met
        MicroClimate: a_interception=0; b_interception=1; c_interception=0; d_interception=0; SoilHeatFluxFraction=0.4; MinimumHeightDiffForNewLayer=0; NightInterceptionFraction=0.5; ReferenceHeight=2
        SoilArbitrator Soil Arbitrator
        Manager ClimateController
          AllowControl = True
          EnableDate = 01/01/1972 00:00:00
          WithinYearControl = False
          ControlStart =
          ControlEnd =
          RainfallMultiplier = 0
          RainfallAddition = 0
          RadiationMultiplier = 1
          RadiationAddition = 0
          MinTMultiplier = 1
          MinTAddition = 0
          MaxTMultiplier = 1
          MaxTAddition = 0
          WindMultiplier = 1
          WindAddition = 0
          VPMultiplier = 1
          VPAddition = 0
```csharp
using Newtonsoft.Json;
using APSIM.Shared.Utilities;
using Models.Interfaces;
using Models.Soils;
using Models.PMF;
using Models.Core;
using System.Xml.Serialization;
using System;
using Models.Soils.Nutrients;
using Models.Climate;

namespace Models
{
    [Serializable]
    public class Script : Model
    {
        // - Links to APSIM models
        [Link] Zone zone;
        [Link] Clock clock;
        [Link] Weather weather;
        [Link] ISummary summary = null;

        // - Paramters for this manager
        [Description("Enable? Set to 'No' to completely disable this manager")] public bool AllowControl { get; set; }

        [Separator("General settings")]
        [Description("Start the climate controls beginning on date (dd/mmm/yyyy): ")] public DateTime EnableDate { get; set; }
        [Description("Implement climate control only during part of the year?")] public bool WithinYearControl { get; set; }
        [Description("Within each year, the first day to start the climate controls is (dd-mmm)")] public string ControlStart { get; set; }
        [Description("Within each year, end last day of climate control is (dd-mmm)")] public string ControlEnd { get; set; }

        [Separator("Rainfall")]
        [Description("Rainfall multiplier (-): ")] public double RainfallMultiplier { get; set; }
        [Description("Rainfall addition (mm): ")] public double RainfallAddition { get; set; }

        [Separator("Radiation")]
        [Description("Radiation multiplier (-): ")] public double RadiationMultiplier { get; set; }
        [Description("Radiation addition (MJ/m2): ")] public double RadiationAddition { get; set; }

        [Separator("Minimum temperature")]
        [Description("Minimum temperature multiplier (-): ")] public double MinTMultiplier { get; set; }
        [Description("Minimum temperature addition (C): ")] public double MinTAddition { get; set; }

        [Separator("Maximum temperature")]
        [Description("Maximum temperature multiplier (-): ")] public double MaxTMultiplier { get; set; }
        [Description("Maximum temperature addition (C): ")] public double MaxTAddition { get; set; }

        [Separator("Wind speed")]
        [Description("Wind speed multiplier (-): ")] public double WindMultiplier { get; set; }
        [Description("Wind speed addition (m/s): ")] public double WindAddition { get; set; }

        [Separator("Vapour pressure")]
        [Description("Vapour pressure multiplier (-): ")] public double VPMultiplier { get; set; }
        [Description("Vapour pressure addition (hPa): ")] public double VPAddition { get; set; }

        [JsonIgnore] public bool DoControl { get; set; }
        [JsonIgnore] public int DoControlInt { get; set; }

        [EventSubscribe("PreparingNewWeatherData")] private void OnDoManagement(object sender, EventArgs e)
        {
            // Check if this manager is enabled
            if ((AllowControl) && (clock.Today >= EnableDate))
            {
                DoControl = true;
                if (WithinYearControl)
                    DoControl = DateUtilities.WithinDates(ControlStart, clock.Today, ControlEnd); 
            }

            if (DoControl)
                DoControlInt = 1;
            else
                DoControlInt = 0;

            if (DoControl)
            {
                // do the weather alterations 
                weather.Rain = RainfallMultiplier * weather.Rain + RainfallAddition;
                weather.Radn = RadiationMultiplier * weather.Radn + RadiationAddition;
                weather.MinT = MinTMultiplier * weather.MinT + MinTAddition;
                weather.MaxT = MaxTMultiplier * weather.MaxT + MaxTAddition;
                weather.Wind = WindMultiplier * weather.Wind + WindAddition;
                weather.VP = VPMultiplier * weather.VP + VPAddition;
            }
        }
    }
}
```
        RectangularZone Row: Length=100; Width=0.9; Slope=0; AspectAngle=0; Altitude=50
          Report: EventNames=[Clock].DoReport
          Memo: same as Validation.Sauvignonblanc.RetainedNodeNum.RetainedNodNum.Row.Memo
          Plant Grapevine: PlantType=Grapevine; IsEnding=false; DaysAfterEnding=0
          Manager TreeInitialisation: same as Validation.Sauvignonblanc.RetainedNodeNum.RetainedNodNum.Row.TreeInitialisation
          Irrigation
          Fertiliser: same as Validation.Sauvignonblanc.RetainedNodeNum.RetainedNodNum.Row.Fertiliser
          SurfaceOrganicMatter: InitialResidueName=wheat_stubble; InitialResidueType=wheat; InitialResidueMass=10000; InitialStandingFraction=0; InitialCPR=0; InitialCNR=20; FractionFaecesAdded=1
          Manager SetupTreeRootZones: same as Validation.Sauvignonblanc.RetainedNodeNum.RetainedNodNum.Row.SetupTreeRootZones
          Operations VineIrrigation
          Operations WinterRainfall
            2006-08-26  [Irrigation].Apply(45);
          Manager PlantVariables: same as Validation.newCanopySyste.BRI_4Cane.Row.PlantVariables
          Manager HarvestNPruning: same as Validation.Sauvignonblanc.RetainedNodeNum.RetainedNodNum.Row.HarvestNPruning
          Manager DripIrrigator: same as Validation.Sauvignonblanc.RetainedNodeNum.RetainedNodNum.Row.DripIrrigator
          Manager Fertilise on fixed dates: same as Validation.Sauvignonblanc.RetainedNodeNum.RetainedNodNum.Row.Fertilise on fixed dates
          Manager Reset on date: same as Validation.Sauvignonblanc.RetainedNodeNum.RetainedNodNum.Row.Reset on date
          Manager Fertilise topup: same as Validation.Sauvignonblanc.RetainedNodeNum.RetainedNodNum.Row.Fertilise topup
          Soil: same as Validation.Sauvignonblanc.RetainedNodeNum.RetainedNodNum.Row.Soil
          Manager AutomaticIrrigation
            allowIrrigation = True
            seasonStart = 1-Oct
            seasonEnd = 30-May
            seasonsAllocation = 10000
            triggerDeficit = 50
            targetDeficit = 95
            returndays = 3
            maximumAmount = 10
            depthPAWC = 650
```csharp
using Newtonsoft.Json;
using APSIM.Shared.Utilities;
using System.Xml.Serialization;
using Models.Soils;
using Models.PMF;
using Models.Core;
using System;
using Models.Interfaces;



        
namespace Models
{
    [Serializable] 
    [System.Xml.Serialization.XmlInclude(typeof(Model))]
    public class Script : Model
    {
        [Link] private ISummary summary;
        [Link] private Irrigation Irrigation;
        [Link] private Clock Clock;
        [Link] private Soil Soil;
        [Link(IsOptional = true)] private IPlant existingCrop;
        private DateTime StartDate;
        private DateTime EndDate;
        private double TopDUL;
        private double TopLL;
        private int nLayers;
        [Link]
        private IPhysical soilPhysical;
        [Link]
        private ISoilWater waterBalance;
        //Communication to other modules
       
        //User inputs from properties tab
        [Description("Turn irrigation on?")]
        public bool allowIrrigation { get; set; }
        [Description("Start of irrigation season (dd-MMM)")]
        public string seasonStart { get; set; }
        [Description("End of irrigation season (dd-MMM)")]
        public string seasonEnd { get; set; }
        [Description("Season allocation (mm)")]
        public double seasonsAllocation { get; set; }
        [Description("Deficit to trigger irrigation (% PAWC)")]
        public double triggerDeficit { get; set; }
        [Description("Deficit to stop irrigaton (% PAWC)")]
        public double targetDeficit { get; set; }
        [Description("Minimum days for irrigation to return")]
        public double returndays { get; set; }
        [Description("Maximum irrigation application (mm/day)")]
        public double maximumAmount { get; set; }
        [Description("Depth to calculate PAWC (mm)")]
        public double depthPAWC { get; set; }

        //Class members
        [JsonIgnore] public double TopSWdeficit { get; set; }
        [JsonIgnore] public double TopSWC { get; set; }
        [JsonIgnore] public double DaysSinceIrrigation { get; set; }
        [JsonIgnore] public double AmountToApply { get; set; }
        [JsonIgnore] public double SeasonAppliedAmount { get; set; }
        
        private bool IrrigationIsAllowed { get; set; }
        private bool SeasonIsOpen { get; set; }
        private bool CropIsActive { get; set; }
        private bool IrrigatorIsAvailable { get; set; }
        private bool SoilIsDry { get; set; }

    
        //Calculate static soil variables
        [EventSubscribe("StartOfSimulation")]
        private void OnStartOfSimulation(object sender, EventArgs e)
        {   
            //Set the season dates
            StartDate = DateTime.Parse(seasonStart + "-" + Clock.Today.Year.ToString());
            EndDate = DateTime.Parse(seasonEnd + "-" + Clock.Today.Year.ToString());
            
            //Can we irrigate at all?
            IrrigationIsAllowed = false; 
            if (allowIrrigation)
                IrrigationIsAllowed = true; 

            //Calculate soil water variables
            double depthFromSurface = 0.0;
            double fracLayer = 0.0;
            nLayers = soilPhysical.Thickness.Length;
            for (int layer = 0; layer < nLayers; layer++)
            {
                fracLayer = Math.Min(1.0, (depthPAWC - depthFromSurface) / soilPhysical.Thickness[layer]);
                TopLL += soilPhysical.LL15mm[layer] * fracLayer;
                TopDUL += soilPhysical.DULmm[layer] * fracLayer;
                depthFromSurface += soilPhysical.Thickness[layer];
                if (depthFromSurface >= depthPAWC)
                    layer = nLayers;
            }
        }
             
        //Determine daily requirement for irrigation
        [EventSubscribe("StartOfDay")]
        private void OnStartOfDay(object sender, EventArgs e)
        {
            //Can we irrigate today?          
            SeasonIsOpen = isBetween(Clock.Today, StartDate, EndDate);
            if (!SeasonIsOpen)
                SeasonAppliedAmount = 0;

            //Is there a crop in the ground that needs irrigation?
            CropIsActive = false;
            if ((existingCrop != null) && (existingCrop.IsAlive))
                CropIsActive = true;
            //if ((existingCrop.Phenology.Stage >= 3.0) && (existingCrop.Phenology.Stage < 6.0))
          
            //Is the irrigator available?
            IrrigatorIsAvailable = false;
            DaysSinceIrrigation += 1;
            if (DaysSinceIrrigation >= returndays)
                IrrigatorIsAvailable = true;
          
            //Is the soil dry enough to require irrigation?
            SoilIsDry = false;
            double depthFromSurface = 0.0;
            double fracLayer = 0.0;
            TopSWC = 0.0;
            for (int layer = 0; layer < nLayers; layer++)
            //for (int layer = 0; depthFromSurface < depthPAWC + soilPhysical.Thickness[layer]; layer++)
            {
                fracLayer = Math.Min(1.0, (depthPAWC - depthFromSurface) / soilPhysical.Thickness[layer]);
                TopSWC += waterBalance.SWmm[layer] * fracLayer;
                depthFromSurface += soilPhysical.Thickness[layer];
                if (depthFromSurface >= depthPAWC)
                    layer = nLayers;
            }
            
            TopSWdeficit = TopSWC - TopDUL;
            if (Math.Max(0.0, -TopSWdeficit) >= (TopDUL - TopLL) * (100 - triggerDeficit) / 100)
                SoilIsDry = true;
                
            //Are all the conditions ratifying irrigation
            if (IrrigationIsAllowed && SeasonIsOpen && CropIsActive && IrrigatorIsAvailable && SoilIsDry)
            {
                //Lets bloody well irrigate then!!!!
                AmountToApply = TopDUL * targetDeficit / 100 - TopSWC;
                AmountToApply = Math.Max(0.0, Math.Min(AmountToApply, seasonsAllocation - SeasonAppliedAmount));
                AmountToApply = Math.Min(AmountToApply,maximumAmount);
                Irrigation.Apply(AmountToApply);
                DaysSinceIrrigation = 0;
                SeasonAppliedAmount += AmountToApply;
            }
        }
        
        ///Checks whether theDate is between iniDate and endDate (non-year specific)
        private bool isBetween(DateTime theDay, DateTime iniDate, DateTime endDate)
        {
            bool result = false;
            if (iniDate.DayOfYear < endDate.DayOfYear)
            {
                // period is within one year, ex: summer in the northern hemisphere
                if ((theDay.DayOfYear >= iniDate.DayOfYear) && (theDay.DayOfYear <= endDate.DayOfYear))
                    result = true;
            }
            else
            {
                // period goes over the end of the year, ex: summer in the southern hemisphere
                if ((theDay.DayOfYear >= iniDate.DayOfYear) || (theDay.DayOfYear <= endDate.DayOfYear))
                    result = true;
            }
            
            return result;
        }
    }
}
```
        RectangularZone Alley: same as Validation.Sauvignonblanc.RetainedNodeNum.RetainedNodNum.Alley
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