Simulations: Version=216
  Folder Replacements
    Report BaseReport: EventNames=[Clock].DoReport
      VariableNames:
        [Clock].Today as Date
        [Clock].Today.DayOfYear as DayOfYear
        // Water outputs
        [Weather].Rain as Rainfall
        [Irrigation].IrrigationApplied as Irrigation
        [MicroClimate].PrecipitationInterception as PrecipitationInterception
        [Soil].SoilWater.Eo as Eo
        [Soil].SoilWater.Es as Evaporation
        [PlantainForage].Leaf.Transpiration as Transpiration
        [Soil].SoilWater.Drainage as Drainage
        [Soil].SoilWater.Runoff as Runoff
        sum([Soil].SoilWater.LateralOutflow) as LateralFlow
        [Soil].SoilWater.pond as PondedWater
        sum([Soil].Water.MM) as TotalSWC
        sum([Soil].Physical.SATmm) as TotalSAT
        sum([Soil].Physical.DULmm) as TotalDUL
        sum([Soil].Physical.LL15mm) as TotalLL15
        [Soil].Water.Volumetric[1] as TopLayerSWC
        [Soil].Physical.DUL[1] as TopLayerDUL
        [Soil].Physical.LL15[1] as TopLayerLL15
        // Nitrogen outputs
        [Fertiliser].NitrogenApplied as FertiliserN
        (0.0) as FixedN
        (sum([Soil].Nutrient.MineralisedN) + sum([SurfaceOrganicMatter].SurfaceResidue.Decomposition.MineralisedN)) as NetMineralisedN
        sum([Soil].Nutrient.MineralisedN) as MineralisedSoilN
        sum([SurfaceOrganicMatter].SurfaceResidue.Decomposition.MineralisedN) as MineralisedSurfOMN
        sum([Soil].Nutrient.DenitrifiedN) as DenitrifiedN
        ([Soil].SoilWater.LeachUrea + [Soil].SoilWater.LeachNH4 + [Soil].SoilWater.LeachNO3) as LeachedN
        [PlantainForage].Root.NTakenUp*10.0 as UptakeN
        ([PlantainForage].Leaf.Detached.N+[PlantainForage].Stem.Detached.N+[PlantainForage].Inflorescence.Detached.N+[PlantainForage].Taproot.Detached.N+[PlantainForage].Root.Detached.N)*10.0 as DetachedPlantN
        [DefoliationManager].Script.HarvestedN*10.0 as PlantDefoliatedN
        [DefoliationManager].Script.RemovedN*10.0 as PlantRemovedN
        [DefoliationManager].Script.NReturnedInDung*10.0 as DungDepositedN
        [DefoliationManager].Script.NReturnedInUrine*10.0 as UrineDepositedN
        (sum([Soil].Urea.kgha) + sum([Soil].NH4.kgha) + sum([Soil].NO3.kgha)) as TotalMineralN
        sum([Soil].Urea.kgha) as TotalUrea
        sum([Soil].NH4.kgha) as TotalNH4
        sum([Soil].NO3.kgha) as TotalNO3
        [SurfaceOrganicMatter].N as TotalSurfOMN
        sum([Soil].Nutrient.FOM.N) as TotalFOMN
        sum([Soil].Nutrient.Humic.N) as TotalHumicN
        sum([Soil].Nutrient.Microbial.N) as TotalMicrobialN
        Sum of ([DefoliationManager].Script.HarvestedWt) from 1-Jul to [Clock].Today as DefoliatedWtCum
        Sum of ([DefoliationManager].Script.HarvestedN) from 1-Jul to [Clock].Today as DefoliatedNCum
        // Crop outputs
        [PlantainForage].Total.Wt as TotalPlantWt
        [PlantainForage].Total.N as TotalPlantN
        ([PlantainForage].AboveGroundLive.Wt + [PlantainForage].BelowGroundLive.Wt) as TotalPlantLiveWt
        ([PlantainForage].Total.Wt - ([PlantainForage].AboveGroundLive.Wt + [PlantainForage].BelowGroundLive.Wt)) as TotalPlantDeadWt
        [PlantainForage].AboveGround.Wt as AboveGroundPlantWt
        [PlantainForage].BelowGround.Wt as BelowGroundPlantWt
        [PlantainForage].AboveGround.NConc as AboveGroundNConc
        [PlantainForage].BelowGround.NConc as BelowGroundNConc
        [PlantainForage].Leaf.LAI as LAIGreen
        [PlantainForage].Leaf.LAIDead as LAIDead
        [MicroClimate].CanopyCover as CoverTotal
        [PlantainForage].Leaf.Height as CropHeight
        [PlantainForage].Root.Depth as RootDepth
        // Harvest outputs
        [DefoliationManager].Script.HarvestedWt as DefoliatedWt
        [DefoliationManager].Script.HarvestedN as DefoliatedN
        [DefoliationManager].Script.RemovedWt as OffTakePlantWt
        [DefoliationManager].Script.RemovedN as OffTakePlantN
        [DefoliationManager].Script.HarvestedN/([DefoliationManager].Script.HarvestedWt + 0.000000001) as DefoliatedNconc
        [DefoliationManager].Script.PreHarvestDM as PreHarvestDM
        [DefoliationManager].Script.PostHarvestDM as PostHarvestDM
        [DefoliationManager].Script.DaysSinceLastDefoliation as DaysSinceLastDefoliation
        [DefoliationManager].Script.MeanGrowthRateDM *10.0 as MeanGrowthRate
        // Other - Extras
        [Weather].Radn as RadiationTotal
        [MicroClimate].RadiationInterception as RadiationIntercepted
        [Weather].MeanT as MeanAirTemperature
        [Soil].Temperature.Value[1] as TopSoilTemperature
        [DefoliationManager].Script.ReturnedWt*10.0 as DungDepositedWt
        [SurfaceOrganicMatter].Wt as TotalSurfaceOMWt
        ([SurfaceOrganicMatter].C / ([SurfaceOrganicMatter].N + 0.000000001)) as SurfOMCNratio
        sum([Soil].Nutrient.FOM.C) / 0.4 as FOMWt
        (sum([Soil].Nutrient.FOM.C) / (sum([Soil].Nutrient.FOM.N) + 0.000000001)) as FOMCNratio
    Report CumReport: EventNames=[Clock].DoReport
      VariableNames:
        [Clock].Today as Date
        [Clock].Today.Year as Year
        // Water outputs
        Sum of ([Weather].Rain) from 1-Jul to [Clock].Today as RainfallCum
        Sum of ([Irrigation].IrrigationApplied) from 1-Jul to [Clock].Today as IrrigationCum
        Sum of ([Soil].SoilWater.Es) from 1-Jul to [Clock].Today as EvaporationCum
        Sum of ([PlantainForage].Leaf.Transpiration) from 1-Jul to [Clock].Today as TranspirationCum
        Sum of ([Soil].SoilWater.Drainage) from 1-Jul to [Clock].Today as DrainageCum
        Sum of ([Soil].SoilWater.Runoff) from 1-Jul to [Clock].Today as RunoffCum
        // Nitrogen outputs
        Sum of ([Fertiliser].NitrogenApplied) from 1-Jul to [Clock].Today as FertiliserNCum
        (0.0) as FixedNCum
        Sum of ((sum([Soil].Nutrient.MineralisedN) + sum([SurfaceOrganicMatter].SurfaceResidue.Decomposition.MineralisedN))) from 1-Jul to [Clock].Today as NetMineralisedNCum
        Sum of (sum([Soil].Nutrient.DenitrifiedN)) from 1-Jul to [Clock].Today as DenitrifiedNCum
        Sum of (([Soil].SoilWater.LeachUrea + [Soil].SoilWater.LeachNH4 + [Soil].SoilWater.LeachNO3)) from 1-Jul to [Clock].Today as LeachedNCum
        Sum of ([PlantainForage].Root.NTakenUp)*10.0 from 1-Jul to [Clock].Today as UptakeNCum
        Sum of ([PlantainForage].Leaf.Detached.N+[PlantainForage].Stem.Detached.N+[PlantainForage].Inflorescence.Detached.N+[PlantainForage].Taproot.Detached.N+[PlantainForage].Root.Detached.N)*10.0 from 1-Jul to [Clock].Today as DetachedPlantNCum
        Sum of ([DefoliationManager].Script.HarvestedN)*10.0 from 1-Jul to [Clock].Today as PlantDefoliatedNCum
        Sum of ([DefoliationManager].Script.RemovedN)*10.0 from 1-Jul to [Clock].Today as PlantRemovedNCum
        Sum of ([DefoliationManager].Script.NReturnedInDung)*10.0 from 1-Jul to [Clock].Today as DungDepositedNCum
        Sum of ([DefoliationManager].Script.NReturnedInUrine)*10.0 from 1-Jul to [Clock].Today as UrineDepositedNCum
        // Harvest outputs
        Sum of ([DefoliationManager].Script.HarvestedWt) from 1-Jul to [Clock].Today as DefoliatedWtCum
        Sum of ([DefoliationManager].Script.HarvestedN) from 1-Jul to [Clock].Today as DefoliatedNCum
        Sum of ([DefoliationManager].Script.RemovedWt) from 1-Jul to [Clock].Today as OffTakePlantWtCum
        Sum of ([DefoliationManager].Script.RemovedN) from 1-Jul to [Clock].Today as OffTakePlantNCum
        // Other - Extras
        Sum of ([DefoliationManager].Script.ReturnedWt)*10.0 from 1-Jul to [Clock].Today as DungDepositedWtCum
    Report CropReport: EventNames=[Clock].DoReport
      VariableNames:
        [Clock].Today as Date
        [Clock].Today.Month as Month
        [PlantainForage].Phenology.ThermalTime
        [PlantainForage].Phenology.Photoperiod
        [PlantainForage].Phenology.PhotoperiodVariation
        [PlantainForage].Phenology.CurrentPhase.Name
        [PlantainForage].Phenology.CurrentStageName
        [PlantainForage].Phenology.Stage
        [PlantainForage].Root.LengthDensity
        [PlantainForage].Leaf.ExtinctionCoefficient
        [PlantainForage].AboveGroundLive.Wt
        ([PlantainForage].Leaf.Live.Wt / ([PlantainForage].AboveGroundLive.Wt + 0.000001)) as LeafFraction
        ([PlantainForage].Stem.Live.Wt / ([PlantainForage].AboveGroundLive.Wt + 0.000001)) as StemFraction
        ([PlantainForage].Inflorescence.Live.Wt / ([PlantainForage].AboveGroundLive.Wt + 0.000001)) as FlowerFraction
        ([PlantainForage].Taproot.Live.Wt / ([PlantainForage].BelowGround.Wt + 0.000001)) as TaprootFraction
        ([PlantainForage].Root.Live.Wt / ([PlantainForage].BelowGround.Wt + 0.000001)) as RootFraction
        [PlantainForage].PerPlantBiomassWt
        [PlantainForage].Arbitrator.DM.TotalFixationSupply
        [PlantainForage].Arbitrator.DM.TotalPlantDemand
        [PlantainForage].Arbitrator.DM.Allocated
        [PlantainForage].Arbitrator.DM.SinkLimitation
        [PlantainForage].Arbitrator.DM.NutrientLimitation
        [PlantainForage].Arbitrator.FDM
        [PlantainForage].Leaf.DMSupply.Total
        [PlantainForage].Stem.DMSupply.Total
        [PlantainForage].Inflorescence.DMSupply.Total
        [PlantainForage].Taproot.DMSupply.Total
        [PlantainForage].Root.DMSupply.Total
        [PlantainForage].Leaf.DMDemand.Total
        [PlantainForage].Stem.DMDemand.Total
        [PlantainForage].Inflorescence.DMDemand.Total
        [PlantainForage].Taproot.DMDemand.Total
        [PlantainForage].Root.DMDemand.Total
        [PlantainForage].Arbitrator.N.TotalPlantSupply
        [PlantainForage].Arbitrator.N.TotalPlantDemand
        [PlantainForage].Arbitrator.N.Allocated
        [PlantainForage].Arbitrator.FN
        [PlantainForage].Root.NTakenUp
        [PlantainForage].Root.NSupply.Uptake
        [PlantainForage].Root.NUptake
        [PlantainForage].Leaf.NSupply.Total
        [PlantainForage].Stem.NSupply.Total
        [PlantainForage].Inflorescence.NSupply.Total
        [PlantainForage].Taproot.NSupply.Total
        [PlantainForage].Root.NSupply.Total
        [PlantainForage].Leaf.NDemand.Total
        [PlantainForage].Stem.NDemand.Total
        [PlantainForage].Inflorescence.NDemand.Total
        [PlantainForage].Taproot.NDemand.Total
        [PlantainForage].Root.NDemand.Total
        [PlantainForage].ShootRootRatio
        [PlantainForage].TargetShootRootRatio
        [PlantainForage].Leaf.DMDemands.Structural.DMDemandFunction.PartitionFraction
        [PlantainForage].Stem.DMDemands.Structural.DMDemandFunction.PartitionFraction
        [PlantainForage].Inflorescence.DMDemands.Structural.DMDemandFunction.PartitionFraction
        [PlantainForage].Taproot.DMDemands.Structural.DMDemandFunction.PartitionFraction
        [PlantainForage].Root.DMDemands.Structural.DMDemandFunction.PartitionFraction
        [PlantainForage].StemsLeafRatio
        [PlantainForage].FlowerStemRatio
        [PlantainForage].TaprootRootRatio
        [PlantainForage].TargetStemsLeafRatio
        [PlantainForage].TargetFlowerStemRatio
        [PlantainForage].TargetTaprootRootRatio
        [PlantainForage].Total.Wt
        [PlantainForage].Total.N
        [PlantainForage].Total.NConc
        [PlantainForage].AboveGround.Wt
        [PlantainForage].BelowGround.Wt
        [PlantainForage].AboveGround.N
        [PlantainForage].BelowGround.N
        [PlantainForage].TotalLive.Wt
        ([PlantainForage].Total.Wt - [PlantainForage].TotalLive.Wt) as PlantainForage.TotalDead.Wt
        [PlantainForage].AboveGroundLive.NConc
        [PlantainForage].BelowGroundLive.NConc
        [PlantainForage].Leaf.Wt
        [PlantainForage].Leaf.Live.Wt
        [PlantainForage].Leaf.Live.N
        [PlantainForage].Leaf.Live.NConc
        [PlantainForage].Leaf.Dead.Wt
        [PlantainForage].Leaf.Dead.NConc
        [PlantainForage].Leaf.CoverTotal
        [PlantainForage].Leaf.CoverGreen
        [PlantainForage].Leaf.CoverDead
        [PlantainForage].Leaf.LAITotal
        [PlantainForage].Leaf.LAI
        [PlantainForage].Leaf.LAIDead
        [PlantainForage].Leaf.Height
        [PlantainForage].Leaf.Transpiration
        [PlantainForage].Leaf.Fw
        [PlantainForage].Leaf.Fn
        [PlantainForage].Leaf.Photosynthesis.FCO2
        [PlantainForage].Leaf.Photosynthesis.FN
        [PlantainForage].Leaf.Photosynthesis.FT
        [PlantainForage].Leaf.Photosynthesis.FW
        [PlantainForage].Leaf.Photosynthesis.FVPD
        [PlantainForage].Leaf.FRGR
        [PlantainForage].Leaf.FNmetabolic
        [PlantainForage].Stem.Live.Wt
        [PlantainForage].Stem.Live.N
        [PlantainForage].Stem.Live.NConc
        [PlantainForage].Stem.Dead.Wt
        [PlantainForage].Stem.Dead.NConc
        [PlantainForage].Inflorescence.Live.Wt
        [PlantainForage].Inflorescence.Live.N
        [PlantainForage].Inflorescence.Live.NConc
        [PlantainForage].Inflorescence.Dead.Wt
        [PlantainForage].Inflorescence.Dead.NConc
        [PlantainForage].Taproot.Live.Wt
        [PlantainForage].Taproot.Live.N
        [PlantainForage].Taproot.Live.NConc
        [PlantainForage].Taproot.Dead.Wt
        [PlantainForage].Taproot.Dead.NConc
        [PlantainForage].Root.Live.Wt
        [PlantainForage].Root.Live.N
        [PlantainForage].Root.Live.NConc
        [PlantainForage].Root.Dead.Wt
        [PlantainForage].Root.Dead.NConc
        [PlantainForage].Root.Depth
        [PlantainForage].Root.WaterUptake
        [PlantainForage].Leaf.Live.StructuralWt
        [PlantainForage].Leaf.Live.StorageWt
        [PlantainForage].Leaf.Live.MetabolicWt
        [PlantainForage].Leaf.Live.StructuralN
        [PlantainForage].Leaf.Live.StorageN
        [PlantainForage].Leaf.Live.MetabolicN
        [PlantainForage].Leaf.Dead.StructuralWt
        [PlantainForage].Leaf.Dead.StorageWt
        [PlantainForage].Leaf.Dead.MetabolicWt
        [PlantainForage].Leaf.Dead.StructuralN
        [PlantainForage].Leaf.Dead.StorageN
        [PlantainForage].Leaf.Dead.MetabolicN
        [PlantainForage].Stem.Live.StructuralWt
        [PlantainForage].Stem.Live.StorageWt
        [PlantainForage].Stem.Live.MetabolicWt
        [PlantainForage].Stem.Live.StructuralN
        [PlantainForage].Stem.Live.MetabolicN
        [PlantainForage].Stem.Live.StorageN
        [PlantainForage].Inflorescence.Live.StructuralWt
        [PlantainForage].Inflorescence.Live.MetabolicWt
        [PlantainForage].Inflorescence.Live.StorageWt
        [PlantainForage].Inflorescence.Live.StructuralN
        [PlantainForage].Inflorescence.Live.MetabolicN
        [PlantainForage].Inflorescence.Live.StorageN
        [PlantainForage].Root.Live.StructuralWt
        [PlantainForage].Root.Live.MetabolicWt
        [PlantainForage].Root.Live.StorageWt
        [PlantainForage].Root.Live.StructuralN
        [PlantainForage].Root.Live.MetabolicN
        [PlantainForage].Root.Live.StorageN
        [PlantainForage].Taproot.Live.StructuralWt
        [PlantainForage].Taproot.Live.MetabolicWt
        [PlantainForage].Taproot.Live.StorageWt
        [PlantainForage].Taproot.Live.StructuralN
        [PlantainForage].Taproot.Live.MetabolicN
        [PlantainForage].Taproot.Live.StorageN
        [PlantainForage].Leaf.Live.StructuralNConc
        [PlantainForage].Leaf.Live.StorageNConc
        [PlantainForage].Root.Live.StructuralNConc
        [PlantainForage].Root.Live.StorageNConc
        [PlantainForage].Leaf.DMDemands.Structural.DMDemandFunction.PartitionFraction
        [PlantainForage].Stem.DMDemands.Structural.DMDemandFunction.PartitionFraction
        [PlantainForage].Inflorescence.DMDemands.Structural.DMDemandFunction.PartitionFraction
        [PlantainForage].Taproot.DMDemands.Structural.DMDemandFunction.PartitionFraction
        [PlantainForage].Leaf.Allocated.Wt
        [PlantainForage].Stem.Allocated.Wt
        [PlantainForage].Inflorescence.Allocated.Wt
        [PlantainForage].Taproot.Allocated.Wt
        [PlantainForage].Root.Allocated.Wt
        [PlantainForage].Leaf.Senesced.Wt
        [PlantainForage].Stem.Senesced.Wt
        [PlantainForage].Inflorescence.Senesced.Wt
        [PlantainForage].Taproot.Senesced.Wt
        [PlantainForage].Root.Senesced.Wt
        [PlantainForage].Leaf.Detached.Wt
        [PlantainForage].Stem.Detached.Wt
        [PlantainForage].Inflorescence.Detached.Wt
        [PlantainForage].Taproot.Detached.Wt
        [PlantainForage].Root.Detached.Wt
        [PlantainForage].Leaf.Removed.Wt
        [PlantainForage].Stem.Removed.Wt
        [PlantainForage].Inflorescence.Removed.Wt
        [PlantainForage].Taproot.Removed.Wt
        [PlantainForage].Root.Removed.Wt
        //(([PlantainForage].Leaf.Allocated.Wt - [PlantainForage].Leaf.Senesced.Wt) + ([AGPRyegrass].Leaf.DMGrowth * 0.1)) as LeafNetGrowthRatePerDay
        //(([PlantainForage].Stem.Allocated.Wt - [PlantainForage].Stem.Senesced.Wt)+ ([AGPRyegrass].Stem.DMGrowth)*0.1)) as  StemNetGrowthRatePerDay
        //([PlantainForage].Inflorescence.Allocated.Wt - [PlantainForage].Inflorescence.Senesced.Wt) as InflorescenceNetGrowthRatePerDay
        //([AGPRyegrass].Stolon.DMGrowth * 0.1) as StolonNetGrowthRatePerDay
        //(([PlantainForage].Leaf.Allocated.Wt - [PlantainForage].Leaf.Senesced.Wt)+ ([PlantainForage].Stem.Allocated.Wt - [PlantainForage].Stem.Senesced.Wt)+ ([PlantainForage].Inflorescence.Allocated.Wt - [PlantainForage].Inflorescence.Senesced.Wt)+ ([AGPRyegrass].Leaf.DMGrowth * 0.1)+ ([AGPRyegrass].Stem.DMGrowth * 0.1)+ ([AGPRyegrass].Stolon.DMGrowth * 0.1)) as TotalNetGrowthRate
        //mean of (([PlantainForage].Leaf.Allocated.Wt - [PlantainForage].Leaf.Senesced.Wt)+ ([PlantainForage].Stem.Allocated.Wt - [PlantainForage].Stem.Senesced.Wt)+ ([PlantainForage].Inflorescence.Allocated.Wt - [PlantainForage].Inflorescence.Senesced.Wt)+ ([AGPRyegrass].Leaf.DMGrowth * 0.1)+ ([AGPRyegrass].Stem.DMGrowth * 0.1)+ ([AGPRyegrass].Stolon.DMGrowth * 0.1)) from [Clock].StartOfMonth to [Clock].EndOfMonth as MonthlyMeanNetGrowth
        //sum of (([PlantainForage].Leaf.Allocated.Wt - [PlantainForage].Leaf.Senesced.Wt)+ ([PlantainForage].Stem.Allocated.Wt - [PlantainForage].Stem.Senesced.Wt)+ ([PlantainForage].Inflorescence.Allocated.Wt - [PlantainForage].Inflorescence.Senesced.Wt)+ ([AGPRyegrass].Leaf.DMGrowth * 0.1)+ ([AGPRyegrass].Stem.DMGrowth * 0.1)+ ([AGPRyegrass].Stolon.DMGrowth * 0.1)) from [Clock].StartOfMonth to [Clock].EndOfMonth as SumMonthlyNetGrowth
        //([PlantainForage].Root.LayerLive+[PlantainForage].Root.LayerDead) as RootWtByLayer
        [PlantainForage].WaterUptake as WaterUptakeByLayer
        [PlantainForage].NitrogenUptake as NitrogenUptakeByLayer
    Report DiagnosisReport: EventNames=[Clock].DoReport
      VariableNames:
        [Clock].Today as Date
        // surface OM
        ([PlantainForage].Leaf.Detached.Wt+[PlantainForage].Stem.Detached.Wt+[PlantainForage].Inflorescence.Detached.Wt)*0.4/([PlantainForage].Leaf.Detached.N+[PlantainForage].Stem.Detached.N+[PlantainForage].Inflorescence.Detached.N+0.00000001) as Litter.CN
        ([PlantainForage].Root.Detached.Wt+[PlantainForage].Taproot.Detached.Wt)*0.4/([PlantainForage].Root.Detached.N+[PlantainForage].Taproot.Detached.N+0.00000001) as RootDetached.CN
        //[DefoliationManager].Script.ReturnedWt*0.4/([DefoliationManager].Script.NReturnedInDung+0.00000001) as Dung.CN
        [SurfaceOrganicMatter].Wt
        ([SurfaceOrganicMatter].C/[SurfaceOrganicMatter].N) as SurfaceOrganicMatter.CN
        // soil water
        (sum([Soil].Water.MM)-sum([Soil].Physical.LL15mm))/(sum([Soil].Physical.DULmm)-sum([Soil].Physical.LL15mm)) as ProfileWaterStatus
        [Weather].VP as VapourPressure
        [Weather].VPD as VapoutPressureDeficit
        // soil nitrogen
        [Soil].Nutrient.FOM.C/0.4 as Soil.FOM.Wt
        [Soil].Nutrient.FOM.C/[Soil].Nutrient.FOM.N as Soil.FOM.CN
        ([Soil].Nutrient.Microbial.C + [Soil].Nutrient.Humic.C)*100.0/([Soil].Physical.BD * [Soil].Physical.Thickness * 10000.0) as Soil.OC
        //[Soil].Nutrient.Microbial.C/[Soil].Nutrient.Humic.C as FBiom
        [Soil].Nutrient.Microbial.C/([Soil].Nutrient.Humic.C - [Soil].Nutrient.Inert.C) as FBiom
        [Soil].Nutrient.Inert.C/([Soil].Nutrient.Microbial.C + [Soil].Nutrient.Humic.C) as FInert
    Report MonthReport: EventNames=[Clock].EndOfMonth
      VariableNames:
        [Clock].Today as Date
        mean of (([PlantainForage].Leaf.Allocated.Wt - [PlantainForage].Leaf.Senesced.Wt)+ ([PlantainForage].Stem.Allocated.Wt - [PlantainForage].Stem.Senesced.Wt)+ ([PlantainForage].Inflorescence.Allocated.Wt - [PlantainForage].Inflorescence.Senesced.Wt)+ ([AGPRyegrass].Leaf.DMGrowth * 0.1)+ ([AGPRyegrass].Stem.DMGrowth * 0.1)+ ([AGPRyegrass].Stolon.DMGrowth * 0.1)) from [Clock].StartOfMonth to [Clock].EndOfMonth as MonthlyMeanNetGrowth
    Plant PlantainForage: PlantType=PlantainForage
      Memo GeneralDescription
        _Rogerio Cichota, AgResearch, New Zealand_

        ## Preamble

        Plantain forage (*Plantago lanceolata*), also know as English plantain, ribgrass, or ribwort, is a herbaceous perennial herb with a broad distribution in the native grasslands of Eurasia ([#SagarHarper_1964]; [#StewartPlantain_1996]).  It is now common around the world in suitable habitats with temperate and subtropical climates.  The plant consists of a rosette of basal semi-erect leaves which may have one or more flowering stalks.  The leaves are green to grey-green in colour, have a characteristic lanceolate shape with 3 to 5 parallel veins along the length and have few or no hairs.  The stems are leafless, growing some 10-15cm above the leaves and have scattered hairs toward the base of the plant.  Each stalk terminates in an ovoid inflorescence containing many small flowers each with a pointed bract.  The inflrescence is 1-4cm long and changes shape over time (from a cone to a cilinder) as the flowers mature from the based to the top, the colour also changes from the initial grey-green to light brown when mature.  The flowering period goes from late spring to early fall and varies between plants, it can last several months for a population of plants in a given locale.  Forage plantain does not need vernalisation to trigger flowering.  The flowers are wind-pollinated and are replaced by a small seed capsule containing two small seeds, with weight varying between 1.5 and 2.0 mg per seed. Seeds have an oblong shape and the colour varies from dark brown to black.  The root system consists of a relatively shallow crown of coarse fibrous roots including adventitious roots ([#SandersonElwinger_2000a]) and although technically a taprooted species it does not have the typical solid deep taproot.  Plantain forage can allocate greater proportion of roots at depth, giving a competitive advantage over shallow root grasses ([#StewartPlantain_1996]; [#NieEtAl_2008]; [#vanDenBergeEtAl_2014]).

        Selection of plantain cultivars for use as forage have focused mostly on narrow leaf varieties, which have an erect, bushy, growth habit and ability to tiller under grazing ([#StewartPlantain_1996]), more recently some emphasis has also been put on the ability to growth over cold periods.  Forage plantain can grow large leaves, up to around 40cm instead of typical 15-25cm, and these are highly palatable to grazing animals, being specifically targeted by sheep ([#SagarHarper_1964]; [#StewartPlantain_1996]; [#RumballKeog_1997]; [#QuijadaThesis_2015]). Reproductive organs are less palatable and mature stalks are avoided by grazers ([#StewartPlantain_1996]; [#MoorheadPigot_2009]; [#AyalaEtAl_2011]).  Plantain forage is highly nutritious, has good digestibility, and the mineral composition usually is higher than ryegras-clover swards ([#StewartPlantain_1996]; [#JacobsWard_2010]; [#ElgersmaEtal_2014]; [#LeeEtAlYields_2015]).  Potential medicinal effects of plantain have been suggested and few bio-active compounds that may alter rumen fermentation and N partitionin in the animal are being investigated ([#StewartPlantain_1996]; [#QuijadaThesis_2015]; [#JansmaThesis_2016]).

        **Objective:**  The model presented here has been built using the Plant Modelling Framework (PMF) of [#brown_plant_2014] to simulate the growth of a forage plantin crop.  Currently, the focus is on describing biomass accumulation and regrowth after harvest on monocultural swards. As part of APSIM's PMF, using plantain forage in mixed swards is possible, but this has not been properly tested yet.  Likewise, describing the effect of population decrease on plant growth was not attempted; for swards free of weeds and within typical population ranges, the changes in plant size (number of tillers) and LAI should compensate for loss of population, but competition with weeds and others would alter this pattern significantly.
        Simulating variations in plant N concentration (seasonal or due to changes in soil status)  is not a major focus of the current model.  Further development of PMF's supply/demand processes are needed for capturing the variations in N content typically seen in perennial species.

        ## Presentation

        This model has been built using the Plant Modelling Framework (PMF) of [#brown_plant_2014] to simulate the growth of a plantain forage crop ( _Plantago lanceolata_ ).  The model focus, thus, on describing primarily the vegetative growth, with a simplified account of the reproductive phase, without explicit considering flowers and seeds (these may be included in future releases).  To simulate the aboveground plant structure, including the photosynthesis process, the PlantainForage model uses the SimpleLeaf procedure of PMF.  The model describes a semi-perennial crop, with phenology rewinding to the vegetative stage at the end of the reproductive phase.

        ## Inclusion in APSIM simulations

        A forage plantain crop can be included in a simulation the same as any other APSIM crop.

         - The PlantainForage object can be dragged or copied from the Crop folder in the tool box into a Field in your simulation;
         - To become active and grow, plantain needs to be sown using a manager script with a sowing rule. e.g.:
        ~~~
         PlantainForage.Sow(cultivar: Tonic, population: 300, depth: 10, rowSpacing: 150);
        ~~~
        If a specified cultivar is not available, a fatal error will be thrown.

        ### Harvest and biomass removal

        Plantain forage biomass can be removed by raising one of the valid methods: Harvest, Cut, Graze, or Prune; this is done using a manager script, similarly to other crops.  The proportion of the biomass of each organ that is removed from the system and/or added to the residue pools may be specified; otherwise defaults will be used.  Note that the sum of fractions removed and added to residue should be <= 1.0.  To specify the proportions for removal in a manager script, use a RemovalFractions class as shown below:
        ~~~
        [#EventSubscribe("Commencing")]
        private void OnSimulationCommencing(object sender, EventArgs e)
        {
          RemoveFraction = new RemovalFractions(PlantainForage.Organs);
        }
        [#EventSubscribe("DoManagement")]
        private void OnDoManagement(object sender, EventArgs e)
        {
          if (Clock.Today.Date == HarvestDate)
          {
            RemoveFraction.SetFractionToRemove("Leaf", 0.80);
            RemoveFraction.SetFractionToRemove("Stem", 0.50);
            RemoveFraction.SetFractionToResidue("leaf",0.05);
            PlantainForage.Harvest(RemoveFraction);
          }
        }
        ~~~
        The RemovalFractions class can be sent with Harvest, Cut, Graze, or Prune events. All parameters are optional, defaults are used whenever any value is not specified.

        ### Crop termination
        To fully terminate a crop the EndCrop event should be raised:
        ~~~
         PlantainForage.EndCrop();
        ~~~
        Once a crop has been ended the field is open to be used by another APSIM plant model, or another plantain crop.  Note that ending plantain forage is not necessary before sowing another crop, competition for resources will take place between crops when there is more than one in the field.

        ## Acknowledgements
        This model was developed with help from Brittany Paton and Russel McAuliffe organising data and simulations. Datasets were kindly shared by Julia M. Lee and the Forages for Reduced Nitrogen Leaching (FRNL) programme.
      Phenology
        Memo Description
          The duration of each phenologic phase in plantain forage is controlled either by the accumulation of thermal time or photoperiod.
        SubDailyInterpolation ThermalTime: agregationMethod=0
          Memo Description
            The thermal time is calculated from the daily average temperature using three cardinal temperatures: minimum, maximum, and optimum.  Crop development accelerates as temperature increases from minimum to optimum and slows down after that, stopping completely when maximum temperature is reached.  There is very little information about these thresholds for plantain, the minimum temperature seem to be quite variable as one of the main traits that vary among cultivars is the growth over winter. A base temperature of 4 oC has been used in New Zealand ([#PowelEtAl_2007], [#PayneEtAl_2018]) to estimate thermal time for Plantain. For "chinese plantain" ( _Plantago  asiatica_ ) the minimum temperature varies between 3 and 14 oC ([#IshikawaEtAl_2007]), which gives an idea of potential variations for this parameter in plantain. Plantain forage is reported as tolerant to high temperatures ([#StewartPlantain_1996]; [#NieEtAl_2008]) and outgrows ryegrass over summer in subtropical climate ([#MoorheadPigot_2009]). The data for chinese plantain suggests the optimum and maximum temperatures around 30 and 38oC respectively ([#IshikawaEtAl_2007]). But results from germination trails using wild varieties from Western Europe suggest lower values, around 20 and 30oC, respectively ([#TeixeiraEtAl_2020]). These should give a good indication of the variations for forage plantain.
          XYPairs Response: X=[4, 24, 34]; Y=[0, 20, 0]
          ThreeHourAirTemperature InterpolationMethod
        PhotoperiodFunction Photoperiod: Twilight=-6; DayLength=0
        PhotoperiodDeltaFunction PhotoperiodVariation: Twilight=0
        GerminatingPhase Germinating: Start=Sowing; End=Germination; IsEmerged=false
          Memo Description
            Germination will occur one day after sowing, provided that the amount of soil extractable water is greater than zero.  Germination rates in plantain typically vary between 75 and 95% when sown close to the surface (<10mm), in moist warm soil ([#ReedEtAl_2008]; [#DouglasEtAl_2013]; [#LeeEtAlYields_2015]).  The plantain model, following convention of PMF, assumes 100% germination, and therefore the user must correct sowing rate when variations between sown and germinated plant density is considered important.
          Constant MinSoilTemperature: FixedValue=0
        EmergingPhase Emerging: Start=Germination; End=Emergence; IsEmerged=true; TTForTimeStep=0
          Memo Description
             Plantain forage has small seeds and emergence is best when seeds are sown at depth <10mm (Peri et al., 2000; Sanderson et al., 2000), deeper seed may stay dormant for years in the soil ([#Blom_1978]; [#RobertsBoddrell_1984]).  Variations in germination rate due to depth are not explicitly simulated by the PlantainForage model in the current version, however the sowing depth does affect timing of emergence.  This is controlled by the parameter ShootRate, which is the shoot elongation rate as function of thermal time (mm/oCd).
          VariableReference ThermalTime: VariableName=[Phenology].ThermalTime
          AddFunction Target
            Constant ShootLag: FixedValue=15
            MultiplyFunction DepthxRate
              VariableReference SowingDepth: VariableName=[Plant].SowingData.Depth
              Constant ShootRate: FixedValue=10
        GenericPhase Vegetative: Start=Emergence; End=Flowering; IsEmerged=true
          Memo Description
            During this phase the plant only partitions biomass to leaf and root+taproot organs.  The phase starts when plants emerge from the ground, but it is also triggered after the end of the reproductive phase (phenology reset).  It ends when the reproductive phase starts, which is triggered by the accumulation of days with long sunlight ([#SussexPlantain_1956]; [#Rowarth_Plantain_1990]; [#CaseLaceyHopkins_1996]; [#LaceyRoach_2003]; [#GonzalezParrado_2015]).  Stalk development have been recorded to start in October in NZ and in May in the USA ([#Rowarth_Plantain_1990]; [#LaceyRoach_2003]; [#SandersonEtAl_2003]), with data suggesting a minimum of 25-30 days (non consecutive) with long daylight periods ([#SussexPlantain_1956]; [#FajerEtAl_1991]; [#CaseLaceyHopkins_1996]).  The literature does not provide an indication of how long the sunlight period should be to trigger the reproductive phase, but it is clear that daylight should be grater that the period in darkness (14-16 hours been used to induce flowering in growth chambers).  The base plantain forage model uses the accumulation of days greater than 12hrs to trigger the end of the vegetative phase.
          Constant Target: FixedValue=45; Units=days
          LinearInterpolationFunction Progression
            XYPairs: X=[10, 11.5, 12.5, 13]; Y=[0, 0, 1, 1]
            VariableReference XValue: VariableName=[Phenology].Photoperiod
        GenericPhase Reproductive: Start=Flowering; End=Ripening; IsEmerged=true
          Memo Description
            During this phase the plant is partitioning biomass to all organs, including reproductive organs (stems, flowers, and seeds). Flower stages and seeds development are not explicitly described in the current model, only a generic organ refered to as _inflorescence_ is defined.  This was done partly due to lack of data and partly because of the variability and complex phenology of forage plantain.  There is a lot of variation among plantain plants regarding when flowering occurs and how long it lasts, plus even the same plant can have flowering stalks, stalks with young seeds, as well as stalks with ripen seed at the same time ([#Rowarth_Plantain_1990]; [#RumballKeog_1997]; [#LaceyRoach_2003]; [#GonzalezParrado_2015]).  Seed ripenning is reached some 8-10 weeks after flowering, with commercial cultivars closer to the low end of the range.  The available data suggest an accumulation of 450oCd for the flowering period, with base temperature between 5 and 9oC ([#Rowarth_Plantain_1990]; [#RumballKeog_1997]; [#GonzalezParrado_2015]).  Howerver flowering continues throughout the summer into autumn and seem to be curtailed only by frosts ([#Rowarth_Plantain_1990]) and/or short days ([#SandersonEtAl_2003]).  In the PlantainForage model the photoperiod is used to define the end of reproductive phase, following the same approach used to start it.  And correspondelly, the accumulation of days shorter than 12 hours is used as the trigger the end of the phase (this approach also ensures phenology reset even in warmer climates).  Note that the DM partition functions also use photoperiod to change priority allocation into reproductive organs, with maximum allocation only when daylight length is greater than 14hours.  This was done to limit the allocation to reproductive organs on the sason shoulders when only few plants are actively in the reproductive phase (e.g. [#SandersonEtAl_2003]).
          Constant Target: FixedValue=25; Units=days
          LinearInterpolationFunction Progression
            XYPairs: X=[10, 11.5, 12.5, 13]; Y=[1, 1, 0, 0]
            VariableReference XValue: VariableName=[Phenology].Photoperiod
        GotoPhase: Start=Ripening; IsEmerged=true; PhaseNameToGoto=Vegetative; RemovalType=0
          Memo Description
            At the end of reproductive phase, plantain phenology is reset to 'Vegetative'.
      OrganArbitrator Arbitrator
        BiomassTypeArbitrator DMArbitration
          Folder PotentialPartitioningMethods
            ReallocationMethod
            AllocateFixationMethod
            RetranslocationMethod
            SendPotentialDMAllocationsMethod
          Folder AllocationMethods
            NutrientConstrainedAllocationMethod
            DryMatterAllocationsMethod
          RelativeAllocation ArbitrationMethod
            Memo Description
              Controls the allocation of biomass to each of the plant's organs. Partition is based on:
        BiomassTypeArbitrator NArbitration
          Folder PotentialPartitioningMethods
            ReallocationMethod
          Folder ActualPartitioningMethods
            AllocateFixationMethod
            RetranslocationMethod
          Folder AllocationMethods
            NitrogenAllocationsMethod
          RelativeAllocation ArbitrationMethod
            Memo Description
              Controls the allocation of N to each of the plant's organs. Partition is based on:
          AllocateUptakesMethod
        WaterUptakeMethod
        NitrogenUptakeMethod
      SimpleLeaf Leaf: Albedo=0.18; Gsmax350=0.015; R50=150; LeafInitialisationStage=Emergence; Height=0; BaseHeight=0; Width=0; FRGR=0; PotentialEP=0; WaterDemand=0; KDead=0; LAIDead=0
        Memo Description
          __Note:__ this organ represents all the leaves in the plant, without distinction between ages or placement in the canopy.
        MultiplyFunction InitialWt
          Constant InitialPlantWt: FixedValue=0.0008; Units=g/plant
          VariableReference Population: VariableName=[Plant].Population
        Constant CarbonConcentration: FixedValue=0.4; Units=gC/gDM
        Constant MinimumNConc: FixedValue=0.023; Units=gN/gDM
        Constant MaximumNConc: FixedValue=0.05; Units=gN/gDM
        Constant CriticalNConc: FixedValue=0.035; Units=gN/gDM
        RUEModel Photosynthesis
          Memo Description
            Data for photosynthesys in forage plantain is very sparse and so some of the data used here are from studies that employed wild varieties. Values for CO2 assimilation rates are generally consistent ([#PootDenBroek_1997]; [#LabreveuxThesis_2002]; [#vanDenBergeEtAl_2014]; [#CranstonEtAl_2015]) and follow a classic relationhip with light intensity (directly proportional) as well with N concentration in the leaves (inversely proportional). Reported values of photosynthetic rate indicate that these are similar or slightly higher in plantain forage when compared to Chicory ([#LabreveuxThesis_2002]; [#CranstonEtAl_2015]). No reported values for RUE were found in the literature, but values around 2.0 g DM/MJ can be infered for wild vareties ([#PootDenBroek_1997]).
            The current model assumes generic responses to enviromental factors, such as temperature, nitrogen concentration, and soil water availability.  Wild plantain is ubiquitous in meadows in subtropical climates around the world, and it is generally assumed to be tollerant to high temperatures but more succeptible to cold conditions ([#SagarHarper_1964]; [#StewartPlantain_1996]). Forage plantain shows large differences between cultivars, but generally can grow more over winter compared to wild varieties and still outperform temperate grasses in summer ([#StewartPlantain_1996]; [#MoorheadPigot_2009], [#DouglasEtAl_2013]), although survivability in harsh winters in the USA was found to be low ([#SandersonEtAl_2003], [#SkinnerPlantain_2005]). Forage plantain is also often mentioned as a drought tollerant species ([#StewartPlantain_1996]; [#DouglasEtAl_2013]; [#QuijadaThesis_2015]), although not as much when compared to deep rooted species such as chicory or lucerne. The use of reserves from the taproots seem to be mechanism used to confer drought resistance in plantain as is the case for many herbs ([#CranstonEtAl_2015]; [#QuijadaThesis_2015]). Simplified functions are used to describe the responses to N concentration and vapour pressure deficit (VPD). These assume that photosynthesis decreases if N concentration fall below the optimum content and a general response to VPD was adapted from a published review ([#GrossiordEtAl_VPD_2020]).
          Constant RUE: FixedValue=2; Units=g/MJ
          RUECO2Function FCO2: PhotosyntheticPathway=C3
          LinearInterpolationFunction FN
            XYPairs: X=[0, 1, 1.2]; Y=[0, 1, 1]
            VariableReference XValue: VariableName=[Leaf].FNmetabolic
          WeightedTemperatureFunction FT: MaximumTemperatureWeighting=0.75
            XYPairs: X=[5, 10, 14, 19, 26, 33, 35]; Y=[0, 0.1, 0.35, 1, 1, 0.1, 0]
          LinearInterpolationFunction FW
            XYPairs: X=[0, 1, 1.2]; Y=[0, 1, 1]
            VariableReference XValue: VariableName=[Leaf].Fw
          LinearInterpolationFunction FVPD
            XYPairs: X=[0, 12.5, 50]; Y=[1, 1, 0]
            VariableReference XValue: VariableName=[Weather].VPD
          VariableReference RadnInt: VariableName=[Leaf].RadiationIntercepted
        DivideFunction FRGR
          Memo Description
            This parameter represents the Fractional Growth Rate.  It is needed by the MicroClimate model, where it is used to compute the effect of growth rate on transpiration.
          VariableReference Photosynthesis: VariableName=[Leaf].Photosynthesis
          MultiplyFunction PotentialPhotosynthesis
            VariableReference RUE: VariableName=[Leaf].Photosynthesis.RUE
            MaximumFunction Radiation
              VariableReference RadnInt: VariableName=[Leaf].RadiationIntercepted
              Constant MinRadn: FixedValue=1e-05
        Constant DMConversionEfficiency: FixedValue=1; Units=0-1
        Constant MaintenanceRespiration: FixedValue=0; Units=0-1
        MultiplyFunction Area
          Constant SpecificLeafArea: FixedValue=0.021; Units=m^2/g
          VariableReference LiveLeafWeight: VariableName=[Leaf].Live.Wt
        MultiplyFunction LaiDead
          VariableReference SpecificLeafArea: VariableName=[Leaf].Area.SpecificLeafArea
          VariableReference DeadLeafWeight: VariableName=[Leaf].Dead.Wt
        Constant ExtinctionCoefficient: FixedValue=0.6; Units=0-1
        Constant StomatalConductanceCO2Modifier: FixedValue=1
        LinearInterpolationFunction HeightFunction
          XYPairs: X=[0, 15, 150, 350, 450]; Y=[0, 125, 325, 475, 500]
          VariableReference XValue: VariableName=[Leaf].Live.Wt
          Memo Description
            The average height of plantain forage is assumed here to be a function of leaf biomass, inflorescence stalks can and often do grow above the leaves, but these are assumed to have little impact on energy balance, where crop height is an important factor. Sward population and competition with other plants can have an influence on the height of plantain and there should be variation between cultivars, but these are not currently accounted for by PMF.
            This function was derived based on data from a trial in New Zealand using cultivar Tonic ([#LeeEtAlYields_2015]).
        MultiplyFunction SenescenceRate
          Memo Description
            The sparse availabe data suggests that plantain has a relativelly slow senescence rate compared to other medow herbs ([#CalviereDuru_1995]; [#SchippersOlff_2000]). Generic relationships to enviromental factors, such as temperature and soil water availability, are assumed based on other plant models.
          Constant ReferenceRate: FixedValue=0.005; Units=/day
          LinearInterpolationFunction StageFactor
            XYPairs: X=[2, 2.999, 3, 3.5, 4, 5]; Y=[0, 0, 0.75, 0.8, 1, 1]
            VariableReference XValue: VariableName=[Phenology].Stage
          LinearInterpolationFunction CoverFactor
            XYPairs: X=[0, 0.5, 0.9, 0.95, 0.99, 1]; Y=[1, 1, 1, 1.1, 2, 3]
            VariableReference XValue: VariableName=[Leaf].CoverTotal
          WeightedTemperatureFunction TemperatureFactor: MaximumTemperatureWeighting=0.5
            XYPairs: X=[0, 5, 20, 30]; Y=[0, 0, 1, 1]
          LinearInterpolationFunction WaterAvailabilityFactor
            XYPairs: X=[0, 0.25, 0.5, 1]; Y=[2, 1.25, 1, 1]
            VariableReference XValue: VariableName=[Leaf].Fw
        MultiplyFunction DetachmentRate
          Memo Description
            A generic relationship between detachment and soil moisture is assumed. It implies that under dry conditions the detachment rate decreases due to the lower level of activity of decomposing microorganisms.
            Soil moisture status is represented by a relative scale, where 0.0 means the soil moisture is at the lower limit for plant uptake (LL), 1.0 represents field capacity (DUL), and 2.0 means the soil moisture is at saturated conditions.
          Constant ReferenceRate: FixedValue=0.1; Units=/day
          LinearInterpolationFunction SoilMoistureFactor
            XYPairs: X=[0, 0.5, 1, 2]; Y=[0.5, 1, 1, 1]
            VariableReference XValue: VariableName=[Root].SoilWaterStatus
        Constant DMRetranslocationFactor: FixedValue=0; Units=/day
        Constant DMReallocationFactor: FixedValue=0; Units=/day
        Constant RemobilisationCost: FixedValue=0
        Constant NRetranslocationFactor: FixedValue=0; Units=/day
        Constant NReallocationFactor: FixedValue=1; Units=/day
        Constant NitrogenDemandSwitch: FixedValue=1
        BiomassRemoval BiomassRemovalDefaults: HarvestFractionLiveToRemove=0; HarvestFractionDeadToRemove=0; HarvestFractionLiveToResidue=0.1; HarvestFractionDeadToResidue=0.1
        NutrientDemandFunctions DMDemands
          MultiplyFunction Structural
            PartitionFractionDemandFunction DMDemandFunction
              Memo Description
                In the PlantainForage model, the DM demand function attempts to keep the shoot to root ratio and then the stem to leaf ratio close to a target value (defined by the [#TargetShootRootRatio].Value and [#TargetStemsLeafRatio].Value), which may vary according to the phenolgical stage.  This approach ensures that the plantain forage plants will recovery after being cut or grazed.  In this case, biomass will be allocated to leaves preferably, even during reproductive phase.
              PhaseLookup PartitionFraction
                PhaseLookupValue Vegetative: Start=Emergence; End=Flowering
                  DivideFunction LeafFraction
                    MultiplyFunction Numerator
                      VariableReference TargetSR1: VariableName=[TargetShootRootRatio]
                      VariableReference TargetSR2: VariableName=[TargetShootRootRatio]
                    AddFunction Denominator
                      MultiplyFunction TargetSRs
                        VariableReference TargetSR1: VariableName=[TargetShootRootRatio]
                        VariableReference TargetSR2: VariableName=[TargetShootRootRatio]
                      VariableReference CurrentSR: VariableName=[ShootRootRatio]
                PhaseLookupValue Reproductive: Start=Flowering; End=Ripening
                  DivideFunction LeafFraction
                    MultiplyFunction Numerator
                      VariableReference TargetSR1: VariableName=[TargetShootRootRatio]
                      VariableReference TargetSR2: VariableName=[TargetShootRootRatio]
                      VariableReference CurrentSL: VariableName=[StemsLeafRatio]
                    MultiplyFunction Denominator
                      AddFunction SRs: same as Replacements.PlantainForage.Leaf.DMDemands.Structural.DMDemandFunction.PartitionFraction.Vegetative.LeafFraction.Denominator
                      AddFunction SLs
                        MultiplyFunction TargetSLs
                          VariableReference TargetSL1: VariableName=[TargetStemsLeafRatio]
                          VariableReference TargetSL2: VariableName=[TargetStemsLeafRatio]
                        VariableReference CurrentSL: VariableName=[StemsLeafRatio]
            Constant StructuralFraction: FixedValue=1; Units=g/g
          Constant Metabolic: FixedValue=0
          StorageDMDemandFunction Storage
            SubtractFunction StorageFraction
              Constant One: FixedValue=1
              VariableReference StructuralFraction: VariableName=[Leaf].DMDemands.Structural.StructuralFraction
          Constant QStructuralPriority: FixedValue=1
          Constant QMetabolicPriority: FixedValue=1
          Constant QStoragePriority: FixedValue=1
        NutrientDemandFunctions NDemands
          MultiplyFunction Structural
            VariableReference MinNconc: VariableName=[Leaf].minimumNconc
            VariableReference PotentialDMAllocation: VariableName=[Leaf].potentialDMAllocation.Structural
          MultiplyFunction Metabolic
            SubtractFunction MetabolicNconc
              VariableReference CritNconc: VariableName=[Leaf].criticalNConc
              VariableReference MinNconc: VariableName=[Leaf].minimumNconc
            VariableReference PotentialDMAllocation: VariableName=[Leaf].potentialDMAllocation.Structural
          StorageNDemandFunction Storage
            VariableReference NitrogenDemandSwitch: VariableName=[Leaf].nitrogenDemandSwitch
            VariableReference MaxNconc: VariableName=[Leaf].maximumNconc
          Constant QStructuralPriority: FixedValue=1
          Constant QMetabolicPriority: FixedValue=1
          Constant QStoragePriority: FixedValue=1
      GenericOrgan Stem: IsAboveGround=true
        Memo Description
          __Note:__ this represents all the stems/stalks in the plant, without distinction between ages or placement in the canopy.
        NutrientPoolFunctions InitialWt
          Constant Structural: FixedValue=1e-06; Units=g/plant
          Constant Metabolic: FixedValue=0
          Constant Storage: FixedValue=0
        VariableReference initialNConcFunction: VariableName=[Stem].MinimumNConc
        Constant CarbonConcentration: FixedValue=0.4; Units=gC/gDM
        Constant MinimumNConc: FixedValue=0.005; Units=gN/gDM
        Constant MaximumNConc: FixedValue=0.025; Units=gN/gDM
        VariableReference CriticalNConc: VariableName=[Stem].MaximumNConc
        Constant Photosynthesis: FixedValue=0
        Constant DMConversionEfficiency: FixedValue=1; Units=0-1
        Constant MaintenanceRespirationFunction: FixedValue=0; Units=0-1
        MultiplyFunction SenescenceRate
          Memo Description
            The reference senescence rate is adjusted using generic relationships to enviromental factors, such as temperature and soil water availability. These are based on general knowledge from other plant models.
          Constant ReferenceRate: FixedValue=0.2; Units=/day
          LinearInterpolationFunction StageFactor
            XYPairs: X=[3, 3.999, 4, 4.5, 5]; Y=[1, 1, 0.25, 0.5, 1]
            VariableReference XValue: VariableName=[Phenology].Stage
          WeightedTemperatureFunction TemperatureFactor: MaximumTemperatureWeighting=0.5
            XYPairs: X=[0, 5, 20, 30]; Y=[0, 0, 1, 1]
          LinearInterpolationFunction WaterAvailabilityFactor
            XYPairs: X=[0, 0.25, 0.5, 1]; Y=[2, 1.25, 1, 1]
            VariableReference XValue: VariableName=[Leaf].Fw
        MultiplyFunction DetachmentRateFunction
          Memo Description: same as Replacements.PlantainForage.Leaf.DetachmentRate.Description
          Constant ReferenceRate: FixedValue=0.1; Units=/day
          LinearInterpolationFunction SoilMoistureFactor
            XYPairs: X=[0, 0.2, 0.8, 2]; Y=[0.25, 0.35, 1, 1]
            VariableReference XValue: VariableName=[Root].SoilWaterStatus
        Constant DMRetranslocationFactor: FixedValue=0; Units=/day
        Constant DMReallocationFactor: FixedValue=0; Units=/day
        Constant RemobilisationCost: FixedValue=0
        Constant NRetranslocationFactor: FixedValue=0; Units=/day
        Constant NReallocationFactor: FixedValue=1; Units=/day
        Constant NitrogenDemandSwitch: FixedValue=1
        RetranslocateNonStructural RetranslocateNitrogen
        BiomassRemoval BiomassRemovalDefaults: HarvestFractionLiveToRemove=0; HarvestFractionDeadToRemove=0; HarvestFractionLiveToResidue=0.1; HarvestFractionDeadToResidue=0.1
        NutrientDemandFunctions DMDemands
          MultiplyFunction Structural
            PartitionFractionDemandFunction DMDemandFunction
              Memo Description
                A simple approach is used in the PlantainForage model to define the allocation of biomass to various organs. The proportion of the above ground biomass allocated to stems is determined based on the current state and two target ratios, the [#TargetStemsLeafRatio].Value and [#FlowerStemRatio].Value). Allocation of biomass to stems can only occur during the reproductive phase. A maximum proportion to allocate is also defined, this smooths out the allocation at start of reproductive phase or in case of extreme defoliation.
              PhaseLookup PartitionFraction
                PhaseLookupValue Reproductive: Start=Flowering; End=Ripening
                  MinimumFunction StemFraction
                    Constant MaxFraction: FixedValue=0.15; Units=g/g
                    DivideFunction EstimatedFraction
                      MultiplyFunction Numerator
                        VariableReference TargetSR1: VariableName=[TargetShootRootRatio]
                        VariableReference TargetSR2: VariableName=[TargetShootRootRatio]
                        VariableReference TargetSL1: VariableName=[TargetStemsLeafRatio]
                        VariableReference TargetSL2: VariableName=[TargetStemsLeafRatio]
                        VariableReference CurrentFS: VariableName=[FlowerStemRatio]
                      MultiplyFunction Denominator
                        AddFunction SRs: same as Replacements.PlantainForage.Leaf.DMDemands.Structural.DMDemandFunction.PartitionFraction.Vegetative.LeafFraction.Denominator
                        AddFunction SLs: same as Replacements.PlantainForage.Leaf.DMDemands.Structural.DMDemandFunction.PartitionFraction.Reproductive.LeafFraction.Denominator.SLs
                        AddFunction FSs
                          MultiplyFunction TargetFSs
                            VariableReference TargetFS1: VariableName=[TargetFlowerStemRatio]
                            VariableReference TargetFS2: VariableName=[TargetFlowerStemRatio]
                          VariableReference CurrentFS: VariableName=[FlowerStemRatio]
            Constant StructuralFraction: FixedValue=1; Units=g/g
          Constant Metabolic: FixedValue=0
          StorageDMDemandFunction Storage
            SubtractFunction StorageFraction
              Constant One: FixedValue=1
              VariableReference StructuralFraction: VariableName=[Stem].DMDemands.Structural.StructuralFraction
          Constant QStructuralPriority: FixedValue=1
          Constant QMetabolicPriority: FixedValue=1
          Constant QStoragePriority: FixedValue=1
        NutrientDemandFunctions NDemands
          MultiplyFunction Structural
            VariableReference MinNconc: VariableName=[Stem].minimumNconc
            VariableReference PotentialDMAllocation: VariableName=[Stem].potentialDMAllocation.Structural
          MultiplyFunction Metabolic
            SubtractFunction MetabolicNconc
              VariableReference CritNconc: VariableName=[Stem].criticalNConc
              VariableReference MinNconc: VariableName=[Stem].minimumNconc
            VariableReference PotentialDMAllocation: VariableName=[Stem].potentialDMAllocation.Structural
          StorageNDemandFunction Storage
            VariableReference NitrogenDemandSwitch: VariableName=[Stem].nitrogenDemandSwitch
            VariableReference MaxNconc: VariableName=[Stem].maximumNconc
          Constant QStructuralPriority: FixedValue=1
          Constant QMetabolicPriority: FixedValue=1
          Constant QStoragePriority: FixedValue=1
      GenericOrgan Inflorescence: IsAboveGround=true
        Memo Description
          __Note:__ this represents all the reproductive parts of the plant, flowers, pods, seed, etc. No distinction is made between ages or placement in the canopy.
        NutrientPoolFunctions InitialWt
          Constant Structural: FixedValue=0; Units=g/m^2
          Constant Metabolic: FixedValue=0
          Constant Storage: FixedValue=0
        Constant CarbonConcentration: FixedValue=0.4; Units=gC/gDM
        VariableReference initialNConcFunction: VariableName=[Inflorescence].MinimumNConc
        Constant MinimumNConc: FixedValue=0.025; Units=gN/gDM
        Constant MaximumNConc: FixedValue=0.035; Units=gN/gDM
        VariableReference CriticalNConc: VariableName=[Inflorescence].MaximumNConc
        Constant Photosynthesis: FixedValue=0
        Constant DMConversionEfficiency: FixedValue=1; Units=0-1
        Constant MaintenanceRespirationFunction: FixedValue=0; Units=0-1
        MultiplyFunction SenescenceRate
          Memo Description
            The sparse availabe data suggests that plantain has a relativelly slow senescence rate compared to other medow herbs ([#CalviereDuru_1995]; [#SchippersOlff_2000]). Generic relationships to enviromental factors, such as temperature and soil water availability, are assumed based on other plant models.
          Constant ReferenceRate: FixedValue=0.25; Units=/day
          LinearInterpolationFunction StageFactor
            XYPairs: X=[3, 3.999, 4, 4.5, 5]; Y=[1, 1, 0.25, 0.5, 1]
            VariableReference XValue: VariableName=[Phenology].Stage
          WeightedTemperatureFunction TemperatureFactor: MaximumTemperatureWeighting=0.5
            XYPairs: X=[0, 5, 20, 30]; Y=[0, 0, 1, 1]
          LinearInterpolationFunction WaterAvailabilityFactor
            XYPairs: X=[0, 0.25, 0.5, 1]; Y=[2, 1.25, 1, 1]
            VariableReference XValue: VariableName=[Leaf].Fw
        MultiplyFunction DetachmentRateFunction
          Memo Description: same as Replacements.PlantainForage.Leaf.DetachmentRate.Description
          Constant ReferenceRate: FixedValue=0.25; Units=/day
          LinearInterpolationFunction SoilMoistureFactor
            XYPairs: X=[0, 0.2, 0.8, 2]; Y=[0.25, 0.35, 1, 1]
            VariableReference XValue: VariableName=[Root].SoilWaterStatus
        Constant DMRetranslocationFactor: FixedValue=0; Units=/day
        Constant DMReallocationFactor: FixedValue=0; Units=/day
        Constant RemobilisationCost: FixedValue=0
        Constant NRetranslocationFactor: FixedValue=0; Units=/day
        Constant NReallocationFactor: FixedValue=1; Units=/day
        Constant NitrogenDemandSwitch: FixedValue=1
        RetranslocateNonStructural RetranslocateNitrogen
        BiomassRemoval BiomassRemovalDefaults: HarvestFractionLiveToRemove=0.8; HarvestFractionDeadToRemove=0.8; HarvestFractionLiveToResidue=0.1; HarvestFractionDeadToResidue=0.1
        NutrientDemandFunctions DMDemands
          MultiplyFunction Structural
            PartitionFractionDemandFunction DMDemandFunction
              Memo Description
                The PlantainForage model uses a  simple approach to define the allocation of biomass to various organs. The fraction of the above ground biomass allocated to inflorescence is determined based on the current proprotion and two target ratios, the [#TargetStemsLeafRatio].Value and [#FlowerStemRatio].Value). Allocation to inflorescence can only occur during the reproductive phase. It is assumed that the proportion allocated to flowers and seeds increases over the season, but with a maximum allocation also defined; this ensures the proportion allocated varies smoothly at start of reproductive phase or in case of extreme defoliation.
              PhaseLookup PartitionFraction
                PhaseLookupValue Reproductive: Start=Flowering; End=Ripening
                  MinimumFunction FlowerFraction
                    Constant MaxFraction: FixedValue=0.15; Units=g/g
                    DivideFunction EstimatedFraction
                      MultiplyFunction Numerator
                        VariableReference TargetSR1: VariableName=[TargetShootRootRatio]
                        VariableReference TargetSR2: VariableName=[TargetShootRootRatio]
                        VariableReference TargetSL1: VariableName=[TargetStemsLeafRatio]
                        VariableReference TargetSL2: VariableName=[TargetStemsLeafRatio]
                        VariableReference TargetFS1: VariableName=[TargetFlowerStemRatio]
                        VariableReference TargetFS2: VariableName=[TargetFlowerStemRatio]
                      MultiplyFunction Denominator: same as Replacements.PlantainForage.Stem.DMDemands.Structural.DMDemandFunction.PartitionFraction.Reproductive.StemFraction.EstimatedFraction.Denominator
            Constant StructuralFraction: FixedValue=1; Units=g/g
          Constant Metabolic: FixedValue=0
          StorageDMDemandFunction Storage
            SubtractFunction StorageFraction
              Constant One: FixedValue=1
              VariableReference StructuralFraction: VariableName=[Inflorescence].DMDemands.Structural.StructuralFraction
          Constant QStructuralPriority: FixedValue=1
          Constant QMetabolicPriority: FixedValue=1
          Constant QStoragePriority: FixedValue=1
        NutrientDemandFunctions NDemands
          MultiplyFunction Structural
            VariableReference MinNconc: VariableName=[Inflorescence].minimumNconc
            VariableReference PotentialDMAllocation: VariableName=[Inflorescence].potentialDMAllocation.Structural
          MultiplyFunction Metabolic
            SubtractFunction MetabolicNconc
              VariableReference CritNconc: VariableName=[Inflorescence].criticalNConc
              VariableReference MinNconc: VariableName=[Inflorescence].minimumNconc
            VariableReference PotentialDMAllocation: VariableName=[Inflorescence].potentialDMAllocation.Structural
          StorageNDemandFunction Storage
            VariableReference NitrogenDemandSwitch: VariableName=[Inflorescence].nitrogenDemandSwitch
            VariableReference MaxNconc: VariableName=[Inflorescence].maximumNconc
          Constant QStructuralPriority: FixedValue=1
          Constant QMetabolicPriority: FixedValue=1
          Constant QStoragePriority: FixedValue=1
      GenericOrgan Taproot: IsAboveGround=false
        Memo Description
          __Note:__ this represents all the taproots of the plant.
          Taproots are the primary reserve organs and will supply sugars and N to burst growth especially early in spring and following defoliation.  To accomplish this, the taproots' biomass is partioned into structural and non-structural fractions, the later is available to be used in new growth (via biomass retranslocation).  There is very few data on how much reserves are kept in plantain taproots, results from [#QuijadaThesis_2015] suggest that sugars plus fructan made up 4-11% of taproots biomass compared to 15-35% in chicory, which is consistent with plantain forage having much smaller taproots.  Based on these values, and some trial and error, the parameters related to retranslocation (StructuralFraction, DMRetranslocationFactor, and NRetranslocationFactor) were estimated.  These should be upgraded when more data is made available.
        NutrientPoolFunctions InitialWt: same as Replacements.PlantainForage.Inflorescence.InitialWt
        Constant CarbonConcentration: FixedValue=0.4; Units=gC/gDM
        VariableReference initialNConcFunction: VariableName=[Taproot].MinimumNConc
        Constant MinimumNConc: FixedValue=0.005; Units=gN/gDM
        Constant MaximumNConc: FixedValue=0.02; Units=gN/gDM
        VariableReference CriticalNConc: VariableName=[Taproot].MaximumNConc
        Constant Photosynthesis: FixedValue=0
        Constant DMConversionEfficiency: FixedValue=1; Units=0-1
        Constant MaintenanceRespirationFunction: FixedValue=0; Units=0-1
        MultiplyFunction SenescenceRate
          Memo Description
            The reference senescence rate is adjusted according to enviromental factors, temperature and soil moisture. Currently there are no data specific to taproots in forage plantain. Here the sensitivity to temperature and soil mositure is considered in a similar way to fine roots, being based on general knowledge from other plant models, so this will have to be upgrade in the future when more data is available.
          Constant ReferenceRate: FixedValue=0.005; Units=/day
          WeightedTemperatureFunction TemperatureFactor: MaximumTemperatureWeighting=0.5
            XYPairs: X=[0, 7, 22, 30]; Y=[0, 0, 1, 1]
          LinearInterpolationFunction SoilMoistureFactor
            XYPairs: X=[0, 0.5, 1, 1.5, 2]; Y=[1, 1, 1, 1.5, 2]
            VariableReference XValue: VariableName=[Root].SoilWaterStatus
        Constant DetachmentRateFunction: FixedValue=1; Units=/day
        MultiplyFunction DMRetranslocationFactor
          Constant MaximumRate: FixedValue=0.1; Units=g/g
          LinearInterpolationFunction PhotoperiodEffect
            XYPairs: X=[11.5, 12, 12.5, 13, 13.4, 13.9, 14.5]; Y=[0, 0.05, 0.15, 0.4, 0.85, 1, 1]
            VariableReference XValue: VariableName=[Phenology].Photoperiod
        Constant DMReallocationFactor: FixedValue=0; Units=/day
        Constant RemobilisationCost: FixedValue=0
        MultiplyFunction NRetranslocationFactor: same as Replacements.PlantainForage.Taproot.DMRetranslocationFactor
        Constant NReallocationFactor: FixedValue=1; Units=/day
        Constant NitrogenDemandSwitch: FixedValue=1
        RetranslocateNonStructural RetranslocateNitrogen
        BiomassRemoval BiomassRemovalDefaults: HarvestFractionLiveToRemove=0; HarvestFractionDeadToRemove=0; HarvestFractionLiveToResidue=0.1; HarvestFractionDeadToResidue=0
        NutrientDemandFunctions DMDemands
          MultiplyFunction Structural
            PartitionFractionDemandFunction DMDemandFunction
              Memo Description
                The PlantainForage model computes the allocation of biomass to taproots assuming that there is a target ratio the biomass of root and taproot (defined by [#TaprootRootRatio].Value).  The existing literature does not provide values for this parameter, and based on other herbs, such as chicory, a simple value which is further modified by plant specific biomass is assumed in the model. This should be update when more data becomes available.
              PhaseLookup PartitionFraction
                PhaseLookupValue AllPhases: Start=Emergence; End=Ripening
                  MinimumFunction TaprootFraction
                    Constant MaxFraction: FixedValue=0.1; Units=g/g
                    DivideFunction EstimatedFraction
                      MultiplyFunction Numerator
                        VariableReference CurrentSR: VariableName=[ShootRootRatio]
                        VariableReference TargetTR1: VariableName=[TargetTaprootRootRatio]
                        VariableReference TargetTR2: VariableName=[TargetTaprootRootRatio]
                      MultiplyFunction Denominator
                        AddFunction SRs: same as Replacements.PlantainForage.Leaf.DMDemands.Structural.DMDemandFunction.PartitionFraction.Vegetative.LeafFraction.Denominator
                        AddFunction TRs
                          MultiplyFunction TargetTRs
                            VariableReference TargetTR1: VariableName=[TargetTaprootRootRatio]
                            VariableReference TargetTR2: VariableName=[TargetTaprootRootRatio]
                          VariableReference CurrentTR: VariableName=[TaprootRootRatio]
            Constant StructuralFraction: FixedValue=0.6; Units=g/g
          Constant Metabolic: FixedValue=0
          StorageDMDemandFunction Storage
            SubtractFunction StorageFraction
              Constant One: FixedValue=1
              VariableReference StructuralFraction: VariableName=[Taproot].DMDemands.Structural.StructuralFraction
          Constant QStructuralPriority: FixedValue=1
          Constant QMetabolicPriority: FixedValue=1
          Constant QStoragePriority: FixedValue=1
        NutrientDemandFunctions NDemands
          MultiplyFunction Structural
            VariableReference MinNconc: VariableName=[Taproot].minimumNconc
            VariableReference PotentialDMAllocation: VariableName=[Taproot].potentialDMAllocation.Structural
          MultiplyFunction Metabolic
            SubtractFunction MetabolicNconc
              VariableReference CritNconc: VariableName=[Taproot].criticalNConc
              VariableReference MinNconc: VariableName=[Taproot].minimumNconc
            VariableReference PotentialDMAllocation: VariableName=[Taproot].potentialDMAllocation.Structural
          StorageNDemandFunction Storage
            VariableReference NitrogenDemandSwitch: VariableName=[Taproot].nitrogenDemandSwitch
            VariableReference MaxNconc: VariableName=[Taproot].maximumNconc
          Constant QStructuralPriority: FixedValue=1
          Constant QMetabolicPriority: FixedValue=1
          Constant QStoragePriority: FixedValue=1
      Root: GrowthRespiration=0; MaintenanceRespiration=0
        Memo Description
          __Note:__ this represents all the fine roots of the plant.  The root organ demands and is partitioned N and DM and its depth increases through time to provide a water uptake supply
          Memo Description
            This represents all the fine roots of the plant.  The root organ demands and is partitioned N and DM and its depth increases through time to provide a water uptake supply
        NutrientPoolFunctions InitialWt
          Constant Structural: FixedValue=0.0009
          Constant Metabolic: FixedValue=0
          Constant Storage: FixedValue=0
        Constant CarbonConcentration: FixedValue=0.4; Units=gC/gDM
        Constant MinimumNConc: FixedValue=0.005; Units=gN/gDM
        Constant MaximumNConc: FixedValue=0.015; Units=gN/gDM
        VariableReference CriticalNConc: VariableName=[Root].MaximumNConc
        Constant DMConversionEfficiency: FixedValue=1
        Constant MaximumRootDepth: FixedValue=1000; Units=mm
        PhaseLookup RootFrontVelocity
          PhaseLookupValue PreEmergence: Start=Germination; End=Emergence
            Constant ReferenceVelocity: FixedValue=5; Units=mm/day
          PhaseLookupValue Vegetative: Start=Emergence; End=Flowering
            Constant ReferenceVelocity: FixedValue=10; Units=mm/day
          PhaseLookupValue Reproductive: Start=Flowering; End=Ripening
            Constant ReferenceVelocity: FixedValue=7.5; Units=mm/day
        Constant TemperatureEffect: FixedValue=1
          Memo
            No effect of temperature on root growth is currently captured in the model.
        Constant SoilWaterEffect: FixedValue=1
          Memo
            No effect of soil water content on root growth is currently captured in the model.
        RootShapeCylinder RootShape
        Constant SpecificRootLength: FixedValue=120; Units=m/g
        MultiplyFunction SenescenceRate
          Memo Description
            The reference senescence rate is adjusted according to enviromental factors, temperature and soil moisture. Sensitivity to temperature is based on general knowledge from other plant models. The sensitivity of plantain roots to low moisture or water logging is not clear (according to [#SagarHarper_1964], *P. major* is more tolerant to water logging than *P. lanceolata*, but water logging definetely has an impact on plantain growth, (WilsonWLoggPlantain_2023). In the model, it is assumed that senescence is only affected by water logging, increasing as soil moisture approaches saturation. This will have to be upgrade in the future when more data is available.
          Constant ReferenceRate: FixedValue=0.01; Units=/day
          WeightedTemperatureFunction TemperatureFactor: MaximumTemperatureWeighting=0.5
            XYPairs: X=[0, 7, 22, 30]; Y=[0, 0, 1, 1]
          LinearInterpolationFunction SoilMoistureFactor
            XYPairs: X=[0, 1, 1.5, 2]; Y=[1, 1, 1.5, 2]
            VariableReference XValue: VariableName=[Root].SoilWaterStatus
        Constant DMRetranslocationFactor: FixedValue=0; Units=/day
        Constant DMReallocationFactor: FixedValue=0; Units=/day
        Constant RemobilisationCost: FixedValue=0
        Constant NRetranslocationFactor: FixedValue=0; Units=/day
        Constant NReallocationFactor: FixedValue=0; Units=/day
        Constant NitrogenDemandSwitch: FixedValue=1
        Constant MaintenanceRespirationFunction: FixedValue=1
        LinearInterpolationFunction KLModifier
          Memo
            No adjustment of KL are considered for plantain at this stage.  More analyses, preferebly with support from data specific to this issue, are needed to improve the description of this relationship.
            Memo Description
              This represents all the fine roots of the plant.  The root organ demands and is partitioned N and DM and its depth increases through time to provide a water uptake supply
          XYPairs: X=[0, 1]; Y=[1, 1]
          VariableReference XValue: VariableName=[Root].LengthDensity
        LinearInterpolationFunction KNH4
          XYPairs: X=[0, 0.003]; Y=[0.01, 0.02]
          VariableReference XValue: VariableName=[Root].LengthDensity
        LinearInterpolationFunction KNO3
          XYPairs: X=[0, 0.003]; Y=[0.01, 0.02]
          VariableReference XValue: VariableName=[Root].LengthDensity
        LinearInterpolationFunction NUptakeSWFactor
          XYPairs: X=[0, 0.5, 1]; Y=[0, 1, 1]
          VariableReference XValue: VariableName=[Root].RWC
        Constant MaxDailyNUptake: FixedValue=10; Units=kgN/ha
        BiomassRemoval BiomassRemovalDefaults: HarvestFractionLiveToRemove=0; HarvestFractionDeadToRemove=0; HarvestFractionLiveToResidue=0.05; HarvestFractionDeadToResidue=0
        NutrientDemandFunctions DMDemands
          MultiplyFunction Structural
            PartitionFractionDemandFunction DMDemandFunction
              PhaseLookup PartitionFraction
                Memo Description
                  The allocation of biomass below ground follows a simple approach in the PlantainForage model. The amount allocated to roots is computed based on current proportion and two target ratios (the [#TargetShootRootRatio].Value and [#TaprootRootRatio].Value). There is little information in the literature about these parameters and they should vary with cultivar. Currently the model will attempt to keep a given proportion of biomass in each organ, how these proportions vary should be update when more data becomes available.
                PhaseLookupValue AllPhases: Start=Emergence; End=Ripening
                  DivideFunction RootFraction
                    MultiplyFunction Numerator
                      VariableReference CurrentSR: VariableName=[ShootRootRatio]
                      VariableReference CurrentTR: VariableName=[TaprootRootRatio]
                    MultiplyFunction Denominator: same as Replacements.PlantainForage.Taproot.DMDemands.Structural.DMDemandFunction.PartitionFraction.AllPhases.TaprootFraction.EstimatedFraction.Denominator
            Constant StructuralFraction: FixedValue=1; Units=g/g
          Constant Metabolic: FixedValue=0
          StorageDMDemandFunction Storage
            SubtractFunction StorageFraction
              Constant One: FixedValue=1
              VariableReference StructuralFraction: VariableName=[Root].DMDemands.Structural.StructuralFraction
          Constant QStructuralPriority: FixedValue=1
          Constant QMetabolicPriority: FixedValue=1
          Constant QStoragePriority: FixedValue=1
        NutrientDemandFunctions NDemands
          MultiplyFunction Structural
            VariableReference MinNconc: VariableName=[Root].minimumNconc
            VariableReference PotentialDMAllocation: VariableName=[Root].potentialDMAllocation.Structural
          MultiplyFunction Metabolic
            SubtractFunction MetabolicNconc
              VariableReference CritNconc: VariableName=[Root].criticalNConc
              VariableReference MinNconc: VariableName=[Root].minimumNconc
            VariableReference PotentialDMAllocation: VariableName=[Root].potentialDMAllocation.Structural
          StorageNDemandFunction Storage
            VariableReference NitrogenDemandSwitch: VariableName=[Root].nitrogenDemandSwitch
            VariableReference MaxNconc: VariableName=[Root].maximumNconc
          Constant QStructuralPriority: FixedValue=1
          Constant QMetabolicPriority: FixedValue=1
          Constant QStoragePriority: FixedValue=1
        SoilWaterScale SoilWaterStatus: LLModel=0
      CompositeBiomass AboveGround: OrganNames=[Leaf, Stem, Inflorescence]; IncludeLive=true; IncludeDead=true
      CompositeBiomass AboveGroundLive: OrganNames=[Leaf, Stem, Inflorescence]; IncludeLive=true; IncludeDead=false
      CompositeBiomass BelowGround: OrganNames=[Root, Taproot]; IncludeLive=true; IncludeDead=true
      CompositeBiomass BelowGroundLive: OrganNames=[Root, Taproot]; IncludeLive=true; IncludeDead=false
      CompositeBiomass Total: OrganNames=[Leaf, Stem, Inflorescence, Root, Taproot]; IncludeLive=true; IncludeDead=true
      CompositeBiomass TotalLive: OrganNames=[Leaf, Stem, Inflorescence, Root, Taproot]; IncludeLive=true; IncludeDead=false
      DivideFunction PerPlantBiomassWt
        Memo Description
          This represents the average live biomass dry weight per plant (in g/plant).
        VariableReference LiveWt: VariableName=[TotalLive].Wt
        VariableReference Population: VariableName=[PlantainForage].Population
      PhaseLookup ShootRootRatio
        PhaseLookupValue AllPhases: Start=Emergence; End=Ripening
          DivideFunction CurrentSR
            VariableReference AbogeGroundDM: VariableName=[AboveGroundLive].Wt
            VariableReference BelowGroundDM: VariableName=[BelowGroundLive].Wt
      PhaseLookup TargetShootRootRatio
        Memo Description
          To ensure prompt regrowth of forage plantain after a defoliation, the model will adjust the allocation of new growth following any defoliation event. This is a simplified approach to biomass allocation plasticity (e.g. [#Wilson_1988]; [#LevangBrilz_2002]), it assumes that the plant switches allocation of towards leaves whenever the current shoot:root ratio differs from the target value.
          Published data for the shoot:root ratio in plantain is highly variable, with values as low as 1.0 for wild varieties and as high as 6.0 for seedlings of commercial cultivars with no water of nutrient limitations ([#SchippersOlff_2000]; [#LabreveuxThesis_2002]; [#CranstonEtAl_2015]; [#PankokeEtAl_2015]). The data suggests mean values to be around 1.75-2.0 for adult plants. This value is likely to be affected by environmental conditions, with water or nutrient deficit favouring root growth, while low light conditions leading to higher allocation above ground. However, these relationships can vary considerably in different plants and there is little data for plantain forage, so the model current ignores the influence of environmental factors on the shoot:root partition, this should be upgraded when data becomes available.
        PhaseLookupValue Vegetative: Start=Emergence; End=Flowering
          Constant TargetSR: FixedValue=2.5; Units=g/g
        PhaseLookupValue Reproductive: Start=Flowering; End=Ripening
          AddFunction TargetSR
            VariableReference MinTargetSR: VariableName=[TargetShootRootRatio].Vegetative.TargetSR
            MultiplyFunction PlusTarget
              SubtractFunction DeltaTarget
                Constant MaxTargetSR: FixedValue=3.5; Units=g/g
                VariableReference MinTargetSR: VariableName=[TargetShootRootRatio].Vegetative.TargetSR
              LinearInterpolationFunction PhotoperiodEffect
                XYPairs: X=[11, 11.5, 12, 13, 14, 15, 16]; Y=[0, 0, 0.05, 0.2, 0.85, 1, 1]
                VariableReference XValue: VariableName=[Phenology].Photoperiod
      PhaseLookup StemsLeafRatio
        PhaseLookupValue Reproductive: Start=Flowering; End=Ripening
          DivideFunction CurrentSL
            AddFunction StemFlowerDM
              VariableReference StemDM: VariableName=[Stem].Live.Wt
              VariableReference InflorescenceDM: VariableName=[Inflorescence].Live.Wt
            VariableReference LeafDM: VariableName=[Leaf].Live.Wt
      PhaseLookup TargetStemsLeafRatio
        Memo Description
          The PlantainForage model defines allocation of biomass above ground following a simple approach, it attempts to keep a given proportion among the various organs. The allocation of biomass to leaves is defined primarily by the target shoot:root ratio, but during the reproductive phase, the partition is further modified based on the ratio of stems+inflorescence to leaves. The model will use this ratio to allocate some biomass to the stems and inflorescence during the reproductive phase (i.e. when the target ratio is reater than zero). As plantain is a 'long-days' plant, the model assumes that the ratio increase with the length of the day (photoperiod). This ratio may be affected by defoliation ([#AyalaEtAl_2011]; [#QuijadaThesis_2015]) and is probably affected by enviromental factors too. There is, however, not enough data to define a good description for these interactions.
          Published results suggest that reproductive parts represent a relatively small proportion of the biomass, about 10-25% in grazed swards, and about 40% if non-grazed ones ([#SchippersOlff_2000]; [#LabreveuxThesis_2002]; [#MoorheadPigot_2009]; [#AyalaEtAl_2011]).
        PhaseLookupValue Reproductive: Start=Flowering; End=Ripening
          MultiplyFunction TargetSL
            Constant MaximumSL: FixedValue=0.25; Units=g/g
            LinearInterpolationFunction PhotoperiodEffect
              XYPairs: X=[12, 12.5, 13, 13.5, 14, 15]; Y=[0.05, 0.1, 0.35, 0.85, 1, 1]
              VariableReference XValue: VariableName=[Phenology].Photoperiod
      PhaseLookup FlowerStemRatio
        PhaseLookupValue Reproductive: Start=Flowering; End=Ripening
          LessThanFunction CurrentFS
            VariableReference StemDM: VariableName=[Stem].Live.Wt
            Constant Zero: FixedValue=1e-10; Units=g/m2
            Constant VeryLargeFS: FixedValue=1e+100; Units=g/g
            DivideFunction ActualCurrentFS
              VariableReference InflorescenceDM: VariableName=[Inflorescence].Live.Wt
              VariableReference StemDM: VariableName=[Stem].Live.Wt
      PhaseLookup TargetFlowerStemRatio
        Memo Description
          Following on the simple allocation of biomass in the PlantainForage model, the allocation during the reproductive phase will attempt to keep a ratio between inflorescence and stem biomass. The model assumes that this ratio increases from spring, when only stems are set, to a maximum in autumn, when the last seeds finish ripenning. This ratio is probably affected by enviromental factors, and perhaps defoliations, but there is not data to determine how these interactions could be modelled. Because the model attempts to simulate a whole sward, with potentially plants of different ages, and due to the short period between stem elongation, flowering, and seed maturity, and a relatively long reproductive phase, forage plantain plants will have ripe seeds as well as young stalks at the same time. This makes it quite difficult to define the variations in biomass allocation to stems and inflorescence. Inference from published values suggest that the ratio of flower biomass to stems varies from around 0.1 to nearly 0.4 ([#SchippersOlff_2000]).
        PhaseLookupValue Reproductive: Start=Flowering; End=Ripening
          MultiplyFunction TargetFS
            Constant ReferenceFS: FixedValue=1.5; Units=g/g
            LinearInterpolationFunction PhotoperiodEffect
              XYPairs: X=[-0.035, -0.03, -0.02, -0.01, 0, 0.01, 0.02, 0.03, 0.035]; Y=[1, 1, 0.97, 0.8, 0.55, 0.35, 0.2, 0.1, 0.1]
              VariableReference XValue: VariableName=[Phenology].PhotoperiodVariation
      PhaseLookup TaprootRootRatio
        PhaseLookupValue AllPhases: Start=Emergence; End=Ripening
          DivideFunction CurrentTR
            VariableReference TaprootDM: VariableName=[Taproot].Live.Wt
            VariableReference RootsDM: VariableName=[Root].Live.Wt
      PhaseLookup TargetTaprootRootRatio
        Memo Description
          The PlantainForage model assumes that biomass is allocated so to mantain a given proportion of the biomass among the various organs (varying with phenological phase and other factors). The ratio between taproot and root biomass is assumed to vary proportional to the plant biomass (healthy well develop plants can add more reserves to the taproots). The ratio increases with the total biomass per plant, approaching a maximum target when plants are adult (this also implies that less biomass goes to taproots following defoliation). Furthermore, a seasonal variation is also considered, with greater proportion of biomass being allocated to taproots in late summer/autumn and less in spring. This is a simple approach and can describe the general behaviour of plantain forage plants, it may be upgraded if deemed necessary when more data becomes available.
        PhaseLookupValue AllPhases: Start=Emergence; End=Ripening
          MultiplyFunction TargetTR
            Constant MaximumTR: FixedValue=0.5; Units=g/g
            LinearInterpolationFunction BiomassFactor
              XYPairs: X=[0, 0.5, 1, 2, 3, 4]; Y=[0, 0.15, 0.5, 0.9, 1, 1]
              VariableReference XValue: VariableName=[PerPlantBiomassWt]
            LinearInterpolationFunction PhotoperiodFactor
              XYPairs: X=[-0.03, -0.02, -0.01, 0, 0.01, 0.02, 0.03]; Y=[1, 1, 0.85, 0.5, 0.3, 0.2, 0.2]
              VariableReference XValue: VariableName=[Phenology].PhotoperiodVariation
      Constant MortalityRate: FixedValue=0
      Constant SeedMortalityRate: FixedValue=0
      Folder Cultivars
        Cultivar Tonic
          Memo Description
            *Tonic* is the base forage plantain cultivar. It was developed later than *Lancelot* (the first commercial breed in New Zealand) and was selected from a northern Portugal germplasm. It has very erect and large leaves, produces less tillers than *Lancelot* and perhaps less seed heads. *Tonic* cultivar is heat tolerant and also winter active, typically with higher yields when compared to *Lancelot*.
        Cultivar Lancelot
          Command:
            [Phenology].ThermalTime.Response.X = 8.0, 27.5, 38.0
            [Phenology].ThermalTime.Response.Y = 0.0, 20.0, 0.0
            [Leaf].Photosynthesis.FT.XYPairs.X = 8, 10, 15, 21, 27.5, 35, 38
            [Leaf].Photosynthesis.FT.XYPairs.Y = 0.0, 0.05, 0.3, 1.0, 1.0, 0.1, 0.0
            [Leaf].HeightFunction.XYPairs.Y = 0.0, 100, 300, 450, 450
          Memo Description
            *Lancelot* is the first forage plantain cultivar released, it was selected from New Zealand pastures. It has a semi-erect growth habit, medium to large leaves, and produce many tillers. This cultivar has good heat tolerance but growth is low over winter. *Lancelot*  has been used for many years as grazing forage, in monoculture or in mixed swards, in several countries worldwide. However, it has been superseeded by newer varieties, the most common cultivar has been *Tonic*, with *Agritonic* and others becoming popular.
  DataStore
    ExcelInput Observed: FileNames=[Observed.xlsx]; SheetNames=[Observed]
    ExcelInput ObservedMeans: FileNames=[Observed.xlsx]; SheetNames=[ObservedMeans]
    PredictedObserved: PredictedTableName=ValidationReport; ObservedTableName=Observed; FieldNameUsedForMatch=SimulationName; FieldName2UsedForMatch=Date; AllColumns=false
      Tests: POName=PredictedObserved
        AcceptedStats:
          Name                   n     Slope     Intercept  SEslope    SEintercept  R2        RMSE        NSE        ME           MAE         RSR       RMR
          AboveGround.Wt         761   0.634001  50.8925    0.0216169  3.31415      0.531246  41.6601     0.511187   -0.808321    29.9556     0.698692  0.294919
          AboveGroundLive.NConc  958   0.528446  0.0122038  0.031797   0.000977354  0.224154  0.00792037  -0.261851  -0.00190404  0.00600945  1.12274   0.264739
          CumulativeHarvestedN   532   0.993085  0.405418   0.0169343  0.271138     0.866467  3.50355     0.846736   0.313614     2.68087     0.391121  0.26389
          CumulativeHarvestedWt  1658  0.879809  41.8006    0.0101818  8.12052      0.818476  178.061     0.803451   -41.0165     126.74      0.443205  0.258417
          HarvestedN             532   0.66272   1.11374    0.0280149  0.107287     0.513586  1.4575      0.47024    0.0127257    1.05567     0.727162  0.446487
          HarvestedWt            1648  0.504908  61.798     0.0119174  1.90886      0.521651  67.1651     0.520936   -1.2934      48.9763     0.691935  0.52706
          NRate                  1413  1         0          0          0            1         0           1          0            0           0         0
          Population             4     0         300        0          0            -         91.0014     -0.85338   61.75        65.25       1.179     0.381957
        AcceptedStatsName=Name n Slope Intercept SEslope SEintercept R2 RMSE NSE ME MAE RSR RMR
    PredictedObserved PredictedObservedMeans: PredictedTableName=ValidationReport; ObservedTableName=ObservedMeans; FieldNameUsedForMatch=SimulationName; FieldName2UsedForMatch=Date; AllColumns=false
      Tests: POName=PredictedObservedMeans
        AcceptedStats:
          Name                   n    Slope     Intercept   SEslope    SEintercept  R2        RMSE        NSE        ME           MAE         RSR       RMR
          AboveGround.Wt         276  0.701487  40.815      0.0350291  5.29504      0.594094  36.5493     0.574298   -1.09585     26.6001     0.651275  0.260325
          AboveGroundLive.NConc  290  0.632389  0.00901769  0.0612093  0.00189867   0.270408  0.00739433  -0.324939  -0.00213816  0.00571871  1.14907   0.24366
          CumulativeHarvestedN   144  1.02249   -0.0884329  0.0266326  0.42884      0.912128  2.81311     0.898182   0.214628     2.25276     0.31798   0.208777
          CumulativeHarvestedWt  417  0.932202  4.29712     0.0172616  13.1095      0.875431  142.455     0.86064    -40.221      101.736     0.372862  0.216949
          HarvestedN             144  0.777886  0.75893     0.0502292  0.193747     0.628115  1.22403     0.592338   0.0154873    0.940354    0.636264  0.365697
          HarvestedWt            417  0.599404  49.2315     0.0235597  3.59976      0.609335  54.2522     0.608997   -1.15154     41.1861     0.624552  0.431359
          NRate                  462  1         0           0          0            1         0           1          0            0           0         0
          Population             4    0         300         0          0            -         91.0014     -0.85338   61.75        65.25       1.179     0.381957
        AcceptedStatsName=Name n Slope Intercept SEslope SEintercept R2 RMSE NSE ME MAE RSR RMR
  Folder Validation
    Memo Note
      The performance of the plantain forage model is evaluated in simulations based on experiments conducted primarily in New Zealand.  Datasets from USA have been added, but they should be taken with caution as there was limited information about the experiments and published results corresponded to annual or seasonal aggregates only.  Note that population is not explicitly simulated by the model, only a decrease in plant numbers as function of cuts or grazings is considered.  The literature suggest that severe defoliation may reduce population by increasing death rate, but mostly is infered from other species and even then the variation is high.  Plantain persistency has been shown to be low, usually restricted to 2-4 years, but very little actuall data is available.

      The model describes N content in the above ground tissues reasonably well only for treatments where N deficit was not high (See results for the FRNL datasets with annual fertiliser rates of 200 kgN/ha and above).  The measured data showed little effect on plant N concentration for the treatment  with nil or low N rates, wehreas the model predicts differences between them.  The variability among replicates is high and there wer only three or four replicates, this may blur some of the differences.   Also, there was no information from which potential sources of nitrogen, such as soil mineralisation or N fixation from 'weeds' (the present of white clover was noted), could be identified and used to adjust the simulations.  Besides these isses, some of the underlying PMF code may need to be upgraded in order to describe some processes under plant cut/grazing and re-growth conditions.  Processes for computing N demand and supply (especially regarding remobilisation within living tissues) are still under developement and this needs especific detailed datasets.  The SimpleLeaf module was employed to simulate the plant canopy in the plantain forage model, this was done because there was not enough data to parameterise the more complex PMF approach.  This means that the model has only one leaf cohort with simple N thresholds (only maximum and minimum), this may be too simplistic to capture the nuances of the re-growth processes especially when sustained by the remobilisation from storage organs (taproot and old tissue).  The model will be upgraded in the near future as the work on the code to improve the description of those specific processes is ongoing.
    Folder New Zealand
      Experiment FRNLLincoln
        Memo
          ###FRNL Lincoln###

          Simulation setup based on field trial performed at Lincoln University Research Dairy Farm, New Zealand, between 2014 and 2016.  The experiment was part of the FRNL (Forages for Reduced Nitrogen Leaching) program and the data is basically unpublished (references will be added when this come about).  Here only plots with pure plantain are used.
          The experiment consisted of six fertiliser treatments (N rates of 0, 50, 100, 200, 350 and 500 kg/ha/yr) in four replicates, and measurements comprised yield and quality indicators (here N content is used).
          Data supplied by Grant Edwards, Lincoln University.

          The soil at the experimental site was a Templeton fine sandy loam (an Immature Pallic soil, USDA: Udic Haplustept), the required parameters were inferred based on data from the New Zealand National Soils Database (Landcare Research).
          Weather data was obtained from nearby Broadfields weather station (NIWA).
        Factors
          Factor NRate: Specification=[NRate]
            Operations 0
            Operations 50
              2014-10-08  [Fertiliser].Apply(amount: 5, type: "UreaN", depth: 10)
              2014-10-31  [Fertiliser].Apply(amount: 5, type: "UreaN", depth: 10)
              2014-11-26  [Fertiliser].Apply(amount: 5, type: "UreaN", depth: 10)
              2014-12-17  [Fertiliser].Apply(amount: 5, type: "UreaN", depth: 10)
              2015-01-20  [Fertiliser].Apply(amount: 5, type: "UreaN", depth: 10)
              2015-02-12  [Fertiliser].Apply(amount: 5, type: "UreaN", depth: 10)
              2015-03-10  [Fertiliser].Apply(amount: 5, type: "UreaN", depth: 10)
              2015-04-17  [Fertiliser].Apply(amount: 5, type: "UreaN", depth: 10)
              2015-05-20  [Fertiliser].Apply(amount: 5, type: "UreaN", depth: 10)
              2015-09-09  [Fertiliser].Apply(amount: 5, type: "UreaN", depth: 10)
              2015-10-06  [Fertiliser].Apply(amount: 5, type: "UreaN", depth: 10)
              2015-11-06  [Fertiliser].Apply(amount: 5, type: "UreaN", depth: 10)
              2015-12-09  [Fertiliser].Apply(amount: 5, type: "UreaN", depth: 10)
              2016-01-07  [Fertiliser].Apply(amount: 5, type: "UreaN", depth: 10)
              2016-02-10  [Fertiliser].Apply(amount: 5, type: "UreaN", depth: 10)
              2016-03-07  [Fertiliser].Apply(amount: 5, type: "UreaN", depth: 10)
              2016-04-02  [Fertiliser].Apply(amount: 5, type: "UreaN", depth: 10)
              2016-05-04  [Fertiliser].Apply(amount: 5, type: "UreaN", depth: 10)
              2016-08-31  [Fertiliser].Apply(amount: 5, type: "UreaN", depth: 10)
              2016-10-05  [Fertiliser].Apply(amount: 5, type: "UreaN", depth: 10)
            Operations 100
              2014-10-08  [Fertiliser].Apply(amount: 10, type: "UreaN", depth: 10)
              2014-10-31  [Fertiliser].Apply(amount: 10, type: "UreaN", depth: 10)
              2014-11-26  [Fertiliser].Apply(amount: 10, type: "UreaN", depth: 10)
              2014-12-17  [Fertiliser].Apply(amount: 10, type: "UreaN", depth: 10)
              2015-01-20  [Fertiliser].Apply(amount: 10, type: "UreaN", depth: 10)
              2015-02-12  [Fertiliser].Apply(amount: 10, type: "UreaN", depth: 10)
              2015-03-10  [Fertiliser].Apply(amount: 10, type: "UreaN", depth: 10)
              2015-04-17  [Fertiliser].Apply(amount: 10, type: "UreaN", depth: 10)
              2015-05-20  [Fertiliser].Apply(amount: 10, type: "UreaN", depth: 10)
              2015-09-09  [Fertiliser].Apply(amount: 10, type: "UreaN", depth: 10)
              2015-10-06  [Fertiliser].Apply(amount: 10, type: "UreaN", depth: 10)
              2015-11-06  [Fertiliser].Apply(amount: 10, type: "UreaN", depth: 10)
              2015-12-09  [Fertiliser].Apply(amount: 10, type: "UreaN", depth: 10)
              2016-01-07  [Fertiliser].Apply(amount: 10, type: "UreaN", depth: 10)
              2016-02-10  [Fertiliser].Apply(amount: 10, type: "UreaN", depth: 10)
              2016-03-07  [Fertiliser].Apply(amount: 10, type: "UreaN", depth: 10)
              2016-04-02  [Fertiliser].Apply(amount: 10, type: "UreaN", depth: 10)
              2016-05-04  [Fertiliser].Apply(amount: 10, type: "UreaN", depth: 10)
              2016-08-31  [Fertiliser].Apply(amount: 10, type: "UreaN", depth: 10)
              2016-10-05  [Fertiliser].Apply(amount: 10, type: "UreaN", depth: 10)
            Operations 200
              2014-10-08  [Fertiliser].Apply(amount: 20, type: "UreaN", depth: 10)
              2014-10-31  [Fertiliser].Apply(amount: 20, type: "UreaN", depth: 10)
              2014-11-26  [Fertiliser].Apply(amount: 20, type: "UreaN", depth: 10)
              2014-12-17  [Fertiliser].Apply(amount: 20, type: "UreaN", depth: 10)
              2015-01-20  [Fertiliser].Apply(amount: 20, type: "UreaN", depth: 10)
              2015-02-12  [Fertiliser].Apply(amount: 20, type: "UreaN", depth: 10)
              2015-03-10  [Fertiliser].Apply(amount: 20, type: "UreaN", depth: 10)
              2015-04-17  [Fertiliser].Apply(amount: 20, type: "UreaN", depth: 10)
              2015-05-20  [Fertiliser].Apply(amount: 20, type: "UreaN", depth: 10)
              2015-09-09  [Fertiliser].Apply(amount: 20, type: "UreaN", depth: 10)
              2015-10-06  [Fertiliser].Apply(amount: 20, type: "UreaN", depth: 10)
              2015-11-06  [Fertiliser].Apply(amount: 20, type: "UreaN", depth: 10)
              2015-12-09  [Fertiliser].Apply(amount: 20, type: "UreaN", depth: 10)
              2016-01-07  [Fertiliser].Apply(amount: 20, type: "UreaN", depth: 10)
              2016-02-10  [Fertiliser].Apply(amount: 20, type: "UreaN", depth: 10)
              2016-03-07  [Fertiliser].Apply(amount: 20, type: "UreaN", depth: 10)
              2016-04-02  [Fertiliser].Apply(amount: 20, type: "UreaN", depth: 10)
              2016-05-04  [Fertiliser].Apply(amount: 20, type: "UreaN", depth: 10)
              2016-08-31  [Fertiliser].Apply(amount: 20, type: "UreaN", depth: 10)
              2016-10-05  [Fertiliser].Apply(amount: 20, type: "UreaN", depth: 10)
            Operations 350
              2014-10-08  [Fertiliser].Apply(amount: 35, type: "UreaN", depth: 10)
              2014-10-31  [Fertiliser].Apply(amount: 35, type: "UreaN", depth: 10)
              2014-11-26  [Fertiliser].Apply(amount: 35, type: "UreaN", depth: 10)
              2014-12-17  [Fertiliser].Apply(amount: 35, type: "UreaN", depth: 10)
              2015-01-20  [Fertiliser].Apply(amount: 35, type: "UreaN", depth: 10)
              2015-02-12  [Fertiliser].Apply(amount: 35, type: "UreaN", depth: 10)
              2015-03-10  [Fertiliser].Apply(amount: 35, type: "UreaN", depth: 10)
              2015-04-17  [Fertiliser].Apply(amount: 35, type: "UreaN", depth: 10)
              2015-05-20  [Fertiliser].Apply(amount: 35, type: "UreaN", depth: 10)
              2015-09-09  [Fertiliser].Apply(amount: 35, type: "UreaN", depth: 10)
              2015-10-06  [Fertiliser].Apply(amount: 35, type: "UreaN", depth: 10)
              2015-11-06  [Fertiliser].Apply(amount: 35, type: "UreaN", depth: 10)
              2015-12-09  [Fertiliser].Apply(amount: 35, type: "UreaN", depth: 10)
              2016-01-07  [Fertiliser].Apply(amount: 35, type: "UreaN", depth: 10)
              2016-02-10  [Fertiliser].Apply(amount: 35, type: "UreaN", depth: 10)
              2016-03-07  [Fertiliser].Apply(amount: 35, type: "UreaN", depth: 10)
              2016-04-02  [Fertiliser].Apply(amount: 35, type: "UreaN", depth: 10)
              2016-05-04  [Fertiliser].Apply(amount: 35, type: "UreaN", depth: 10)
              2016-08-31  [Fertiliser].Apply(amount: 35, type: "UreaN", depth: 10)
              2016-10-05  [Fertiliser].Apply(amount: 35, type: "UreaN", depth: 10)
            Operations 500
              2014-10-08  [Fertiliser].Apply(amount: 50, type: "UreaN", depth: 10)
              2014-10-31  [Fertiliser].Apply(amount: 50, type: "UreaN", depth: 10)
              2014-11-26  [Fertiliser].Apply(amount: 50, type: "UreaN", depth: 10)
              2014-12-17  [Fertiliser].Apply(amount: 50, type: "UreaN", depth: 10)
              2015-01-20  [Fertiliser].Apply(amount: 50, type: "UreaN", depth: 10)
              2015-02-12  [Fertiliser].Apply(amount: 50, type: "UreaN", depth: 10)
              2015-03-10  [Fertiliser].Apply(amount: 50, type: "UreaN", depth: 10)
              2015-04-17  [Fertiliser].Apply(amount: 50, type: "UreaN", depth: 10)
              2015-05-20  [Fertiliser].Apply(amount: 50, type: "UreaN", depth: 10)
              2015-09-09  [Fertiliser].Apply(amount: 50, type: "UreaN", depth: 10)
              2015-10-06  [Fertiliser].Apply(amount: 50, type: "UreaN", depth: 10)
              2015-11-06  [Fertiliser].Apply(amount: 50, type: "UreaN", depth: 10)
              2015-12-09  [Fertiliser].Apply(amount: 50, type: "UreaN", depth: 10)
              2016-01-07  [Fertiliser].Apply(amount: 50, type: "UreaN", depth: 10)
              2016-02-10  [Fertiliser].Apply(amount: 50, type: "UreaN", depth: 10)
              2016-03-07  [Fertiliser].Apply(amount: 50, type: "UreaN", depth: 10)
              2016-04-02  [Fertiliser].Apply(amount: 50, type: "UreaN", depth: 10)
              2016-05-04  [Fertiliser].Apply(amount: 50, type: "UreaN", depth: 10)
              2016-08-31  [Fertiliser].Apply(amount: 50, type: "UreaN", depth: 10)
              2016-10-05  [Fertiliser].Apply(amount: 50, type: "UreaN", depth: 10)
        Simulation FRNLLincoln
          Clock: Start=2014-03-01; End=2016-05-31
          Weather: FileName=Lincoln-Broadfields.met
          Summary summaryfile
          SoilArbitrator Soil Arbitrator
          Forages
            Parameters:
              Name                          LiveDigestibility  DeadDigestibility  LiveFractionConsumable  DeadFractionConsumable  LiveMinimumBiomass  DeadMinimumBiomass
              SurfaceOrganicMatter.Residue  0.7                0.3                0                       0                       0                   0
              PlantainForage.Leaf           0.75               0.3                1                       1                       0                   0
              PlantainForage.Stem           0.7                0.2                1                       1                       0                   0
              PlantainForage.Inflorescence  0.6                0.2                1                       1                       0                   0
              PlantainForage.Taproot        0.7                0.3                0                       0                       0                   0
              PlantainForage.Root           0.7                0.3                0                       0                       0                   0
          Zone Field: Area=1; Slope=0; AspectAngle=0; Altitude=50
            Folder Management
              Operations Sowing
                2014-03-20  [PlantainForage].Sow(population: 200, cultivar: "Tonic", depth: 10, rowSpacing: 150)
              Operations IrrigationSchedule
                2014-10-31  [Irrigation].Apply(amount: 7)
                2014-11-03  [Irrigation].Apply(amount: 7)
                2014-11-05  [Irrigation].Apply(amount: 8)
                2014-11-07  [Irrigation].Apply(amount: 8)
                2014-11-10  [Irrigation].Apply(amount: 7)
                2014-11-11  [Irrigation].Apply(amount: 7)
                2014-11-12  [Irrigation].Apply(amount: 8)
                2014-11-17  [Irrigation].Apply(amount: 9)
                2014-11-18  [Irrigation].Apply(amount: 7)
                2014-11-19  [Irrigation].Apply(amount: 7)
                2014-11-24  [Irrigation].Apply(amount: 8)
                2014-11-25  [Irrigation].Apply(amount: 9)
                2014-11-27  [Irrigation].Apply(amount: 10)
                2014-12-01  [Irrigation].Apply(amount: 8)
                2014-12-02  [Irrigation].Apply(amount: 8)
                2014-12-04  [Irrigation].Apply(amount: 7)
                2014-12-08  [Irrigation].Apply(amount: 7)
                2014-12-09  [Irrigation].Apply(amount: 7)
                2014-12-12  [Irrigation].Apply(amount: 8)
                2014-12-15  [Irrigation].Apply(amount: 10)
                2014-12-17  [Irrigation].Apply(amount: 10)
                2014-12-19  [Irrigation].Apply(amount: 7)
                2014-12-20  [Irrigation].Apply(amount: 7)
                2014-12-21  [Irrigation].Apply(amount: 8)
                2014-12-22  [Irrigation].Apply(amount: 10)
                2014-12-25  [Irrigation].Apply(amount: 8)
                2014-12-26  [Irrigation].Apply(amount: 8)
                2014-12-27  [Irrigation].Apply(amount: 7)
                2014-12-28  [Irrigation].Apply(amount: 10)
                2014-12-29  [Irrigation].Apply(amount: 8)
                2014-12-30  [Irrigation].Apply(amount: 8)
                2015-01-02  [Irrigation].Apply(amount: 7)
                2015-01-05  [Irrigation].Apply(amount: 10)
                2015-01-08  [Irrigation].Apply(amount: 8)
                2015-01-09  [Irrigation].Apply(amount: 9)
                2015-01-12  [Irrigation].Apply(amount: 7)
                2015-01-13  [Irrigation].Apply(amount: 7)
                2015-01-16  [Irrigation].Apply(amount: 8)
                2015-01-19  [Irrigation].Apply(amount: 7)
                2015-01-20  [Irrigation].Apply(amount: 7)
                2015-01-21  [Irrigation].Apply(amount: 8)
                2015-01-26  [Irrigation].Apply(amount: 10)
                2015-01-27  [Irrigation].Apply(amount: 10)
                2015-01-29  [Irrigation].Apply(amount: 8)
                2015-02-02  [Irrigation].Apply(amount: 10)
                2015-02-04  [Irrigation].Apply(amount: 8)
                2015-02-05  [Irrigation].Apply(amount: 7)
                2015-02-09  [Irrigation].Apply(amount: 8)
                2015-02-11  [Irrigation].Apply(amount: 7)
                2015-02-12  [Irrigation].Apply(amount: 10)
                2015-02-16  [Irrigation].Apply(amount: 10)
                2015-02-17  [Irrigation].Apply(amount: 10)
                2015-02-18  [Irrigation].Apply(amount: 8)
                2015-02-24  [Irrigation].Apply(amount: 10)
                2015-02-26  [Irrigation].Apply(amount: 7)
                2015-02-27  [Irrigation].Apply(amount: 8)
                2015-03-02  [Irrigation].Apply(amount: 7)
                2015-03-03  [Irrigation].Apply(amount: 7)
                2015-03-05  [Irrigation].Apply(amount: 8)
                2015-03-10  [Irrigation].Apply(amount: 8)
                2015-03-12  [Irrigation].Apply(amount: 9)
                2015-03-13  [Irrigation].Apply(amount: 7)
                2015-03-16  [Irrigation].Apply(amount: 10)
                2015-03-19  [Irrigation].Apply(amount: 9)
                2015-03-20  [Irrigation].Apply(amount: 8)
                2015-03-23  [Irrigation].Apply(amount: 9)
                2015-03-24  [Irrigation].Apply(amount: 7)
                2015-03-26  [Irrigation].Apply(amount: 10)
                2015-03-30  [Irrigation].Apply(amount: 7)
                2015-04-02  [Irrigation].Apply(amount: 10)
                2015-04-03  [Irrigation].Apply(amount: 8)
                2015-04-06  [Irrigation].Apply(amount: 7)
                2015-04-08  [Irrigation].Apply(amount: 10)
                2015-04-17  [Irrigation].Apply(amount: 10)
                2015-05-20  [Irrigation].Apply(amount: 10)
                2015-06-09  [Irrigation].Apply(amount: 10)
                2015-09-09  [Irrigation].Apply(amount: 10)
                2015-09-30  [Irrigation].Apply(amount: 10)
                2015-10-02  [Irrigation].Apply(amount: 8)
                2015-10-06  [Irrigation].Apply(amount: 10)
                2015-10-09  [Irrigation].Apply(amount: 10)
                2015-10-12  [Irrigation].Apply(amount: 8)
                2015-10-13  [Irrigation].Apply(amount: 7)
                2015-10-16  [Irrigation].Apply(amount: 10)
                2015-10-20  [Irrigation].Apply(amount: 10)
                2015-10-21  [Irrigation].Apply(amount: 8)
                2015-10-23  [Irrigation].Apply(amount: 7)
                2015-10-26  [Irrigation].Apply(amount: 7)
                2015-10-27  [Irrigation].Apply(amount: 9)
                2015-11-02  [Irrigation].Apply(amount: 10)
                2015-11-03  [Irrigation].Apply(amount: 8)
                2015-11-04  [Irrigation].Apply(amount: 9)
                2015-11-06  [Irrigation].Apply(amount: 9)
                2015-11-09  [Irrigation].Apply(amount: 10)
                2015-11-11  [Irrigation].Apply(amount: 7)
                2015-11-16  [Irrigation].Apply(amount: 10)
                2015-11-18  [Irrigation].Apply(amount: 9)
                2015-11-20  [Irrigation].Apply(amount: 7)
                2015-11-23  [Irrigation].Apply(amount: 10)
                2015-11-24  [Irrigation].Apply(amount: 8)
                2015-11-25  [Irrigation].Apply(amount: 7)
                2015-11-27  [Irrigation].Apply(amount: 9)
                2015-11-30  [Irrigation].Apply(amount: 7)
                2015-12-01  [Irrigation].Apply(amount: 7)
                2015-12-04  [Irrigation].Apply(amount: 9)
                2015-12-07  [Irrigation].Apply(amount: 10)
                2015-12-09  [Irrigation].Apply(amount: 9)
                2015-12-10  [Irrigation].Apply(amount: 9)
                2015-12-22  [Irrigation].Apply(amount: 8)
                2015-12-24  [Irrigation].Apply(amount: 9)
                2015-12-26  [Irrigation].Apply(amount: 8)
                2015-12-29  [Irrigation].Apply(amount: 7)
                2015-12-31  [Irrigation].Apply(amount: 7)
                2016-01-01  [Irrigation].Apply(amount: 10)
                2016-01-07  [Irrigation].Apply(amount: 10)
                2016-01-09  [Irrigation].Apply(amount: 7)
                2016-01-11  [Irrigation].Apply(amount: 7)
                2016-01-12  [Irrigation].Apply(amount: 7)
                2016-01-13  [Irrigation].Apply(amount: 9)
                2016-01-15  [Irrigation].Apply(amount: 10)
                2016-01-21  [Irrigation].Apply(amount: 7)
                2016-01-25  [Irrigation].Apply(amount: 8)
                2016-01-30  [Irrigation].Apply(amount: 7)
                2016-02-02  [Irrigation].Apply(amount: 10)
                2016-02-03  [Irrigation].Apply(amount: 10)
                2016-02-05  [Irrigation].Apply(amount: 9)
                2016-02-08  [Irrigation].Apply(amount: 10)
                2016-02-11  [Irrigation].Apply(amount: 10)
                2016-02-12  [Irrigation].Apply(amount: 7)
                2016-02-15  [Irrigation].Apply(amount: 8)
                2016-02-16  [Irrigation].Apply(amount: 8)
                2016-02-22  [Irrigation].Apply(amount: 7)
                2016-02-23  [Irrigation].Apply(amount: 7)
                2016-02-25  [Irrigation].Apply(amount: 7)
                2016-02-26  [Irrigation].Apply(amount: 7)
                2016-03-01  [Irrigation].Apply(amount: 7)
                2016-03-02  [Irrigation].Apply(amount: 8)
                2016-03-04  [Irrigation].Apply(amount: 10)
                2016-03-07  [Irrigation].Apply(amount: 9)
                2016-03-08  [Irrigation].Apply(amount: 4)
                2016-03-10  [Irrigation].Apply(amount: 8)
                2016-03-14  [Irrigation].Apply(amount: 8)
                2016-03-15  [Irrigation].Apply(amount: 10)
                2016-03-18  [Irrigation].Apply(amount: 9)
                2016-03-21  [Irrigation].Apply(amount: 10)
                2016-03-22  [Irrigation].Apply(amount: 9)
                2016-03-23  [Irrigation].Apply(amount: 9)
                2016-03-28  [Irrigation].Apply(amount: 8)
                2016-04-02  [Irrigation].Apply(amount: 10)
                2016-04-08  [Irrigation].Apply(amount: 10)
                2016-05-04  [Irrigation].Apply(amount: 10)
                2016-08-31  [Irrigation].Apply(amount: 10)
                2016-10-05  [Irrigation].Apply(amount: 10)
                2016-10-18  [Irrigation].Apply(amount: 10)
                2016-10-26  [Irrigation].Apply(amount: 10)
              Operations NRate
              Operations DefoliationSchedule
                2014-10-08  [DefoliationManager].Script.Defoliate(amountDM: 35, amountType: "ResidualDM", duration: 1)
                2014-10-30  [DefoliationManager].Script.Defoliate(amountDM: 35, amountType: "ResidualDM", duration: 1)
                2014-11-25  [DefoliationManager].Script.Defoliate(amountDM: 35, amountType: "ResidualDM", duration: 1)
                2014-12-17  [DefoliationManager].Script.Defoliate(amountDM: 35, amountType: "ResidualDM", duration: 1)
                2015-01-16  [DefoliationManager].Script.Defoliate(amountDM: 35, amountType: "ResidualDM", duration: 1)
                2015-02-11  [DefoliationManager].Script.Defoliate(amountDM: 35, amountType: "ResidualDM", duration: 1)
                2015-03-10  [DefoliationManager].Script.Defoliate(amountDM: 35, amountType: "ResidualDM", duration: 1)
                2015-04-16  [DefoliationManager].Script.Defoliate(amountDM: 35, amountType: "ResidualDM", duration: 1)
                2015-05-20  [DefoliationManager].Script.Defoliate(amountDM: 35, amountType: "ResidualDM", duration: 1)
                2015-09-02  [DefoliationManager].Script.Defoliate(amountDM: 35, amountType: "ResidualDM", duration: 1)
                2015-10-06  [DefoliationManager].Script.Defoliate(amountDM: 35, amountType: "ResidualDM", duration: 1)
                2015-11-06  [DefoliationManager].Script.Defoliate(amountDM: 35, amountType: "ResidualDM", duration: 1)
                2015-12-07  [DefoliationManager].Script.Defoliate(amountDM: 35, amountType: "ResidualDM", duration: 1)
                2016-01-07  [DefoliationManager].Script.Defoliate(amountDM: 35, amountType: "ResidualDM", duration: 1)
                2016-02-04  [DefoliationManager].Script.Defoliate(amountDM: 35, amountType: "ResidualDM", duration: 1)
                2016-03-04  [DefoliationManager].Script.Defoliate(amountDM: 35, amountType: "ResidualDM", duration: 1)
                2016-03-31  [DefoliationManager].Script.Defoliate(amountDM: 35, amountType: "ResidualDM", duration: 1)
                2016-05-04  [DefoliationManager].Script.Defoliate(amountDM: 35, amountType: "ResidualDM", duration: 1)
              Manager DefoliationManager
                AllowAutomaticManagement = No
                DefoliationRotationStartDate = 01/01/1900 00:00:00
                DefoliationRotationEndDate = 12/31/2100 00:00:00
                DefoliationTriggerType = TargetStandingBiomass
                IntervalBetweenDefoliations = 15
                TargetStandingBiomass = 250
                DurationOfEachDefoliation = 1
                RemoveAmountType = ResidualDM
                AmountForEachDefoliation = 125
                MininumAmountToDefoliate = 75
                SuppressDefoliationOnWindow = No
                NoDefoliationWindowStartDate = 1-Jun
                NoDefoliationWindowEndDate = 30-Jul
                EnforceMinimumInterval = No
                MinimumInterval = 15
                EnforceMaximumInterval = No
                MaximumInterval = 90
                DMRemoveType = UserDefinedFraction
                FractionDMToRemove = 0.99
                NRemoveType = UserDefinedFraction
                FractionNToRemove = 0.99
                ReturnType = AsResidue
                NDungType = DefineCNratio
                ProportionOfNToDung = 0.4
                CNRatioDung = 17.5
                UrineDepth = 250
                SettingUrineNAmount = No
                UrineNSetAmount = 2
                PopulationDeclineRate = 0
                ConsiderTrampling = No
                MaximumLitterFractionToSoil = 0.01
                BiomassDefoliatedForMaximumLitterFraction = 120
                MeanGrowthPeriodType = BetweenDefoliationsOrMaxPeriod
                MaxPeriodForMeanGrowth = 30
```csharp
// This script will perform defoliations, i.e remove biomass, from any existing plant (PMF and/or AgPasture) that is alive in a field.
// General rules for when and how much to defoliate, as well as how to handle the material harvested, are supplied via the GUI.
// Defoliations can be triggered automatically by this manager, based on given rules, or by calling the 'Defoliate()' method
//  from another Script or a Schedule model. Note that in this case, some rules are overriden based on the parameters given in Defoliate().
// Developed by RCichota, last updated in 20/Jan/2025

using APSIM.Core;
using System;
using System.Linq;
using System.Collections.Generic;
using Newtonsoft.Json;
using APSIM.Shared.Utilities;
using Models.Core;
using Models.PMF;
using Models.Soils;
using Models.PMF.Interfaces;
using Models.AgPasture;
using Models.ForageDigestibility;
using APSIM.Numerics;

namespace Models
{
    [Serializable]
    public class Script : Model, IStructureDependency
    {
        [Link] private Clock clock;
        [Link] private Zone myZone;
        [Link] private IPhysical soilPhysical;
        [Link(ByName = true)] private ISolute Urea;
        [Link] private Surface.SurfaceOrganicMatter surfaceOM;
        [Link] private Forages swardForages;
        [Link] private ISummary summary;
        public  event BiomassRemovedDelegate BiomassRemoved;
        public  event EventHandler DefoliationHappenedToday;
        private string baseAmountType;
        private string currentAmountType;
        private double currentAmountForDefoliation;
        private double currentMinAmount;
        private double herbageToRemove;
        private int durationOfThisDefoliation;
        private int daysDefoliating;
        private double cumAmountHarvested;
        private double currentPostHarvest;
        private double swardPreviousPhenoStage;
        private bool aDefoliationHasHappened;
        
        public IStructure Structure { private get; set; }

        //> Links to other Apsim models
        [Link] private IPlant[] existingCrops;

        //> Events raised by this manager
        private EventArgs args = new EventArgs();

        //> User inputs from properties tab
        [Separator("Generic defoliation management - removes biomass from all PMF and AgPasture species in the field \n"
                 + "   this also includes residue management or the return of excreta (dung and urine, uniformly)")]
        [Description(" Allow this manager to control defoliations automatically?")]
        public yesNoAnswer AllowAutomaticManagement { get; set; }
        [Description(" Date to start the defoliation management (dd/mm/yyyy):")]
        public DateTime DefoliationRotationStartDate { get; set; }
        [Description(" Date to end the defoliation management (dd/mm/yyyy):")]
        public DateTime DefoliationRotationEndDate { get; set; }

        [Separator("Parameters defining how the defoliation is managed")]
        [Description(" How the defoliation events should be triggered?")]
        public DefoliationTriggerTypes DefoliationTriggerType { get; set; }
        [Description("   Minimum number of days between defoliation events:")]
        [Display(VisibleCallback = "isDefoliationTriggerAnInterval")]
        public int IntervalBetweenDefoliations { get; set; }
        [Description("   Minimum standing biomass to trigger a defoliation event (g/m2):")]
        [Display(VisibleCallback = "isDefoliationTriggerAnAmount")]
        public double TargetStandingBiomass { get; set; }
        [Description(" Duration of each defoliation event (days):")]
        public int DurationOfEachDefoliation { get; set; }
        [Description(" Which amount is defined to control biomass to be defoliated?")]
        public DefoliateAmountTypes RemoveAmountType { get; set; }
        [Description(" DM amount to use (g/m2):")]
        public double AmountForEachDefoliation { get; set; }
        [Description(" Minimum DM amount to remove (g/m2):")]
        [Display(VisibleCallback = "isAmountDMToRemove")]
        public double MininumAmountToDefoliate { get; set; }

        [Separator(" Additional management parameters to control defoliation frequency")]
        [Description(" Suppress defoliations over a period of time within the year?")]
        public yesNoAnswer SuppressDefoliationOnWindow { get; set; }
        [Description("   Date to start the defoliation suppression window (dd-mmm):")]
        [Display(VisibleCallback = "suppressingDefoliationOnWindow")]
        public string NoDefoliationWindowStartDate { get; set; }
        [Description("   Date to end the defoliation suppression window (dd-mmm):")]
        [Display(VisibleCallback = "suppressingDefoliationOnWindow")]
        public string NoDefoliationWindowEndDate { get; set; }
        [Description(" Enforce a minimum interval between defoliations?")]
        [Display(VisibleCallback = "isDefoliationTriggerAnAmount")]
        public yesNoAnswer EnforceMinimumInterval { get; set; }
        [Description("   Minimum number of days between defoliations:")]
        [Display(VisibleCallback = "minimumIntervalEnforced")]
        public int MinimumInterval { get; set; }
        [Description(" Enforce a maximum interval between defoliations?")]
        [Display(VisibleCallback = "isTriggerNotFixedInterval")]
        public yesNoAnswer EnforceMaximumInterval { get; set; }
        [Description("   Maximum number of days between defoliations:")]
        [Display(VisibleCallback = "maximumIntervalEnforced")]
        public int MaximumInterval { get; set; }

        [Separator("Parameters defining the management of the defoliated biomass")]
        [Description(" How much of the DM defoliated is to be removed from the field?")]
        public DMRemovalTypes DMRemoveType { get; set; }
        [Description("   Fraction of DM to remove off field (0-1):")]
        [Display(VisibleCallback = "userDefinesDMFraction")]
        public double FractionDMToRemove { get; set; }
        [Description(" How much of the N defoliated is to be removed from the field?")]
        public NRemovalTypes NRemoveType { get; set; }
        [Description("   Fraction of N to remove off field (0-1):")]
        [Display(VisibleCallback = "userDefinesNFraction")]
        public double FractionNToRemove { get; set; }
        [Description(" How the non-removed material is returned to the field?")]
        public ReturnAsTypes ReturnType { get; set; }

        [Separator("Parameters for partitioning non-removed N into urine and dung")]
        [Description(" How the partition of N to dung and urine is defined?")]
        [Display(VisibleCallback = "returningAsDungUrine")]
        public DungNContentTypes NDungType { get; set; }
        [Description("   Proportion of N returned in dung (0-1):")]
        [Display(VisibleCallback = "nitrogenInDungIsProportion")]
        public double ProportionOfNToDung { get; set; }
        [Description("   The C:N of dung, if using DefineCNratio (typically around 20):")]
        [Display(VisibleCallback = "nitrogenInDungIsCNRatio")]
        public double CNRatioDung { get; set; }
        [Description(" Soil depth down to which urine should be applied (mm):")]
        [Display(VisibleCallback = "returningAsDungUrine")]
        public double UrineDepth { get; set; }

        [Separator("Additional parameters to control N returns")]
        [Description(" Use a fixed N amount in each urine deposition?")]
        [Display(VisibleCallback = "returningAsDungUrine")]
        public yesNoAnswer SettingUrineNAmount { get; set; }
        [Description("   Amount of N to apply as \"urine\" (gN/m2)):")]
        [Display(VisibleCallback = "urineNAmountFixed")]
        public double UrineNSetAmount { get; set; }

        [Separator(" Additional parameters to control effects of defoliations")]
        [Description(" Fraction of population decline in each defoliation (0-1) Not Implemented:")]
        public double PopulationDeclineRate { get; set; } = 0.0;
        [Description(" Consider effects of trampling on surface OM (litter)?")]
        public yesNoAnswer ConsiderTrampling { get; set; }
        [Description(" Maximum fraction of litter incorporated to the soil (0-1):")]
        [Display(VisibleCallback = "consideringTrampling")]
        public double MaximumLitterFractionToSoil { get; set; }
        [Description(" Defoliated biomass for maximum rate of incorporation (g/m2): \n  (e.g. 90 for heavy cattle, 120 for ewes)")]
        [Display(VisibleCallback = "consideringTrampling")]
        public double BiomassDefoliatedForMaximumLitterFraction { get; set; }

        [Separator("Additional parameters for computing growth rates")]
        [Description(" Interval over which the mean growth rate will be calculated?")]
        public MeanGrowthPeriodTypes MeanGrowthPeriodType { get; set; }
        [Description("  Number of days to compute mean growth rate (maximum):")]
        [Display(VisibleCallback = "growthPeriodToBeGiven")]
        public int MaxPeriodForMeanGrowth { get; set; }

        //> Outputs from this manager
        [JsonIgnore][Units("g/m2")] // Pasture DM that can be consume (removed from plants) today
        public double ConsumableWt { get; set; }
        [JsonIgnore][Units("g/m2")] // N in the pasture material that can be consumed today
        public double ConsumableN { get; set; }
        [JsonIgnore][Units("g/m2")] // Pasture DM defoliated (removed from plants) today
        public double DefoliatedWt { get; set; }
        [JsonIgnore][Units("g/m2")] // N in the pasture material defoliated today
        public double DefoliatedN { get; set; }
        [JsonIgnore][Units("g/m2")] // Pasture DM harvested (removed from plants minus direct residue) today
        public double HarvestedWt { get; set; }
        [JsonIgnore][Units("g/m2")] // N in the pasture material harvested today
        public double HarvestedN { get; set; }
        [JsonIgnore][Units("g/m2")] // Pasture DM actually removed from the field
        public double RemovedWt { get; set; }
        [JsonIgnore][Units("g/m2")] // N in the pasture material removed from the field
        public double RemovedN { get; set; }
        [JsonIgnore][Units("g/m2")] // Pasture DM returned by this manager to the field
        public double ReturnedWt { get; set; }
        [JsonIgnore][Units("g/m2")] // N in the pasture material returned by this manager to the field
        public double ReturnedN { get; set; }
        [JsonIgnore][Units("g/m2")] // Non-removed N returned as dung (to SurfaceOM)
        public double NReturnedInDung { get; set; }
        [JsonIgnore][Units("g/m2")] // Non-removed N returned as urine (soil urea)
        public double NReturnedInUrine { get; set; }
        [JsonIgnore][Units("days")] // Number of days since the end of last defoliation event
        public int DaysSinceLastDefoliation { get; set; }
        [JsonIgnore][Units("g/m2")] // Total standing aboveground DM before a defoliation
        public double PreHarvestDM { get; set; }
        [JsonIgnore][Units("g/m2")] // Total standing aboveground DM after a defoliation
        public double PostHarvestDM { get; set; }
        [JsonIgnore][Units("g/m2")] // Total pasture DM harvested over a complete defoliation event
        public double RotationHarvestedDM { get; set; }
        [JsonIgnore][Units("g/m2")] // Mean sward growth rate over a given period before each defoliation
        public double MeanGrowthRateDM { get; set; }

        //> Internal variables
        private List<ModelWithDigestibleBiomass> existingForageCrops; // links to the forage interface of each plant organ
        private LinkedList<double> growthQueue;         // list of daily growth rates over the period to compute mean growth rate
        private double[] urineFraction;                 // fraction of urine N to be applied in each soil layer



        

        [EventSubscribe("StartOfSimulation")]
        private void OnStartOfSimulation(object sender, EventArgs e)
        {
            // check the type of amount given
            if (RemoveAmountType == DefoliateAmountTypes.DMToRemove)
            {
                baseAmountType = "DMToRemove";
            }
            else if (RemoveAmountType == DefoliateAmountTypes.ResidualDM)
            {
                baseAmountType = "ResidualDM";
            }

            // check the interval between events
            if (IntervalBetweenDefoliations < 1)
            {
                throw new Exception("The interval between defoliation events must be at least one day");
            }

            // check the duration for each defoliation
            if(DurationOfEachDefoliation <= 0)
            {
                throw new Exception("The duration of defoliations cannot be zero or negative!");
            }

            // check the fraction of defoliated material to remove from the field
            if (DMRemoveType == DMRemovalTypes.RemoveAll)
            {
                FractionDMToRemove = 1.0;
            }
            else if (DMRemoveType == DMRemovalTypes.RemoveNone)
            {
                FractionDMToRemove = 0.0;
            }
            else if (DMRemoveType == DMRemovalTypes.BasedOnDigestibility)
            {
                FractionDMToRemove = -1.0;  // will be calculated dynamically
            }
            else // DMRemoveType == DMRemovalTypes.UserDefinedFraction
            {
                if (FractionDMToRemove < 0.0)
                {
                    throw new Exception("The fraction of DM defoliated to remove from the field cannot be negative!");
                }
            }

            // check the fraction of defoliated N to remove from the field
            if (NRemoveType == NRemovalTypes.RemoveAll)
            {
                FractionNToRemove = 1.0;
            }
            else if (NRemoveType == NRemovalTypes.RemoveNone)
            {
                FractionNToRemove = 0.0;
            }
            else if (NRemoveType == NRemovalTypes.ProportionalToDM)
            {
                FractionNToRemove = FractionDMToRemove;
            }
            else // NRemoveType == NRemovalTypes.UserDefinedFraction
            {
                if (FractionNToRemove < 0.0)
                {
                    throw new Exception("The fraction of defoliated N to remove from the field cannot be negative!");
                }
            }

            // get links to the forage interface for each platn organ
            existingForageCrops = swardForages.ModelsWithDigestibleBiomass.ToList();

            // make sure that management starts when RotationStartDate < simulationStartDay
            DefoliationRotationEndDate = DefoliationRotationEndDate > clock.EndDate? clock.EndDate: DefoliationRotationEndDate;
            if ((clock.Today > DefoliationRotationStartDate) && (clock.Today < DefoliationRotationEndDate))
            {
                DefoliationRotationStartDate = clock.Today;
            }

            // initialise some variables
            growthQueue = new LinkedList<double>();
            swardPreviousPhenoStage = 1.0;
            DaysSinceLastDefoliation = 0;
            durationOfThisDefoliation = -1;
            daysDefoliating = 0;
            resetMyOutputs();

            // set the fraction of urine for each layer
            if (ReturnType == ReturnAsTypes.AsDungUrine)
            {
                double depthFromSurface = 0.0;
                double propAtZ0;
                double propAtZ1;
                for (int layer = 0; layer < soilPhysical.Thickness.Length; layer++)
                {
                    depthFromSurface += soilPhysical.Thickness[layer];
                    if (depthFromSurface >= UrineDepth)
                    { // bottom layer found
                        urineFraction = new double[layer + 1];
                        double distFactor = 1.5;
                        double totalProp = UrineDepth * Math.Pow(1.0, distFactor) / (distFactor + 1.0);
                        depthFromSurface = 0.0;
                        propAtZ1 = (UrineDepth - depthFromSurface) * Math.Pow(1.0 - depthFromSurface / UrineDepth, distFactor) / (distFactor + 1.0);
                        for (int z = 0; z < layer+1; z++)
                        {
                            propAtZ0 = propAtZ1;
                            depthFromSurface += soilPhysical.Thickness[z];
                            propAtZ1 = (UrineDepth - depthFromSurface) * Math.Pow(1.0 - depthFromSurface / UrineDepth, distFactor) / (distFactor + 1);
                            if (1.0 - (depthFromSurface / UrineDepth) < 0.0)
                            {
                                propAtZ1 = 0;
                            }
                            urineFraction[z] = (propAtZ0 - propAtZ1) / totalProp;
                        }
                        layer = soilPhysical.Thickness.Length;
                    }
                }
            }

            // write message in summary
            summary.WriteMessage(this," Defoliation manager initialisation", MessageType.Diagnostic);
            if (automaticManagementAllowed)
            {
                summary.WriteMessage(this, "   Automatic defoliations will happen between " + DefoliationRotationStartDate.ToShortDateString()
                                         + " and " + DefoliationRotationEndDate.ToShortDateString() + ".", MessageType.Diagnostic);
                if (SuppressDefoliationOnWindow == yesNoAnswer.Yes)
                {
                    summary.WriteMessage(this, "    But they will be suppressed between " + NoDefoliationWindowStartDate  + " and "
                                               + NoDefoliationWindowEndDate + ".", MessageType.Diagnostic);
                }

                summary.WriteMessage(this, "   Biomass from all species in the sward will be removed if criteria are matched.", MessageType.Diagnostic);
                if (DefoliationTriggerType == DefoliationTriggerTypes.TargetStandingBiomass)
                {
                    summary.WriteMessage(this, "   Events will happen whenever aboveground biomass surpasses " + TargetStandingBiomass.ToString("#0.0") + " g/m2.", MessageType.Diagnostic);
                    if(EnforceMinimumInterval == yesNoAnswer.Yes)
                    {
                        summary.WriteMessage(this, "     With a minimum of " + MinimumInterval + " days between defoliations", MessageType.Diagnostic);
                    }
                    if(EnforceMaximumInterval == yesNoAnswer.Yes)
                    {
                        summary.WriteMessage(this, "     With a maximum of " + MaximumInterval + " days between defoliations", MessageType.Diagnostic);
                    }
                }
                else
                {
                    summary.WriteMessage(this, "   Events will happen every " + IntervalBetweenDefoliations + " days, if there is enough biomass.", MessageType.Diagnostic);
                }

                if(baseAmountType == "ResidualDM")
                {
                    summary.WriteMessage(this, "   Removing biomass down to a residual amount of " + AmountForEachDefoliation.ToString("#.0") + " g/m2 over "
                                             + DurationOfEachDefoliation + " days.", MessageType.Diagnostic);
                }
                else
                {
                    summary.WriteMessage(this, "   Attempting to remove " + AmountForEachDefoliation.ToString("#.0") + " g/m2 of biomass per day over "
                                             + DurationOfEachDefoliation + " days.", MessageType.Diagnostic);
                }
            }
            else
            {
                summary.WriteMessage(this,"   Automatic defoliations are currently disabled, though defoliations can be triggered by another manager", MessageType.Diagnostic);
            }

            if(ReturnType == ReturnAsTypes.AsDungUrine)
            {
                summary.WriteMessage(this,"   Non-removed material will be returned as dung and urine. Urine added to soil according to proportions: "
                                         + string.Join(", ",urineFraction), MessageType.Diagnostic);
            }
            else
            {
                summary.WriteMessage(this,"   Non-removed material will be returned as residue.", MessageType.Diagnostic);
            }
        }

        [EventSubscribe("DoManagement")]
        private void OnDoManagement(object sender, EventArgs e)
        {
            // get the biomass available for defoliation
            ConsumableWt = harvestableSwardBiomassWt("All");
            ConsumableN = harvestableSwardBiomassN("All");

            // check whether we need to continue defoliating, i.e. within a multi-day defoliation event (need to check this first in the day)
            if ((daysDefoliating > 0) && (daysDefoliating < durationOfThisDefoliation))
            {
                // reset outputs
                resetMyOutputs();

                // re-check the amount to defoliate
                herbageToRemove = 0.0;
                if (currentAmountType == "DMToRemove")
                {
                    if(ConsumableWt > currentMinAmount + 0.001)
                    {
                        herbageToRemove = Math.Min(ConsumableWt, (currentAmountForDefoliation - cumAmountHarvested) / (durationOfThisDefoliation - daysDefoliating));
                    }
                }
                else if (currentAmountType == "ResidualDM")
                {
                    double currentDM = standingSwardBiomassWt;
                    if (currentDM > currentAmountForDefoliation)
                    {
                        herbageToRemove = Math.Min(ConsumableWt, (currentDM - currentAmountForDefoliation) / (durationOfThisDefoliation - daysDefoliating));
                    }
                }

                // remove plant biomass and return residue
                if (Math.Abs(herbageToRemove) >= 0.001)
                {
                    // set biomass removal
                    defoliateSward(herbageToRemove);

                    // return residue or excreta
                    if(ReturnedWt + ReturnedN > 0.0)
                    {
                        if (ReturnType == ReturnAsTypes.AsResidue)
                        {
                            returnResidues();
                        }
                        else
                        {
                            returnExcreta();
                        }
                    }

                    // consider trampling effect on surface OM
                    if (consideringTrampling)
                    {
                        doTrampling();
                    }

                    // gather amount removed this event
                    cumAmountHarvested += HarvestedWt;
                }

                daysDefoliating += 1;
            }

            // check whether a defoliation ended yesterday
            if (daysDefoliating < 0)
            { // clean up variables
                resetMyOutputs();
                daysDefoliating = 0;
            }

            // check whether automatic defoliations are enabled
            if (automaticManagementAllowed)
            {
                // check whether we are within the period in which defoliation management is allowed
                if ((clock.Today.Date >= DefoliationRotationStartDate.Date) && (clock.Today.Date <= DefoliationRotationEndDate.Date))
                {
                    // check whether the sward has plants alive that could be defoliated
                    if (swardHasLivingPlants)
                    {
                        // check whether the day counter to control defoliation interval needs to be set
                        if (clock.Today.Date == DefoliationRotationStartDate.Date)
                        { // set to the maximum interval, so a defoliation is triggered today
                            if(isDefoliationTriggerAnAmount)
                            {
                                if(EnforceMaximumInterval == yesNoAnswer.Yes)
                                {
                                    DaysSinceLastDefoliation = MaximumInterval;
                                }
                            }
                            else
                            {
                                DaysSinceLastDefoliation = IntervalBetweenDefoliations;
                            }
                        }

                        // check whether the day counter to control defoliation interval needs to be set off
                        double swardCurrentPhenoStage = swardPhenologyStage;
                        if ((swardPreviousPhenoStage < 1.0) && (swardCurrentPhenoStage >= 1.0))
                        { // sward was sown and has just emmerged, pretend a defoliation has happened to set the counter going
                            aDefoliationHasHappened = true;
                            DaysSinceLastDefoliation -= 30; // give an extra month for the pasture to grow (on top of 'normal' interval)
                        }
                        swardPreviousPhenoStage = swardCurrentPhenoStage;

                        // check whether a window for suppressing defoliations has been set
                        if (suppressingDefoliationOnWindow && DateUtilities.WithinDates(NoDefoliationWindowStartDate, clock.Today, NoDefoliationWindowEndDate))
                        { // do nothing as we're within the suppression window
                        }
                        else
                        {
                            // check whether we should start a defoliation event
                            if (DefoliationTriggerType == DefoliationTriggerTypes.FixedInterval)
                            {
                                if (DaysSinceLastDefoliation == IntervalBetweenDefoliations)
                                {
                                    Defoliate(AmountForEachDefoliation, baseAmountType, DurationOfEachDefoliation, MininumAmountToDefoliate, "yes");
                                }
                            }
                            else if (DefoliationTriggerType == DefoliationTriggerTypes.TargetInterval)
                            {
                                if (DaysSinceLastDefoliation >= IntervalBetweenDefoliations)
                                {
                                    if(EnforceMaximumInterval == yesNoAnswer.Yes && (DaysSinceLastDefoliation >= MaximumInterval))
                                    { // start a defoliation even if biomass is insufficient
                                        Defoliate(AmountForEachDefoliation, baseAmountType, DurationOfEachDefoliation, MininumAmountToDefoliate, "yes");
                                    }
                                    else
                                    {
                                        Defoliate(AmountForEachDefoliation, baseAmountType, DurationOfEachDefoliation, MininumAmountToDefoliate, "no");
                                    }
                                }
                            }
                            else  //DefoliationTriggerType == DefoliationTriggerTypes.TargetStandingBiomass
                            {
                                if (standingSwardBiomassWt >= TargetStandingBiomass)
                                {
                                    if(EnforceMinimumInterval == yesNoAnswer.Yes)
                                    { // check interval between defoliations
                                        if(DaysSinceLastDefoliation >= MinimumInterval)
                                        { // sufficient days passed since last defoliation
                                            Defoliate(AmountForEachDefoliation, baseAmountType, DurationOfEachDefoliation, 0.0, "no");
                                        }
                                        //else wait for minimum interval
                                    }
                                    else
                                    { // no checks, just defoliate
                                        Defoliate(AmountForEachDefoliation, baseAmountType, DurationOfEachDefoliation, 0.0, "no");
                                    }
                                }
                                else
                                {
                                    if(EnforceMaximumInterval == yesNoAnswer.Yes && (DaysSinceLastDefoliation >= MaximumInterval))
                                    { // start a defoliation even if biomass is insufficient
                                        Defoliate(AmountForEachDefoliation, baseAmountType, DurationOfEachDefoliation, 0.0, "yes");
                                    }
                                }
                            }
                        }
                    }
                }
                //// Note: Only the code above, responsible for triggering automatic events, is limited by 'AllowAutomaticManagement'.
                ////       The rest of the code is still available to perform one-off defoliations.
                ////       It can be called from another manager or a schedule thingy via Defoliate().
            }
        }

        [EventSubscribe("DoManagementCalculations")]
        private void OnDoManagementCalculations(object sender, EventArgs e)
        {
            // check whether a defoliation event has just been completed
            if (daysDefoliating == durationOfThisDefoliation)
            {
                // get amount of biomass remaining and zero counters
                PostHarvestDM = currentPostHarvest;
                RotationHarvestedDM = cumAmountHarvested;
                aDefoliationHasHappened = true;
                daysDefoliating = -1;

                // compute the mean growth rate for the queued period
                MeanGrowthRateDM = MathUtilities.Average(growthQueue.ToArray());
                growthQueue.Clear();
            }

            // count the days after a defoliation
            if (aDefoliationHasHappened && (daysDefoliating == 0))
            {
                DaysSinceLastDefoliation += 1;
            }

            // update the list holding growth rates
            updateGrowthQueue();
        }

        [EventSubscribe("EndOfDay")]
        private void OnEndOfDay(object sender, EventArgs e)
        {
            // send a 'message' to let models know that a defoliation has ended today (mostly for report)
            if ((daysDefoliating < 0) && (DefoliationHappenedToday != null))
            {
                DefoliationHappenedToday.Invoke(this, args);
            }
        }

        /// <summary>Sets up a defoliation event.</summary>
        /// <param name="amountDM">Amount of biomass to use (g/m2)</param>
        /// <param name="amountType">How the DM amount is interpreted (DMToRemove, ResidualDM)</param>
        /// <param name="duration">Number of days to defoliate over</param>
        /// <param name="minAmount">Minimum amount that can be removed, if using DMToRemove</param>
        /// <param name="mustDo">Flag whether a defoliation must be counted as such even if there is no biomass</param>
        public void Defoliate(double amountDM, string amountType, int duration = 1, double minAmount = 0.0, string mustDo = "yes")
        {
            // check whether there are plants in the sward that can be defoliated
            if (swardHasLivingPlants)
            {
                // check DM amount given
                if (amountDM < 0.0)
                {
                    throw new Exception("Amount to defoliate cannot be negative!");
                }
                else
                {
                    currentAmountForDefoliation = amountDM;
                }
                currentMinAmount = Math.Max(minAmount, 0.0);

                // check the type of amount given
                if (amountType.ToLower() == "dmtoremove")
                {
                    currentAmountType = "DMToRemove";
                }
                else if (amountType.ToLower() == "residualdm")
                {
                    currentAmountType = "ResidualDM";
                }
                else
                {
                    throw new Exception("Amount type should be \"DMToRemove\" or \"ResidualDM\"!");
                }

                // check duration given
                if (duration <= 0)
                {
                    throw new Exception("Duration of defoliation cannot be zero or negative!");
                }
                else
                {
                    durationOfThisDefoliation = duration;
                }

                // check existing biomass and amount to remove
                PreHarvestDM = standingSwardBiomassWt;
                herbageToRemove = 0.0;
                double harvestableBiomass = harvestableSwardBiomassWt("All");
                if (currentAmountType == "DMToRemove")
                {
                    if (currentAmountForDefoliation > 0.001)
                    { // a meaningful amount was given, check how much can be removed
                        if (harvestableBiomass > minAmount + 0.001)
                        {
                            herbageToRemove = Math.Min(harvestableBiomass, currentAmountForDefoliation / durationOfThisDefoliation);
                        }

                        summary.WriteMessage(this, "   Defoliation triggered, attempting to remove " + currentAmountForDefoliation.ToString("#0.0") + " g/m2 of biomass over " + durationOfThisDefoliation + " days", MessageType.Diagnostic);
                    }
                }
                else if (currentAmountType == "ResidualDM")
                {
                    // check how much biomass will be removed
                    if (PreHarvestDM > currentAmountForDefoliation)
                    {
                        herbageToRemove = Math.Min(harvestableBiomass, (PreHarvestDM - currentAmountForDefoliation) / durationOfThisDefoliation);
                    }

                    summary.WriteMessage(this, "   Defoliation triggered, attempting to remove biomass down to " + currentAmountForDefoliation.ToString("#0.0") + " g/m2 over " + durationOfThisDefoliation + " days", MessageType.Diagnostic);
                }

                // can defoliation begin?
                if (Math.Abs(herbageToRemove) >= 0.001)
                {
                    // set off first defoliation
                    defoliateSward(herbageToRemove);

                    // return residue or excreta
                    if(ReturnedWt + ReturnedN > 0.0)
                    {
                        if (ReturnType == ReturnAsTypes.AsResidue)
                        {
                            returnResidues();
                        }
                        else
                        {
                            returnExcreta();
                        }
                    }

                    // consider trampling effect on surface OM
                    if (consideringTrampling)
                    {
                        doTrampling();
                    }

                    // gather values for this event
                    cumAmountHarvested = HarvestedWt;
                    currentPostHarvest = standingSwardBiomassWt;
                    daysDefoliating = 1;
                    DaysSinceLastDefoliation = 0;
                }
                else
                {
                    // abort command as there is not enough biomass, except...
                    if (mustDo.ToLower() == "yes")
                    { // count the event as if it did happen
                        cumAmountHarvested = 0.0;
                        currentPostHarvest = standingSwardBiomassWt;
                        daysDefoliating = 1;
                        DaysSinceLastDefoliation = 0;
                        summary.WriteMessage(this, "   Defoliation triggered but no biomass was removed (total harvestable = " + harvestableBiomass.ToString("#0.0") + " g/m2)", MessageType.Diagnostic);
                    }
                    else
                    {
                        summary.WriteMessage(this, "   Defoliation did not happen because current biomass (" + PreHarvestDM.ToString("#0.0") + " g/m2) is too low (total harvestable = " + harvestableBiomass.ToString("#0.0") + " g/m2)", MessageType.Diagnostic);
                    }
                }
            }
            else
            {
                summary.WriteMessage(this, "   Defoliation did not happen because there is no growing plants in the sward", MessageType.Diagnostic);
            }
        }

        /// <summary>Resets the values of outputs.</summary>
        private void resetMyOutputs()
        {
            DefoliatedWt = 0.0;
            DefoliatedN = 0.0;
            HarvestedWt = 0.0;
            HarvestedN = 0.0;
            RemovedWt = 0.0;
            RemovedN = 0.0;
            ReturnedWt = 0.0;
            ReturnedN = 0.0;
            NReturnedInDung = 0.0;
            NReturnedInUrine = 0.0;
            RotationHarvestedDM = 0.0;
            MeanGrowthRateDM = 0.0;
        }

        /// <summary>Updates the lists holding data to compute mean growth rate.</summary>
        private void updateGrowthQueue()
        {
            growthQueue.AddFirst(todaysBiomassGrowthWt);
            if (MeanGrowthPeriodType != MeanGrowthPeriodTypes.BetweenDefoliations)
            {
               if (growthQueue.Count > MaxPeriodForMeanGrowth)
               { // Max period reached, need to remove last value in the queue
                   growthQueue.RemoveLast();
               }
            }
        }

        /// <summary>Flags whether there is any living plant in the sward.</summary>
        private bool swardHasLivingPlants
        {
            get
            {
                bool result = false;
                foreach (IPlant species in existingCrops)
                {
                    result |= species.IsAlive;
                }

                return result;
            }
        }

        /// <summary>Gets the phenology stage of the most developed plant in the sward.</summary>
        private double swardPhenologyStage
        {
            get
            {
                double result = 0.0;
                foreach (Plant species in   Structure.FindChildren<Plant>(relativeTo: (INodeModel)myZone).OfType<IModel>().ToList())
                {
                    if (species.IsAlive)
                    {
                        result = Math.Max(result, (double)Structure.Get(species.Name+".Phenology.Stage", relativeTo: myZone));
                    }
                }

                foreach (AgPasture.PastureSpecies species in   Structure.FindChildren<AgPasture.PastureSpecies>(relativeTo: (INodeModel)myZone).OfType<IModel>().ToList())
                {
                    if (species.IsAlive)
                    {
                        result = Math.Max(result, species.Stage);
                    }
                }

                return result;
            }
        }

        /// <summary>Amount of plant biomass aboveground (g/m2).</summary>
        private double standingSwardBiomassWt
        {
            get
            {
                double result = 0.0;
                foreach (IPlant species in existingCrops)
                {
                   result += species.AboveGround.Wt;
                }

                return result;
            }
        }

        /// <summary>Amount of N in plant's biomass aboveground (g/m2).</summary>
        private double standingSwardBiomassN
        {
            get
            {
                double result = 0.0;
                foreach (IPlant species in existingCrops)
                {
                    result += species.AboveGround.N;
                }

                return result;
            }
        }

        /// <summary>Amount of plant biomass from all organs available for defoliation (g/m2).</summary>
        /// <remarks>Uses the fractions set in 'Forages' model.</remarks>
        /// <param name="plantName">The name of the plant to retrieve its biomass</param>
        private double harvestableSwardBiomassWt(string plantName)
        {
            double amountWt = 0.0;
            foreach (var forage in existingForageCrops) 
            {
                foreach (var forageMaterial in forage.Material)
                {
                    string forageName = forageMaterial.Name.Split('.')[0];
                    if ((plantName == "All") || (forageName == plantName))
                    {
                        amountWt += forageMaterial.Consumable.Wt;
                    }
                }
            }

            return amountWt;
        }

        /// <summary>Amount of N in plant biomass available for defoliation (g/m2).</summary>
        /// <remarks>Uses the fractions set in 'Forages' model.</remarks>
        /// <param name="plantName">The name of the plant to retrieve its biomass</param>
        private double harvestableSwardBiomassN(string plantName)
        {
            double amountN = 0.0;
            foreach (var forage in existingForageCrops) 
            {
                foreach (var forageMaterial in forage.Material)
                {
                    string forageName = forageMaterial.Name.Split('.')[0];
                    if ((plantName == "All") || (forageName == plantName))
                    {
                        amountN += forageMaterial.Consumable.N;
                    }
                }
            }

            return amountN;
        }

        /// <summary>Gets the sward growth rate of aboveground biomass for today (g/m2).</summary>
        private double todaysBiomassGrowthWt
        {
            get
            {
                double result = 0.0;
                foreach (IPlant species in existingCrops)
                {
                    if (species.GetType().ToString().Contains("PMF"))
                    { // a PMF plant
                        foreach (IOrgan organ in Structure.FindChildren<IOrgan>(relativeTo: species as INodeModel, recurse: true).OfType<IModel>().ToList())
                        {
                            string speciesName = (species as Plant).Name;
                            if ((bool)Structure.Get(speciesName + "." + organ.Name + ".IsAboveGround", relativeTo: myZone))
                            {
                                result += (double)Structure.Get(speciesName + "." + organ.Name + ".Allocated.Wt", relativeTo: myZone);
                                result -= (double)Structure.Get(speciesName + "." + organ.Name + ".Detached.Wt", relativeTo: myZone);
                            }
                        }
                    }
                    else
                    { // an AgPasture plant
                        result += (species as PastureSpecies).HerbageGrowthWt*0.1;
                    }
                }

                return result;
            }
        }

        /// <summary>Triggers the actual biomass removal and gather DM and N amounts.</summary>
        /// <param name="amountToRemove">The total DM amount to remove (g/m2)</param>
        private void defoliateSward(double amountToRemove)
        {
            // get the amounts of biomass and N before today's defoliation
            double preRemovalDM = standingSwardBiomassWt;
            double preRemovalN = standingSwardBiomassN;
            double totalHarvestableAmount = harvestableSwardBiomassWt("All");

            // zero the outputs, just in case
            DefoliatedWt = 0.0;
            DefoliatedN = 0.0;
            HarvestedWt = 0.0;
            HarvestedN = 0.0;
            RemovedWt = 0.0;
            RemovedN = 0.0;

            // go over each forage species and organ and remove biomass
            foreach (var forage in existingForageCrops)
            {
                if(forage.Material.Count() > 0)
                {
                    // do the biomass removal/harvest
                    double speciesOrganFraction = forage.Material.Sum(m => m.Consumable.Wt)*0.1/totalHarvestableAmount;
                    double removeAmount = amountToRemove*speciesOrganFraction*10.0;

                    if (removeAmount > 0.0)
                    {
                        var forageDefoliated = forage.RemoveBiomass(amountToRemove: removeAmount);

                        // gather the amounts harvested (i.e. defoliated minus returned to residues)
                        HarvestedWt += forageDefoliated.Wt*0.1;
                        HarvestedN += forageDefoliated.N*0.1;

                        // check the fraction of defoliated biomass to be taken off field
                        double removeFractionDM = FractionDMToRemove;
                        double removeFractionN = FractionNToRemove;
                        if(FractionDMToRemove < 0.0)
                        { // use digestibility to define the fraction
                            removeFractionDM = forageDefoliated.Digestibility;

                            // check whether N fraction is proportional to DM
                            if (FractionNToRemove < 0.0)
                            {
                                removeFractionN = removeFractionDM;
                            }
                        }

                        // get the amounts actually removed from the field
                        RemovedWt += forageDefoliated.Wt*0.1*removeFractionDM;
                        RemovedN += forageDefoliated.N*0.1*removeFractionN;
                    }
                }
            }

            // get the amounts of biomass and N after today's defoliation
            double postRemovalDM = standingSwardBiomassWt;
            double postRemovalN = standingSwardBiomassN;

            // get total defoliation (total plant stuff lost)
            DefoliatedWt = preRemovalDM - postRemovalDM;
            DefoliatedN = preRemovalN - postRemovalN;

            // get amounts harvested, removed, and returned
            manageDefoliatedBiomass();
        }

        /// <summary>Gathers the DM and N amounts harvested, to be removed, and to be returned.</summary>
        private void manageDefoliatedBiomass()
        {
            if (HarvestedWt > 0.0)
            {
                // get the amounts to be returned to the field (as residue or dung+urine)
                ReturnedWt = HarvestedWt - RemovedWt;
                ReturnedN = HarvestedN - RemovedN;
                if (returningAsDungUrine)
                {
                    if (nitrogenInDungIsProportion)
                    {
                        NReturnedInDung = ReturnedN * ProportionOfNToDung;
                    }
                    else
                    {
                        NReturnedInDung = Math.Min(ReturnedN, ReturnedWt * 0.4 / CNRatioDung);
                    }

                    NReturnedInDung = Math.Min(NReturnedInDung, ReturnedN);
                    NReturnedInUrine = ReturnedN - NReturnedInDung;

                    if(urineNAmountFixed)
                    { // urine N to return is set in UI
                        NReturnedInUrine = UrineNSetAmount;
                    }
                }
                else
                {
                    NReturnedInDung = 0.0;
                    NReturnedInUrine = 0.0;
                }
            }
        }

        /// <summary>Returns the material not removed off field as residue.</summary>
        private void returnResidues()
        {
            if ((ReturnedWt > 0.0) || (ReturnedN > 0.0))
            {
                PMF.BiomassRemovedType BiomassResidue = new PMF.BiomassRemovedType();
                string[] type = new string[] { "Grass" };
                float[] dltdm = new float[] { (float)(10.0 * ReturnedWt) };
                float[] dltn = new float[] { (float)(10.0 * ReturnedN) };
                float[] dltp = new float[] { 0.0f };
                float[] fraction = new float[] { 1.0f };     // fraction is always 1.0 here

                BiomassResidue.crop_type = "Grass";
                BiomassResidue.dm_type = type;
                BiomassResidue.dlt_crop_dm = dltdm;
                BiomassResidue.dlt_dm_n = dltn;
                BiomassResidue.dlt_dm_p = dltp;
                BiomassResidue.fraction_to_residue = fraction;
                BiomassRemoved.Invoke(BiomassResidue);
            }
        }

        /// <summary>Returns the material not removed off field as dung and urine).</summary>
        private void returnExcreta()
        {
            if ((ReturnedWt > 0.0) || (NReturnedInDung > 0.0))
            {
                PMF.BiomassRemovedType BiomassDung = new PMF.BiomassRemovedType();
                string[] type = new string[] { "RuminantDung_PastureFed" };
                float[] dltdm = new float[] { (float)(10.0 * ReturnedWt) };
                float[] dltn = new float[] { (float)(10.0 * NReturnedInDung) };
                float[] dltp = new float[] { 0.0f };
                float[] fraction = new float[] { 1.0f };     // fraction is always 1.0 here

                BiomassDung.crop_type = "RuminantDung_PastureFed";
                BiomassDung.dm_type = type;
                BiomassDung.dlt_crop_dm = dltdm;
                BiomassDung.dlt_dm_n = dltn;
                BiomassDung.dlt_dm_p = dltp;
                BiomassDung.fraction_to_residue = fraction;
                BiomassRemoved.Invoke(BiomassDung);
            }

            if (NReturnedInUrine > 0.0)
            {
                double[] myUrineDeposition = new double[soilPhysical.Thickness.Length];
                for (int z = 0; z < urineFraction.Length; z++)
                {
                    myUrineDeposition[z] = NReturnedInUrine * 10.0 * urineFraction[z];
                }

                Urea.AddKgHaDelta(SoluteSetterType.Fertiliser, myUrineDeposition);
            }
        }

        /// <summary>Incorporate a fraction of surface OM material to the soil surface layer.</summary>
        /// <remarks>Assumes that trampling is proportional to the amount defoliated.</remarks>
        private void doTrampling(double fractionToIncorporate = 0.0)
        {
            if (DefoliatedWt > 0.0)
            {
                fractionToIncorporate = Math.Min(BiomassDefoliatedForMaximumLitterFraction/DefoliatedWt, MaximumLitterFractionToSoil);
                surfaceOM.Incorporate(fraction: fractionToIncorporate, depth: 100);
            }
        }

        // Auxiliary boolead for UI  - - - - - - - - - - - - - - - - - - - - - - - - - - - - - - - - -

        private bool automaticManagementAllowed
        { get { return AllowAutomaticManagement == yesNoAnswer.Yes; } }
        private bool isDefoliationTriggerAnInterval
        { get { return DefoliationTriggerType != DefoliationTriggerTypes.TargetStandingBiomass; } }
        private bool isTriggerNotFixedInterval
        { get { return DefoliationTriggerType != DefoliationTriggerTypes.FixedInterval; } }
        private bool isDefoliationTriggerAnAmount
        { get { return DefoliationTriggerType == DefoliationTriggerTypes.TargetStandingBiomass; } }
        private bool isAmountDMToRemove
        { get { return RemoveAmountType == DefoliateAmountTypes.DMToRemove; } }
        private bool suppressingDefoliationOnWindow
        { get { return SuppressDefoliationOnWindow == yesNoAnswer.Yes; } }
        private bool minimumIntervalEnforced
        { get { return isDefoliationTriggerAnAmount && (EnforceMinimumInterval == yesNoAnswer.Yes); } }
        private bool maximumIntervalEnforced
        { get { return isTriggerNotFixedInterval && (EnforceMaximumInterval == yesNoAnswer.Yes); } }
        private bool userDefinesDMFraction
        { get { return DMRemoveType == DMRemovalTypes.UserDefinedFraction; } }
        private bool userDefinesNFraction
        { get { return NRemoveType == NRemovalTypes.UserDefinedFraction; } }
        private bool returningAsDungUrine
        { get { return ReturnType == ReturnAsTypes.AsDungUrine; } }
        private bool nitrogenInDungIsProportion
        { get { return returningAsDungUrine && (NDungType == DungNContentTypes.DefineProportion); } }
        private bool nitrogenInDungIsCNRatio
        { get { return returningAsDungUrine && (NDungType == DungNContentTypes.DefineCNratio); } }
        private bool urineNAmountFixed
        { get { return SettingUrineNAmount == yesNoAnswer.Yes; } }
        private bool growthPeriodToBeGiven
        { get { return MeanGrowthPeriodType != MeanGrowthPeriodTypes.BetweenDefoliations; } }
        private bool consideringTrampling
        { get { return ConsiderTrampling == yesNoAnswer.Yes;} }

        // Auxiliary bits and pieces  - - - - - - - - - - - - - - - - - - - - - - - - - - - - - - - - -

        /// <summary>Flag for a positive or negative answer.</summary>
        public enum yesNoAnswer
        {
            /// <summary>Positive answer.</summary>
            Yes,
            /// <summary>Negative answer.</summary>
            No
        }

        /// <summary>Flag how defoliations will be triggered.</summary>
        public enum DefoliationTriggerTypes
        {
            /// <summary>Setting a fixed interval.</summary>
            FixedInterval,
            /// <summary>Setting a target (minimum) interval.</summary>
            TargetInterval,
            /// <summary>Setting a target (maximum) standing biomass.</summary>
            TargetStandingBiomass
        }

        /// <summary>How the DM amount given is interpreted.</summary>
        public enum DefoliateAmountTypes
        {
            /// <summary>Setting a DM amount to remove.</summary>
            DMToRemove,
            /// <summary>Setting the residual DM amount.</summary>
            ResidualDM
        }

        /// <summary>Fraction of defoliated DM to remove from field.</summary>
        public enum DMRemovalTypes
        {
            /// <summary>Remove all DM.</summary>
            RemoveAll,
            /// <summary>Remove no DM.</summary>
            RemoveNone,
            /// <summary>Remove a user-defined fraction.</summary>
            UserDefinedFraction,
            /// <summary>Remove a fraction based on plant digestibility.</summary>
            BasedOnDigestibility
        }

        /// <summary>Fraction of N in the defoliated material to remove from field.</summary>
        public enum NRemovalTypes
        {
            /// <summary>Remove all N.</summary>
            RemoveAll,
            /// <summary>Remove no N.</summary>
            RemoveNone,
            /// <summary>Remove a user-defined fraction.</summary>
            UserDefinedFraction,
            /// <summary>Remove a fraction equal to DM removed.</summary>
            ProportionalToDM
        }

        /// <summary>Define how the non-removed material is returned to the field.</summary>
        public enum ReturnAsTypes
        {
            /// <summary>Return plant material as residue.</summary>
            AsResidue,
            /// <summary>Return material as dung and urine.</summary>
            AsDungUrine
        }

        /// <summary>Define how the proportion of N in dung is defined.</summary>
        public enum DungNContentTypes
        {
            /// <summary>Define the proportion of N returned as dung.</summary>
            DefineProportion,
            /// <summary>Define the C:N of dung.</summary>
            DefineCNratio
        }

        /// <summary>Options for the period over which mean growth is computed.</summary>
        public enum MeanGrowthPeriodTypes
        {
            /// <summary>Compute over the period between defoliations.</summary>
            BetweenDefoliations,
            /// <summary>Compute over a fixed number of days.</summary>
            FixedPeriod,
            /// <summary>Compute over the period between defoliations, but limited to a maximum.</summary>
            BetweenDefoliationsOrMaxPeriod
        }
    }
}
```
            MicroClimate: a_interception=0; b_interception=1; c_interception=0; d_interception=0; SoilHeatFluxFraction=0.4; MinimumHeightDiffForNewLayer=0; NightInterceptionFraction=0.5; ReferenceHeight=2
            Irrigation
            Fertiliser
            SurfaceOrganicMatter: InitialResidueName=grass; InitialResidueType=grass; InitialResidueMass=500; InitialStandingFraction=0; InitialCPR=0; InitialCNR=40
            Soil TempletonPaparua: SoilType=Udic Haplustept (US),  Immature Pallic Soil (NZ); LocalName=Templeton Fine Sandy Loam; Site=LURDF; NearestTown=Lincoln; Region=Canterbury; Country=New Zealand; Latitude=0; Longitude=0; DataSource=Adapted based on data from the NZ National Soils Database
              Comments=Different references name the soil at the site as either Templeton or Paparua (very similar soils)
              Chemical: Thickness=[150, 150, 200, 250, 250, 500]; PH=[6, 6, 6, 6, 6, 6]; PHUnits=Water
              Physical
                Thickness  ParticleSizeSand  ParticleSizeSilt  ParticleSizeClay  Rocks  BD    AirDry  LL15   DUL    SAT    KS
                150        17.4              60.9              21.8              0      1.35  0.057   0.17   0.34   0.439  2913.761
                150        24.8              56.9              18.3              0      1.43  0.159   0.177  0.325  0.409  1052.63
                200        21                59.5              19.5              0      1.54  0.186   0.186  0.327  0.362  182.149
                250        37                52.6              10.3              0      1.54  0.132   0.132  0.251  0.358  1272.997
                250        43.6              46.9              9.5               0      1.48  0.116   0.116  0.24   0.365  1767.199
                500        24.2              59.3              16.6              0      1.41  0.138   0.138  0.273  0.39   586.553
                SoilCrop PlantainForageSoil: LL=[0.17, 0.177, 0.186, 0.132, 0.116, 0.138]; KL=[0.12, 0.11, 0.06, 0.03, 0.01, 0.01]; XF=[1, 1, 1, 1, 1, 1]
              WaterBalance SoilWater: SummerDate=1-Nov; SummerU=6; SummerCona=3.5; WinterDate=1-Apr; WinterU=3; WinterCona=1.5; DiffusConst=88; DiffusSlope=35; Salb=0.13; CN2Bare=73; CNRed=20; CNCov=0.8; PSIDul=-100; Thickness=[150, 150, 200, 250, 250, 500]; SWCON=[0.5, 0.41, 0.27, 0.39, 0.49, 0.42]
              Organic: FOMCNRatio=40; CarbonUnits=Total
                Thickness  Carbon  SoilCNRatio  FBiom  FInert  FOM
                150        2.6     11.3         0.08   0.4     650
                150        1.51    11.5         0.04   0.695   350
                200        0.4     12           0.03   0.845   175
                250        0.19    13           0.02   0.89    60
                250        0.22    14           0.01   0.96    15
                500        0.18    14           0.01   0.99    0
              Water: Thickness=[150, 150, 200, 250, 250, 500]; InitialValues=[0.34, 0.325, 0.327, 0.251, 0.24, 0.273]; FilledFromTop=true
              Nutrient
              Solute NO3: Thickness=[150, 150, 200, 250, 250, 500]; InitialValues=[5, 4, 1.5, 1.5, 1.5, 0.780142]; InitialValuesUnits=ppm; WaterTableConcentration=0; D0=0; DepthConstant=0; MaxDepthSoluteAccessible=0; RunoffEffectivenessAtMovingSolute=0; MaxEffectiveRunoff=0
              Solute NH4: Thickness=[150, 150, 200, 250, 250, 500]; InitialValues=[0.493827, 0.34965, 0.2, 0.2, 0.135135, 0.070922]; InitialValuesUnits=ppm; WaterTableConcentration=0; D0=0; DepthConstant=0; MaxDepthSoluteAccessible=0; RunoffEffectivenessAtMovingSolute=0; MaxEffectiveRunoff=0
              Solute Urea: Thickness=[150, 150, 200, 250, 250, 500]; InitialValues=[0, 0, 0, 0, 0, 0]; InitialValuesUnits=kg/ha; WaterTableConcentration=0; D0=0; DepthConstant=0; MaxDepthSoluteAccessible=0; RunoffEffectivenessAtMovingSolute=0; MaxEffectiveRunoff=0
              SoilTemperature Temperature: InteractionsPerDay=8
            Plant PlantainForage
            Report BaseReport: VariableNames=// variables defined in 'Replacements'; EventNames=[Clock].DoReport
            Report CumReport: VariableNames=// variables defined in 'Replacements'; EventNames=[Clock].DoReport
            Report CropReport: VariableNames=// variables defined in 'Replacements'; EventNames=[Clock].DoReport
            Report DiagnosisReport: VariableNames=// variables defined in 'Replacements'; EventNames=[Clock].DoReport
            Report ValidationReport: EventNames=[Clock].DoReport
              VariableNames:
                [Clock].Today as Date
                [Clock].Today.DayOfYear as DayOfYear
                [PlantainForage].Population as Population
                [PlantainForage].AboveGround.Wt as AboveGround.Wt
                [PlantainForage].Leaf.Live.NConc as Leaf.Live.NConc
                [PlantainForage].AboveGroundLive.NConc as AboveGroundLive.NConc
                [PlantainForage].Leaf.Height as PlantHeight
                [DefoliationManager].Script.HarvestedWt as HarvestedWt
                [DefoliationManager].Script.HarvestedN as HarvestedN
                Sum of ([DefoliationManager].Script.RemovedWt) from 1-Jul to [Clock].Today as CumulativeHarvestedWt
                Sum of ([DefoliationManager].Script.RemovedN) from 1-Jul to [Clock].Today as CumulativeHarvestedN
      Experiment FRNLRuakura
        Memo
          ###FRNL Ruakura###

          This simulation setup was based on field trials performed at DairyNZ's Scott Farm, in Ruakura, New Zealand, between 2014 and 2016.  The experiment was part of the FRNL (Forages for Reduced Nitrogen Leaching) program and the data is basically unpublished (references will be added when this come about).  Here only plots with pure plantain are used.
          The experiment consisted of six fertiliser treatments (N rates of 0, 50, 100, 200, 350 and 500 kg/ha/yr) in three replicates, and measurements comprised yield and quality indicators (here N content is used).
          Observed data supplied by Grant Edwards, Lincoln University.

          The soil at the experimental site was a Horotiu silt loam (an Orthic Allophanic soil; USDA: Typic Udivitrand), the parameters required were inferred using data from the New Zealand National Soils Database (Landcare Research).
          Weather data was obtained from nearby Ruakura weather station (NIWA).
        Factors
          Factor NRate: Specification=[NRate]
            Operations 0
            Operations 50
              2014-12-22  [Fertiliser].Apply(amount: 5, type: "UreaN", depth: 10)
              2015-01-19  [Fertiliser].Apply(amount: 5, type: "UreaN", depth: 10)
              2015-03-23  [Fertiliser].Apply(amount: 5, type: "UreaN", depth: 10)
              2015-05-01  [Fertiliser].Apply(amount: 5, type: "UreaN", depth: 10)
              2015-06-18  [Fertiliser].Apply(amount: 5, type: "UreaN", depth: 10)
              2015-09-09  [Fertiliser].Apply(amount: 5, type: "UreaN", depth: 10)
              2015-10-29  [Fertiliser].Apply(amount: 5, type: "UreaN", depth: 10)
              2015-10-09  [Fertiliser].Apply(amount: 5, type: "UreaN", depth: 10)
              2015-11-24  [Fertiliser].Apply(amount: 5, type: "UreaN", depth: 10)
              2015-12-17  [Fertiliser].Apply(amount: 5, type: "UreaN", depth: 10)
              2016-01-26  [Fertiliser].Apply(amount: 5, type: "UreaN", depth: 10)
              2016-04-12  [Fertiliser].Apply(amount: 5, type: "UreaN", depth: 10)
              2016-06-30  [Fertiliser].Apply(amount: 5, type: "UreaN", depth: 10)
            Operations 100
              2014-12-22  [Fertiliser].Apply(amount: 10, type: "UreaN", depth: 10)
              2015-01-19  [Fertiliser].Apply(amount: 10, type: "UreaN", depth: 10)
              2015-03-23  [Fertiliser].Apply(amount: 10, type: "UreaN", depth: 10)
              2015-05-01  [Fertiliser].Apply(amount: 10, type: "UreaN", depth: 10)
              2015-06-18  [Fertiliser].Apply(amount: 10, type: "UreaN", depth: 10)
              2015-09-09  [Fertiliser].Apply(amount: 10, type: "UreaN", depth: 10)
              2015-10-09  [Fertiliser].Apply(amount: 10, type: "UreaN", depth: 10)
              2015-10-29  [Fertiliser].Apply(amount: 10, type: "UreaN", depth: 10)
              2015-11-24  [Fertiliser].Apply(amount: 10, type: "UreaN", depth: 10)
              2015-12-17  [Fertiliser].Apply(amount: 10, type: "UreaN", depth: 10)
              2016-01-26  [Fertiliser].Apply(amount: 10, type: "UreaN", depth: 10)
              2016-04-12  [Fertiliser].Apply(amount: 10, type: "UreaN", depth: 10)
              2016-06-30  [Fertiliser].Apply(amount: 10, type: "UreaN", depth: 10)
            Operations 200
              2014-12-22  [Fertiliser].Apply(amount: 20, type: "UreaN", depth: 10)
              2015-01-19  [Fertiliser].Apply(amount: 20, type: "UreaN", depth: 10)
              2015-03-23  [Fertiliser].Apply(amount: 20, type: "UreaN", depth: 10)
              2015-05-01  [Fertiliser].Apply(amount: 20, type: "UreaN", depth: 10)
              2015-06-18  [Fertiliser].Apply(amount: 20, type: "UreaN", depth: 10)
              2015-09-09  [Fertiliser].Apply(amount: 20, type: "UreaN", depth: 10)
              2015-10-09  [Fertiliser].Apply(amount: 20, type: "UreaN", depth: 10)
              2015-10-29  [Fertiliser].Apply(amount: 20, type: "UreaN", depth: 10)
              2015-11-24  [Fertiliser].Apply(amount: 20, type: "UreaN", depth: 10)
              2015-12-17  [Fertiliser].Apply(amount: 20, type: "UreaN", depth: 10)
              2016-01-26  [Fertiliser].Apply(amount: 20, type: "UreaN", depth: 10)
              2016-04-12  [Fertiliser].Apply(amount: 20, type: "UreaN", depth: 10)
              2016-06-30  [Fertiliser].Apply(amount: 20, type: "UreaN", depth: 10)
            Operations 350
              2014-12-22  [Fertiliser].Apply(amount: 35, type: "UreaN", depth: 10)
              2015-01-19  [Fertiliser].Apply(amount: 35, type: "UreaN", depth: 10)
              2015-03-23  [Fertiliser].Apply(amount: 35, type: "UreaN", depth: 10)
              2015-05-01  [Fertiliser].Apply(amount: 35, type: "UreaN", depth: 10)
              2015-06-18  [Fertiliser].Apply(amount: 35, type: "UreaN", depth: 10)
              2015-09-09  [Fertiliser].Apply(amount: 35, type: "UreaN", depth: 10)
              2015-10-09  [Fertiliser].Apply(amount: 35, type: "UreaN", depth: 10)
              2015-10-29  [Fertiliser].Apply(amount: 35, type: "UreaN", depth: 10)
              2015-11-24  [Fertiliser].Apply(amount: 35, type: "UreaN", depth: 10)
              2015-12-17  [Fertiliser].Apply(amount: 35, type: "UreaN", depth: 10)
              2016-01-26  [Fertiliser].Apply(amount: 35, type: "UreaN", depth: 10)
              2016-04-12  [Fertiliser].Apply(amount: 35, type: "UreaN", depth: 10)
              2016-06-30  [Fertiliser].Apply(amount: 35, type: "UreaN", depth: 10)
            Operations 500
              2014-12-22  [Fertiliser].Apply(amount: 50, type: "UreaN", depth: 10)
              2015-01-19  [Fertiliser].Apply(amount: 50, type: "UreaN", depth: 10)
              2015-03-23  [Fertiliser].Apply(amount: 50, type: "UreaN", depth: 10)
              2015-05-01  [Fertiliser].Apply(amount: 50, type: "UreaN", depth: 10)
              2015-06-18  [Fertiliser].Apply(amount: 50, type: "UreaN", depth: 10)
              2015-09-09  [Fertiliser].Apply(amount: 50, type: "UreaN", depth: 10)
              2015-10-09  [Fertiliser].Apply(amount: 50, type: "UreaN", depth: 10)
              2015-10-29  [Fertiliser].Apply(amount: 50, type: "UreaN", depth: 10)
              2015-11-24  [Fertiliser].Apply(amount: 50, type: "UreaN", depth: 10)
              2015-12-17  [Fertiliser].Apply(amount: 50, type: "UreaN", depth: 10)
              2016-01-26  [Fertiliser].Apply(amount: 50, type: "UreaN", depth: 10)
              2016-04-12  [Fertiliser].Apply(amount: 50, type: "UreaN", depth: 10)
              2016-06-30  [Fertiliser].Apply(amount: 50, type: "UreaN", depth: 10)
        Simulation FRNLRuakura
          Clock: Start=2014-06-01; End=2016-06-30
          Weather: FileName=Ruakura.met
          Summary summaryfile
          SoilArbitrator Soil Arbitrator
          Forages: same as Validation.New Zealand.FRNLLincoln.FRNLLincoln.Forages
          Zone Field: Area=1; Slope=0; AspectAngle=0; Altitude=50
            Folder Management
              Operations Sowing
                2014-10-10  [PlantainForage].Sow(population: 200, cultivar: "Tonic", depth: 10, rowSpacing: 150)
              Operations NRate
              Operations BaseFertiliser
                2014-10-13  [Fertiliser].Apply(amount: 26.4, type: "UreaN", depth: 10)
                2014-12-23  [Fertiliser].Apply(amount: 3.9, type: "UreaN", depth: 10)
              Operations DefoliationSchedule
                2014-12-16  [DefoliationManager].Script.Defoliate(amountDM: 60, amountType: "ResidualDM", duration: 1)
                2015-01-14  [DefoliationManager].Script.Defoliate(amountDM: 60, amountType: "ResidualDM", duration: 1)
                2015-03-18  [DefoliationManager].Script.Defoliate(amountDM: 60, amountType: "ResidualDM", duration: 1)
                2015-04-28  [DefoliationManager].Script.Defoliate(amountDM: 60, amountType: "ResidualDM", duration: 1)
                2015-06-17  [DefoliationManager].Script.Defoliate(amountDM: 60, amountType: "ResidualDM", duration: 1)
                2015-09-07  [DefoliationManager].Script.Defoliate(amountDM: 60, amountType: "ResidualDM", duration: 1)
                2015-10-07  [DefoliationManager].Script.Defoliate(amountDM: 60, amountType: "ResidualDM", duration: 1)
                2015-10-28  [DefoliationManager].Script.Defoliate(amountDM: 60, amountType: "ResidualDM", duration: 1)
                2015-11-23  [DefoliationManager].Script.Defoliate(amountDM: 60, amountType: "ResidualDM", duration: 1)
                2015-12-16  [DefoliationManager].Script.Defoliate(amountDM: 60, amountType: "ResidualDM", duration: 1)
                2016-01-25  [DefoliationManager].Script.Defoliate(amountDM: 60, amountType: "ResidualDM", duration: 1)
                2016-04-11  [DefoliationManager].Script.Defoliate(amountDM: 60, amountType: "ResidualDM", duration: 1)
                2016-06-29  [DefoliationManager].Script.Defoliate(amountDM: 60, amountType: "ResidualDM", duration: 1)
                2016-09-21  [DefoliationManager].Script.Defoliate(amountDM: 60, amountType: "ResidualDM", duration: 1)
              Manager DefoliationManager: same as Validation.New Zealand.FRNLLincoln.FRNLLincoln.Field.Management.DefoliationManager
            MicroClimate: a_interception=0; b_interception=1; c_interception=0; d_interception=0; SoilHeatFluxFraction=0.4; MinimumHeightDiffForNewLayer=0; NightInterceptionFraction=0.5; ReferenceHeight=2
            Irrigation
            Fertiliser
            SurfaceOrganicMatter: InitialResidueName=grass; InitialResidueType=grass; InitialResidueMass=500; InitialStandingFraction=0; InitialCPR=0; InitialCNR=40
            Soil HorotiuSoil: SoilType=Typic Udivitrand (US), Typic Orthic, Allophanic Soil (NZ); LocalName=Horotiu silt loam; Site=Ruakura; NearestTown=Hamilton; Region=Waikato; Country=New Zealand; Latitude=0; Longitude=0
              DataSource=Adapted based on data from the NZ National Soils Database and Close et al, 2003
              Chemical: Thickness=[200, 200, 130, 140, 380, 230, 220]; PH=[6, 6, 6, 6, 6, 6, 6]; PHUnits=Water
              Physical
                Thickness  ParticleSizeSand  ParticleSizeSilt  ParticleSizeClay  Rocks  BD    AirDry  LL15   DUL    SAT    KS
                200        47                33                20                0      0.88  0.114   0.228  0.373  0.581  553
                200        65                17                19                0      0.85  0.209   0.22   0.34   0.609  5083
                130        76                13                11                0      1.03  0.182   0.182  0.323  0.54   8353
                140        84                10                7                 0      1.11  0.15    0.15   0.282  0.5    13589
                380        88                8                 5                 0      1.11  0.142   0.142  0.2    0.5    38963
                230        91                6                 3                 4      1.03  0.103   0.103  0.16   0.446  45280
                220        94                5                 1                 25     1.03  0.08    0.08   0.13   0.37   53606
                SoilCrop PlantainForageSoil: LL=[0.228, 0.22, 0.182, 0.15, 0.142, 0.103, 0.08]; KL=[0.1, 0.08, 0.05, 0.02, 0.01, 0.01, 0]; XF=[1, 1, 1, 1, 1, 1, 0.5]
              WaterBalance SoilWater: SummerDate=1-Nov; SummerU=6; SummerCona=3.5; WinterDate=1-Apr; WinterU=3; WinterCona=1.5; DiffusConst=88; DiffusSlope=35; Salb=0.13; CN2Bare=70; CNRed=23; CNCov=0.8; PSIDul=-100; Thickness=[200, 200, 130, 140, 380, 230, 220]; SWCON=[0.55, 0.6, 0.7, 0.7, 0.75, 0.8, 0.8]
              Organic: FOMCNRatio=40; CarbonUnits=Total
                Thickness  Carbon  SoilCNRatio  FBiom  FInert  FOM
                200        8       12           0.07   0.5     750
                200        2       12.2         0.035  0.63    340
                130        0.93    12.5         0.025  0.75    90
                140        0.43    12.6         0.02   0.85    45
                380        0.13    13           0.01   0.93    25
                230        0.1     13           0.01   0.98    0
                220        0.07    13           0.01   0.99    0
              Water: Thickness=[200, 200, 130, 140, 380, 230, 220]; InitialValues=[0.373, 0.34, 0.323, 0.282, 0.2, 0.16, 0.13]; FilledFromTop=false
              Nutrient
              Solute NO3: Thickness=[200, 200, 130, 140, 380, 230, 220]; InitialValues=[15, 10, 5, 5, 4.47368, 1, 1]; InitialValuesUnits=ppm; WaterTableConcentration=0; D0=0; DepthConstant=0; MaxDepthSoluteAccessible=0; RunoffEffectivenessAtMovingSolute=0; MaxEffectiveRunoff=0
              Solute NH4: Thickness=[200, 200, 130, 140, 380, 230, 220]; InitialValues=[0.5, 0.2, 0.093, 0.093, 0.093, 0.093, 0.093]; InitialValuesUnits=ppm; WaterTableConcentration=0; D0=0; DepthConstant=0; MaxDepthSoluteAccessible=0; RunoffEffectivenessAtMovingSolute=0; MaxEffectiveRunoff=0
              Solute Urea: Thickness=[200, 200, 130, 140, 380, 230, 220]; InitialValues=[0, 0, 0, 0, 0, 0, 0]; InitialValuesUnits=kg/ha; WaterTableConcentration=0; D0=0; DepthConstant=0; MaxDepthSoluteAccessible=0; RunoffEffectivenessAtMovingSolute=0; MaxEffectiveRunoff=0
              SoilTemperature Temperature: InteractionsPerDay=8
            Plant PlantainForage
            Report BaseReport: VariableNames=// variables defined in 'Replacements'; EventNames=[Clock].DoReport
            Report CumReport: VariableNames=// variables defined in 'Replacements'; EventNames=[Clock].DoReport
            Report CropReport: VariableNames=// variables defined in 'Replacements'; EventNames=[Clock].DoReport
            Report DiagnosisReport: VariableNames=// variables defined in 'Replacements'; EventNames=[Clock].DoReport
            Report ValidationReport: same as Validation.New Zealand.FRNLLincoln.FRNLLincoln.Field.ValidationReport
      Experiment ScottFarmFD902
        Memo
          This simulation was setup based on a defoliation trial at Scott farm, Hamilton, New Zealand, run from 2010 to 2012 by DairyNZ.  The study investigated the effect of cut height (which define rotation length) and residual height on chicory and plantain growth.  The treatments consisted of trigerring cuts when the sward reached target heights of 150, 250, 350, and 450 mm, in factorial combination with two residual heights, 30-50 or 60-80 mm.  Harvest was avoided over winter.  Note that not always the target height was reached.
          Trial plots were sown with plantain, cultivar '*Ceres Tonic*' (at 10 kg/ha), after previous pasture was sprayed with herbicide and conventionally drilled.  Irrigation was applied in the first year and fertiliser was applied over summer.  Results reported include biomass yield, botanical composition (presence of weeds), plant density, leaf area, and light interception (the later two only during one growing period - between two cuts).

          References:
          Lee, J.M.;  Hemmingson, N.R.; Minnee, E.M.K.; Clark, C.E.F. 2015. Management strategies for chicory (Cichorium intybus) and plantain (Plantago lanceolata): impact on dry matter yield, nutritive characteristics and plant density. Crop and Pasture Science, 66, 168–183.
        Factors
          Factor Defoliation: Specification=[DefoliationSchedule]
            Operations 15To4
              2010-12-13  [DefoliationManager].Script.Defoliate(amountDM: 30, amountType: "ResidualDM", duration: 1)
              2011-01-03  [DefoliationManager].Script.Defoliate(amountDM: 30, amountType: "ResidualDM", duration: 1)
              2011-01-20  [DefoliationManager].Script.Defoliate(amountDM: 30, amountType: "ResidualDM", duration: 1)
              2011-01-27  [DefoliationManager].Script.Defoliate(amountDM: 30, amountType: "ResidualDM", duration: 1)
              2011-02-10  [DefoliationManager].Script.Defoliate(amountDM: 30, amountType: "ResidualDM", duration: 1)
              2011-02-24  [DefoliationManager].Script.Defoliate(amountDM: 30, amountType: "ResidualDM", duration: 1)
              2011-03-10  [DefoliationManager].Script.Defoliate(amountDM: 30, amountType: "ResidualDM", duration: 1)
              2011-03-24  [DefoliationManager].Script.Defoliate(amountDM: 30, amountType: "ResidualDM", duration: 1)
              2011-04-07  [DefoliationManager].Script.Defoliate(amountDM: 30, amountType: "ResidualDM", duration: 1)
              2011-04-21  [DefoliationManager].Script.Defoliate(amountDM: 30, amountType: "ResidualDM", duration: 1)
              2011-05-05  [DefoliationManager].Script.Defoliate(amountDM: 30, amountType: "ResidualDM", duration: 1)
              2011-05-27  [DefoliationManager].Script.Defoliate(amountDM: 30, amountType: "ResidualDM", duration: 1)
              2011-06-16  [DefoliationManager].Script.Defoliate(amountDM: 30, amountType: "ResidualDM", duration: 1)
              2011-07-21  [DefoliationManager].Script.Defoliate(amountDM: 30, amountType: "ResidualDM", duration: 1)
              2011-08-25  [DefoliationManager].Script.Defoliate(amountDM: 30, amountType: "ResidualDM", duration: 1)
              2011-10-06  [DefoliationManager].Script.Defoliate(amountDM: 30, amountType: "ResidualDM", duration: 1)
              2011-11-03  [DefoliationManager].Script.Defoliate(amountDM: 30, amountType: "ResidualDM", duration: 1)
              2011-11-17  [DefoliationManager].Script.Defoliate(amountDM: 30, amountType: "ResidualDM", duration: 1)
              2011-12-08  [DefoliationManager].Script.Defoliate(amountDM: 30, amountType: "ResidualDM", duration: 1)
              2011-12-22  [DefoliationManager].Script.Defoliate(amountDM: 30, amountType: "ResidualDM", duration: 1)
              2012-01-12  [DefoliationManager].Script.Defoliate(amountDM: 30, amountType: "ResidualDM", duration: 1)
              2012-01-26  [DefoliationManager].Script.Defoliate(amountDM: 30, amountType: "ResidualDM", duration: 1)
              2012-02-16  [DefoliationManager].Script.Defoliate(amountDM: 30, amountType: "ResidualDM", duration: 1)
              2012-03-09  [DefoliationManager].Script.Defoliate(amountDM: 30, amountType: "ResidualDM", duration: 1)
              2012-03-29  [DefoliationManager].Script.Defoliate(amountDM: 30, amountType: "ResidualDM", duration: 1)
              2012-04-19  [DefoliationManager].Script.Defoliate(amountDM: 30, amountType: "ResidualDM", duration: 1)
              2012-05-31  [DefoliationManager].Script.Defoliate(amountDM: 30, amountType: "ResidualDM", duration: 1)
            Operations 15To7
              2010-12-13  [DefoliationManager].Script.Defoliate(amountDM: 50, amountType: "ResidualDM", duration: 1)
              2011-01-03  [DefoliationManager].Script.Defoliate(amountDM: 50, amountType: "ResidualDM", duration: 1)
              2011-01-20  [DefoliationManager].Script.Defoliate(amountDM: 50, amountType: "ResidualDM", duration: 1)
              2011-01-27  [DefoliationManager].Script.Defoliate(amountDM: 50, amountType: "ResidualDM", duration: 1)
              2011-02-03  [DefoliationManager].Script.Defoliate(amountDM: 50, amountType: "ResidualDM", duration: 1)
              2011-02-10  [DefoliationManager].Script.Defoliate(amountDM: 50, amountType: "ResidualDM", duration: 1)
              2011-02-24  [DefoliationManager].Script.Defoliate(amountDM: 50, amountType: "ResidualDM", duration: 1)
              2011-03-10  [DefoliationManager].Script.Defoliate(amountDM: 50, amountType: "ResidualDM", duration: 1)
              2011-03-24  [DefoliationManager].Script.Defoliate(amountDM: 50, amountType: "ResidualDM", duration: 1)
              2011-04-07  [DefoliationManager].Script.Defoliate(amountDM: 50, amountType: "ResidualDM", duration: 1)
              2011-04-21  [DefoliationManager].Script.Defoliate(amountDM: 50, amountType: "ResidualDM", duration: 1)
              2011-05-05  [DefoliationManager].Script.Defoliate(amountDM: 50, amountType: "ResidualDM", duration: 1)
              2011-05-27  [DefoliationManager].Script.Defoliate(amountDM: 50, amountType: "ResidualDM", duration: 1)
              2011-06-16  [DefoliationManager].Script.Defoliate(amountDM: 50, amountType: "ResidualDM", duration: 1)
              2011-07-21  [DefoliationManager].Script.Defoliate(amountDM: 50, amountType: "ResidualDM", duration: 1)
              2011-08-25  [DefoliationManager].Script.Defoliate(amountDM: 50, amountType: "ResidualDM", duration: 1)
              2011-10-06  [DefoliationManager].Script.Defoliate(amountDM: 50, amountType: "ResidualDM", duration: 1)
              2011-11-03  [DefoliationManager].Script.Defoliate(amountDM: 50, amountType: "ResidualDM", duration: 1)
              2011-11-17  [DefoliationManager].Script.Defoliate(amountDM: 50, amountType: "ResidualDM", duration: 1)
              2011-12-08  [DefoliationManager].Script.Defoliate(amountDM: 50, amountType: "ResidualDM", duration: 1)
              2011-12-22  [DefoliationManager].Script.Defoliate(amountDM: 50, amountType: "ResidualDM", duration: 1)
              2012-01-12  [DefoliationManager].Script.Defoliate(amountDM: 50, amountType: "ResidualDM", duration: 1)
              2012-01-26  [DefoliationManager].Script.Defoliate(amountDM: 50, amountType: "ResidualDM", duration: 1)
              2012-02-16  [DefoliationManager].Script.Defoliate(amountDM: 50, amountType: "ResidualDM", duration: 1)
              2012-03-09  [DefoliationManager].Script.Defoliate(amountDM: 50, amountType: "ResidualDM", duration: 1)
              2012-03-29  [DefoliationManager].Script.Defoliate(amountDM: 50, amountType: "ResidualDM", duration: 1)
              2012-04-19  [DefoliationManager].Script.Defoliate(amountDM: 50, amountType: "ResidualDM", duration: 1)
              2012-05-31  [DefoliationManager].Script.Defoliate(amountDM: 50, amountType: "ResidualDM", duration: 1)
            Operations 25To4
              2010-12-13  [DefoliationManager].Script.Defoliate(amountDM: 30, amountType: "ResidualDM", duration: 1)
              2011-01-03  [DefoliationManager].Script.Defoliate(amountDM: 30, amountType: "ResidualDM", duration: 1)
              2011-01-20  [DefoliationManager].Script.Defoliate(amountDM: 30, amountType: "ResidualDM", duration: 1)
              2011-02-03  [DefoliationManager].Script.Defoliate(amountDM: 30, amountType: "ResidualDM", duration: 1)
              2011-02-16  [DefoliationManager].Script.Defoliate(amountDM: 30, amountType: "ResidualDM", duration: 1)
              2011-03-10  [DefoliationManager].Script.Defoliate(amountDM: 30, amountType: "ResidualDM", duration: 1)
              2011-03-24  [DefoliationManager].Script.Defoliate(amountDM: 30, amountType: "ResidualDM", duration: 1)
              2011-04-14  [DefoliationManager].Script.Defoliate(amountDM: 30, amountType: "ResidualDM", duration: 1)
              2011-05-12  [DefoliationManager].Script.Defoliate(amountDM: 30, amountType: "ResidualDM", duration: 1)
              2011-06-23  [DefoliationManager].Script.Defoliate(amountDM: 30, amountType: "ResidualDM", duration: 1)
              2011-10-13  [DefoliationManager].Script.Defoliate(amountDM: 30, amountType: "ResidualDM", duration: 1)
              2011-11-17  [DefoliationManager].Script.Defoliate(amountDM: 30, amountType: "ResidualDM", duration: 1)
              2011-12-22  [DefoliationManager].Script.Defoliate(amountDM: 30, amountType: "ResidualDM", duration: 1)
              2012-01-12  [DefoliationManager].Script.Defoliate(amountDM: 30, amountType: "ResidualDM", duration: 1)
              2012-02-09  [DefoliationManager].Script.Defoliate(amountDM: 30, amountType: "ResidualDM", duration: 1)
              2012-03-15  [DefoliationManager].Script.Defoliate(amountDM: 30, amountType: "ResidualDM", duration: 1)
              2012-04-26  [DefoliationManager].Script.Defoliate(amountDM: 30, amountType: "ResidualDM", duration: 1)
              2012-05-31  [DefoliationManager].Script.Defoliate(amountDM: 30, amountType: "ResidualDM", duration: 1)
            Operations 25To7
              2010-12-13  [DefoliationManager].Script.Defoliate(amountDM: 50, amountType: "ResidualDM", duration: 1)
              2011-01-03  [DefoliationManager].Script.Defoliate(amountDM: 50, amountType: "ResidualDM", duration: 1)
              2011-01-20  [DefoliationManager].Script.Defoliate(amountDM: 50, amountType: "ResidualDM", duration: 1)
              2011-02-03  [DefoliationManager].Script.Defoliate(amountDM: 50, amountType: "ResidualDM", duration: 1)
              2011-02-16  [DefoliationManager].Script.Defoliate(amountDM: 50, amountType: "ResidualDM", duration: 1)
              2011-03-10  [DefoliationManager].Script.Defoliate(amountDM: 50, amountType: "ResidualDM", duration: 1)
              2011-03-24  [DefoliationManager].Script.Defoliate(amountDM: 50, amountType: "ResidualDM", duration: 1)
              2011-04-14  [DefoliationManager].Script.Defoliate(amountDM: 50, amountType: "ResidualDM", duration: 1)
              2011-05-12  [DefoliationManager].Script.Defoliate(amountDM: 50, amountType: "ResidualDM", duration: 1)
              2011-06-23  [DefoliationManager].Script.Defoliate(amountDM: 50, amountType: "ResidualDM", duration: 1)
              2011-10-13  [DefoliationManager].Script.Defoliate(amountDM: 50, amountType: "ResidualDM", duration: 1)
              2011-11-17  [DefoliationManager].Script.Defoliate(amountDM: 50, amountType: "ResidualDM", duration: 1)
              2011-12-22  [DefoliationManager].Script.Defoliate(amountDM: 50, amountType: "ResidualDM", duration: 1)
              2012-01-12  [DefoliationManager].Script.Defoliate(amountDM: 50, amountType: "ResidualDM", duration: 1)
              2012-02-09  [DefoliationManager].Script.Defoliate(amountDM: 50, amountType: "ResidualDM", duration: 1)
              2012-03-15  [DefoliationManager].Script.Defoliate(amountDM: 50, amountType: "ResidualDM", duration: 1)
              2012-04-26  [DefoliationManager].Script.Defoliate(amountDM: 50, amountType: "ResidualDM", duration: 1)
              2012-05-31  [DefoliationManager].Script.Defoliate(amountDM: 50, amountType: "ResidualDM", duration: 1)
            Operations 35To4
              2010-12-13  [DefoliationManager].Script.Defoliate(amountDM: 30, amountType: "ResidualDM", duration: 1)
              2011-01-03  [DefoliationManager].Script.Defoliate(amountDM: 30, amountType: "ResidualDM", duration: 1)
              2011-01-20  [DefoliationManager].Script.Defoliate(amountDM: 30, amountType: "ResidualDM", duration: 1)
              2011-02-10  [DefoliationManager].Script.Defoliate(amountDM: 30, amountType: "ResidualDM", duration: 1)
              2011-03-17  [DefoliationManager].Script.Defoliate(amountDM: 30, amountType: "ResidualDM", duration: 1)
              2011-04-28  [DefoliationManager].Script.Defoliate(amountDM: 30, amountType: "ResidualDM", duration: 1)
              2011-06-23  [DefoliationManager].Script.Defoliate(amountDM: 30, amountType: "ResidualDM", duration: 1)
              2011-10-20  [DefoliationManager].Script.Defoliate(amountDM: 30, amountType: "ResidualDM", duration: 1)
              2011-11-24  [DefoliationManager].Script.Defoliate(amountDM: 30, amountType: "ResidualDM", duration: 1)
              2012-01-05  [DefoliationManager].Script.Defoliate(amountDM: 30, amountType: "ResidualDM", duration: 1)
              2012-02-09  [DefoliationManager].Script.Defoliate(amountDM: 30, amountType: "ResidualDM", duration: 1)
              2012-03-15  [DefoliationManager].Script.Defoliate(amountDM: 30, amountType: "ResidualDM", duration: 1)
              2012-04-26  [DefoliationManager].Script.Defoliate(amountDM: 30, amountType: "ResidualDM", duration: 1)
              2012-05-31  [DefoliationManager].Script.Defoliate(amountDM: 30, amountType: "ResidualDM", duration: 1)
            Operations 35To7
              2010-12-13  [DefoliationManager].Script.Defoliate(amountDM: 50, amountType: "ResidualDM", duration: 1)
              2011-01-03  [DefoliationManager].Script.Defoliate(amountDM: 50, amountType: "ResidualDM", duration: 1)
              2011-01-20  [DefoliationManager].Script.Defoliate(amountDM: 50, amountType: "ResidualDM", duration: 1)
              2011-02-10  [DefoliationManager].Script.Defoliate(amountDM: 50, amountType: "ResidualDM", duration: 1)
              2011-03-17  [DefoliationManager].Script.Defoliate(amountDM: 50, amountType: "ResidualDM", duration: 1)
              2011-04-28  [DefoliationManager].Script.Defoliate(amountDM: 50, amountType: "ResidualDM", duration: 1)
              2011-06-23  [DefoliationManager].Script.Defoliate(amountDM: 50, amountType: "ResidualDM", duration: 1)
              2011-10-20  [DefoliationManager].Script.Defoliate(amountDM: 50, amountType: "ResidualDM", duration: 1)
              2011-11-24  [DefoliationManager].Script.Defoliate(amountDM: 50, amountType: "ResidualDM", duration: 1)
              2012-01-05  [DefoliationManager].Script.Defoliate(amountDM: 50, amountType: "ResidualDM", duration: 1)
              2012-02-09  [DefoliationManager].Script.Defoliate(amountDM: 50, amountType: "ResidualDM", duration: 1)
              2012-03-15  [DefoliationManager].Script.Defoliate(amountDM: 50, amountType: "ResidualDM", duration: 1)
              2012-04-26  [DefoliationManager].Script.Defoliate(amountDM: 50, amountType: "ResidualDM", duration: 1)
              2012-05-31  [DefoliationManager].Script.Defoliate(amountDM: 50, amountType: "ResidualDM", duration: 1)
            Operations 45To4
              2010-12-13  [DefoliationManager].Script.Defoliate(amountDM: 30, amountType: "ResidualDM", duration: 1)
              2011-01-03  [DefoliationManager].Script.Defoliate(amountDM: 30, amountType: "ResidualDM", duration: 1)
              2011-01-20  [DefoliationManager].Script.Defoliate(amountDM: 30, amountType: "ResidualDM", duration: 1)
              2011-02-24  [DefoliationManager].Script.Defoliate(amountDM: 30, amountType: "ResidualDM", duration: 1)
              2011-03-31  [DefoliationManager].Script.Defoliate(amountDM: 30, amountType: "ResidualDM", duration: 1)
              2011-05-27  [DefoliationManager].Script.Defoliate(amountDM: 30, amountType: "ResidualDM", duration: 1)
              2011-10-27  [DefoliationManager].Script.Defoliate(amountDM: 30, amountType: "ResidualDM", duration: 1)
              2011-12-01  [DefoliationManager].Script.Defoliate(amountDM: 30, amountType: "ResidualDM", duration: 1)
              2012-01-19  [DefoliationManager].Script.Defoliate(amountDM: 30, amountType: "ResidualDM", duration: 1)
              2012-03-15  [DefoliationManager].Script.Defoliate(amountDM: 30, amountType: "ResidualDM", duration: 1)
              2012-05-03  [DefoliationManager].Script.Defoliate(amountDM: 30, amountType: "ResidualDM", duration: 1)
              2012-05-31  [DefoliationManager].Script.Defoliate(amountDM: 30, amountType: "ResidualDM", duration: 1)
            Operations 45To7
              2010-12-13  [DefoliationManager].Script.Defoliate(amountDM: 50, amountType: "ResidualDM", duration: 1)
              2011-01-03  [DefoliationManager].Script.Defoliate(amountDM: 50, amountType: "ResidualDM", duration: 1)
              2011-01-20  [DefoliationManager].Script.Defoliate(amountDM: 50, amountType: "ResidualDM", duration: 1)
              2011-02-24  [DefoliationManager].Script.Defoliate(amountDM: 50, amountType: "ResidualDM", duration: 1)
              2011-03-31  [DefoliationManager].Script.Defoliate(amountDM: 50, amountType: "ResidualDM", duration: 1)
              2011-05-27  [DefoliationManager].Script.Defoliate(amountDM: 50, amountType: "ResidualDM", duration: 1)
              2011-10-27  [DefoliationManager].Script.Defoliate(amountDM: 50, amountType: "ResidualDM", duration: 1)
              2011-12-01  [DefoliationManager].Script.Defoliate(amountDM: 50, amountType: "ResidualDM", duration: 1)
              2012-01-19  [DefoliationManager].Script.Defoliate(amountDM: 50, amountType: "ResidualDM", duration: 1)
              2012-03-15  [DefoliationManager].Script.Defoliate(amountDM: 50, amountType: "ResidualDM", duration: 1)
              2012-05-03  [DefoliationManager].Script.Defoliate(amountDM: 50, amountType: "ResidualDM", duration: 1)
              2012-05-31  [DefoliationManager].Script.Defoliate(amountDM: 50, amountType: "ResidualDM", duration: 1)
        Simulation FD902
          Clock: Start=2010-06-01; End=2012-05-31
          Weather: FileName=Ruakura.met
          SoilArbitrator Soil Arbitrator
          Summary summaryfile
          Forages: same as Validation.New Zealand.FRNLLincoln.FRNLLincoln.Forages
          Zone Field: Area=1; Slope=0; AspectAngle=0; Altitude=50
            Folder Management
              Operations Sowing
                2010-10-13  [PlantainForage].Sow(population: 200, cultivar: "Tonic", depth: 10, rowSpacing: 150)
              Operations FertiliserSchedule
                2010-10-04  [Fertiliser].Apply(amount: 35.2, type: "UreaN", depth: 50)
                2010-12-20  [Fertiliser].Apply(amount: 39.1, type: "UreaN", depth: 50)
                2011-01-27  [Fertiliser].Apply(amount: 39.1, type: "UreaN", depth: 50)
                2011-03-03  [Fertiliser].Apply(amount: 39.1, type: "UreaN", depth: 50)
                2011-04-08  [Fertiliser].Apply(amount: 39.1, type: "UreaN", depth: 50)
                2011-05-30  [Fertiliser].Apply(amount: 39.1, type: "UreaN", depth: 50)
                2011-10-28  [Fertiliser].Apply(amount: 27.6, type: "UreaN", depth: 50)
                2011-12-22  [Fertiliser].Apply(amount: 27.6, type: "UreaN", depth: 50)
                2012-02-02  [Fertiliser].Apply(amount: 27.6, type: "UreaN", depth: 50)
                2012-03-22  [Fertiliser].Apply(amount: 27.6, type: "UreaN", depth: 50)
              Operations IrrigationSchedule
                2010-11-30  [Irrigation].Apply(amount: 25.4)
                2010-12-10  [Irrigation].Apply(amount: 25.2)
                2010-12-14  [Irrigation].Apply(amount: 9.2)
                2010-12-15  [Irrigation].Apply(amount: 29.8)
                2011-01-05  [Irrigation].Apply(amount: 41.2)
                2011-02-01  [Irrigation].Apply(amount: 55.0)
                2011-02-04  [Irrigation].Apply(amount: 13.7)
                2011-02-11  [Irrigation].Apply(amount: 36.6)
                2011-02-23  [Irrigation].Apply(amount: 18.3)
                2011-03-04  [Irrigation].Apply(amount: 36.6)
                2011-03-13  [Irrigation].Apply(amount: 4.6)
                2011-03-17  [Irrigation].Apply(amount: 36.6)
                2011-11-30  [Irrigation].Apply(amount: 36.6)
              Operations DefoliationSchedule
                2011-01-13  [DefoliationManager].Script.Defoliate(amountDM: 50, amountType: "ResidualDM", duration: 1)
              Manager DefoliationManager
                AllowAutomaticManagement = No
                DefoliationRotationStartDate = 01/01/1900 00:00:00
                DefoliationRotationEndDate = 12/31/2100 00:00:00
                DefoliationTriggerType = TargetStandingBiomass
                IntervalBetweenDefoliations = 15
                TargetStandingBiomass = 250
                DurationOfEachDefoliation = 1
                RemoveAmountType = ResidualDM
                AmountForEachDefoliation = 125
                MininumAmountToDefoliate = 75
                SuppressDefoliationOnWindow = No
                NoDefoliationWindowStartDate = 1-Jun
                NoDefoliationWindowEndDate = 30-Jul
                EnforceMinimumInterval = No
                MinimumInterval = 15
                EnforceMaximumInterval = No
                MaximumInterval = 90
                DMRemoveType = UserDefinedFraction
                FractionDMToRemove = 0.99
                NRemoveType = UserDefinedFraction
                FractionNToRemove = 0.99
                ReturnType = AsResidue
                NDungType = DefineCNratio
                ProportionOfNToDung = 0.4
                CNRatioDung = 17.5
                UrineDepth = 250
                SettingUrineNAmount = No
                UrineNSetAmount = 2
                PopulationDeclineRate = 0
                ConsiderTrampling = No
                MaximumLitterFractionToSoil = 0.01
                BiomassDefoliatedForMaximumLitterFraction = 120
                MeanGrowthPeriodType = BetweenDefoliations
                MaxPeriodForMeanGrowth = 30
                script: same as in Validation.New Zealand.FRNLLincoln.FRNLLincoln.Field.Management.DefoliationManager
            MicroClimate: a_interception=0; b_interception=1; c_interception=0; d_interception=0; SoilHeatFluxFraction=0.4; MinimumHeightDiffForNewLayer=0; NightInterceptionFraction=0.5; ReferenceHeight=2
            Irrigation
            Fertiliser
            SurfaceOrganicMatter: InitialResidueName=grass; InitialResidueType=grass; InitialResidueMass=500; InitialStandingFraction=0; InitialCPR=0; InitialCNR=40
            Soil HorotiuSoil: SoilType=Typic Udivitrand (US), Typic Orthic, Allophanic Soil (NZ); LocalName=Horotiu silt loam; Site=Ruakura; NearestTown=Hamilton; Region=Waikato; Country=New Zealand; Latitude=0; Longitude=0
              DataSource=Adapted based on data from the NZ National Soils Database and Close et al, 2003
              Chemical: Thickness=[200, 200, 130, 140, 380, 230, 220]; PH=[6, 6, 6, 6, 6, 6, 6]; PHUnits=Water
              Physical: same as Validation.New Zealand.FRNLRuakura.FRNLRuakura.Field.HorotiuSoil.Physical
              WaterBalance SoilWater: same as Validation.New Zealand.FRNLRuakura.FRNLRuakura.Field.HorotiuSoil.SoilWater
              Organic: same as Validation.New Zealand.FRNLRuakura.FRNLRuakura.Field.HorotiuSoil.Organic
              Water: Thickness=[200, 200, 130, 140, 380, 230, 220]; InitialValues=[0.373, 0.34, 0.323, 0.282, 0.2, 0.16, 0.13]; FilledFromTop=false
              Nutrient
              Solute NO3: Thickness=[200, 200, 130, 140, 380, 230, 220]; InitialValues=[15, 10, 5, 5, 4.474, 1, 1]; InitialValuesUnits=ppm; WaterTableConcentration=0; D0=0; DepthConstant=0; MaxDepthSoluteAccessible=0; RunoffEffectivenessAtMovingSolute=0; MaxEffectiveRunoff=0
              Solute NH4: Thickness=[200, 200, 130, 140, 380, 230, 220]; InitialValues=[0.5, 0.2, 0.093, 0.093, 0.093, 0.093, 0.093]; InitialValuesUnits=ppm; WaterTableConcentration=0; D0=0; DepthConstant=0; MaxDepthSoluteAccessible=0; RunoffEffectivenessAtMovingSolute=0; MaxEffectiveRunoff=0
              Solute Urea: same as Validation.New Zealand.FRNLRuakura.FRNLRuakura.Field.HorotiuSoil.Urea
              SoilTemperature Temperature: InteractionsPerDay=8
            Plant PlantainForage
            Report BaseReport: VariableNames=// variables defined in 'Replacements'; EventNames=[Clock].DoReport
            Report CumReport: VariableNames=// variables defined in 'Replacements'; EventNames=[Clock].DoReport
            Report CropReport: EventNames=[Clock].DoReport
            Report DiagnosisReport: VariableNames=// variables defined in 'Replacements'; EventNames=[Clock].DoReport
            Report ValidationReport: EventNames=[Clock].DoReport
              VariableNames:
                [Clock].Today as Date
                [Clock].Today.DayOfYear as DayOfYear
                [PlantainForage].Population as Population
                [PlantainForage].AboveGround.Wt as AboveGround.Wt
                [PlantainForage].Leaf.Live.NConc as Leaf.Live.NConc
                [PlantainForage].AboveGroundLive.NConc as AboveGroundLive.NConc
                [DefoliationManager].Script.HarvestedWt as HarvestedWt
                [DefoliationManager].Script.HarvestedN as HarvestedN
                Sum of ([DefoliationManager].Script.RemovedWt) from 1-Jul to [Clock].Today as CumulativeHarvestedWt
                Sum of ([DefoliationManager].Script.RemovedN) from 1-Jul to [Clock].Today as CumulativeHarvestedN
      Experiment LincolnRDF
        Memo
          ###Lincoln university research farm###

          Simulation setup based on field trial performed at Lincoln University Research Dairy Farm, New Zealand, between 2010 and 2012. The experiment aimed to compare the nutritive value and DM production of a range of pasture species throughout the growing season under a high and low N fertiliser regime. Here only plots with pure plantain are used.
          The experiment had two nitrogen treatments, nitrogen was applied to half of each plot after grazing, ensuring similar distribution over what were previously ProGibb, N and control plots. The first N rate was called low (125 kg N/ha/yr) – to encourage legume growth and to mimic rates used by Frisco; the second N rate was called high (at 250 kg N/ha/yr); for both treatments, fertiliser was applied into three events. Yield cuts were taken every 4 weeks by mowing to 4.5cm. After mowing for yield, animals were allowed to graze the areas down to 4.5cm, followed by further mowing if necessary to tidy up the plots. When grazing dates coincided with the allotted N schedule, urea was then applied later by hand within seven days of grazing.

          The soil at the experimental site was a Templeton fine sandy loam (an Immature Pallic soil, USDA: Udic Haplustept), the required parameters were inferred based on data from the New Zealand National Soils Database (Landcare Research).
          Weather data was obtained from nearby Broadfields weather station (NIWA).
        Factors
          Factor NRate: Specification=[NRate]
            Operations Low
              2010-08-01  [Fertiliser].Apply(amount: 50, type: "UreaN", depth: 10)
              2011-09-22  [Fertiliser].Apply(amount: 50, type: "UreaN", depth: 10)
              2011-10-26  [Fertiliser].Apply(amount: 25, type: "UreaN", depth: 10)
              2012-01-18  [Fertiliser].Apply(amount: 25, type: "UreaN", depth: 10)
              2012-03-15  [Fertiliser].Apply(amount: 25, type: "UreaN", depth: 10)
            Operations High
              2010-08-01  [Fertiliser].Apply(amount: 50, type: "UreaN", depth: 10)
              2011-08-01  [Fertiliser].Apply(amount: 50, type: "UreaN", depth: 10)
              2011-09-22  [Fertiliser].Apply(amount: 50, type: "UreaN", depth: 10)
              2011-10-26  [Fertiliser].Apply(amount: 50, type: "UreaN", depth: 10)
              2012-01-18  [Fertiliser].Apply(amount: 50, type: "UreaN", depth: 10)
              2012-03-15  [Fertiliser].Apply(amount: 50, type: "UreaN", depth: 10)
        Simulation LincolnRDF
          Clock: Start=2010-03-20; End=2012-05-01
          Weather: FileName=Lincoln-Broadfields.met
          Summary summaryfile
          SoilArbitrator Soil Arbitrator
          Forages: same as Validation.New Zealand.FRNLLincoln.FRNLLincoln.Forages
          Zone Field: Area=1; Slope=0; AspectAngle=0; Altitude=50
            Folder Management
              Operations Sowing
                2010-03-20  [PlantainForage].Sow(population: 200, cultivar: "Tonic", depth: 10, rowSpacing: 150)
              Operations NRate
              Operations DefoliationSchedule
                2010-05-01  [DefoliationManager].Script.Defoliate(amountDM: 40, amountType: "ResidualDM", duration: 1)
                2010-08-01  [DefoliationManager].Script.Defoliate(amountDM: 40, amountType: "ResidualDM", duration: 1)
                2010-09-01  [DefoliationManager].Script.Defoliate(amountDM: 40, amountType: "ResidualDM", duration: 1)
                2010-10-01  [DefoliationManager].Script.Defoliate(amountDM: 40, amountType: "ResidualDM", duration: 1)
                2010-11-01  [DefoliationManager].Script.Defoliate(amountDM: 40, amountType: "ResidualDM", duration: 1)
                2010-12-01  [DefoliationManager].Script.Defoliate(amountDM: 40, amountType: "ResidualDM", duration: 1)
                2011-01-01  [DefoliationManager].Script.Defoliate(amountDM: 40, amountType: "ResidualDM", duration: 1)
                2011-02-01  [DefoliationManager].Script.Defoliate(amountDM: 40, amountType: "ResidualDM", duration: 1)
                2011-03-01  [DefoliationManager].Script.Defoliate(amountDM: 40, amountType: "ResidualDM", duration: 1)
                2011-04-01  [DefoliationManager].Script.Defoliate(amountDM: 40, amountType: "ResidualDM", duration: 1)
                2011-05-01  [DefoliationManager].Script.Defoliate(amountDM: 40, amountType: "ResidualDM", duration: 1)
                2011-08-11  [DefoliationManager].Script.Defoliate(amountDM: 40, amountType: "ResidualDM", duration: 1)
                2011-09-13  [DefoliationManager].Script.Defoliate(amountDM: 40, amountType: "ResidualDM", duration: 1)
                2011-10-24  [DefoliationManager].Script.Defoliate(amountDM: 40, amountType: "ResidualDM", duration: 1)
                2011-11-22  [DefoliationManager].Script.Defoliate(amountDM: 40, amountType: "ResidualDM", duration: 1)
                2011-12-20  [DefoliationManager].Script.Defoliate(amountDM: 40, amountType: "ResidualDM", duration: 1)
                2012-01-16  [DefoliationManager].Script.Defoliate(amountDM: 40, amountType: "ResidualDM", duration: 1)
                2012-02-17  [DefoliationManager].Script.Defoliate(amountDM: 40, amountType: "ResidualDM", duration: 1)
                2012-03-19  [DefoliationManager].Script.Defoliate(amountDM: 40, amountType: "ResidualDM", duration: 1)
                2012-05-01  [DefoliationManager].Script.Defoliate(amountDM: 40, amountType: "ResidualDM", duration: 1)
              Manager IrrigationManager
                AllowAutomaticIrrigation = Yes
                SeasonStartDate = 15-Oct
                SeasonEndDate = 30-Apr
                IrrigationTriggerType = TriggerBySoilDeficit
                IntervalBetweenIrrigations = 0
                TriggerDeficit = 60
                IrrigationAmountType = BasedOnSoilDeficit
                GivenAmount = 0
                TargetDeficit = 90
                MaximumAmount = 50
                CheckCropStatus = Yes
                SkipRainDays = Yes
                RainfallThreshold = 5
                ReturnDays = 3
                DepthOfMonitoringLayer = 500
```csharp
// This script will apply irrigation at time and amount determined based on given instructions and/or soil condition
// Developed by RCichota, last updated in 15/Oct/2022

using System;
using Newtonsoft.Json;
using APSIM.Shared.Utilities;
using Models.Interfaces;
using Models.Core;
using Models.PMF;
using Models.Soils;

namespace Models
{
    [Serializable]
    [System.Xml.Serialization.XmlInclude(typeof(Model))]
    public class Script : Model
    {
        //> Links to other Apsim models
        [Link] private Clock clock;
        [Link] private IWeather weather;
        [Link] private Irrigation irrigator;
        [Link] private IPhysical soilPhysical;
        [Link] private ISoilWater soilWater;
        [Link(IsOptional = true)] private IPlant[] existingCrops;
        [Link] private ISummary summary;

        //> User inputs from properties tab
        [Separator("Generic irrigation management")]
        [Description(" Allow this manager to controll irrigation automatically?")]
        public yesNoAnswer AllowAutomaticIrrigation { get; set; }
        [Description(" Start of irrigation season (dd-mmm):")]
        public string SeasonStartDate { get; set; }
        [Description(" End of irrigation season (dd-mmm):")]
        public string SeasonEndDate { get; set; }

        [Separator("Parameters defining how the irrigation is triggered")]
        [Description(" How irrigation should be triggered?")]
        public IrrigationTriggerTypes IrrigationTriggerType { get; set; }
        [Description("   Number of days between irrigations, if using fixed interval:")]
        public int IntervalBetweenIrrigations { get; set; }
        [Description("   Deficit to trigger irrigation, if using soil deficit (% PAWC):")]
        public double TriggerDeficit { get; set; }

        [Separator("Parameters defining how much irrigation is applied")]
        [Description(" How irrigation amount is determined? ")]
        public IrrigationAmountTypes IrrigationAmountType { get; set; }
        [Description("   Amount of irrigation to apply, if setting amount (mm):")]
        public double GivenAmount { get; set; }
        [Description("   Deficit to stop irrigation, if based on soil deficit (% PAWC):")]
        public double TargetDeficit { get; set; }
        [Description("   Maximum irrigation application (mm/day):")]
        public double MaximumAmount { get; set; }

        [Separator("Parameters defining extra constraints to irrigation")]
        [Description(" Limit irrigation to only when there is a crop alive?")]
        public yesNoAnswer CheckCropStatus { get; set; }
        [Description(" Skip irrigation after significant rainfall?")]
        public yesNoAnswer SkipRainDays { get; set; }
        [Description("   Rainfall amount above which irrigation will be stopped (mm/day):")]
        public double RainfallThreshold { get; set; }
        [Description("   Minimum number of days between irrigations (ignored if irrigating using fixed interval):")]
        public double ReturnDays { get; set; }

        [Separator("Parameters for computing soil water status")]
        [Description(" Depth to calculate PAWC and water deficit (mm):")]
        public double DepthOfMonitoringLayer { get; set; }

        //> Outputs from this manager
        [JsonIgnore][Units("mm")] // Soil water deficit in the layer monitored for irrigation
        public double SoilWaterDeficit { get; set; }
        [JsonIgnore][Units("mm")] // Soil water content in the layer monitored for irrigation
        public double MonitoredLayerSWC { get; set; }
        [JsonIgnore][Units("mm")] // Soil moisute at DUL in the layer monitored for irrigation
        public double MonitoredLayerDUL { get; set; }
        [JsonIgnore][Units("mm")] // Soil moisture at LL in the layer monitored for irrigation
        public double MonitoredLayerLL { get; set; }
        [JsonIgnore][Units("days")] // Number of days since last irrigation
        public double DaysSinceIrrigation { get; set; }
        [JsonIgnore][Units("mm")] // Amount of water to apply in a given irrigation event
        public double AmountToApply { get; set; }
        [JsonIgnore][Units("mm")] // Total amount of water applied over the irrigation season
        public double SeasonAppliedAmount { get; set; }

        //> Internal variables
        private int bottomLayer;
        private double fracBottomLayer;
        private bool seasonIsOpen;
        private bool cropIsActive;
        private bool rainIsNotSignificant;
        private bool irrigatorIsAvailable;
        private bool soilMoistureIsLow;


        [EventSubscribe("StartOfSimulation")]
        private void OnStartOfSimulation(object sender, EventArgs e)
        {
            // check whether irrigation is allowed at all
            if (AllowAutomaticIrrigation == yesNoAnswer.Yes)
            {
                // check whether we need to check crop status
                if (CheckCropStatus == yesNoAnswer.Yes)
                {
                    if(existingCrops == null)
                    {
                        throw new Exception(" Manager requires checking active crop, but no crop is present");
                    }
                }
            }

            //Calculate soil water variables
            double depthFromSurface = 0.0;
            for (int layer = 0; layer < soilPhysical.Thickness.Length; layer++)
            {
                fracBottomLayer = Math.Min(1.0, (DepthOfMonitoringLayer - depthFromSurface) / soilPhysical.Thickness[layer]);
                MonitoredLayerLL += soilPhysical.LL15mm[layer] * fracBottomLayer;
                MonitoredLayerDUL += soilPhysical.DULmm[layer] * fracBottomLayer;
                depthFromSurface += soilPhysical.Thickness[layer];
                if (depthFromSurface >= DepthOfMonitoringLayer)
                {
                    bottomLayer = layer;
                    layer = soilPhysical.Thickness.Length;
                }
            }

            // write message in summary
            summary.WriteMessage(this," Automatic irrigation manager initialised", MessageType.Diagnostic);
            if (AllowAutomaticIrrigation == yesNoAnswer.Yes)
            {
                summary.WriteMessage(this,"  Irrigation is enabled between " + SeasonStartDate + " and " + SeasonEndDate, MessageType.Diagnostic);
                if (IrrigationTriggerType == IrrigationTriggerTypes.FixedInterval)
                {
                    summary.WriteMessage(this,"  Irrigation will be triggered every " + IntervalBetweenIrrigations + " days", MessageType.Diagnostic);
                }
                else
                {
                    summary.WriteMessage(this,"  Irrigation will be triggered every time soil moisture is below " + TriggerDeficit.ToString("#0.0") + "% of PAWC", MessageType.Diagnostic);
                }

                if (IrrigationAmountType == IrrigationAmountTypes.GivenAmount)
                {
                    summary.WriteMessage(this,"  Amount to be applied is fixed at " + Math.Min(MaximumAmount, GivenAmount).ToString("#0.0") + "mm each application", MessageType.Diagnostic);
                }
                else
                {
                    summary.WriteMessage(this,"  Amount to be applied will aim to bring soil moisture up to " + TargetDeficit.ToString("#0.0") + "% of PAWC", MessageType.Diagnostic);
                    summary.WriteMessage(this,"   limited to " + MaximumAmount.ToString("#0.0") + "mm in each application", MessageType.Diagnostic);
                }
            }
            else
            {
                summary.WriteMessage(this,"  Irrigation is disabled", MessageType.Diagnostic);
            }
        }

        [EventSubscribe("StartOfDay")]
        private void OnStartOfDay(object sender, EventArgs e)
        {
            // check whether we are within the irrigation season
            if(DateUtilities.WithinDates(SeasonStartDate, clock.Today, SeasonEndDate))
            {
                seasonIsOpen = true;
            }
            else
            {
                seasonIsOpen = false;
                SeasonAppliedAmount = 0;
            }

            // check for whether there is a crop that needs irrigation
            if (CheckCropStatus == yesNoAnswer.Yes)
            {
                cropIsActive = false;
                foreach (IPlant crop in existingCrops)
                {
                    if (crop.IsAlive)
                    {
                        cropIsActive = true;
                        break;
                    }
                }
            }
            else
            {
                cropIsActive = true;
            }

            // check whether there has been significant rainfall
            rainIsNotSignificant = true;
            if (SkipRainDays == yesNoAnswer.Yes && weather.Rain > RainfallThreshold)
            {
                rainIsNotSignificant = false;
            }

            // check whether the irrigator available
            irrigatorIsAvailable = false;
            DaysSinceIrrigation += 1;
            if(IrrigationTriggerType == IrrigationTriggerTypes.FixedInterval)
            {
                if (DaysSinceIrrigation >= IntervalBetweenIrrigations)
                {
                    irrigatorIsAvailable = true;
                }
            }
            else
            {
                if (DaysSinceIrrigation >= ReturnDays)
                {
                    irrigatorIsAvailable = true;
                }
            }
        }

        [EventSubscribe("DoManagement")]
        private void OnDoManagement(object sender, EventArgs e)
        {
            // get current soil moisture and water deficit
            MonitoredLayerSWC = 0.0;
            for (int layer = 0; layer < bottomLayer; layer++)
            {
                MonitoredLayerSWC += soilWater.SWmm[layer];
            }

            MonitoredLayerSWC += soilWater.SWmm[bottomLayer] * fracBottomLayer;
            SoilWaterDeficit = MonitoredLayerSWC - MonitoredLayerDUL;

            if (AllowAutomaticIrrigation == yesNoAnswer.Yes)
            {
                // check whether the soil is dry enough to require irrigation
                if(IrrigationTriggerType == IrrigationTriggerTypes.TriggerBySoilDeficit)
                {
                    soilMoistureIsLow = false;
                    if (Math.Max(0.0, -SoilWaterDeficit) >= (MonitoredLayerDUL - MonitoredLayerLL) * (100.0 - TriggerDeficit) / 100.0)
                    {
                        soilMoistureIsLow = true;
                    }
                }
                else
                { // moisture is not checked
                    soilMoistureIsLow = true;
                }

                // check whether all the conditions ratify irrigation
                if (seasonIsOpen && cropIsActive && irrigatorIsAvailable && rainIsNotSignificant && soilMoistureIsLow)
                {
                    // let's bloody well irrigate then!!!!
                    if(IrrigationAmountType == IrrigationAmountTypes.GivenAmount)
                    {
                        AmountToApply = Math.Min(GivenAmount, MaximumAmount);
                    }
                    else
                    {
                        AmountToApply = MonitoredLayerLL + (MonitoredLayerDUL - MonitoredLayerLL) * TargetDeficit / 100.0 - MonitoredLayerSWC;
                        AmountToApply = Math.Max(0.0, Math.Min(AmountToApply, MaximumAmount));
                    }
    
                    irrigator.Apply(amount: AmountToApply, depth: 0.0, duration: 1440, willRunoff: true);
                    DaysSinceIrrigation = 0;
                    SeasonAppliedAmount += AmountToApply;
                }
            }
        }


        /// <summary>Flag for a positive or negative answer</summary>
        public enum yesNoAnswer
        {
            /// <summary>Positive answer</summary>
            Yes,
            /// <summary>Negative answer</summary>
            No
        }

        /// <summary>Flag how irrigation will be triggered</summary>
        public enum IrrigationTriggerTypes
        {
            /// <summary>Setting a fixed interval</summary>
            FixedInterval,
            /// <summary>Setting a soil deficit</summary>
            TriggerBySoilDeficit
        }

        /// <summary>Flag how much irrigation will be applied</summary>
        public enum IrrigationAmountTypes
        {
            /// <summary>Setting a fixed interval</summary>
            GivenAmount,
            /// <summary>Setting a soil deficit</summary>
            BasedOnSoilDeficit
        }
    }
}
```
              Manager DefoliationManager: same as Validation.New Zealand.FRNLLincoln.FRNLLincoln.Field.Management.DefoliationManager
              Manager DungAndUrine
                AllowDepositions = Yes
                UrineNToAdd = 10
                UrineDepth = 150
                DungDMToAdd = 220
                NDungType = SetCNratio
                DungNToAdd = 0
                CNRatioDung = 17.5
```csharp
using APSIM.Core;
using Models.Interfaces;
using Models.Soils;
using Models.PMF;
using Models.Core;
using APSIM.Shared.Utilities;
using Newtonsoft.Json;
using System;

namespace Models
{
    [Serializable]
    public class Script : Model, IStructureDependency
    {
        [Link] private Clock clock;
        [Link] private Zone myZone;
        [Link] private IPhysical soilPhysical;
        [Link(ByName = true)] private ISolute Urea;
        [Link] private ISummary summary;
        public  event BiomassRemovedDelegate BiomassRemoved;
        private double harvestedWt;
        public IStructure Structure { private get; set; }
        //> Links to other Apsim models

        //> Events raised by this manager

        //> User inputs from properties tab
        [Separator("Script to add nitrogen to the soil to mimic a excreta deposition (urine and/or dung)")]
        [Description(" Allow this manager to apply N automatically?")]
        public yesNoAnswer AllowDepositions { get; set; }

        [Separator("Parameters defining the addition of urine")]
        [Description(" Amount of N to add to the soil (kg/ha):")]
        public double UrineNToAdd { get; set; }
        [Description(" Soil depth down to which urine is applied (mm):")]
        public double UrineDepth { get; set; }

        [Separator("Parameters defining the addition of dung to the soil surface")]
        [Description(" Amount of dung (dry matter) to add to the soil surface (kg/ha):")]
        public double DungDMToAdd { get; set; }
        [Description(" How the N content in dung is defined?")]
        public DungNTypes NDungType { get; set; }
        [Description("   Amount of N to return in dung (kg/ha):")]
        [Display(VisibleCallback = "isDungNAmount")]
        public double DungNToAdd { get; set; }
        [Description("   The C:N ratio of dung (typically around 20):")]
        [Display(VisibleCallback = "isDungCNratio")]
        public double CNRatioDung { get; set; }
        
        //> Outputs from this manager
        [JsonIgnore][Units("kg/ha")] // DM amount added to the soil surface mimicking dung deposition 
        public double DungDepositionWt { get; set; }
        [JsonIgnore][Units("kg/ha")] // N amount added to the soil surface mimicking dung deposition 
        public double DungDepositionN { get; set; }
        [JsonIgnore][Units("kg/ha")] // N amount added to the soil mimicking urine deposition
        public double UrineDepositionN { get; set; }

        //> Internal variables
        private double[] urineFraction;          // fraction of urine to be applied in each soil layer



        

        [EventSubscribe("StartOfSimulation")]
        private void OnStartOfSimulation(object sender, EventArgs e)
        {
            // check the amount of N to add in dung
            if (isDepositionAllowed && (DungDMToAdd > 0.0))
            {
                if (isDungCNratio)
                {
                    if (CNRatioDung <= 0.0)
                    {
                        throw new Exception("The C:N ratio of dung has to be greater than zero");
                    }

                    DungNToAdd = DungDMToAdd * 0.4 / CNRatioDung;
                }
            }

            // set the fraction of urine for each layer
            if (isDepositionAllowed && (UrineNToAdd > 0.0))
            {
                double depthFromSurface = 0.0;
                double propAtZ0;
                double propAtZ1;
                for (int layer = 0; layer < soilPhysical.Thickness.Length; layer++)
                {
                    depthFromSurface += soilPhysical.Thickness[layer];
                    if (depthFromSurface >= UrineDepth)
                    { // bottom layer found
                        urineFraction = new double[layer + 1];
                        double distFactor = 1.5;
                        double totalProp = UrineDepth * Math.Pow(1.0, distFactor) / (distFactor + 1.0);
                        depthFromSurface = 0.0;
                        propAtZ1 = (UrineDepth - depthFromSurface) * Math.Pow(1.0 - depthFromSurface / UrineDepth, distFactor) / (distFactor + 1.0);
                        for (int z = 0; z < layer+1; z++)
                        {
                            propAtZ0 = propAtZ1;
                            depthFromSurface += soilPhysical.Thickness[z];
                            propAtZ1 = (UrineDepth - depthFromSurface) * Math.Pow(1.0 - depthFromSurface / UrineDepth, distFactor) / (distFactor + 1);
                            if (1.0 - (depthFromSurface / UrineDepth) < 0.0)
                            {
                                propAtZ1 = 0;
                            }
                            urineFraction[z] = (propAtZ0 - propAtZ1) / totalProp;
                        }
                        layer = soilPhysical.Thickness.Length;
                    }
                }
            }

            // write message in summary
            summary.WriteMessage(this," Initialising script to add dung and urine", MessageType.Diagnostic);
            if (isDepositionAllowed)
            {
                if(DungDMToAdd > 0.0)
                {
                    summary.WriteMessage(this,"   Dung will be added to the soil surface following each harvest. This includes adding " + DungDMToAdd.ToString("#0.0")
                                             + " kgDM/ha of material with " + DungNToAdd.ToString("#0.0") + " kgN/ha", MessageType.Diagnostic);
                }

                if(UrineNToAdd > 0.0)
                {
                    summary.WriteMessage(this,"   Urine will be added to the soil following each harvest. This will be mimicked by adding " + UrineNToAdd.ToString("#0.0")
                                             + " kgN/ha to the soil, down to a depth of " + UrineDepth.ToString("#0") + "mm", MessageType.Diagnostic);
                    summary.WriteMessage(this,"   Urine will be added over the soil profile according to proportions: "
                                             + string.Join(", ",urineFraction), MessageType.Diagnostic);
                }
                else
                {
                    summary.WriteMessage(this,"   Non-removed material will be returned as residue.", MessageType.Diagnostic);
                }
            }
        }

        [EventSubscribe("DoManagement")]
        private void OnDoManagement(object sender, EventArgs e)
        {
            // zero variables
            DungDepositionWt = 0.0;
            DungDepositionN = 0.0;
            UrineDepositionN = 0.0;

            // check whether a defoliations has happened
            harvestedWt = (double)Structure.Get("[DefoliationManager].Script.HarvestedWt", relativeTo: myZone);
            if (harvestedWt > 0.0)
            { // a defoliation/harvest happened today, apply some excreta
                excretaDepositions();
            }
        }

        private void excretaDepositions()
        {
            if (isDepositionAllowed && (DungDMToAdd > 0.0))
            {
                PMF.BiomassRemovedType BiomassDung = new PMF.BiomassRemovedType();
                string[] type = new string[] { "RuminantDung_PastureFed" };
                float[] dltdm = new float[] { (float)(DungDMToAdd) };
                float[] dltn = new float[] { (float)(DungNToAdd) };
                float[] dltp = new float[] { 0.0f };
                float[] fraction = new float[] { 1.0f };     // fraction is always 1.0 here

                BiomassDung.crop_type = "RuminantDung_PastureFed";
                BiomassDung.dm_type = type;
                BiomassDung.dlt_crop_dm = dltdm;
                BiomassDung.dlt_dm_n = dltn;
                BiomassDung.dlt_dm_p = dltp;
                BiomassDung.fraction_to_residue = fraction;
                BiomassRemoved.Invoke(BiomassDung);
                
                DungDepositionWt = DungDMToAdd;
                DungDepositionN = DungNToAdd;
            }

            if (isDepositionAllowed && (UrineNToAdd > 0.0))
            {
                double[] myUrineDeposition = new double[soilPhysical.Thickness.Length];
                for (int z = 0; z < urineFraction.Length; z++)
                {
                    myUrineDeposition[z] = UrineNToAdd * urineFraction[z];
                }

                Urea.AddKgHaDelta(SoluteSetterType.Fertiliser, myUrineDeposition);
                UrineDepositionN = UrineNToAdd;
            }
        }

        private bool isDepositionAllowed { get { return AllowDepositions == yesNoAnswer.Yes; } }
        private bool isDungNAmount { get { return NDungType == DungNTypes.SetAmount; } }
        private bool isDungCNratio { get { return NDungType == DungNTypes.SetCNratio; } }

        /// <summary>Flag for a positive or negative answer.</summary>
        public enum yesNoAnswer
        {
            /// <summary>Positive answer.</summary>
            Yes,
            /// <summary>Negative answer.</summary>
            No
        }

        /// <summary>Flag how N in dung is defined.</summary>
        public enum DungNTypes
        {
            /// <summary>An amount is given.</summary>
            SetAmount,
            /// <summary>Negative answer.</summary>
            SetCNratio
        }
    }
}
```
              Manager AuxReport
                ShadeTreatment = Some
                WaterTreatment = All
                DateForReseting = 15-Apr
```csharp
using System;
using Newtonsoft.Json;
using APSIM.Shared.Utilities;
using Models.Core;
using Models.PMF;
using Models.Interfaces;

namespace Models
{
    [Serializable]
    public class Script : Model
    {
        //> Links to other Apsim models
        [Link] IClock clock;
        [Link] private Zone myZone;
        [Link] ISummary summary;

        //> User inputs from properties tab
        [Separator("Auxiliary outputs for reporting")]
        [Description(" Shade treatment:")]
        public string ShadeTreatment { get; set; }
        [Description(" Water deficit treatment:")]
        public string WaterTreatment { get; set; }
        [Description(" Date to reset cumulative values, for report (d-mmm):")]
        public string DateForReseting { get; set; }

        //> Outputs from this manager
        [JsonIgnore][Units("")] // flag the treatment combination (shade × water deficit)
        public string TreatmentCombo { get; set; }
        [JsonIgnore][Units("")] // flag the treatment combination (shade × water deficit)
        public DateTime NormalisedDate { get; set; }
        [JsonIgnore] [Units("")] // Flag whether a day is start or end of simulation
        public int DayMarker { get; set; }
        [JsonIgnore] [Units("")] // Date to aid reporting of cumulative values. When reset happens
        public DateTime ResetDate { get; set; }

        //> Internal variables
        private bool seasonIsOpen;               // Flag for whether the irrigation season is open


        [EventSubscribe("StartOfSimulation")]
        private void OnStartOfSimulation(object sender, EventArgs e)
        {
            TreatmentCombo = ShadeTreatment + "_" + WaterTreatment;
        }

        [EventSubscribe("StartOfDay")]
        private void OnStartOfDay(object sender, EventArgs e)
        {
            NormalisedDate = DateTime.ParseExact(clock.Today.ToString("dd/MM") + "/2000", "dd/MM/yyyy", null);
            ResetDate = DateTime.Parse(DateForReseting + "-" + clock.Today.Year);
            DayMarker = 0;
            if (clock.Today.Date == clock.StartDate.Date)
            {
                DayMarker = -1;
            }
            else if (clock.Today.Date == clock.EndDate.Date)
            {
                DayMarker = 1;
            }
        }
    }
}
```
            MicroClimate: a_interception=0; b_interception=1; c_interception=0; d_interception=0; SoilHeatFluxFraction=0.4; MinimumHeightDiffForNewLayer=0; NightInterceptionFraction=0.5; ReferenceHeight=2
            Irrigation
            Fertiliser
            SurfaceOrganicMatter: InitialResidueName=grass; InitialResidueType=grass; InitialResidueMass=500; InitialStandingFraction=0; InitialCPR=0; InitialCNR=40
            Soil TempletonPaparua: SoilType=Udic Haplustept (US),  Immature Pallic Soil (NZ); LocalName=Templeton Fine Sandy Loam; Site=LURDF; NearestTown=Lincoln; Region=Canterbury; Country=New Zealand; Latitude=0; Longitude=0; DataSource=Adapted based on data from the NZ National Soils Database
              Comments=Different references name the soil at the site as either Templeton or Paparua (very similar soils)
              Chemical: Thickness=[150, 150, 200, 250, 250, 500]; PH=[6, 6, 6, 6, 6, 6]; PHUnits=Water
              Physical
                Thickness  ParticleSizeSand  ParticleSizeSilt  ParticleSizeClay  Rocks  BD    AirDry  LL15   DUL    SAT    KS
                150        17.4              60.9              21.8              0      1.35  0.057   0.17   0.34   0.439  2913.761
                150        24.8              56.9              18.3              0      1.43  0.159   0.177  0.325  0.409  1052.63
                200        21                59.5              19.5              0      1.54  0.186   0.186  0.327  0.362  182.149
                250        37                52.6              10.3              0      1.54  0.132   0.132  0.251  0.358  1272.997
                250        43.6              46.9              9.5               0      1.48  0.116   0.116  0.24   0.365  1767.199
                500        24.2              59.3              16.6              0      1.41  0.138   0.138  0.273  0.39   586.553
                SoilCrop PlantainForageSoil: LL=[0.17, 0.177, 0.186, 0.132, 0.116, 0.138]; KL=[0.12, 0.11, 0.06, 0.03, 0.01, 0.01]; XF=[1, 1, 1, 1, 1, 1]
              WaterBalance SoilWater: SummerDate=1-Nov; SummerU=6; SummerCona=3.5; WinterDate=1-apr; WinterU=3; WinterCona=1.5; DiffusConst=88; DiffusSlope=35; Salb=0.13; CN2Bare=73; CNRed=20; CNCov=0.8; PSIDul=-100; Thickness=[150, 150, 200, 250, 250, 500]; SWCON=[0.5, 0.41, 0.27, 0.39, 0.49, 0.42]
              Organic: same as Validation.New Zealand.FRNLLincoln.FRNLLincoln.Field.TempletonPaparua.Organic
              Water: Thickness=[150, 150, 200, 250, 250, 500]; InitialValues=[0.34, 0.325, 0.327, 0.251, 0.24, 0.273]; FilledFromTop=true
              Nutrient
              Solute NO3: Thickness=[150, 150, 200, 250, 250, 500]; InitialValues=[4, 3, 1.5, 1.5, 1.5, 0.78]; InitialValuesUnits=ppm; WaterTableConcentration=0; D0=0; DepthConstant=0; MaxDepthSoluteAccessible=0; RunoffEffectivenessAtMovingSolute=0; MaxEffectiveRunoff=0
              Solute NH4: same as Validation.New Zealand.FRNLLincoln.FRNLLincoln.Field.TempletonPaparua.NH4
              Solute Urea: same as Validation.New Zealand.FRNLLincoln.FRNLLincoln.Field.TempletonPaparua.Urea
              SoilTemperature Temperature: InteractionsPerDay=8
            Plant PlantainForage
            Report BaseReport: VariableNames=// variables defined in 'Replacements'; EventNames=[Clock].DoReport
            Report CumReport: VariableNames=// variables defined in 'Replacements'; EventNames=[Clock].DoReport
            Report CropReport: VariableNames=// variables defined in 'Replacements'; EventNames=[Clock].DoReport
            Report DiagnosisReport: VariableNames=// variables defined in 'Replacements'; EventNames=[Clock].DoReport
            Report ValidationReport: EventNames=[Clock].DoReport
              VariableNames:
                [Clock].Today as Date
                [Clock].Today.DayOfYear as DayOfYear
                [PlantainForage].Population as Population
                [PlantainForage].AboveGround.Wt as AboveGround.Wt
                [PlantainForage].Leaf.Live.NConc as Leaf.Live.NConc
                [PlantainForage].AboveGroundLive.NConc as AboveGroundLive.NConc
                [PlantainForage].Leaf.Height as PlantHeight
                [DefoliationManager].Script.HarvestedWt as HarvestedWt
                [DefoliationManager].Script.HarvestedN as HarvestedN
                Sum of ([DefoliationManager].Script.RemovedWt) from 1-Nov to [Clock].Today as CumulativeHarvestedWt
                Sum of ([DefoliationManager].Script.RemovedN) from 1-Nov to [Clock].Today as CumulativeHarvestedN
      Experiment MasseyRDF1
        Memo
          ###Massey university research farm###

          Simulation setup based on field trial performed at No1 Dairy Unit at Massey University in Palmerston North. A grazing experiment was conducted during 2011-2012 (first growing season) and 2012-2013 (second growing season), New Zealand (40° 22′S, 175° 36′E). Three pasture treatments were evaluated: (i) chicory, (ii) plantain, and (iii) an herb-clover mix pasture, containing chicory, plantain, red clover and white clover, under two grazing frequencies; every two or four weeks. Perennial ryegrass/white clover pasture was also established and grazed to provide a benchmark.

          The soil at the experimental site was a Manawatu silt loam over sand. Soils tests to 75 mm depth were conducted
          at the experimental site and showed levels of soil fertility of Olsen phosphate of 31 ppm, sulphate of 13 ppm, potassium of 0.42 me/100g, and pH 5.7. Before sowing, the paddock was ploughed, power harrowed, fertilised with 27, 18, 18 kg/ha nitrogen (N), phosphorus (P) and potassium (K), respectively.

          Weather data was obtained from nearby weather station (NIWA).
        Factors
          Factor GrazeFrequency
            CompositeFactor 2wks
              Specifications:
                [DefoliationSchedule]
                [DungAndUrine].Script.UrineNToAdd = 15
              Operations DefoliationSchedule
                2011-12-20  [DefoliationManager].Script.Defoliate(amountDM: 57, amountType: "ResidualDM", duration: 1)
                2012-01-05  [DefoliationManager].Script.Defoliate(amountDM: 42, amountType: "ResidualDM", duration: 1)
                2012-01-18  [DefoliationManager].Script.Defoliate(amountDM: 50, amountType: "ResidualDM", duration: 1)
                2012-02-01  [DefoliationManager].Script.Defoliate(amountDM: 36, amountType: "ResidualDM", duration: 1)
                2012-02-15  [DefoliationManager].Script.Defoliate(amountDM: 45, amountType: "ResidualDM", duration: 1)
                2012-02-29  [DefoliationManager].Script.Defoliate(amountDM: 36, amountType: "ResidualDM", duration: 1)
                2012-03-14  [DefoliationManager].Script.Defoliate(amountDM: 28, amountType: "ResidualDM", duration: 1)
                2012-03-28  [DefoliationManager].Script.Defoliate(amountDM: 20, amountType: "ResidualDM", duration: 1)
                2012-04-12  [DefoliationManager].Script.Defoliate(amountDM: 28, amountType: "ResidualDM", duration: 1)
                2012-04-26  [DefoliationManager].Script.Defoliate(amountDM: 25, amountType: "ResidualDM", duration: 1)
                2012-08-22  [DefoliationManager].Script.Defoliate(amountDM: 43, amountType: "ResidualDM", duration: 1)
                2012-09-05  [DefoliationManager].Script.Defoliate(amountDM: 40, amountType: "ResidualDM", duration: 1)
                2012-09-19  [DefoliationManager].Script.Defoliate(amountDM: 31, amountType: "ResidualDM", duration: 1)
                2012-10-03  [DefoliationManager].Script.Defoliate(amountDM: 29, amountType: "ResidualDM", duration: 1)
                2012-10-17  [DefoliationManager].Script.Defoliate(amountDM: 28, amountType: "ResidualDM", duration: 1)
                2012-10-31  [DefoliationManager].Script.Defoliate(amountDM: 22, amountType: "ResidualDM", duration: 1)
                2012-11-14  [DefoliationManager].Script.Defoliate(amountDM: 22, amountType: "ResidualDM", duration: 1)
                2012-11-29  [DefoliationManager].Script.Defoliate(amountDM: 26, amountType: "ResidualDM", duration: 1)
                2012-12-13  [DefoliationManager].Script.Defoliate(amountDM: 27, amountType: "ResidualDM", duration: 1)
                2012-12-27  [DefoliationManager].Script.Defoliate(amountDM: 28, amountType: "ResidualDM", duration: 1)
                2013-01-11  [DefoliationManager].Script.Defoliate(amountDM: 32, amountType: "ResidualDM", duration: 1)
                2013-01-24  [DefoliationManager].Script.Defoliate(amountDM: 38, amountType: "ResidualDM", duration: 1)
                2013-02-07  [DefoliationManager].Script.Defoliate(amountDM: 25, amountType: "ResidualDM", duration: 1)
                2013-02-21  [DefoliationManager].Script.Defoliate(amountDM: 43, amountType: "ResidualDM", duration: 1)
                2013-03-08  [DefoliationManager].Script.Defoliate(amountDM: 30, amountType: "ResidualDM", duration: 1)
                2013-04-04  [DefoliationManager].Script.Defoliate(amountDM: 36, amountType: "ResidualDM", duration: 1)
                2013-04-18  [DefoliationManager].Script.Defoliate(amountDM: 30, amountType: "ResidualDM", duration: 1)
                2013-05-03  [DefoliationManager].Script.Defoliate(amountDM: 30, amountType: "ResidualDM", duration: 1)
                2013-05-16  [DefoliationManager].Script.Defoliate(amountDM: 28, amountType: "ResidualDM", duration: 1)
                2013-05-30  [DefoliationManager].Script.Defoliate(amountDM: 20, amountType: "ResidualDM", duration: 1)
            CompositeFactor 4wks
              Specifications:
                [DefoliationSchedule]
                [DungAndUrine].Script.UrineNToAdd = 20
              Operations DefoliationSchedule
                2011-12-20  [DefoliationManager].Script.Defoliate(amountDM: 51, amountType: "ResidualDM", duration: 1)
                2012-01-18  [DefoliationManager].Script.Defoliate(amountDM: 51, amountType: "ResidualDM", duration: 1)
                2012-02-15  [DefoliationManager].Script.Defoliate(amountDM: 40, amountType: "ResidualDM", duration: 1)
                2012-03-14  [DefoliationManager].Script.Defoliate(amountDM: 36, amountType: "ResidualDM", duration: 1)
                2012-04-12  [DefoliationManager].Script.Defoliate(amountDM: 43, amountType: "ResidualDM", duration: 1)
                2012-05-09  [DefoliationManager].Script.Defoliate(amountDM: 41, amountType: "ResidualDM", duration: 1)
                2012-06-06  [DefoliationManager].Script.Defoliate(amountDM: 26, amountType: "ResidualDM", duration: 1)
                2012-08-22  [DefoliationManager].Script.Defoliate(amountDM: 36, amountType: "ResidualDM", duration: 1)
                2012-09-19  [DefoliationManager].Script.Defoliate(amountDM: 37, amountType: "ResidualDM", duration: 1)
                2012-10-17  [DefoliationManager].Script.Defoliate(amountDM: 35, amountType: "ResidualDM", duration: 1)
                2012-11-14  [DefoliationManager].Script.Defoliate(amountDM: 32, amountType: "ResidualDM", duration: 1)
                2012-12-13  [DefoliationManager].Script.Defoliate(amountDM: 29, amountType: "ResidualDM", duration: 1)
                2013-01-11  [DefoliationManager].Script.Defoliate(amountDM: 42, amountType: "ResidualDM", duration: 1)
                2013-02-07  [DefoliationManager].Script.Defoliate(amountDM: 50, amountType: "ResidualDM", duration: 1)
                2013-03-08  [DefoliationManager].Script.Defoliate(amountDM: 38, amountType: "ResidualDM", duration: 1)
                2013-04-04  [DefoliationManager].Script.Defoliate(amountDM: 42, amountType: "ResidualDM", duration: 1)
                2013-05-03  [DefoliationManager].Script.Defoliate(amountDM: 30, amountType: "ResidualDM", duration: 1)
                2013-05-30  [DefoliationManager].Script.Defoliate(amountDM: 25, amountType: "ResidualDM", duration: 1)
        Simulation MasseyRDF1
          Clock: Start=2011-06-01; End=2013-06-30
          Weather: FileName=PalmerstonNorth.met
          Summary summaryfile
          SoilArbitrator Soil Arbitrator
          Forages: same as Validation.New Zealand.FRNLLincoln.FRNLLincoln.Forages
          Zone Field: Area=1; Slope=0; AspectAngle=0; Altitude=50
            Folder Management
              Operations Sowing
                2011-10-10  [PlantainForage].Sow(population: 350, cultivar: "Tonic", depth: 10, rowSpacing: 150)
              Operations FertiliserSchedule
                2011-10-10  [Fertiliser].Apply(amount: 27, type: "UreaN", depth: 10)
                2012-08-16  [Fertiliser].Apply(amount: 50, type: "UreaN", depth: 10)
              Operations IrrigationSchedule
                2013-01-10  [Irrigation].Apply(amount: 25)
                2013-03-01  [Irrigation].Apply(amount: 25)
                2013-03-11  [Irrigation].Apply(amount: 25)
              Operations DefoliationSchedule
              Manager DefoliationManager
                AllowAutomaticManagement = No
                DefoliationRotationStartDate = 01/01/1900 00:00:00
                DefoliationRotationEndDate = 12/31/2100 00:00:00
                DefoliationTriggerType = TargetStandingBiomass
                IntervalBetweenDefoliations = 15
                TargetStandingBiomass = 250
                DurationOfEachDefoliation = 1
                RemoveAmountType = ResidualDM
                AmountForEachDefoliation = 125
                MininumAmountToDefoliate = 75
                SuppressDefoliationOnWindow = No
                NoDefoliationWindowStartDate = 1-Jun
                NoDefoliationWindowEndDate = 30-Jul
                EnforceMinimumInterval = No
                MinimumInterval = 15
                EnforceMaximumInterval = No
                MaximumInterval = 90
                DMRemoveType = UserDefinedFraction
                FractionDMToRemove = 0.99
                NRemoveType = UserDefinedFraction
                FractionNToRemove = 0.99
                ReturnType = AsResidue
                NDungType = DefineCNratio
                ProportionOfNToDung = 0.4
                CNRatioDung = 17.5
                UrineDepth = 250
                SettingUrineNAmount = No
                UrineNSetAmount = 2
                PopulationDeclineRate = 0
                ConsiderTrampling = No
                MaximumLitterFractionToSoil = 0.01
                BiomassDefoliatedForMaximumLitterFraction = 120
                MeanGrowthPeriodType = BetweenDefoliationsOrMaxPeriod
                MaxPeriodForMeanGrowth = 30
                script: same as in Validation.New Zealand.FRNLLincoln.FRNLLincoln.Field.Management.DefoliationManager
              Manager DungAndUrine
                AllowDepositions = Yes
                UrineNToAdd = 15
                UrineDepth = 150
                DungDMToAdd = 220
                NDungType = SetCNratio
                DungNToAdd = 0
                CNRatioDung = 17.5
                script: same as in Validation.New Zealand.LincolnRDF.LincolnRDF.Field.Management.DungAndUrine
              Manager AuxReport
                ShadeTreatment = Some
                WaterTreatment = All
                DateForReseting = 1-Jul
                script: same as in Validation.New Zealand.LincolnRDF.LincolnRDF.Field.Management.AuxReport
            MicroClimate: a_interception=0; b_interception=1; c_interception=0; d_interception=0; SoilHeatFluxFraction=0.4; MinimumHeightDiffForNewLayer=0; NightInterceptionFraction=0.5; ReferenceHeight=2
            Irrigation
            Fertiliser
            SurfaceOrganicMatter: InitialResidueName=grass; InitialResidueType=grass; InitialResidueMass=500; InitialStandingFraction=0; InitialCPR=0; InitialCNR=40
            Soil: SoilType=Silt loam; LocalName=Manawatu; Site=Karere Rd; NearestTown=Longburn; Region=Manawatu; Country=New Zealand; NaturalVegetation=long term grass; ApsoilNumber=1325; Latitude=-40.406; Longitude=175.536; LocationAccuracy=+/-50 m; YearOfSampling=1985
              DataSource=The database of New Zealand soils was compiled by AgResearch (www.agresearch.co.nz) and based on soil properties gathered, mainly from publications, in the course of conducting several simulation-based research projects but particularly from the Pastoral 21 Environment program which was funded by the New Zealand Ministry for Business, Innovation and Employment,  Dairy NZ, Fonterra and Meat & Wool NZ.
              Comments=The data is a combination of published or supplied measurements, pedotransfer functions, and expert opinion. See Cichota et al. (2013; Soil Research 51: 92-111, http://dx.doi.org/10.1071/SR12338) for a description of the pedotransfer functions. The soil carbon and fresh organic matter settings have been set as those broadly appropriate for permanent productive pastoral systems, see Cichota el al. (2012; Soil Research 50: 694-707, http://dx.doi.org/10.1071/SR12208). Users should take care to adapt these to local conditions before using the data in simulations. FOM values estimated to be 900 kg/ha of FOM in top 600mm of soil and another 100 kg/ha below.
              Physical
                Thickness  ParticleSizeSand  ParticleSizeSilt  ParticleSizeClay  Rocks  BD     AirDry  LL15   DUL    SAT    KS
                100        13.735            74.265            12                0      1.171  0.054   0.163  0.432  0.494  1996.371
                130        13.063            72.937            14                0      1.248  0.053   0.159  0.373  0.483  917.695
                100        2.554             78.446            19                0      1.306  0.057   0.171  0.354  0.475  311.124
                270        6.973             75.027            18                0      1.344  0.06    0.181  0.348  0.464  268.836
                130        24.063            58.467            17.47             0      1.421  0.052   0.158  0.327  0.438  656.485
                70         42.878            43.552            13.57             0      1.433  0.033   0.101  0.288  0.43   1184.37
                190        45.032            41.968            13                0      1.411  0.028   0.085  0.302  0.436  1423.197
                180        18.248            68.492            13.26             0      1.439  0.039   0.118  0.345  0.424  324.548
                140        3.303             74.697            22                0      1.362  0.059   0.179  0.408  0.45   150.715
                190        21.63             62.37             16                0      1.375  0.039   0.118  0.344  0.451  386.542
                BD source: Field measured and checked for sensibility
                AirDry source: Estimated based on local knowledge
                LL15, DUL source: Laboratory measured
                SAT source: Calculated from measured, estimated or calculated BD
                SoilCrop PlantainForageSoil
                  LL=[0.163, 0.159, 0.171, 0.181, 0.158, 0.101, 0.085, 0.118, 0.179, 0.118]
                  KL=[0.1, 0.095, 0.08, 0.05, 0.02, 0.015, 0.01, 0.01, 0, 0]
                  XF=[1, 1, 1, 1, 1, 1, 1, 1, 0, 0]
                  LL source: Estimated based on local knowledge
              WaterBalance SoilWater: SummerDate=1-Nov; SummerU=6; SummerCona=3.5; WinterDate=1-Apr; WinterU=3; WinterCona=2; DiffusConst=88; DiffusSlope=35; Salb=0.13; CN2Bare=73; CNRed=20; CNCov=0.8; PSIDul=-100; Thickness=[100, 130, 100, 270, 130, 70, 190, 180, 140, 190]
                SWCON=[0.638, 0.566, 0.547, 0.45, 0.558, 0.614, 0.546, 0.525, 0.569, 0.507]
              Organic: FOMCNRatio=40; CarbonUnits=Total
                Thickness  Carbon  SoilCNRatio  FBiom  FInert  FOM
                100        3.1     11.5         0.08   0.329   450
                130        1.9     11.5         0.055  0.418   400
                100        1.1     12           0.035  0.702   180
                270        0.3     12.3         0.025  0.876   170
                130        0.2     12.5         0.018  0.943   30
                70         0.2     12.8         0.013  0.96    10
                190        0.2     13           0.01   0.969   6
                180        0.15    13           0.01   0.99    4
                140        0.15    13           0.01   0.993   0
                190        0.1     13           0.01   0.993   0
              Chemical: PHUnits=Water
                Thickness  PH   CEC
                100        6.5  12.2
                130        6.5  10.9
                100        6.5  10.7
                270        6.5  10.7
                130        6.5  8.7
                70         6.5  6.3
                190        6.5  6
                180        6.5  8.4
                140        6.5  11.3
                190        6.5  7.8
                PH source: Estimated based on local knowledge
              Nutrient
              Water: Thickness=[100, 130, 100, 270, 130, 70, 190, 180, 140, 190]; FilledFromTop=false
                InitialValues=[0.432, 0.373, 0.354, 0.348, 0.327, 0.288, 0.302, 0.345, 0.408, 0.344]
              Solute NO3: Thickness=[100, 130, 370, 570, 330]; InitialValues=[10, 7, 3, 1, 1]; InitialValuesUnits=ppm; WaterTableConcentration=0; D0=0; DepthConstant=0; MaxDepthSoluteAccessible=0; RunoffEffectivenessAtMovingSolute=0; MaxEffectiveRunoff=0
              Solute NH4: Thickness=[100, 130, 370, 570, 330]; InitialValues=[2, 1, 0.5, 0.3, 0.2]; InitialValuesUnits=ppm; WaterTableConcentration=0; D0=0; DepthConstant=0; MaxDepthSoluteAccessible=0; RunoffEffectivenessAtMovingSolute=0; MaxEffectiveRunoff=0
              Solute Urea: Thickness=[100, 130, 370, 570, 330]; InitialValues=[0, 0, 0, 0, 0]; InitialValuesUnits=kg/ha; WaterTableConcentration=0; D0=0; DepthConstant=0; MaxDepthSoluteAccessible=0; RunoffEffectivenessAtMovingSolute=0; MaxEffectiveRunoff=0
              SoilTemperature Temperature: InteractionsPerDay=8
            Plant PlantainForage
            Report BaseReport: VariableNames=// variables defined in 'Replacements'; EventNames=[Clock].DoReport
            Report CumReport: VariableNames=// variables defined in 'Replacements'; EventNames=[Clock].DoReport
            Report CropReport: VariableNames=// variables defined in 'Replacements'; EventNames=[Clock].DoReport
            Report DiagnosisReport: VariableNames=// variables defined in 'Replacements'; EventNames=[Clock].DoReport
            Report ValidationReport: same as Validation.New Zealand.FRNLLincoln.FRNLLincoln.Field.ValidationReport
      Experiment SFFFWaikato
        Memo: same as Validation.New Zealand.MasseyRDF1.Memo
        Factors
          Factor Cultivar
            CompositeFactor One: Specifications=[Sowing]
              Operations Sowing
                2022-10-18  [PlantainForage].Sow(population: 350, cultivar: "Tonic", depth: 10, rowSpacing: 150)
            CompositeFactor Two: same as Validation.New Zealand.SFFFWaikato.Factors.Cultivar.One
            CompositeFactor Three: same as Validation.New Zealand.SFFFWaikato.Factors.Cultivar.One
            CompositeFactor Four: same as Validation.New Zealand.SFFFWaikato.Factors.Cultivar.One
            CompositeFactor Five: same as Validation.New Zealand.SFFFWaikato.Factors.Cultivar.One
            CompositeFactor Six: same as Validation.New Zealand.SFFFWaikato.Factors.Cultivar.One
            CompositeFactor Seven: same as Validation.New Zealand.SFFFWaikato.Factors.Cultivar.One
            CompositeFactor Eight: same as Validation.New Zealand.SFFFWaikato.Factors.Cultivar.One
            CompositeFactor Nine: same as Validation.New Zealand.SFFFWaikato.Factors.Cultivar.One
            CompositeFactor Ten: Specifications=[Sowing]
              Operations Sowing
                2022-10-17  [AGPRyegrass].EndCrop()
                2022-10-18  [AGPRyegrass].Sow(population: 0, cultivar: "R", depth: 0, rowSpacing: 0)
            CompositeFactor Eleven: same as Validation.New Zealand.SFFFWaikato.Factors.Cultivar.One
            CompositeFactor Twelve: same as Validation.New Zealand.SFFFWaikato.Factors.Cultivar.One
            CompositeFactor Thirteen: same as Validation.New Zealand.SFFFWaikato.Factors.Cultivar.One
            CompositeFactor Fourteen: same as Validation.New Zealand.SFFFWaikato.Factors.Cultivar.One
            CompositeFactor Fifteen: same as Validation.New Zealand.SFFFWaikato.Factors.Cultivar.One
            CompositeFactor Sixteen: same as Validation.New Zealand.SFFFWaikato.Factors.Cultivar.One
            CompositeFactor Seventeen: same as Validation.New Zealand.SFFFWaikato.Factors.Cultivar.One
            CompositeFactor Eightteen: same as Validation.New Zealand.SFFFWaikato.Factors.Cultivar.One
            CompositeFactor Nineteen: same as Validation.New Zealand.SFFFWaikato.Factors.Cultivar.One
            CompositeFactor Twenty: same as Validation.New Zealand.SFFFWaikato.Factors.Cultivar.One
        Simulation SFFFWaikato
          Clock: Start=2022-07-01; End=2024-06-30
          Weather: FileName=Ruakura.met
          Summary summaryfile
          SoilArbitrator Soil Arbitrator
          Forages
            Parameters:
              Name                          LiveDigestibility  DeadDigestibility  LiveFractionConsumable  DeadFractionConsumable  LiveMinimumBiomass  DeadMinimumBiomass
              SurfaceOrganicMatter.Residue  0.7                0.3                0                       0                       0                   0
              PlantainForage.Leaf           0.75               0.3                1                       1                       0                   0
              PlantainForage.Stem           0.7                0.2                1                       1                       0                   0
              PlantainForage.Inflorescence  0.6                0.2                1                       1                       0                   0
              PlantainForage.Taproot        0.7                0.3                0                       0                       0                   0
              PlantainForage.Root           0.7                0.3                0                       0                       0                   0
              AGPRyegrass.Leaf              0.7                0.3                1                       1                       0                   0
              AGPRyegrass.Stem              0.7                0.3                1                       1                       0                   0
              AGPRyegrass.Stolon            0.7                0.3                1                       1                       0                   0
          Zone Field: Area=1; Slope=0; AspectAngle=0; Altitude=50
            Folder Management
              Operations Sowing
              Operations FertiliserSchedule
                2022-10-18  [Fertiliser].Apply(amount: 26, type: "DAP", depth: 10)
                2023-02-03  [Fertiliser].Apply(amount: 46, type: "UreaN", depth: 10)
                2023-03-20  [Fertiliser].Apply(amount: 31, type: "UreaN", depth: 10)
                2023-05-03  [Fertiliser].Apply(amount: 46, type: "UreaN", depth: 10)
                2023-09-19  [Fertiliser].Apply(amount: 19, type: "UreaN", depth: 10)
                2023-10-25  [Fertiliser].Apply(amount: 49, type: "UreaN", depth: 10)
                2023-11-17  [Fertiliser].Apply(amount: 34, type: "UreaN", depth: 10)
                2023-12-01  [Fertiliser].Apply(amount: 35, type: "UreaN", depth: 10)
                2023-12-22  [Fertiliser].Apply(amount: 39, type: "UreaN", depth: 10)
                2024-01-23  [Fertiliser].Apply(amount: 56, type: "UreaN", depth: 10)
                2024-03-22  [Fertiliser].Apply(amount: 56, type: "UreaN", depth: 10)
              Operations IrrigationSchedule: same as Validation.New Zealand.MasseyRDF1.MasseyRDF1.Field.Management.IrrigationSchedule
              Operations DefoliationSchedule
                2022-12-19  [DefoliationManager].Script.Defoliate(amountDM: 40, amountType: "ResidualDM", duration: 1)
                2023-01-13  [DefoliationManager].Script.Defoliate(amountDM: 40, amountType: "ResidualDM", duration: 1)
                2023-02-02  [DefoliationManager].Script.Defoliate(amountDM: 40, amountType: "ResidualDM", duration: 1)
                2023-02-21  [DefoliationManager].Script.Defoliate(amountDM: 40, amountType: "ResidualDM", duration: 1)
                2023-03-14  [DefoliationManager].Script.Defoliate(amountDM: 40, amountType: "ResidualDM", duration: 1)
                2023-04-26  [DefoliationManager].Script.Defoliate(amountDM: 40, amountType: "ResidualDM", duration: 1)
                2023-06-27  [DefoliationManager].Script.Defoliate(amountDM: 40, amountType: "ResidualDM", duration: 1)
                2023-09-12  [DefoliationManager].Script.Defoliate(amountDM: 40, amountType: "ResidualDM", duration: 1)
                2023-10-17  [DefoliationManager].Script.Defoliate(amountDM: 40, amountType: "ResidualDM", duration: 1)
                2023-11-08  [DefoliationManager].Script.Defoliate(amountDM: 40, amountType: "ResidualDM", duration: 1)
                2023-11-29  [DefoliationManager].Script.Defoliate(amountDM: 40, amountType: "ResidualDM", duration: 1)
                2023-12-20  [DefoliationManager].Script.Defoliate(amountDM: 40, amountType: "ResidualDM", duration: 1)
                2024-01-18  [DefoliationManager].Script.Defoliate(amountDM: 40, amountType: "ResidualDM", duration: 1)
              Manager DefoliationManager
                AllowAutomaticManagement = No
                DefoliationRotationStartDate = 01/01/1900 00:00:00
                DefoliationRotationEndDate = 12/31/2100 00:00:00
                DefoliationTriggerType = TargetStandingBiomass
                IntervalBetweenDefoliations = 15
                TargetStandingBiomass = 250
                DurationOfEachDefoliation = 1
                RemoveAmountType = ResidualDM
                AmountForEachDefoliation = 125
                MininumAmountToDefoliate = 75
                SuppressDefoliationOnWindow = No
                NoDefoliationWindowStartDate = 1-Jun
                NoDefoliationWindowEndDate = 30-Jul
                EnforceMinimumInterval = No
                MinimumInterval = 15
                EnforceMaximumInterval = No
                MaximumInterval = 90
                DMRemoveType = BasedOnDigestibility
                FractionDMToRemove = 0.99
                NRemoveType = UserDefinedFraction
                FractionNToRemove = 0.99
                ReturnType = AsResidue
                NDungType = DefineCNratio
                ProportionOfNToDung = 0.4
                CNRatioDung = 17.5
                UrineDepth = 250
                SettingUrineNAmount = No
                UrineNSetAmount = 2
                PopulationDeclineRate = 0
                ConsiderTrampling = No
                MaximumLitterFractionToSoil = 0.01
                BiomassDefoliatedForMaximumLitterFraction = 120
                MeanGrowthPeriodType = BetweenDefoliations
                MaxPeriodForMeanGrowth = 30
                script: same as in Validation.New Zealand.FRNLLincoln.FRNLLincoln.Field.Management.DefoliationManager
              Manager DungAndUrine: same as Validation.New Zealand.MasseyRDF1.MasseyRDF1.Field.Management.DungAndUrine
              Manager AuxReport (disabled)
                ShadeTreatment = Some
                WaterTreatment = All
                DateForReseting = 1-Jul
                script: same as in Validation.New Zealand.LincolnRDF.LincolnRDF.Field.Management.AuxReport
            MicroClimate: a_interception=0; b_interception=1; c_interception=0; d_interception=0; SoilHeatFluxFraction=0.4; MinimumHeightDiffForNewLayer=0; NightInterceptionFraction=0.5; ReferenceHeight=2
            Irrigation
            Fertiliser
            SurfaceOrganicMatter: InitialResidueName=grass; InitialResidueType=grass; InitialResidueMass=500; InitialStandingFraction=0; InitialCPR=0; InitialCNR=40
            Soil HorotiuSoil: SoilType=Typic Orthic Gley; LocalName=Silty clay loam; Site=Ruakura; NearestTown=Hamilton; Region=Waikato; Country=New Zealand; Latitude=-37.915722; Longitude=175.193; DataSource=Plantain Potency and Practice SFFF Dairy NZ
              Chemical: PHUnits=Water
                Thickness  PH   CEC
                100        5.6  21.3
                100        5.4  23.8
                100        5.9  15.4
                100        5.8  13.9
                200        5.8  16
                200        5.4  3.5
                200        5.4  3.3
              Physical
                Thickness  ParticleSizeSand  ParticleSizeSilt  ParticleSizeClay  Rocks  BD    AirDry  LL15   DUL    SAT    KS
                100        47                33                20                0      0.99  0.114   0.22   0.484  0.581  553
                100        65                17                19                0      0.92  0.209   0.229  0.446  0.609  5083
                100        76                13                11                0      1.16  0.182   0.267  0.444  0.54   8353
                100        84                10                7                 0      1.13  0.15    0.291  0.441  0.5    13589
                200        88                8                 5                 0      1.08  0.142   0.199  0.391  0.5    38963
                200        91                6                 3                 4      1.26  0.103   0.128  0.249  0.446  45280
                200        94                5                 1                 25     1.28  0.07    0.077  0.275  0.37   53606
                SoilCrop PlantainForageSoil: LL=[0.228, 0.22, 0.182, 0.15, 0.142, 0.103, 0.08]; KL=[0.1, 0.08, 0.05, 0.02, 0.01, 0.01, 0]; XF=[1, 1, 1, 1, 1, 1, 0.5]
                SoilCrop AGPRyegrassSoil: LL=[0.22, 0.219, 0.182, 0.15, 0.15, 0.12, -]; KL=[0.1, 0.085, 0.055, 0.02, 0.005, 0, -]; XF=[1, 1, 1, 1, 1, 1, -]
              WaterBalance SoilWater: SummerDate=1-Nov; SummerU=6; SummerCona=3.5; WinterDate=1-Apr; WinterU=3; WinterCona=1.5; DiffusConst=88; DiffusSlope=35; Salb=0.13; CN2Bare=70; CNRed=23; CNCov=0.8; PSIDul=-100; Thickness=[100, 100, 100, 100, 200, 200, 200]; SWCON=[0.55, 0.6, 0.7, 0.7, 0.75, 0.8, 0.8]
              Organic: FOMCNRatio=40; CarbonUnits=Total
                Thickness  Carbon  SoilCNRatio  FBiom  FInert  FOM
                100        3.8     11.5         0.07   0.5     750
                100        5.1     10.7         0.035  0.63    340
                100        1.5     11.4         0.025  0.75    90
                100        1       9.7          0.02   0.85    45
                200        1.1     11.4         0.01   0.93    25
                200        0.2     7.9          0.01   0.98    0
                200        0.1     5.7          0.01   0.99    0
              Water: Thickness=[100, 100, 100, 100, 200, 200, 200]; InitialValues=[0.484, 0.446, 0.444, 0.441, 0.391, 0.157, 0.077]; FilledFromTop=true
              Nutrient
              Solute NO3: Thickness=[100, 100, 100, 100, 200, 200, 220]; InitialValues=[15, 10, 5, 5, 4.47368, 1, 1]; InitialValuesUnits=ppm; WaterTableConcentration=0; D0=0; DepthConstant=0; MaxDepthSoluteAccessible=0; RunoffEffectivenessAtMovingSolute=0; MaxEffectiveRunoff=0
              Solute NH4: same as Validation.New Zealand.FRNLRuakura.FRNLRuakura.Field.HorotiuSoil.NH4
              Solute Urea: same as Validation.New Zealand.FRNLRuakura.FRNLRuakura.Field.HorotiuSoil.Urea
              SoilTemperature Temperature: InteractionsPerDay=8
            Plant PlantainForage
            PastureSpecies AGPRyegrass: doyGermination=275; daysEmergenceToAnthesis=120; daysAnthesisToMaturity=85; degreesDayForAnthesis=1100; degreesDayForMaturity=900; daysAnnualsFactor=45; CanopyType=PastureSpecies; InitialShootDM=0; InitialRootDM=0; InitialRootDepth=0; initialDMFractionsGrasses=[0.15, 0.25, 0.25, 0.05, 0.05, 0.1, 0.1, 0.05, 0, 0, 0]; initialDMFractionsForbs=[0.2, 0.2, 0.15, 0.05, 0.1, 0.15, 0.1, 0.05, 0, 0, 0]; PhotosyntheticEfficiency=0.01; PhotosynthesisCurveFactor=0.8; FractionPAR=0.5; ReferenceCO2=380; CO2EffectScaleFactor=700; CO2EffectOffsetFactor=600; CO2EffectMinimum=0.7; CO2EffectExponent=2; ReproSeasonDurationCoeff=2; ReproSeasonShouldersLengthFactor=1; ReproSeasonOnsetDurationFactor=0.6; RelativeTurnoverEmerging=2; DetachmentDroughtCoefficient=3; DetachmentDroughtEffectMin=0.1; TurnoverStockFactor=0.01; TurnoverDefoliationEffectMin=0.025; MinimumGreenLeafProp=0.8; MinimumGreenRootProp=0.5
              initialDMFractionsLegumes=[0.16, 0.23, 0.22, 0.05, 0.03, 0.05, 0.05, 0.01, 0.04, 0.08, 0.08]
              LinearInterpolationFunction FVPDFunction
            Report BaseReport: VariableNames=// variables defined in 'Replacements'; EventNames=[Clock].DoReport
            Report CumReport: VariableNames=// variables defined in 'Replacements'; EventNames=[Clock].DoReport
            Report CropReport: VariableNames=// variables defined in 'Replacements'; EventNames=[Clock].DoReport
            Report DiagnosisReport: VariableNames=// variables defined in 'Replacements'; EventNames=[Clock].DoReport
            Report ValidationReport: EventNames=[Clock].DoReport
              VariableNames:
                [Clock].Today as Date
                [Clock].Today.DayOfYear as DayOfYear
                [PlantainForage].Population as Population
                [PlantainForage].AboveGround.Wt as AboveGround.Wt
                [PlantainForage].Leaf.Live.NConc as Leaf.Live.NConc
                [PlantainForage].AboveGroundLive.NConc as AboveGroundLive.NConc
                [PlantainForage].Leaf.Height as PlantHeight
                [DefoliationManager].Script.HarvestedWt as HarvestedWt
                [DefoliationManager].Script.HarvestedN as HarvestedN
                Sum of ([DefoliationManager].Script.HarvestedWt) from 1-Jul to [Clock].Today as CumulativeHarvestedWt
                Sum of ([DefoliationManager].Script.HarvestedN) from 1-Jul to [Clock].Today as CumulativeHarvestedN
            Report MonthReport: EventNames=[Clock].EndOfMonth
              VariableNames:
                [Clock].Today as Date
                mean of (([PlantainForage].Leaf.Allocated.Wt - [PlantainForage].Leaf.Senesced.Wt)+ ([PlantainForage].Stem.Allocated.Wt - [PlantainForage].Stem.Senesced.Wt)+ ([PlantainForage].Inflorescence.Allocated.Wt - [PlantainForage].Inflorescence.Senesced.Wt)) from [Clock].StartOfMonth to [Clock].EndOfMonth as MonthlyMeanNetGrowth
      Experiment SFFFManawatu
        Memo: same as Validation.New Zealand.MasseyRDF1.Memo
        Factors
          Factor Cultivar
            CompositeFactor One: Specifications=[Sowing]
              Operations Sowing
                2022-11-08  [PlantainForage].Sow(population: 350, cultivar: "Tonic", depth: 10, rowSpacing: 150)
            CompositeFactor Two: same as Validation.New Zealand.SFFFManawatu.Factors.Cultivar.One
            CompositeFactor Three: same as Validation.New Zealand.SFFFManawatu.Factors.Cultivar.One
            CompositeFactor Four: same as Validation.New Zealand.SFFFManawatu.Factors.Cultivar.One
            CompositeFactor Five: same as Validation.New Zealand.SFFFManawatu.Factors.Cultivar.One
            CompositeFactor Six: same as Validation.New Zealand.SFFFManawatu.Factors.Cultivar.One
            CompositeFactor Seven: same as Validation.New Zealand.SFFFManawatu.Factors.Cultivar.One
            CompositeFactor Eight: same as Validation.New Zealand.SFFFManawatu.Factors.Cultivar.One
            CompositeFactor Nine: same as Validation.New Zealand.SFFFManawatu.Factors.Cultivar.One
            CompositeFactor Ten: Specifications=[Sowing]
              Operations Sowing
                2022-11-05  [AGPRyegrass].EndCrop()
                2022-11-08  [AGPRyegrass].Sow(population: 0, cultivar: "R", depth: 0, rowSpacing: 0)
        Simulation SFFFManawatu
          Clock: Start=2022-07-01; End=2024-06-30
          Weather: FileName=PalmerstonNorth.met
          Summary summaryfile
          SoilArbitrator Soil Arbitrator
          Forages: same as Validation.New Zealand.SFFFWaikato.SFFFWaikato.Forages
          Zone Field: Area=1; Slope=0; AspectAngle=0; Altitude=50
            Folder Management
              Operations Sowing
                2011-10-10  [PlantainForage].Sow(population: 350, cultivar: "Tonic", depth: 10, rowSpacing: 150)
              Operations FertiliserSchedule
                2022-11-08  [Fertiliser].Apply(amount: 26, type: "DAP", depth: 10)
                2023-02-23  [Fertiliser].Apply(amount: 47, type: "UreaN", depth: 10)
                2023-03-23  [Fertiliser].Apply(amount: 41, type: "UreaN", depth: 10)
                2023-04-24  [Fertiliser].Apply(amount: 41, type: "UreaN", depth: 10)
                2023-09-11  [Fertiliser].Apply(amount: 15, type: "UreaN", depth: 10)
                2023-10-18  [Fertiliser].Apply(amount: 60, type: "UreaN", depth: 10)
                2023-11-08  [Fertiliser].Apply(amount: 32, type: "UreaN", depth: 10)
                2023-12-04  [Fertiliser].Apply(amount: 46, type: "UreaN", depth: 10)
                2023-12-18  [Fertiliser].Apply(amount: 8, type: "UreaN", depth: 10)
                2024-03-22  [Fertiliser].Apply(amount: 32, type: "UreaN", depth: 10)
              Operations IrrigationSchedule: same as Validation.New Zealand.MasseyRDF1.MasseyRDF1.Field.Management.IrrigationSchedule
              Operations DefoliationSchedule
                2023-01-10  [DefoliationManager].Script.Defoliate(amountDM: 40, amountType: "ResidualDM", duration: 1)
                2023-01-27  [DefoliationManager].Script.Defoliate(amountDM: 40, amountType: "ResidualDM", duration: 1)
                2023-02-23  [DefoliationManager].Script.Defoliate(amountDM: 40, amountType: "ResidualDM", duration: 1)
                2023-03-23  [DefoliationManager].Script.Defoliate(amountDM: 40, amountType: "ResidualDM", duration: 1)
                2023-04-24  [DefoliationManager].Script.Defoliate(amountDM: 40, amountType: "ResidualDM", duration: 1)
                2023-06-09  [DefoliationManager].Script.Defoliate(amountDM: 40, amountType: "ResidualDM", duration: 1)
                2023-10-18  [DefoliationManager].Script.Defoliate(amountDM: 40, amountType: "ResidualDM", duration: 1)
                2023-11-08  [DefoliationManager].Script.Defoliate(amountDM: 40, amountType: "ResidualDM", duration: 1)
                2023-12-18  [DefoliationManager].Script.Defoliate(amountDM: 40, amountType: "ResidualDM", duration: 1)
                2024-02-02  [DefoliationManager].Script.Defoliate(amountDM: 40, amountType: "ResidualDM", duration: 1)
                2024-05-23  [DefoliationManager].Script.Defoliate(amountDM: 40, amountType: "ResidualDM", duration: 1)
              Manager DefoliationManager: same as Validation.New Zealand.MasseyRDF1.MasseyRDF1.Field.Management.DefoliationManager
              Manager DungAndUrine: same as Validation.New Zealand.MasseyRDF1.MasseyRDF1.Field.Management.DungAndUrine
              Manager AuxReport: same as Validation.New Zealand.MasseyRDF1.MasseyRDF1.Field.Management.AuxReport
            MicroClimate: a_interception=0; b_interception=1; c_interception=0; d_interception=0; SoilHeatFluxFraction=0.4; MinimumHeightDiffForNewLayer=0; NightInterceptionFraction=0.5; ReferenceHeight=2
            Irrigation
            Fertiliser
            SurfaceOrganicMatter: InitialResidueName=grass; InitialResidueType=grass; InitialResidueMass=500; InitialStandingFraction=0; InitialCPR=0; InitialCNR=40
            Soil: SoilType=Mottled Immature Pallic; LocalName=Manawatu; Site=2919a Cheltenham-Hunterville road; NearestTown=Longburn; Region=Manawatu; Country=New Zealand; NaturalVegetation=long term grass; Latitude=-40.406; Longitude=175.536; LocationAccuracy=+/-50 m; YearOfSampling=2021; DataSource=Plantain Potency and Practice SFFF Dairy NZ
              Physical
                Thickness  ParticleSizeSand  ParticleSizeSilt  ParticleSizeClay  Rocks  BD    AirDry  LL15   DUL    SAT    KS
                100        13.735            74.265            12                0      1.16  0.163   0.163  0.427  0.535  1996.371
                100        13.063            72.937            14                0      1.19  0.156   0.16   0.38   0.521  917.695
                100        2.554             78.446            19                0      1.34  0.15    0.158  0.37   0.494  311.124
                100        6.973             75.027            18                0      1.55  0.15    0.158  0.353  0.415  268.836
                200        24.063            58.467            17.47             0      1.56  0.15    0.164  0.311  0.411  656.485
                200        42.878            43.552            13.57             0      1.56  0.1     0.17   0.337  0.411  1184.37
                SoilCrop PlantainForageSoil: LL=[0.163, 0.159, 0.171, 0.181, 0.158, 0.101]; KL=[0.1, 0.095, 0.08, 0.05, 0.02, 0.015]; XF=[1, 1, 1, 1, 1, 1]
                SoilCrop AGPRyegrassSoil: LL=[0.22, 0.219, 0.177, 0.15, 0.15, 0.12, -]; KL=[0.1, 0.085, 0.055, 0.02, 0.005, 0, -]; XF=[1, 1, 1, 1, 1, 1, -]
              WaterBalance SoilWater: SummerDate=1-Nov; SummerU=6; SummerCona=3.5; WinterDate=1-Apr; WinterU=3; WinterCona=2; DiffusConst=88; DiffusSlope=35; Salb=0.13; CN2Bare=73; CNRed=20; CNCov=0.8; PSIDul=-100; Thickness=[100, 100, 100, 100, 200, 200]; SWCON=[0.638, 0.566, 0.547, 0.45, 0.558, 0.614]
              Organic: FOMCNRatio=40; CarbonUnits=Total
                Thickness  Carbon  SoilCNRatio  FBiom  FInert  FOM
                100        3.3     10.5         0.08   0.329   450
                100        2.6     10.2         0.055  0.418   400
                100        1.6     10.2         0.035  0.702   180
                100        0.6     8.7          0.025  0.876   170
                200        0.5     8.9          0.018  0.943   30
                200        0.4     8.2          0.013  0.96    10
              Chemical: PHUnits=Water
                Thickness  PH   CEC
                100        6.3  17.4
                100        6.4  15.1
                100        6.4  10.9
                100        6.4  8.2
                200        6.2  9.5
                200        5.7  10.4
              Nutrient
              Water: Thickness=[100, 100, 100, 100, 200, 200]; InitialValues=[0.432, 0.373, 0.354, 0.348, 0.327, 0.288]; FilledFromTop=false
              Solute NO3: Thickness=[100, 100, 100, 100, 200, 200]; InitialValues=[10, 7, 3, 1, 1, 1]; InitialValuesUnits=ppm; WaterTableConcentration=0; D0=0; DepthConstant=0; MaxDepthSoluteAccessible=0; RunoffEffectivenessAtMovingSolute=0; MaxEffectiveRunoff=0
              Solute NH4: Thickness=[100, 100, 100, 100, 200, 200]; InitialValues=[2, 1, 0.5, 0.3, 0.2, 0.1]; InitialValuesUnits=ppm; WaterTableConcentration=0; D0=0; DepthConstant=0; MaxDepthSoluteAccessible=0; RunoffEffectivenessAtMovingSolute=0; MaxEffectiveRunoff=0
              Solute Urea: Thickness=[100, 100, 100, 100, 200, 200]; InitialValues=[0, 0, 0, 0, 0, 0]; InitialValuesUnits=kg/ha; WaterTableConcentration=0; D0=0; DepthConstant=0; MaxDepthSoluteAccessible=0; RunoffEffectivenessAtMovingSolute=0; MaxEffectiveRunoff=0
              SoilTemperature Temperature: InteractionsPerDay=8
            Plant PlantainForage
            PastureSpecies AGPRyegrass: same as Validation.New Zealand.SFFFWaikato.SFFFWaikato.Field.AGPRyegrass
            Report BaseReport: VariableNames=// variables defined in 'Replacements'; EventNames=[Clock].DoReport
            Report CumReport: VariableNames=// variables defined in 'Replacements'; EventNames=[Clock].DoReport
            Report CropReport: VariableNames=// variables defined in 'Replacements'; EventNames=[Clock].DoReport
            Report DiagnosisReport: VariableNames=// variables defined in 'Replacements'; EventNames=[Clock].DoReport
            Report ValidationReport: same as Validation.New Zealand.SFFFWaikato.SFFFWaikato.Field.ValidationReport
            Report MonthReport: same as Validation.New Zealand.SFFFWaikato.SFFFWaikato.Field.MonthReport
      Experiment SFFFCanterbury
        Memo: same as Validation.New Zealand.MasseyRDF1.Memo
        Factors
          Factor Cultivar
            CompositeFactor One: Specifications=[Sowing]
              Operations Sowing
                2022-12-23  [PlantainForage].Sow(population: 350, cultivar: "Tonic", depth: 10, rowSpacing: 150)
            CompositeFactor Two: same as Validation.New Zealand.SFFFCanterbury.Factors.Cultivar.One
            CompositeFactor Three: same as Validation.New Zealand.SFFFCanterbury.Factors.Cultivar.One
            CompositeFactor Four: same as Validation.New Zealand.SFFFCanterbury.Factors.Cultivar.One
            CompositeFactor Five: same as Validation.New Zealand.SFFFCanterbury.Factors.Cultivar.One
            CompositeFactor Six: same as Validation.New Zealand.SFFFCanterbury.Factors.Cultivar.One
            CompositeFactor Seven: same as Validation.New Zealand.SFFFCanterbury.Factors.Cultivar.One
            CompositeFactor Eight: same as Validation.New Zealand.SFFFCanterbury.Factors.Cultivar.One
            CompositeFactor Nine: same as Validation.New Zealand.SFFFCanterbury.Factors.Cultivar.One
            CompositeFactor Ten: same as Validation.New Zealand.SFFFManawatu.Factors.Cultivar.Ten
            CompositeFactor Eleven: same as Validation.New Zealand.SFFFCanterbury.Factors.Cultivar.One
            CompositeFactor Twelve: same as Validation.New Zealand.SFFFCanterbury.Factors.Cultivar.One
            CompositeFactor Thirteen: same as Validation.New Zealand.SFFFCanterbury.Factors.Cultivar.One
            CompositeFactor Fourteen: same as Validation.New Zealand.SFFFCanterbury.Factors.Cultivar.One
            CompositeFactor Fifteen: same as Validation.New Zealand.SFFFCanterbury.Factors.Cultivar.One
            CompositeFactor Sixteen: same as Validation.New Zealand.SFFFCanterbury.Factors.Cultivar.One
            CompositeFactor Seventeen: same as Validation.New Zealand.SFFFCanterbury.Factors.Cultivar.One
            CompositeFactor Eightteen: same as Validation.New Zealand.SFFFCanterbury.Factors.Cultivar.One
            CompositeFactor Nineteen: same as Validation.New Zealand.SFFFCanterbury.Factors.Cultivar.One
            CompositeFactor Twenty: same as Validation.New Zealand.SFFFCanterbury.Factors.Cultivar.One
        Simulation SFFFCanterbury
          Clock: Start=2022-07-01; End=2024-06-29
          Weather: FileName=Lincoln-Broadfields.met
          Summary summaryfile
          SoilArbitrator Soil Arbitrator
          Forages: same as Validation.New Zealand.SFFFWaikato.SFFFWaikato.Forages
          Zone Field: Area=1; Slope=0; AspectAngle=0; Altitude=50
            Folder Management
              Operations Sowing
              Operations FertiliserSchedule
                2022-12-23  [Fertiliser].Apply(amount: 24, type: "DAP", depth: 10)
                2023-03-20  [Fertiliser].Apply(amount: 46, type: "UreaN", depth: 10)
                2023-05-12  [Fertiliser].Apply(amount: 46, type: "UreaN", depth: 10)
                2023-09-19  [Fertiliser].Apply(amount: 45, type: "UreaN", depth: 10)
                2023-11-10  [Fertiliser].Apply(amount: 46, type: "UreaN", depth: 10)
                2023-11-30  [Fertiliser].Apply(amount: 42, type: "UreaN", depth: 10)
                2023-12-28  [Fertiliser].Apply(amount: 55, type: "UreaN", depth: 10)
                2024-02-05  [Fertiliser].Apply(amount: 55, type: "UreaN", depth: 10)
                2024-03-29  [Fertiliser].Apply(amount: 23, type: "UreaN", depth: 10)
              Operations IrrigationSchedule
                2022-12-23  [Irrigation].Apply(amount: 25)
                2023-01-01  [Irrigation].Apply(amount: 25)
                2023-01-10  [Irrigation].Apply(amount: 25)
                2023-01-20  [Irrigation].Apply(amount: 25)
                2023-01-30  [Irrigation].Apply(amount: 25)
                2023-02-05  [Irrigation].Apply(amount: 25)
                2023-02-10  [Irrigation].Apply(amount: 25)
                2023-02-18  [Irrigation].Apply(amount: 25)
                2023-02-28  [Irrigation].Apply(amount: 25)
                2023-03-05  [Irrigation].Apply(amount: 25)
                2023-03-15  [Irrigation].Apply(amount: 25)
                2023-03-30  [Irrigation].Apply(amount: 25)
                2023-04-15  [Irrigation].Apply(amount: 25)
                2023-05-30  [Irrigation].Apply(amount: 25)
                2023-10-01  [Irrigation].Apply(amount: 25)
                2023-11-01  [Irrigation].Apply(amount: 25)
                2023-12-01  [Irrigation].Apply(amount: 25)
                2023-12-05  [Irrigation].Apply(amount: 25)
                2023-12-10  [Irrigation].Apply(amount: 25)
                2023-12-15  [Irrigation].Apply(amount: 25)
                2023-12-25  [Irrigation].Apply(amount: 25)
                2023-12-30  [Irrigation].Apply(amount: 25)
                2024-01-05  [Irrigation].Apply(amount: 25)
                2024-01-15  [Irrigation].Apply(amount: 25)
                2024-01-20  [Irrigation].Apply(amount: 25)
                2024-01-30  [Irrigation].Apply(amount: 25)
                2024-02-10  [Irrigation].Apply(amount: 25)
                2024-02-28  [Irrigation].Apply(amount: 25)
                2024-03-10  [Irrigation].Apply(amount: 25)
                2024-03-30  [Irrigation].Apply(amount: 25)
                2024-04-10  [Irrigation].Apply(amount: 25)
              Operations DefoliationSchedule
                2023-02-20  [DefoliationManager].Script.Defoliate(amountDM: 40, amountType: "ResidualDM", duration: 1)
                2023-03-16  [DefoliationManager].Script.Defoliate(amountDM: 40, amountType: "ResidualDM", duration: 1)
                2023-05-04  [DefoliationManager].Script.Defoliate(amountDM: 40, amountType: "ResidualDM", duration: 1)
                2023-08-09  [DefoliationManager].Script.Defoliate(amountDM: 40, amountType: "ResidualDM", duration: 1)
                2023-09-15  [DefoliationManager].Script.Defoliate(amountDM: 40, amountType: "ResidualDM", duration: 1)
                2023-10-30  [DefoliationManager].Script.Defoliate(amountDM: 40, amountType: "ResidualDM", duration: 1)
                2023-11-28  [DefoliationManager].Script.Defoliate(amountDM: 40, amountType: "ResidualDM", duration: 1)
                2023-12-22  [DefoliationManager].Script.Defoliate(amountDM: 40, amountType: "ResidualDM", duration: 1)
                2024-02-01  [DefoliationManager].Script.Defoliate(amountDM: 40, amountType: "ResidualDM", duration: 1)
                2024-03-26  [DefoliationManager].Script.Defoliate(amountDM: 40, amountType: "ResidualDM", duration: 1)
                2024-06-04  [DefoliationManager].Script.Defoliate(amountDM: 40, amountType: "ResidualDM", duration: 1)
              Manager DefoliationManager: same as Validation.New Zealand.MasseyRDF1.MasseyRDF1.Field.Management.DefoliationManager
              Manager DungAndUrine: same as Validation.New Zealand.MasseyRDF1.MasseyRDF1.Field.Management.DungAndUrine
              Manager AuxReport: same as Validation.New Zealand.MasseyRDF1.MasseyRDF1.Field.Management.AuxReport
            MicroClimate: a_interception=0; b_interception=1; c_interception=0; d_interception=0; SoilHeatFluxFraction=0.4; MinimumHeightDiffForNewLayer=0; NightInterceptionFraction=0.5; ReferenceHeight=2
            Irrigation
            Fertiliser
            SurfaceOrganicMatter: InitialResidueName=grass; InitialResidueType=grass; InitialResidueMass=500; InitialStandingFraction=0; InitialCPR=0; InitialCNR=40
            Soil TempletonPaparua: SoilType=Udic Haplustept (US),  Immature Pallic Soil (NZ); LocalName=Templeton Fine Sandy Loam; Site=LURDF; NearestTown=Lincoln; Region=Canterbury; Country=New Zealand; Latitude=-43.6124; Longitude=172.469; DataSource=Plantain Potency and Practice SFFF Dairy NZ
              Comments=Different references name the soil at the site as either Templeton or Paparua (very similar soils)
              Chemical: PHUnits=Water
                Thickness  PH   CEC
                100        6    0.189
                100        6.1  0.254
                100        6.1  0.269
                100        6.4  0.24
                200        6.8  0.366
                200        6.9  0.288
              Physical
                Thickness  ParticleSizeSand  ParticleSizeSilt  ParticleSizeClay  Rocks  BD    AirDry  LL15   DUL    SAT    KS
                100        17.4              60.9              21.8              0      1.26  0.12    0.126  0.355  0.524  2913.761
                100        24.8              56.9              18.3              0      1.3   0.14    0.148  0.328  0.468  1052.63
                100        21                59.5              19.5              0      1.53  0.12    0.14   0.33   0.422  182.149
                100        37                52.6              10.3              0      1.57  0.11    0.127  0.339  0.407  1272.997
                200        43.6              46.9              9.5               0      1.66  0.14    0.175  0.324  0.373  1767.199
                200        24.2              59.3              16.6              0      1.6   0.1     0.119  0.316  0.395  586.553
                SoilCrop PlantainForageSoil: LL=[0.17, 0.177, 0.186, 0.132, 0.141, 0.138]; KL=[0.12, 0.11, 0.06, 0.03, 0.01, 0.01]; XF=[1, 1, 1, 1, 1, 1]
                SoilCrop AGPRyegrassSoil: LL=[0.22, 0.219, 0.177, 0.15, 0.15, 0.12, -]; KL=[0.1, 0.085, 0.055, 0.02, 0.005, 0, -]; XF=[1, 1, 1, 1, 1, 1, -]
              WaterBalance SoilWater: SummerDate=1-Nov; SummerU=6; SummerCona=3.5; WinterDate=1-apr; WinterU=3; WinterCona=1.5; DiffusConst=88; DiffusSlope=35; Salb=0.13; CN2Bare=73; CNRed=20; CNCov=0.8; PSIDul=-100; Thickness=[100, 100, 100, 100, 200, 200]; SWCON=[0.5, 0.41, 0.27, 0.39, 0.49, 0.42]
              Organic: FOMCNRatio=40; CarbonUnits=Total
                Thickness  Carbon  SoilCNRatio  FBiom  FInert  FOM
                100        2.5     11.1         0.08   0.4     650
                100        2.1     11.2         0.04   0.695   350
                100        1.1     10.5         0.03   0.845   175
                100        0.5     9            0.02   0.89    60
                200        0.3     7.6          0.01   0.96    15
                200        0.3     6.8          0.01   0.99    0
              Water: Thickness=[100, 100, 100, 100, 200, 200]; InitialValues=[0.355, 0.328, 0.33, 0.339, 0.324, 0.3145]; FilledFromTop=true
              Nutrient
              Solute NO3: Thickness=[100, 100, 100, 100, 200, 200]; InitialValues=[10, 8, 1.5, 1.5, 1.5, 0.78]; InitialValuesUnits=ppm; WaterTableConcentration=0; D0=0; DepthConstant=0; MaxDepthSoluteAccessible=0; RunoffEffectivenessAtMovingSolute=0; MaxEffectiveRunoff=0
              Solute NH4: Thickness=[100, 100, 100, 100, 200, 200]; InitialValues=[3, 0.5, 0.2, 0.2, 0.135, 0.071]; InitialValuesUnits=ppm; WaterTableConcentration=0; D0=0; DepthConstant=0; MaxDepthSoluteAccessible=0; RunoffEffectivenessAtMovingSolute=0; MaxEffectiveRunoff=0
              Solute Urea: same as Validation.New Zealand.SFFFManawatu.SFFFManawatu.Field.Soil.Urea
              SoilTemperature Temperature: InteractionsPerDay=8
            Plant PlantainForage
            PastureSpecies AGPRyegrass: same as Validation.New Zealand.SFFFWaikato.SFFFWaikato.Field.AGPRyegrass
            Report BaseReport: VariableNames=// variables defined in 'Replacements'; EventNames=[Clock].DoReport
            Report CumReport: VariableNames=// variables defined in 'Replacements'; EventNames=[Clock].DoReport
            Report CropReport: VariableNames=// variables defined in 'Replacements'; EventNames=[Clock].DoReport
            Report ValidationReport: same as Validation.New Zealand.FRNLLincoln.FRNLLincoln.Field.ValidationReport
            Report DiagnosisReport: VariableNames=// variables defined in 'Replacements'; EventNames=[Clock].DoReport
            Report MonthReport: same as Validation.New Zealand.SFFFWaikato.SFFFWaikato.Field.MonthReport
      Experiment SFFFSouthland
        Memo: same as Validation.New Zealand.MasseyRDF1.Memo
        Factors
          Factor Cultivar
            CompositeFactor One: Specifications=[Sowing]
              Operations Sowing
                2022-11-29  [PlantainForage].Sow(population: 350, cultivar: "Tonic", depth: 10, rowSpacing: 150)
            CompositeFactor Two: same as Validation.New Zealand.SFFFSouthland.Factors.Cultivar.One
            CompositeFactor Three: same as Validation.New Zealand.SFFFSouthland.Factors.Cultivar.One
            CompositeFactor Four: same as Validation.New Zealand.SFFFSouthland.Factors.Cultivar.One
            CompositeFactor Five: same as Validation.New Zealand.SFFFSouthland.Factors.Cultivar.One
            CompositeFactor Six: same as Validation.New Zealand.SFFFSouthland.Factors.Cultivar.One
            CompositeFactor Seven: same as Validation.New Zealand.SFFFSouthland.Factors.Cultivar.One
            CompositeFactor Eight: same as Validation.New Zealand.SFFFSouthland.Factors.Cultivar.One
            CompositeFactor Nine: same as Validation.New Zealand.SFFFSouthland.Factors.Cultivar.One
            CompositeFactor Ten: same as Validation.New Zealand.SFFFManawatu.Factors.Cultivar.Ten
        Simulation SFFFSouthland
          Clock: Start=2022-07-01; End=2024-06-30
          Weather: FileName=Southland.met
          Summary summaryfile
          SoilArbitrator Soil Arbitrator
          Forages: same as Validation.New Zealand.SFFFWaikato.SFFFWaikato.Forages
          Zone Field: Area=1; Slope=0; AspectAngle=0; Altitude=50
            Folder Management
              Operations Sowing
              Operations FertiliserSchedule
                2022-12-02  [Fertiliser].Apply(amount: 26, type: "DAP", depth: 10)
                2023-03-06  [Fertiliser].Apply(amount: 55.2, type: "UreaN", depth: 10)
                2023-04-11  [Fertiliser].Apply(amount: 62, type: "UreaN", depth: 10)
                2023-05-15  [Fertiliser].Apply(amount: 53, type: "UreaN", depth: 10)
                2023-09-19  [Fertiliser].Apply(amount: 26.9, type: "UreaN", depth: 10)
                2023-10-23  [Fertiliser].Apply(amount: 57, type: "UreaN", depth: 10)
                2023-11-08  [Fertiliser].Apply(amount: 51, type: "UreaN", depth: 10)
                2023-12-02  [Fertiliser].Apply(amount: 60, type: "UreaN", depth: 10)
                2023-12-21  [Fertiliser].Apply(amount: 37, type: "UreaN", depth: 10)
                2024-01-25  [Fertiliser].Apply(amount: 105, type: "UreaN", depth: 10)
                2024-02-16  [Fertiliser].Apply(amount: 42, type: "UreaN", depth: 10)
                2024-03-15  [Fertiliser].Apply(amount: 63, type: "UreaN", depth: 10)
              Operations IrrigationSchedule: same as Validation.New Zealand.MasseyRDF1.MasseyRDF1.Field.Management.IrrigationSchedule
              Operations DefoliationSchedule
                2023-01-19  [DefoliationManager].Script.Defoliate(amountDM: 40, amountType: "ResidualDM", duration: 1)
                2023-02-15  [DefoliationManager].Script.Defoliate(amountDM: 40, amountType: "ResidualDM", duration: 1)
                2023-03-27  [DefoliationManager].Script.Defoliate(amountDM: 40, amountType: "ResidualDM", duration: 1)
                2023-05-07  [DefoliationManager].Script.Defoliate(amountDM: 40, amountType: "ResidualDM", duration: 1)
                2023-08-08  [DefoliationManager].Script.Defoliate(amountDM: 40, amountType: "ResidualDM", duration: 1)
                2023-09-15  [DefoliationManager].Script.Defoliate(amountDM: 40, amountType: "ResidualDM", duration: 1)
                2023-10-17  [DefoliationManager].Script.Defoliate(amountDM: 40, amountType: "ResidualDM", duration: 1)
                2023-11-07  [DefoliationManager].Script.Defoliate(amountDM: 40, amountType: "ResidualDM", duration: 1)
                2023-11-29  [DefoliationManager].Script.Defoliate(amountDM: 40, amountType: "ResidualDM", duration: 1)
                2023-12-19  [DefoliationManager].Script.Defoliate(amountDM: 40, amountType: "ResidualDM", duration: 1)
                2024-01-21  [DefoliationManager].Script.Defoliate(amountDM: 40, amountType: "ResidualDM", duration: 1)
                2024-02-13  [DefoliationManager].Script.Defoliate(amountDM: 40, amountType: "ResidualDM", duration: 1)
                2024-03-13  [DefoliationManager].Script.Defoliate(amountDM: 40, amountType: "ResidualDM", duration: 1)
                2024-05-07  [DefoliationManager].Script.Defoliate(amountDM: 40, amountType: "ResidualDM", duration: 1)
              Manager DefoliationManager: same as Validation.New Zealand.MasseyRDF1.MasseyRDF1.Field.Management.DefoliationManager
              Manager DungAndUrine: same as Validation.New Zealand.MasseyRDF1.MasseyRDF1.Field.Management.DungAndUrine
              Manager AuxReport: same as Validation.New Zealand.MasseyRDF1.MasseyRDF1.Field.Management.AuxReport
            MicroClimate: a_interception=0; b_interception=1; c_interception=0; d_interception=0; SoilHeatFluxFraction=0.4; MinimumHeightDiffForNewLayer=0; NightInterceptionFraction=0.5; ReferenceHeight=2
            Irrigation
            Fertiliser
            SurfaceOrganicMatter: InitialResidueName=grass; InitialResidueType=grass; InitialResidueMass=500; InitialStandingFraction=0; InitialCPR=0; InitialCNR=40
            Soil: SoilType=Typic Orthic Brown; LocalName=Southland; Site=273 Edendale-Seaward Downs Rd; NearestTown=Edendale; Region=Southland; Country=New Zealand; NaturalVegetation=long term grass; Latitude=-46.3415; Longitude=168.781; LocationAccuracy=+/-50 m; YearOfSampling=2022; DataSource=Plantain Potency and Practice SFFF Dairy NZ
              Physical
                Thickness  ParticleSizeSand  ParticleSizeSilt  ParticleSizeClay  Rocks  BD    AirDry  LL15   DUL    SAT    KS
                100        13.735            74.265            12                0      0.94  0.032   0.19   0.534  0.627  1996.371
                100        13.063            72.937            14                0      1.13  0.028   0.207  0.477  0.568  917.695
                100        2.554             78.446            19                0      1.11  0.025   0.185  0.43   0.58   311.124
                100        6.973             75.027            18                0      1.23  0.023   0.21   0.448  0.535  268.836
                200        24.063            58.467            17.47             0      1.29  0.023   0.219  0.444  0.512  656.485
                200        42.878            43.552            13.57             0      1.32  0.023   0.228  0.44   0.501  1184.37
                200        45.032            41.968            13                0      1.45  0.019   0.208  0.446  0.452  1423.197
                SoilCrop PlantainForageSoil: LL=[0.163, 0.159, 0.171, 0.181, 0.158, 0.101, 0.085]; KL=[0.1, 0.095, 0.08, 0.05, 0.02, 0.015, 0.01]; XF=[1, 1, 1, 1, 1, 1, 1]
                SoilCrop AGPRyegrassSoil: LL=[0.22, 0.219, 0.177, 0.15, 0.15, 0.12, 0.083]; KL=[0.1, 0.085, 0.055, 0.02, 0.005, 0, 0]; XF=[1, 1, 1, 1, 1, 1, 1]
              WaterBalance SoilWater: SummerDate=1-Nov; SummerU=6; SummerCona=3.5; WinterDate=1-Apr; WinterU=3; WinterCona=2; DiffusConst=88; DiffusSlope=35; Salb=0.13; CN2Bare=73; CNRed=20; CNCov=0.8; PSIDul=-100; Thickness=[100, 100, 100, 100, 200, 200, 200]; SWCON=[0.638, 0.566, 0.547, 0.45, 0.558, 0.614, 0.546]
              Organic: FOMCNRatio=40; CarbonUnits=Total
                Thickness  Carbon  SoilCNRatio  FBiom  FInert  FOM
                100        6.7     10.5         0.08   0.329   450
                100        4.4     10.4         0.055  0.418   400
                100        3.2     10.7         0.035  0.702   180
                100        2.2     10.2         0.025  0.876   170
                200        1.7     10.1         0.018  0.943   30
                200        1.2     9.7          0.013  0.96    10
                200        0.9     9            0.01   0.969   6
              Chemical: PHUnits=Water
                Thickness  PH   CEC
                100        6    26
                100        5.8  20.8
                100        5.9  17.4
                100        5.6  13.1
                200        5.6  11.6
                200        5.8  10.2
                200        5.9  9.8
              Nutrient
              Water: Thickness=[100, 100, 100, 100, 200, 200, 200]; InitialValues=[0.534, 0.477, 0.43, 0.448, 0.444, 0.4333, 0.208]; FilledFromTop=true
              Solute NO3: Thickness=[100, 100, 100, 100, 200, 200, 200]; InitialValues=[10, 7, 3, 1, 1, 1, 1]; InitialValuesUnits=ppm; WaterTableConcentration=0; D0=0; DepthConstant=0; MaxDepthSoluteAccessible=0; RunoffEffectivenessAtMovingSolute=0; MaxEffectiveRunoff=0
              Solute NH4: Thickness=[100, 100, 100, 100, 200, 200, 200]; InitialValues=[2, 1, 0.5, 0.3, 0.2, 0.2, 0.2]; InitialValuesUnits=ppm; WaterTableConcentration=0; D0=0; DepthConstant=0; MaxDepthSoluteAccessible=0; RunoffEffectivenessAtMovingSolute=0; MaxEffectiveRunoff=0
              Solute Urea: Thickness=[100, 100, 100, 100, 200, 200, 200]; InitialValues=[0, 0, 0, 0, 0, 0, 0]; InitialValuesUnits=kg/ha; WaterTableConcentration=0; D0=0; DepthConstant=0; MaxDepthSoluteAccessible=0; RunoffEffectivenessAtMovingSolute=0; MaxEffectiveRunoff=0
              SoilTemperature Temperature: InteractionsPerDay=8
            Plant PlantainForage
            PastureSpecies AGPRyegrass: same as Validation.New Zealand.SFFFWaikato.SFFFWaikato.Field.AGPRyegrass
            Report BaseReport: VariableNames=// variables defined in 'Replacements'; EventNames=[Clock].DoReport
            Report CumReport: VariableNames=// variables defined in 'Replacements'; EventNames=[Clock].DoReport
            Report CropReport: VariableNames=// variables defined in 'Replacements'; EventNames=[Clock].DoReport
            Report DiagnosisReport: VariableNames=// variables defined in 'Replacements'; EventNames=[Clock].DoReport
            Report ValidationReport: same as Validation.New Zealand.FRNLLincoln.FRNLLincoln.Field.ValidationReport
            Report MonthReport: same as Validation.New Zealand.SFFFWaikato.SFFFWaikato.Field.MonthReport
      Memo SubTitle
        ### All data from New Zealand
    Folder USA
      Experiment RELARC_01
        Memo
          ###RELARC 01###

          This simulation was adapted from a defoliation trial conducted in 1998-1999, at Russell E. Larson Agricultural Research Center, Pennsylvania, USA.  The trial consisted of small plots where two plantain forage cultivars ('*Lancelot*' and '*Tonic*') were sown separately in May-1997 (at 11.0 kg seed/ha).  Population decreased markedly after the 1998/99 winter and plantain plots were no longer used. Plots were fertilized with 27 kgP and 72 kgK/ha in October 1997. Fertilizer N was applied at 56 kg/ha in June and July of 1998.  Treatments were replicated five times and the soil at the site was a Hagerstown silt loam (fine, mixed, semiactive mesic Typic Hapludalfs).
          Each plot was divided in two, one-half was harvested every 3 wk and the other half every 5 wk. Each strip was cut to a 7-cm height with a rotary mower.  Dates for each cut were given, but only annual and treatment yields are reported;  population numbers were provided for few specific dates.  Yield for each harvest were arbitrarily inferred, therefore they should be seen as rough indication only.
          Met file was built using data obtained from NOAA website.  The data set was largely complete except for solar radiation, which was added from an alternative interpolated set for this location, also from NOAA.
          Information to assemble the soil data was obtained from USGS.

          References:
          Sanderson, M.A.; Labreveux, M.; Hall, M.H.; Elwinger, G.F. 2003. Forage yield and persistence of chicory and english plantain. Crop Science, 43: 995-1000.
        Factors
          Permutation
            Factor Cultivar
              CompositeFactor Lancelot: Specifications=[Sowing]
                Operations Sowing
                  1997-05-16  [PlantainForage].Sow(population: 250, cultivar: "Lancelot", depth: 10, rowSpacing: 150)
              CompositeFactor Tonic: Specifications=[Sowing]
                Operations Sowing
                  1997-05-16  [PlantainForage].Sow(population: 250, cultivar: "Tonic", depth: 10, rowSpacing: 150)
            Factor CutFrequency: Specification=[Cuttings]
              Operations 3wks
                1998-05-19  [DefoliationManager].Script.Defoliate(amountDM: 40, amountType: "ResidualDM", duration: 1)
                1998-06-10  [DefoliationManager].Script.Defoliate(amountDM: 50, amountType: "ResidualDM", duration: 1)
                1998-06-30  [DefoliationManager].Script.Defoliate(amountDM: 50, amountType: "ResidualDM", duration: 1)
                1998-07-21  [DefoliationManager].Script.Defoliate(amountDM: 50, amountType: "ResidualDM", duration: 1)
                1998-08-11  [DefoliationManager].Script.Defoliate(amountDM: 50, amountType: "ResidualDM", duration: 1)
                1998-09-02  [DefoliationManager].Script.Defoliate(amountDM: 50, amountType: "ResidualDM", duration: 1)
                1998-09-23  [DefoliationManager].Script.Defoliate(amountDM: 50, amountType: "ResidualDM", duration: 1)
                1999-05-20  [DefoliationManager].Script.Defoliate(amountDM: 50, amountType: "ResidualDM", duration: 1)
                1999-06-10  [DefoliationManager].Script.Defoliate(amountDM: 50, amountType: "ResidualDM", duration: 1)
                1999-07-01  [DefoliationManager].Script.Defoliate(amountDM: 50, amountType: "ResidualDM", duration: 1)
                1999-07-22  [DefoliationManager].Script.Defoliate(amountDM: 50, amountType: "ResidualDM", duration: 1)
                1999-08-12  [DefoliationManager].Script.Defoliate(amountDM: 50, amountType: "ResidualDM", duration: 1)
                1999-09-02  [DefoliationManager].Script.Defoliate(amountDM: 50, amountType: "ResidualDM", duration: 1)
                1999-09-23  [DefoliationManager].Script.Defoliate(amountDM: 50, amountType: "ResidualDM", duration: 1)
              Operations 5wks
                1998-05-19  [DefoliationManager].Script.Defoliate(amountDM: 40, amountType: "ResidualDM", duration: 1)
                1998-06-24  [DefoliationManager].Script.Defoliate(amountDM: 50, amountType: "ResidualDM", duration: 1)
                1998-07-29  [DefoliationManager].Script.Defoliate(amountDM: 50, amountType: "ResidualDM", duration: 1)
                1998-09-02  [DefoliationManager].Script.Defoliate(amountDM: 50, amountType: "ResidualDM", duration: 1)
                1998-10-07  [DefoliationManager].Script.Defoliate(amountDM: 50, amountType: "ResidualDM", duration: 1)
                1999-05-20  [DefoliationManager].Script.Defoliate(amountDM: 50, amountType: "ResidualDM", duration: 1)
                1999-06-24  [DefoliationManager].Script.Defoliate(amountDM: 50, amountType: "ResidualDM", duration: 1)
                1999-07-29  [DefoliationManager].Script.Defoliate(amountDM: 50, amountType: "ResidualDM", duration: 1)
                1999-09-02  [DefoliationManager].Script.Defoliate(amountDM: 50, amountType: "ResidualDM", duration: 1)
                1999-10-07  [DefoliationManager].Script.Defoliate(amountDM: 50, amountType: "ResidualDM", duration: 1)
        Simulation RELARC_01
          Clock: Start=1997-05-01; End=1998-12-31
          Weather: FileName=StateCollege.met
          Summary
          SoilArbitrator Soil Arbitrator
          Forages: same as Validation.New Zealand.FRNLLincoln.FRNLLincoln.Forages
          Zone Field: Area=1; Slope=0; AspectAngle=0; Altitude=50
            Folder Management
              Operations Sowing
              Operations FertiliserSchedule
                1998-06-01  [Fertiliser].Apply(amount: 56, type: "NH4NO3N", depth: 10)
                1998-07-15  [Fertiliser].Apply(amount: 56, type: "NH4NO3N", depth: 10)
              Operations BaseCut
                1997-09-15  [DefoliationManager].Script.Defoliate(amountDM: 50, amountType: "ResidualDM", duration: 1)
              Operations Cuttings
              Manager DefoliationManager
                AllowAutomaticManagement = No
                DefoliationRotationStartDate = 01/01/1900 00:00:00
                DefoliationRotationEndDate = 12/31/2100 00:00:00
                DefoliationTriggerType = TargetStandingBiomass
                IntervalBetweenDefoliations = 15
                TargetStandingBiomass = 250
                DurationOfEachDefoliation = 1
                RemoveAmountType = ResidualDM
                AmountForEachDefoliation = 125
                MininumAmountToDefoliate = 75
                SuppressDefoliationOnWindow = No
                NoDefoliationWindowStartDate = 1-Jun
                NoDefoliationWindowEndDate = 30-Jul
                EnforceMinimumInterval = No
                MinimumInterval = 15
                EnforceMaximumInterval = No
                MaximumInterval = 90
                DMRemoveType = UserDefinedFraction
                FractionDMToRemove = 0.99
                NRemoveType = UserDefinedFraction
                FractionNToRemove = 0.99
                ReturnType = AsResidue
                NDungType = DefineCNratio
                ProportionOfNToDung = 0.4
                CNRatioDung = 17.5
                UrineDepth = 250
                SettingUrineNAmount = No
                UrineNSetAmount = 2
                PopulationDeclineRate = 0
                ConsiderTrampling = No
                MaximumLitterFractionToSoil = 0.01
                BiomassDefoliatedForMaximumLitterFraction = 120
                MeanGrowthPeriodType = BetweenDefoliationsOrMaxPeriod
                MaxPeriodForMeanGrowth = 30
```csharp
// This script will perform defoliations, i.e remove biomass, from any existing plant (PMF and/or AgPasture) that is alive in a field.
// General rules for when and how much to defoliate, as well as how to handle the material harvested, are supplied via the GUI.
// Defoliations can be triggered automatically by this manager, based on given rules, or by calling the 'Defoliate()' method
//  from another Script or a Schedule model. Note that in this case, some rules are overriden based on the parameters given in Defoliate().
// Developed by RCichota, last updated in 20/Jan/2025

using APSIM.Core;
using System;
using System.Linq;
using System.Collections.Generic;
using Newtonsoft.Json;
using APSIM.Shared.Utilities;
using Models.Core;
using Models.PMF;
using Models.Soils;
using Models.PMF.Interfaces;
using Models.AgPasture;
using Models.ForageDigestibility;
using APSIM.Numerics;

namespace Models
{
    [Serializable]
    public class Script : Model, IStructureDependency
    {
        [Link] private Clock clock;
        [Link] private Zone myZone;
        [Link] private IPhysical soilPhysical;
        [Link(ByName = true)] private ISolute Urea;
        [Link] private Surface.SurfaceOrganicMatter surfaceOM;
        [Link] private Forages swardForages;
        [Link] private ISummary summary;
        public  event BiomassRemovedDelegate BiomassRemoved;
        public  event EventHandler DefoliationHappenedToday;
        private string baseAmountType;
        private string currentAmountType;
        private double currentAmountForDefoliation;
        private double currentMinAmount;
        private double herbageToRemove;
        private int durationOfThisDefoliation;
        private int daysDefoliating;
        private double cumAmountHarvested;
        private double currentPostHarvest;
        private double swardPreviousPhenoStage;
        private bool aDefoliationHasHappened;
        
        public IStructure Structure { private get; set; }

        //> Links to other Apsim models
        [Link] private IPlant[] existingCrops;

        //> Events raised by this manager
        private EventArgs args = new EventArgs();

        //> User inputs from properties tab
        [Separator("Generic defoliation management - removes biomass from all PMF and AgPasture species in the field \n"
                 + "   this also includes residue management or the return of excreta (dung and urine, uniformly)")]
        [Description(" Allow this manager to control defoliations automatically?")]
        public yesNoAnswer AllowAutomaticManagement { get; set; }
        [Description(" Date to start the defoliation management (dd/mm/yyyy):")]
        public DateTime DefoliationRotationStartDate { get; set; }
        [Description(" Date to end the defoliation management (dd/mm/yyyy):")]
        public DateTime DefoliationRotationEndDate { get; set; }

        [Separator("Parameters defining how the defoliation is managed")]
        [Description(" How the defoliation events should be triggered?")]
        public DefoliationTriggerTypes DefoliationTriggerType { get; set; }
        [Description("   Minimum number of days between defoliation events:")]
        [Display(VisibleCallback = "isDefoliationTriggerAnInterval")]
        public int IntervalBetweenDefoliations { get; set; }
        [Description("   Minimum standing biomass to trigger a defoliation event (g/m2):")]
        [Display(VisibleCallback = "isDefoliationTriggerAnAmount")]
        public double TargetStandingBiomass { get; set; }
        [Description(" Duration of each defoliation event (days):")]
        public int DurationOfEachDefoliation { get; set; }
        [Description(" Which amount is defined to control biomass to be defoliated?")]
        public DefoliateAmountTypes RemoveAmountType { get; set; }
        [Description(" DM amount to use (g/m2):")]
        public double AmountForEachDefoliation { get; set; }
        [Description(" Minimum DM amount to remove (g/m2):")]
        [Display(VisibleCallback = "isAmountDMToRemove")]
        public double MininumAmountToDefoliate { get; set; }

        [Separator(" Additional management parameters to control defoliation frequency")]
        [Description(" Suppress defoliations over a period of time within the year?")]
        public yesNoAnswer SuppressDefoliationOnWindow { get; set; }
        [Description("   Date to start the defoliation suppression window (dd-mmm):")]
        [Display(VisibleCallback = "suppressingDefoliationOnWindow")]
        public string NoDefoliationWindowStartDate { get; set; }
        [Description("   Date to end the defoliation suppression window (dd-mmm):")]
        [Display(VisibleCallback = "suppressingDefoliationOnWindow")]
        public string NoDefoliationWindowEndDate { get; set; }
        [Description(" Enforce a minimum interval between defoliations?")]
        [Display(VisibleCallback = "isDefoliationTriggerAnAmount")]
        public yesNoAnswer EnforceMinimumInterval { get; set; }
        [Description("   Minimum number of days between defoliations:")]
        [Display(VisibleCallback = "minimumIntervalEnforced")]
        public int MinimumInterval { get; set; }
        [Description(" Enforce a maximum interval between defoliations?")]
        [Display(VisibleCallback = "isTriggerNotFixedInterval")]
        public yesNoAnswer EnforceMaximumInterval { get; set; }
        [Description("   Maximum number of days between defoliations:")]
        [Display(VisibleCallback = "maximumIntervalEnforced")]
        public int MaximumInterval { get; set; }

        [Separator("Parameters defining the management of the defoliated biomass")]
        [Description(" How much of the DM defoliated is to be removed from the field?")]
        public DMRemovalTypes DMRemoveType { get; set; }
        [Description("   Fraction of DM to remove off field (0-1):")]
        [Display(VisibleCallback = "userDefinesDMFraction")]
        public double FractionDMToRemove { get; set; }
        [Description(" How much of the N defoliated is to be removed from the field?")]
        public NRemovalTypes NRemoveType { get; set; }
        [Description("   Fraction of N to remove off field (0-1):")]
        [Display(VisibleCallback = "userDefinesNFraction")]
        public double FractionNToRemove { get; set; }
        [Description(" How the non-removed material is returned to the field?")]
        public ReturnAsTypes ReturnType { get; set; }

        [Separator("Parameters for partitioning non-removed N into urine and dung")]
        [Description(" How the partition of N to dung and urine is defined?")]
        [Display(VisibleCallback = "returningAsDungUrine")]
        public DungNContentTypes NDungType { get; set; }
        [Description("   Proportion of N returned in dung (0-1):")]
        [Display(VisibleCallback = "nitrogenInDungIsProportion")]
        public double ProportionOfNToDung { get; set; }
        [Description("   The C:N of dung, if using DefineCNratio (typically around 20):")]
        [Display(VisibleCallback = "nitrogenInDungIsCNRatio")]
        public double CNRatioDung { get; set; }
        [Description(" Soil depth down to which urine should be applied (mm):")]
        [Display(VisibleCallback = "returningAsDungUrine")]
        public double UrineDepth { get; set; }

        [Separator("Additional parameters to control N returns")]
        [Description(" Use a fixed N amount in each urine deposition?")]
        [Display(VisibleCallback = "returningAsDungUrine")]
        public yesNoAnswer SettingUrineNAmount { get; set; }
        [Description("   Amount of N to apply as \"urine\" (gN/m2)):")]
        [Display(VisibleCallback = "urineNAmountFixed")]
        public double UrineNSetAmount { get; set; }

        [Separator(" Additional parameters to control effects of defoliations")]
        [Description(" Fraction of population decline in each defoliation (0-1) Not Implemented:")]
        public double PopulationDeclineRate { get; set; } = 0.0;
        [Description(" Consider effects of trampling on surface OM (litter)?")]
        public yesNoAnswer ConsiderTrampling { get; set; }
        [Description(" Maximum fraction of litter incorporated to the soil (0-1):")]
        [Display(VisibleCallback = "consideringTrampling")]
        public double MaximumLitterFractionToSoil { get; set; }
        [Description(" Defoliated biomass for maximum rate of incorporation (g/m2): \n  (e.g. 90 for heavy cattle, 120 for ewes)")]
        [Display(VisibleCallback = "consideringTrampling")]
        public double BiomassDefoliatedForMaximumLitterFraction { get; set; }

        [Separator("Additional parameters for computing growth rates")]
        [Description(" Interval over which the mean growth rate will be calculated?")]
        public MeanGrowthPeriodTypes MeanGrowthPeriodType { get; set; }
        [Description("  Number of days to compute mean growth rate (maximum):")]
        [Display(VisibleCallback = "growthPeriodToBeGiven")]
        public int MaxPeriodForMeanGrowth { get; set; }

        //> Outputs from this manager
        [JsonIgnore][Units("g/m2")] // Pasture DM that can be consume (removed from plants) today
        public double ConsumableWt { get; set; }
        [JsonIgnore][Units("g/m2")] // N in the pasture material that can be consumed today
        public double ConsumableN { get; set; }
        [JsonIgnore][Units("g/m2")] // Pasture DM defoliated (removed from plants) today
        public double DefoliatedWt { get; set; }
        [JsonIgnore][Units("g/m2")] // N in the pasture material defoliated today
        public double DefoliatedN { get; set; }
        [JsonIgnore][Units("g/m2")] // Pasture DM harvested (removed from plants minus direct residue) today
        public double HarvestedWt { get; set; }
        [JsonIgnore][Units("g/m2")] // N in the pasture material harvested today
        public double HarvestedN { get; set; }
        [JsonIgnore][Units("g/m2")] // Pasture DM actually removed from the field
        public double RemovedWt { get; set; }
        [JsonIgnore][Units("g/m2")] // N in the pasture material removed from the field
        public double RemovedN { get; set; }
        [JsonIgnore][Units("g/m2")] // Pasture DM returned by this manager to the field
        public double ReturnedWt { get; set; }
        [JsonIgnore][Units("g/m2")] // N in the pasture material returned by this manager to the field
        public double ReturnedN { get; set; }
        [JsonIgnore][Units("g/m2")] // Non-removed N returned as dung (to SurfaceOM)
        public double NReturnedInDung { get; set; }
        [JsonIgnore][Units("g/m2")] // Non-removed N returned as urine (soil urea)
        public double NReturnedInUrine { get; set; }
        [JsonIgnore][Units("days")] // Number of days since the end of last defoliation event
        public int DaysSinceLastDefoliation { get; set; }
        [JsonIgnore][Units("g/m2")] // Total standing aboveground DM before a defoliation
        public double PreHarvestDM { get; set; }
        [JsonIgnore][Units("g/m2")] // Total standing aboveground DM after a defoliation
        public double PostHarvestDM { get; set; }
        [JsonIgnore][Units("g/m2")] // Total pasture DM harvested over a complete defoliation event
        public double RotationHarvestedDM { get; set; }
        [JsonIgnore][Units("g/m2")] // Mean sward growth rate over a given period before each defoliation
        public double MeanGrowthRateDM { get; set; }

        //> Internal variables
        private List<ModelWithDigestibleBiomass> existingForageCrops; // links to the forage interface of each plant organ
        private LinkedList<double> growthQueue;         // list of daily growth rates over the period to compute mean growth rate
        private double[] urineFraction;                 // fraction of urine N to be applied in each soil layer



        

        [EventSubscribe("StartOfSimulation")]
        private void OnStartOfSimulation(object sender, EventArgs e)
        {
            // check the type of amount given
            if (RemoveAmountType == DefoliateAmountTypes.DMToRemove)
            {
                baseAmountType = "DMToRemove";
            }
            else if (RemoveAmountType == DefoliateAmountTypes.ResidualDM)
            {
                baseAmountType = "ResidualDM";
            }

            // check the interval between events
            if (IntervalBetweenDefoliations < 1)
            {
                throw new Exception("The interval between defoliation events must be at least one day");
            }

            // check the duration for each defoliation
            if(DurationOfEachDefoliation <= 0)
            {
                throw new Exception("The duration of defoliations cannot be zero or negative!");
            }

            // check the fraction of defoliated material to remove from the field
            if (DMRemoveType == DMRemovalTypes.RemoveAll)
            {
                FractionDMToRemove = 1.0;
            }
            else if (DMRemoveType == DMRemovalTypes.RemoveNone)
            {
                FractionDMToRemove = 0.0;
            }
            else if (DMRemoveType == DMRemovalTypes.BasedOnDigestibility)
            {
                FractionDMToRemove = -1.0;  // will be calculated dynamically
            }
            else // DMRemoveType == DMRemovalTypes.UserDefinedFraction
            {
                if (FractionDMToRemove < 0.0)
                {
                    throw new Exception("The fraction of DM defoliated to remove from the field cannot be negative!");
                }
            }

            // check the fraction of defoliated N to remove from the field
            if (NRemoveType == NRemovalTypes.RemoveAll)
            {
                FractionNToRemove = 1.0;
            }
            else if (NRemoveType == NRemovalTypes.RemoveNone)
            {
                FractionNToRemove = 0.0;
            }
            else if (NRemoveType == NRemovalTypes.ProportionalToDM)
            {
                FractionNToRemove = FractionDMToRemove;
            }
            else // NRemoveType == NRemovalTypes.UserDefinedFraction
            {
                if (FractionNToRemove < 0.0)
                {
                    throw new Exception("The fraction of defoliated N to remove from the field cannot be negative!");
                }
            }

            // get links to the forage interface for each platn organ
            existingForageCrops = swardForages.ModelsWithDigestibleBiomass.ToList();

            // make sure that management starts when RotationStartDate < simulationStartDay
            DefoliationRotationEndDate = DefoliationRotationEndDate > clock.EndDate? clock.EndDate: DefoliationRotationEndDate;
            if ((clock.Today > DefoliationRotationStartDate) && (clock.Today < DefoliationRotationEndDate))
            {
                DefoliationRotationStartDate = clock.Today;
            }

            // initialise some variables
            growthQueue = new LinkedList<double>();
            swardPreviousPhenoStage = 1.0;
            DaysSinceLastDefoliation = 0;
            durationOfThisDefoliation = -1;
            daysDefoliating = 0;
            resetMyOutputs();

            // set the fraction of urine for each layer
            if (ReturnType == ReturnAsTypes.AsDungUrine)
            {
                double depthFromSurface = 0.0;
                double propAtZ0;
                double propAtZ1;
                for (int layer = 0; layer < soilPhysical.Thickness.Length; layer++)
                {
                    depthFromSurface += soilPhysical.Thickness[layer];
                    if (depthFromSurface >= UrineDepth)
                    { // bottom layer found
                        urineFraction = new double[layer + 1];
                        double distFactor = 1.5;
                        double totalProp = UrineDepth * Math.Pow(1.0, distFactor) / (distFactor + 1.0);
                        depthFromSurface = 0.0;
                        propAtZ1 = (UrineDepth - depthFromSurface) * Math.Pow(1.0 - depthFromSurface / UrineDepth, distFactor) / (distFactor + 1.0);
                        for (int z = 0; z < layer+1; z++)
                        {
                            propAtZ0 = propAtZ1;
                            depthFromSurface += soilPhysical.Thickness[z];
                            propAtZ1 = (UrineDepth - depthFromSurface) * Math.Pow(1.0 - depthFromSurface / UrineDepth, distFactor) / (distFactor + 1);
                            if (1.0 - (depthFromSurface / UrineDepth) < 0.0)
                            {
                                propAtZ1 = 0;
                            }
                            urineFraction[z] = (propAtZ0 - propAtZ1) / totalProp;
                        }
                        layer = soilPhysical.Thickness.Length;
                    }
                }
            }

            // write message in summary
            summary.WriteMessage(this," Defoliation manager initialisation", MessageType.Diagnostic);
            if (automaticManagementAllowed)
            {
                summary.WriteMessage(this, "   Automatic defoliations will happen between " + DefoliationRotationStartDate.ToShortDateString()
                                         + " and " + DefoliationRotationEndDate.ToShortDateString() + ".", MessageType.Diagnostic);
                if (SuppressDefoliationOnWindow == yesNoAnswer.Yes)
                {
                    summary.WriteMessage(this, "    But they will be suppressed between " + NoDefoliationWindowStartDate  + " and "
                                               + NoDefoliationWindowEndDate + ".", MessageType.Diagnostic);
                }

                summary.WriteMessage(this, "   Biomass from all species in the sward will be removed if criteria are matched.", MessageType.Diagnostic);
                if (DefoliationTriggerType == DefoliationTriggerTypes.TargetStandingBiomass)
                {
                    summary.WriteMessage(this, "   Events will happen whenever aboveground biomass surpasses " + TargetStandingBiomass.ToString("#0.0") + " g/m2.", MessageType.Diagnostic);
                    if(EnforceMinimumInterval == yesNoAnswer.Yes)
                    {
                        summary.WriteMessage(this, "     With a minimum of " + MinimumInterval + " days between defoliations", MessageType.Diagnostic);
                    }
                    if(EnforceMaximumInterval == yesNoAnswer.Yes)
                    {
                        summary.WriteMessage(this, "     With a maximum of " + MaximumInterval + " days between defoliations", MessageType.Diagnostic);
                    }
                }
                else
                {
                    summary.WriteMessage(this, "   Events will happen every " + IntervalBetweenDefoliations + " days, if there is enough biomass.", MessageType.Diagnostic);
                }

                if(baseAmountType == "ResidualDM")
                {
                    summary.WriteMessage(this, "   Removing biomass down to a residual amount of " + AmountForEachDefoliation.ToString("#.0") + " g/m2 over "
                                             + DurationOfEachDefoliation + " days.", MessageType.Diagnostic);
                }
                else
                {
                    summary.WriteMessage(this, "   Attempting to remove " + AmountForEachDefoliation.ToString("#.0") + " g/m2 of biomass per day over "
                                             + DurationOfEachDefoliation + " days.", MessageType.Diagnostic);
                }
            }
            else
            {
                summary.WriteMessage(this,"   Automatic defoliations are currently disabled, though defoliations can be triggered by another manager", MessageType.Diagnostic);
            }

            if(ReturnType == ReturnAsTypes.AsDungUrine)
            {
                summary.WriteMessage(this,"   Non-removed material will be returned as dung and urine. Urine added to soil according to proportions: "
                                         + string.Join(", ",urineFraction), MessageType.Diagnostic);
            }
            else
            {
                summary.WriteMessage(this,"   Non-removed material will be returned as residue.", MessageType.Diagnostic);
            }
        }

        [EventSubscribe("DoManagement")]
        private void OnDoManagement(object sender, EventArgs e)
        {
            // get the biomass available for defoliation
            ConsumableWt = harvestableSwardBiomassWt("All");
            ConsumableN = harvestableSwardBiomassN("All");

            // check whether we need to continue defoliating, i.e. within a multi-day defoliation event (need to check this first in the day)
            if ((daysDefoliating > 0) && (daysDefoliating < durationOfThisDefoliation))
            {
                // reset outputs
                resetMyOutputs();

                // re-check the amount to defoliate
                herbageToRemove = 0.0;
                if (currentAmountType == "DMToRemove")
                {
                    if(ConsumableWt > currentMinAmount + 0.001)
                    {
                        herbageToRemove = Math.Min(ConsumableWt, (currentAmountForDefoliation - cumAmountHarvested) / (durationOfThisDefoliation - daysDefoliating));
                    }
                }
                else if (currentAmountType == "ResidualDM")
                {
                    double currentDM = standingSwardBiomassWt;
                    if (currentDM > currentAmountForDefoliation)
                    {
                        herbageToRemove = Math.Min(ConsumableWt, (currentDM - currentAmountForDefoliation) / (durationOfThisDefoliation - daysDefoliating));
                    }
                }

                // remove plant biomass and return residue
                if (Math.Abs(herbageToRemove) >= 0.001)
                {
                    // set biomass removal
                    defoliateSward(herbageToRemove);

                    // return residue or excreta
                    if(ReturnedWt + ReturnedN > 0.0)
                    {
                        if (ReturnType == ReturnAsTypes.AsResidue)
                        {
                            returnResidues();
                        }
                        else
                        {
                            returnExcreta();
                        }
                    }

                    // consider trampling effect on surface OM
                    if (consideringTrampling)
                    {
                        doTrampling();
                    }

                    // gather amount removed this event
                    cumAmountHarvested += HarvestedWt;
                }

                daysDefoliating += 1;
            }

            // check whether a defoliation ended yesterday
            if (daysDefoliating < 0)
            { // clean up variables
                resetMyOutputs();
                daysDefoliating = 0;
            }

            // check whether automatic defoliations are enabled
            if (automaticManagementAllowed)
            {
                // check whether we are within the period in which defoliation management is allowed
                if ((clock.Today.Date >= DefoliationRotationStartDate.Date) && (clock.Today.Date <= DefoliationRotationEndDate.Date))
                {
                    // check whether the sward has plants alive that could be defoliated
                    if (swardHasLivingPlants)
                    {
                        // check whether the day counter to control defoliation interval needs to be set
                        if (clock.Today.Date == DefoliationRotationStartDate.Date)
                        { // set to the maximum interval, so a defoliation is triggered today
                            if(isDefoliationTriggerAnAmount)
                            {
                                if(EnforceMaximumInterval == yesNoAnswer.Yes)
                                {
                                    DaysSinceLastDefoliation = MaximumInterval;
                                }
                            }
                            else
                            {
                                DaysSinceLastDefoliation = IntervalBetweenDefoliations;
                            }
                        }

                        // check whether the day counter to control defoliation interval needs to be set off
                        double swardCurrentPhenoStage = swardPhenologyStage;
                        if ((swardPreviousPhenoStage < 1.0) && (swardCurrentPhenoStage >= 1.0))
                        { // sward was sown and has just emmerged, pretend a defoliation has happened to set the counter going
                            aDefoliationHasHappened = true;
                            DaysSinceLastDefoliation -= 30; // give an extra month for the pasture to grow (on top of 'normal' interval)
                        }
                        swardPreviousPhenoStage = swardCurrentPhenoStage;

                        // check whether a window for suppressing defoliations has been set
                        if (suppressingDefoliationOnWindow && DateUtilities.WithinDates(NoDefoliationWindowStartDate, clock.Today, NoDefoliationWindowEndDate))
                        { // do nothing as we're within the suppression window
                        }
                        else
                        {
                            // check whether we should start a defoliation event
                            if (DefoliationTriggerType == DefoliationTriggerTypes.FixedInterval)
                            {
                                if (DaysSinceLastDefoliation == IntervalBetweenDefoliations)
                                {
                                    Defoliate(AmountForEachDefoliation, baseAmountType, DurationOfEachDefoliation, MininumAmountToDefoliate, "yes");
                                }
                            }
                            else if (DefoliationTriggerType == DefoliationTriggerTypes.TargetInterval)
                            {
                                if (DaysSinceLastDefoliation >= IntervalBetweenDefoliations)
                                {
                                    if(EnforceMaximumInterval == yesNoAnswer.Yes && (DaysSinceLastDefoliation >= MaximumInterval))
                                    { // start a defoliation even if biomass is insufficient
                                        Defoliate(AmountForEachDefoliation, baseAmountType, DurationOfEachDefoliation, MininumAmountToDefoliate, "yes");
                                    }
                                    else
                                    {
                                        Defoliate(AmountForEachDefoliation, baseAmountType, DurationOfEachDefoliation, MininumAmountToDefoliate, "no");
                                    }
                                }
                            }
                            else  //DefoliationTriggerType == DefoliationTriggerTypes.TargetStandingBiomass
                            {
                                if (standingSwardBiomassWt >= TargetStandingBiomass)
                                {
                                    if(EnforceMinimumInterval == yesNoAnswer.Yes)
                                    { // check interval between defoliations
                                        if(DaysSinceLastDefoliation >= MinimumInterval)
                                        { // sufficient days passed since last defoliation
                                            Defoliate(AmountForEachDefoliation, baseAmountType, DurationOfEachDefoliation, 0.0, "no");
                                        }
                                        //else wait for minimum interval
                                    }
                                    else
                                    { // no checks, just defoliate
                                        Defoliate(AmountForEachDefoliation, baseAmountType, DurationOfEachDefoliation, 0.0, "no");
                                    }
                                }
                                else
                                {
                                    if(EnforceMaximumInterval == yesNoAnswer.Yes && (DaysSinceLastDefoliation >= MaximumInterval))
                                    { // start a defoliation even if biomass is insufficient
                                        Defoliate(AmountForEachDefoliation, baseAmountType, DurationOfEachDefoliation, 0.0, "yes");
                                    }
                                }
                            }
                        }
                    }
                }
                //// Note: Only the code above, responsible for triggering automatic events, is limited by 'AllowAutomaticManagement'.
                ////       The rest of the code is still available to perform one-off defoliations.
                ////       It can be called from another manager or a schedule thingy via Defoliate().
            }
        }

        [EventSubscribe("DoManagementCalculations")]
        private void OnDoManagementCalculations(object sender, EventArgs e)
        {
            // check whether a defoliation event has just been completed
            if (daysDefoliating == durationOfThisDefoliation)
            {
                // get amount of biomass remaining and zero counters
                PostHarvestDM = currentPostHarvest;
                RotationHarvestedDM = cumAmountHarvested;
                aDefoliationHasHappened = true;
                daysDefoliating = -1;

                // compute the mean growth rate for the queued period
                MeanGrowthRateDM = MathUtilities.Average(growthQueue.ToArray());
                growthQueue.Clear();
            }

            // count the days after a defoliation
            if (aDefoliationHasHappened && (daysDefoliating == 0))
            {
                DaysSinceLastDefoliation += 1;
            }

            // update the list holding growth rates
            updateGrowthQueue();
        }

        [EventSubscribe("EndOfDay")]
        private void OnEndOfDay(object sender, EventArgs e)
        {
            // send a 'message' to let models know that a defoliation has ended today (mostly for report)
            if ((daysDefoliating < 0) && (DefoliationHappenedToday != null))
            {
                DefoliationHappenedToday.Invoke(this, args);
            }
        }

        /// <summary>Sets up a defoliation event.</summary>
        /// <param name="amountDM">Amount of biomass to use (g/m2)</param>
        /// <param name="amountType">How the DM amount is interpreted (DMToRemove, ResidualDM)</param>
        /// <param name="duration">Number of days to defoliate over</param>
        /// <param name="minAmount">Minimum amount that can be removed, if using DMToRemove</param>
        /// <param name="mustDo">Flag whether a defoliation must be counted as such even if there is no biomass</param>
        public void Defoliate(double amountDM, string amountType, int duration = 1, double minAmount = 0.0, string mustDo = "yes")
        {
            // check whether there are plants in the sward that can be defoliated
            if (swardHasLivingPlants)
            {
                // check DM amount given
                if (amountDM < 0.0)
                {
                    throw new Exception("Amount to defoliate cannot be negative!");
                }
                else
                {
                    currentAmountForDefoliation = amountDM;
                }
                currentMinAmount = Math.Max(minAmount, 0.0);

                // check the type of amount given
                if (amountType.ToLower() == "dmtoremove")
                {
                    currentAmountType = "DMToRemove";
                }
                else if (amountType.ToLower() == "residualdm")
                {
                    currentAmountType = "ResidualDM";
                }
                else
                {
                    throw new Exception("Amount type should be \"DMToRemove\" or \"ResidualDM\"!");
                }

                // check duration given
                if (duration <= 0)
                {
                    throw new Exception("Duration of defoliation cannot be zero or negative!");
                }
                else
                {
                    durationOfThisDefoliation = duration;
                }

                // check existing biomass and amount to remove
                PreHarvestDM = standingSwardBiomassWt;
                herbageToRemove = 0.0;
                double harvestableBiomass = harvestableSwardBiomassWt("All");
                if (currentAmountType == "DMToRemove")
                {
                    if (currentAmountForDefoliation > 0.001)
                    { // a meaningful amount was given, check how much can be removed
                        if (harvestableBiomass > minAmount + 0.001)
                        {
                            herbageToRemove = Math.Min(harvestableBiomass, currentAmountForDefoliation / durationOfThisDefoliation);
                        }

                        summary.WriteMessage(this, "   Defoliation triggered, attempting to remove " + currentAmountForDefoliation.ToString("#0.0") + " g/m2 of biomass over " + durationOfThisDefoliation + " days", MessageType.Diagnostic);
                    }
                }
                else if (currentAmountType == "ResidualDM")
                {
                    // check how much biomass will be removed
                    if (PreHarvestDM > currentAmountForDefoliation)
                    {
                        herbageToRemove = Math.Min(harvestableBiomass, (PreHarvestDM - currentAmountForDefoliation) / durationOfThisDefoliation);
                    }

                    summary.WriteMessage(this, "   Defoliation triggered, attempting to remove biomass down to " + currentAmountForDefoliation.ToString("#0.0") + " g/m2 over " + durationOfThisDefoliation + " days", MessageType.Diagnostic);
                }

                // can defoliation begin?
                if (Math.Abs(herbageToRemove) >= 0.001)
                {
                    // set off first defoliation
                    defoliateSward(herbageToRemove);

                    // return residue or excreta
                    if(ReturnedWt + ReturnedN > 0.0)
                    {
                        if (ReturnType == ReturnAsTypes.AsResidue)
                        {
                            returnResidues();
                        }
                        else
                        {
                            returnExcreta();
                        }
                    }

                    // consider trampling effect on surface OM
                    if (consideringTrampling)
                    {
                        doTrampling();
                    }

                    // gather values for this event
                    cumAmountHarvested = HarvestedWt;
                    currentPostHarvest = standingSwardBiomassWt;
                    daysDefoliating = 1;
                    DaysSinceLastDefoliation = 0;
                }
                else
                {
                    // abort command as there is not enough biomass, except...
                    if (mustDo.ToLower() == "yes")
                    { // count the event as if it did happen
                        cumAmountHarvested = 0.0;
                        currentPostHarvest = standingSwardBiomassWt;
                        daysDefoliating = 1;
                        DaysSinceLastDefoliation = 0;
                        summary.WriteMessage(this, "   Defoliation triggered but no biomass was removed (total harvestable = " + harvestableBiomass.ToString("#0.0") + " g/m2)", MessageType.Diagnostic);
                    }
                    else
                    {
                        summary.WriteMessage(this, "   Defoliation did not happen because current biomass (" + PreHarvestDM.ToString("#0.0") + " g/m2) is too low (total harvestable = " + harvestableBiomass.ToString("#0.0") + " g/m2)", MessageType.Diagnostic);
                    }
                }
            }
            else
            {
                summary.WriteMessage(this, "   Defoliation did not happen because there is no growing plants in the sward", MessageType.Diagnostic);
            }
        }

        /// <summary>Resets the values of outputs.</summary>
        private void resetMyOutputs()
        {
            DefoliatedWt = 0.0;
            DefoliatedN = 0.0;
            HarvestedWt = 0.0;
            HarvestedN = 0.0;
            RemovedWt = 0.0;
            RemovedN = 0.0;
            ReturnedWt = 0.0;
            ReturnedN = 0.0;
            NReturnedInDung = 0.0;
            NReturnedInUrine = 0.0;
            RotationHarvestedDM = 0.0;
            MeanGrowthRateDM = 0.0;
        }

        /// <summary>Updates the lists holding data to compute mean growth rate.</summary>
        private void updateGrowthQueue()
        {
            growthQueue.AddFirst(todaysBiomassGrowthWt);
            if (MeanGrowthPeriodType != MeanGrowthPeriodTypes.BetweenDefoliations)
            {
               if (growthQueue.Count > MaxPeriodForMeanGrowth)
               { // Max period reached, need to remove last value in the queue
                   growthQueue.RemoveLast();
               }
            }
        }

        /// <summary>Flags whether there is any living plant in the sward.</summary>
        private bool swardHasLivingPlants
        {
            get
            {
                bool result = false;
                foreach (IPlant species in existingCrops)
                {
                    result |= species.IsAlive;
                }

                return result;
            }
        }

        /// <summary>Gets the phenology stage of the most developed plant in the sward.</summary>
        private double swardPhenologyStage
        {
            get
            {
                double result = 0.0;
                foreach (Plant species in   Structure.FindChildren<Plant>(relativeTo: (INodeModel)myZone).OfType<IModel>().ToList())
                {
                    if (species.IsAlive)
                    {
                        result = Math.Max(result, (double)Structure.Get(species.Name+".Phenology.Stage", relativeTo: myZone));
                    }
                }

                foreach (AgPasture.PastureSpecies species in   Structure.FindChildren<AgPasture.PastureSpecies>(relativeTo: (INodeModel)myZone).OfType<IModel>().ToList())
                {
                    if (species.IsAlive)
                    {
                        result = Math.Max(result, species.Stage);
                    }
                }

                return result;
            }
        }

        /// <summary>Amount of plant biomass aboveground (g/m2).</summary>
        private double standingSwardBiomassWt
        {
            get
            {
                double result = 0.0;
                foreach (IPlant species in existingCrops)
                {
                   result += species.AboveGround.Wt;
                }

                return result;
            }
        }

        /// <summary>Amount of N in plant's biomass aboveground (g/m2).</summary>
        private double standingSwardBiomassN
        {
            get
            {
                double result = 0.0;
                foreach (IPlant species in existingCrops)
                {
                    result += species.AboveGround.N;
                }

                return result;
            }
        }

        /// <summary>Amount of plant biomass from all organs available for defoliation (g/m2).</summary>
        /// <remarks>Uses the fractions set in 'Forages' model.</remarks>
        /// <param name="plantName">The name of the plant to retrieve its biomass</param>
        private double harvestableSwardBiomassWt(string plantName)
        {
            double amountWt = 0.0;
            foreach (var forage in existingForageCrops) 
            {
                foreach (var forageMaterial in forage.Material)
                {
                    string forageName = forageMaterial.Name.Split('.')[0];
                    if ((plantName == "All") || (forageName == plantName))
                    {
                        amountWt += forageMaterial.Consumable.Wt;
                    }
                }
            }

            return amountWt;
        }

        /// <summary>Amount of N in plant biomass available for defoliation (g/m2).</summary>
        /// <remarks>Uses the fractions set in 'Forages' model.</remarks>
        /// <param name="plantName">The name of the plant to retrieve its biomass</param>
        private double harvestableSwardBiomassN(string plantName)
        {
            double amountN = 0.0;
            foreach (var forage in existingForageCrops) 
            {
                foreach (var forageMaterial in forage.Material)
                {
                    string forageName = forageMaterial.Name.Split('.')[0];
                    if ((plantName == "All") || (forageName == plantName))
                    {
                        amountN += forageMaterial.Consumable.N;
                    }
                }
            }

            return amountN;
        }

        /// <summary>Gets the sward growth rate of aboveground biomass for today (g/m2).</summary>
        private double todaysBiomassGrowthWt
        {
            get
            {
                double result = 0.0;
                foreach (IPlant species in existingCrops)
                {
                    if (species.GetType().ToString().Contains("PMF"))
                    { // a PMF plant
                        foreach (IOrgan organ in Structure.FindChildren<IOrgan>(relativeTo: species as Plant, recurse: true).OfType<IModel>().ToList())
                        {
                            string speciesName = (species as Plant).Name;
                            if ((bool)Structure.Get(speciesName + "." + organ.Name + ".IsAboveGround", relativeTo: myZone))
                            {
                                result += (double)Structure.Get(speciesName + "." + organ.Name + ".Allocated.Wt", relativeTo: myZone);
                                result -= (double)Structure.Get(speciesName + "." + organ.Name + ".Detached.Wt", relativeTo: myZone);
                            }
                        }
                    }
                    else
                    { // an AgPasture plant
                        result += (species as PastureSpecies).HerbageGrowthWt*0.1;
                    }
                }

                return result;
            }
        }

        /// <summary>Triggers the actual biomass removal and gather DM and N amounts.</summary>
        /// <param name="amountToRemove">The total DM amount to remove (g/m2)</param>
        private void defoliateSward(double amountToRemove)
        {
            // get the amounts of biomass and N before today's defoliation
            double preRemovalDM = standingSwardBiomassWt;
            double preRemovalN = standingSwardBiomassN;
            double totalHarvestableAmount = harvestableSwardBiomassWt("All");

            // zero the outputs, just in case
            DefoliatedWt = 0.0;
            DefoliatedN = 0.0;
            HarvestedWt = 0.0;
            HarvestedN = 0.0;
            RemovedWt = 0.0;
            RemovedN = 0.0;

            // go over each forage species and organ and remove biomass
            foreach (var forage in existingForageCrops)
            {
                if(forage.Material.Count() > 0)
                {
                    // do the biomass removal/harvest
                    double speciesOrganFraction = forage.Material.Sum(m => m.Consumable.Wt)*0.1/totalHarvestableAmount;
                    double removeAmount = amountToRemove*speciesOrganFraction*10.0;

                    if (removeAmount > 0.0)
                    {
                        var forageDefoliated = forage.RemoveBiomass(amountToRemove: removeAmount);

                        // gather the amounts harvested (i.e. defoliated minus returned to residues)
                        HarvestedWt += forageDefoliated.Wt*0.1;
                        HarvestedN += forageDefoliated.N*0.1;

                        // check the fraction of defoliated biomass to be taken off field
                        double removeFractionDM = FractionDMToRemove;
                        double removeFractionN = FractionNToRemove;
                        if(FractionDMToRemove < 0.0)
                        { // use digestibility to define the fraction
                            removeFractionDM = forageDefoliated.Digestibility;

                            // check whether N fraction is proportional to DM
                            if (FractionNToRemove < 0.0)
                            {
                                removeFractionN = removeFractionDM;
                            }
                        }

                        // get the amounts actually removed from the field
                        RemovedWt += forageDefoliated.Wt*0.1*removeFractionDM;
                        RemovedN += forageDefoliated.N*0.1*removeFractionN;
                    }
                }
            }

            // get the amounts of biomass and N after today's defoliation
            double postRemovalDM = standingSwardBiomassWt;
            double postRemovalN = standingSwardBiomassN;

            // get total defoliation (total plant stuff lost)
            DefoliatedWt = preRemovalDM - postRemovalDM;
            DefoliatedN = preRemovalN - postRemovalN;

            // get amounts harvested, removed, and returned
            manageDefoliatedBiomass();
        }

        /// <summary>Gathers the DM and N amounts harvested, to be removed, and to be returned.</summary>
        private void manageDefoliatedBiomass()
        {
            if (HarvestedWt > 0.0)
            {
                // get the amounts to be returned to the field (as residue or dung+urine)
                ReturnedWt = HarvestedWt - RemovedWt;
                ReturnedN = HarvestedN - RemovedN;
                if (returningAsDungUrine)
                {
                    if (nitrogenInDungIsProportion)
                    {
                        NReturnedInDung = ReturnedN * ProportionOfNToDung;
                    }
                    else
                    {
                        NReturnedInDung = Math.Min(ReturnedN, ReturnedWt * 0.4 / CNRatioDung);
                    }

                    NReturnedInDung = Math.Min(NReturnedInDung, ReturnedN);
                    NReturnedInUrine = ReturnedN - NReturnedInDung;

                    if(urineNAmountFixed)
                    { // urine N to return is set in UI
                        NReturnedInUrine = UrineNSetAmount;
                    }
                }
                else
                {
                    NReturnedInDung = 0.0;
                    NReturnedInUrine = 0.0;
                }
            }
        }

        /// <summary>Returns the material not removed off field as residue.</summary>
        private void returnResidues()
        {
            if ((ReturnedWt > 0.0) || (ReturnedN > 0.0))
            {
                PMF.BiomassRemovedType BiomassResidue = new PMF.BiomassRemovedType();
                string[] type = new string[] { "Grass" };
                float[] dltdm = new float[] { (float)(10.0 * ReturnedWt) };
                float[] dltn = new float[] { (float)(10.0 * ReturnedN) };
                float[] dltp = new float[] { 0.0f };
                float[] fraction = new float[] { 1.0f };     // fraction is always 1.0 here

                BiomassResidue.crop_type = "Grass";
                BiomassResidue.dm_type = type;
                BiomassResidue.dlt_crop_dm = dltdm;
                BiomassResidue.dlt_dm_n = dltn;
                BiomassResidue.dlt_dm_p = dltp;
                BiomassResidue.fraction_to_residue = fraction;
                BiomassRemoved.Invoke(BiomassResidue);
            }
        }

        /// <summary>Returns the material not removed off field as dung and urine).</summary>
        private void returnExcreta()
        {
            if ((ReturnedWt > 0.0) || (NReturnedInDung > 0.0))
            {
                PMF.BiomassRemovedType BiomassDung = new PMF.BiomassRemovedType();
                string[] type = new string[] { "RuminantDung_PastureFed" };
                float[] dltdm = new float[] { (float)(10.0 * ReturnedWt) };
                float[] dltn = new float[] { (float)(10.0 * NReturnedInDung) };
                float[] dltp = new float[] { 0.0f };
                float[] fraction = new float[] { 1.0f };     // fraction is always 1.0 here

                BiomassDung.crop_type = "RuminantDung_PastureFed";
                BiomassDung.dm_type = type;
                BiomassDung.dlt_crop_dm = dltdm;
                BiomassDung.dlt_dm_n = dltn;
                BiomassDung.dlt_dm_p = dltp;
                BiomassDung.fraction_to_residue = fraction;
                BiomassRemoved.Invoke(BiomassDung);
            }

            if (NReturnedInUrine > 0.0)
            {
                double[] myUrineDeposition = new double[soilPhysical.Thickness.Length];
                for (int z = 0; z < urineFraction.Length; z++)
                {
                    myUrineDeposition[z] = NReturnedInUrine * 10.0 * urineFraction[z];
                }

                Urea.AddKgHaDelta(SoluteSetterType.Fertiliser, myUrineDeposition);
            }
        }

        /// <summary>Incorporate a fraction of surface OM material to the soil surface layer.</summary>
        /// <remarks>Assumes that trampling is proportional to the amount defoliated.</remarks>
        private void doTrampling(double fractionToIncorporate = 0.0)
        {
            if (DefoliatedWt > 0.0)
            {
                fractionToIncorporate = Math.Min(BiomassDefoliatedForMaximumLitterFraction/DefoliatedWt, MaximumLitterFractionToSoil);
                surfaceOM.Incorporate(fraction: fractionToIncorporate, depth: 100);
            }
        }

        // Auxiliary boolead for UI  - - - - - - - - - - - - - - - - - - - - - - - - - - - - - - - - -

        private bool automaticManagementAllowed
        { get { return AllowAutomaticManagement == yesNoAnswer.Yes; } }
        private bool isDefoliationTriggerAnInterval
        { get { return DefoliationTriggerType != DefoliationTriggerTypes.TargetStandingBiomass; } }
        private bool isTriggerNotFixedInterval
        { get { return DefoliationTriggerType != DefoliationTriggerTypes.FixedInterval; } }
        private bool isDefoliationTriggerAnAmount
        { get { return DefoliationTriggerType == DefoliationTriggerTypes.TargetStandingBiomass; } }
        private bool isAmountDMToRemove
        { get { return RemoveAmountType == DefoliateAmountTypes.DMToRemove; } }
        private bool suppressingDefoliationOnWindow
        { get { return SuppressDefoliationOnWindow == yesNoAnswer.Yes; } }
        private bool minimumIntervalEnforced
        { get { return isDefoliationTriggerAnAmount && (EnforceMinimumInterval == yesNoAnswer.Yes); } }
        private bool maximumIntervalEnforced
        { get { return isTriggerNotFixedInterval && (EnforceMaximumInterval == yesNoAnswer.Yes); } }
        private bool userDefinesDMFraction
        { get { return DMRemoveType == DMRemovalTypes.UserDefinedFraction; } }
        private bool userDefinesNFraction
        { get { return NRemoveType == NRemovalTypes.UserDefinedFraction; } }
        private bool returningAsDungUrine
        { get { return ReturnType == ReturnAsTypes.AsDungUrine; } }
        private bool nitrogenInDungIsProportion
        { get { return returningAsDungUrine && (NDungType == DungNContentTypes.DefineProportion); } }
        private bool nitrogenInDungIsCNRatio
        { get { return returningAsDungUrine && (NDungType == DungNContentTypes.DefineCNratio); } }
        private bool urineNAmountFixed
        { get { return SettingUrineNAmount == yesNoAnswer.Yes; } }
        private bool growthPeriodToBeGiven
        { get { return MeanGrowthPeriodType != MeanGrowthPeriodTypes.BetweenDefoliations; } }
        private bool consideringTrampling
        { get { return ConsiderTrampling == yesNoAnswer.Yes;} }

        // Auxiliary bits and pieces  - - - - - - - - - - - - - - - - - - - - - - - - - - - - - - - - -

        /// <summary>Flag for a positive or negative answer.</summary>
        public enum yesNoAnswer
        {
            /// <summary>Positive answer.</summary>
            Yes,
            /// <summary>Negative answer.</summary>
            No
        }

        /// <summary>Flag how defoliations will be triggered.</summary>
        public enum DefoliationTriggerTypes
        {
            /// <summary>Setting a fixed interval.</summary>
            FixedInterval,
            /// <summary>Setting a target (minimum) interval.</summary>
            TargetInterval,
            /// <summary>Setting a target (maximum) standing biomass.</summary>
            TargetStandingBiomass
        }

        /// <summary>How the DM amount given is interpreted.</summary>
        public enum DefoliateAmountTypes
        {
            /// <summary>Setting a DM amount to remove.</summary>
            DMToRemove,
            /// <summary>Setting the residual DM amount.</summary>
            ResidualDM
        }

        /// <summary>Fraction of defoliated DM to remove from field.</summary>
        public enum DMRemovalTypes
        {
            /// <summary>Remove all DM.</summary>
            RemoveAll,
            /// <summary>Remove no DM.</summary>
            RemoveNone,
            /// <summary>Remove a user-defined fraction.</summary>
            UserDefinedFraction,
            /// <summary>Remove a fraction based on plant digestibility.</summary>
            BasedOnDigestibility
        }

        /// <summary>Fraction of N in the defoliated material to remove from field.</summary>
        public enum NRemovalTypes
        {
            /// <summary>Remove all N.</summary>
            RemoveAll,
            /// <summary>Remove no N.</summary>
            RemoveNone,
            /// <summary>Remove a user-defined fraction.</summary>
            UserDefinedFraction,
            /// <summary>Remove a fraction equal to DM removed.</summary>
            ProportionalToDM
        }

        /// <summary>Define how the non-removed material is returned to the field.</summary>
        public enum ReturnAsTypes
        {
            /// <summary>Return plant material as residue.</summary>
            AsResidue,
            /// <summary>Return material as dung and urine.</summary>
            AsDungUrine
        }

        /// <summary>Define how the proportion of N in dung is defined.</summary>
        public enum DungNContentTypes
        {
            /// <summary>Define the proportion of N returned as dung.</summary>
            DefineProportion,
            /// <summary>Define the C:N of dung.</summary>
            DefineCNratio
        }

        /// <summary>Options for the period over which mean growth is computed.</summary>
        public enum MeanGrowthPeriodTypes
        {
            /// <summary>Compute over the period between defoliations.</summary>
            BetweenDefoliations,
            /// <summary>Compute over a fixed number of days.</summary>
            FixedPeriod,
            /// <summary>Compute over the period between defoliations, but limited to a maximum.</summary>
            BetweenDefoliationsOrMaxPeriod
        }
    }
}
```
            MicroClimate: a_interception=0; b_interception=1; c_interception=0; d_interception=0; SoilHeatFluxFraction=0.4; MinimumHeightDiffForNewLayer=0; NightInterceptionFraction=0.5; ReferenceHeight=2
            SurfaceOrganicMatter: InitialResidueName=grass; InitialResidueType=grass; InitialResidueMass=500; InitialStandingFraction=0; InitialCPR=0; InitialCNR=40
            Irrigation
            Fertiliser
            Soil HagerstownSoil: SoilType=Typic Hapludult (US); LocalName=Ramsey fine-loam; State=West Virginia; Country=USA; NaturalVegetation=Forest; Latitude=0; Longitude=0; DataSource=National Cooperative Soil Survey, US
              Comments=Generic soil description based on data of the same sol type from different locations
              Chemical: Thickness=[100, 120, 130, 200, 300, 300, 350]; PH=[6, 6, 6, 6, 6, 6, 6]; PHUnits=Water
              Physical
                Thickness  ParticleSizeSand  ParticleSizeSilt  ParticleSizeClay  Rocks  BD    AirDry  LL15   DUL    SAT    KS
                100        11.4              66.9              21.7              0      1.3   0.048   0.12   0.277  0.465  1200
                120        10.9              66.7              22.4              0      1.38  0.085   0.094  0.264  0.421  420
                130        11.9              64.3              23.8              0      1.37  0.079   0.079  0.238  0.381  275
                200        13.7              60.8              25.5              0      1.41  0.094   0.094  0.222  0.381  200
                300        11.1              45.6              43.3              0      1.47  0.141   0.141  0.255  0.338  80
                300        8.7               39.9              51.4              0      1.48  0.155   0.155  0.28   0.359  40
                350        9.3               42.7              48                0      1.52  0.166   0.166  0.296  0.409  80
                SoilCrop PlantainForageSoil: LL=[0.12, 0.094, 0.079, 0.094, 0.141, 0.155, 0.166]; KL=[0.1, 0.09, 0.08, 0.05, 0.03, 0.02, 0.02]; XF=[1, 1, 1, 1, 1, 1, 1]
              WaterBalance SoilWater: SummerDate=21-Mar; SummerU=6; SummerCona=3.5; WinterDate=23-Sep; WinterU=6; WinterCona=2.5; DiffusConst=88; DiffusSlope=35; Salb=0.13; CN2Bare=73; CNRed=20; CNCov=0.8; PSIDul=-100; Thickness=[100, 120, 130, 200, 300, 300, 350]; SWCON=[0.6, 0.5, 0.3, 0.3, 0.25, 0.2, 0.3]
              Organic: FOMCNRatio=40; CarbonUnits=Total
                Thickness  Carbon  SoilCNRatio  FBiom  FInert  FOM
                100        3.26    11           0.06   0.4     450
                120        1.17    11           0.04   0.6     380
                130        0.39    11           0.025  0.75    225
                200        0.4     11           0.015  0.875   125
                300        0.25    11           0.01   0.95    60
                300        0.2     11           0.01   0.99    10
                350        0.15    11           0.01   0.99    0
              Water: Thickness=[100, 120, 130, 200, 300, 300, 350]; InitialValues=[0.26915, 0.2555, 0.23005, 0.2156, 0.2493, 0.27375, 0.2895]; FilledFromTop=false
              Nutrient
              Solute NO3: Thickness=[100, 120, 130, 200, 300, 300, 350]; InitialValuesUnits=ppm; WaterTableConcentration=0; D0=0; DepthConstant=0; MaxDepthSoluteAccessible=0; RunoffEffectivenessAtMovingSolute=0; MaxEffectiveRunoff=0
                InitialValues=[15.3846, 9.05797, 2.17344, 2.17344, 0.352858, 0.352858, 0.352858]
              Solute NH4: Thickness=[100, 120, 130, 200, 300, 300, 350]; InitialValuesUnits=ppm; WaterTableConcentration=0; D0=0; DepthConstant=0; MaxDepthSoluteAccessible=0; RunoffEffectivenessAtMovingSolute=0; MaxEffectiveRunoff=0
                InitialValues=[1.53846, 1.20773, 0.217344, 0.217344, 0.0352858, 0.0352858, 0.0352858]
              Solute Urea: Thickness=[100, 120, 130, 200, 300, 300, 350]; InitialValues=[0, 0, 0, 0, 0, 0, 0]; InitialValuesUnits=kg/ha; WaterTableConcentration=0; D0=0; DepthConstant=0; MaxDepthSoluteAccessible=0; RunoffEffectivenessAtMovingSolute=0; MaxEffectiveRunoff=0
              SoilTemperature Temperature: InteractionsPerDay=8
            Plant PlantainForage
            Report BaseReport: VariableNames=// variables defined in 'Replacements'; EventNames=[Clock].DoReport
            Report CumReport: VariableNames=// variables defined in 'Replacements'; EventNames=[Clock].DoReport
            Report CropReport: VariableNames=// variables defined in 'Replacements'; EventNames=[Clock].DoReport
            Report DiagnosisReport: VariableNames=// variables defined in 'Replacements'; EventNames=[Clock].DoReport
            Report ValidationReport: EventNames=[Clock].DoReport
              VariableNames:
                [Clock].Today as Date
                [Clock].Today.DayOfYear as DayOfYear
                [PlantainForage].Population as Population
                [PlantainForage].AboveGround.Wt as AboveGround.Wt
                [PlantainForage].Leaf.Live.NConc as Leaf.Live.NConc
                [PlantainForage].AboveGroundLive.NConc as AboveGroundLive.NConc
                [PlantainForage].Leaf.Height as PlantHeight
                [DefoliationManager].Script.HarvestedWt as HarvestedWt
                [DefoliationManager].Script.HarvestedN as HarvestedN
                Sum of ([DefoliationManager].Script.RemovedWt) from 1-Jan to [Clock].Today as CumulativeHarvestedWt
                Sum of ([DefoliationManager].Script.RemovedN) from 1-Jan to [Clock].Today as CumulativeHarvestedN
      Experiment RELARC_02
        Memo
          ###RELARC 02###

          This simulation was adapted from a defoliation trial conducted in 2000-2001, at Russell E. Larson Agricultural Research Center, Pennsylvania, USA.  The trial was established in small plots, replicated five times, with plantain forage sown in April-1999 (Cultivars '*Lancelot*' and '*Tonic*'.  Only data from the first year is used as the population declined markedly in the second winter.  All plots received 4.5 t/ha of limestone and were fertilized with 56 kg N/ha in April, June and July of 2000.  The soil at the site was a Hagerstown silt loam (fine, mixed, semiactive mesic Typic Hapludalfs).
          Each plot was mechanically mowed to height of 7cm every 4 weeks.  Only annual and treatment yields are reported, however population was given for specific dates.  Dates for each harvest were reported.  From these data, yield was arbitrarily inferred for each harvest, therefore they should be seen as rough approximation only (N variation between cultivars were considered here).
          Met file was built using data obtained from NOAA website.  The data set was largely complete except for solar radiation, which was added from an alternative interpolated set for this location, also from NOAA.
          Information to assemble the soil data was obtained from USGS.

          References:
          Sanderson, M.A.; Labreveux, M.; Hall, M.H.; Elwinger, G.F. 2003. Forage yield and persistence of chicory and english plantain. Crop Science, 43: 995-1000.
        Factors
          Factor Cultivar
            CompositeFactor Lancelot: Specifications=[Sowing]
              Operations Sowing
                1999-04-28  [PlantainForage].Sow(population: 300, cultivar: "Lancelot", depth: 10, rowSpacing: 150)
            CompositeFactor Tonic: Specifications=[Sowing]
              Operations Sowing
                1999-04-28  [PlantainForage].Sow(population: 300, cultivar: "Tonic", depth: 10, rowSpacing: 150)
        Simulation RELARC_02
          Clock: Start=1999-04-01; End=2000-12-31
          Weather: FileName=StateCollege.met
          Summary
          SoilArbitrator Soil Arbitrator
          Forages: same as Validation.New Zealand.FRNLLincoln.FRNLLincoln.Forages
          Zone Field: Area=1; Slope=0; AspectAngle=0; Altitude=50
            Folder Management
              Operations Sowing
              Operations FertiliserSchedule
                2000-04-15  [Fertiliser].Apply(amount: 56, type: "NH4NO3N", depth: 10)
                2000-06-01  [Fertiliser].Apply(amount: 56, type: "NH4NO3N", depth: 10)
                2000-07-05  [Fertiliser].Apply(amount: 56, type: "NH4NO3N", depth: 10)
              Operations Cuttings
                1999-09-15  [DefoliationManager].Script.Defoliate(amountDM: 50, amountType: "ResidualDM", duration: 1)
                2000-05-16  [DefoliationManager].Script.Defoliate(amountDM: 50, amountType: "ResidualDM", duration: 1)
                2000-06-14  [DefoliationManager].Script.Defoliate(amountDM: 50, amountType: "ResidualDM", duration: 1)
                2000-07-11  [DefoliationManager].Script.Defoliate(amountDM: 50, amountType: "ResidualDM", duration: 1)
                2000-08-08  [DefoliationManager].Script.Defoliate(amountDM: 60, amountType: "ResidualDM", duration: 1)
                2000-09-05  [DefoliationManager].Script.Defoliate(amountDM: 60, amountType: "ResidualDM", duration: 1)
              Manager DefoliationManager: same as Validation.USA.RELARC_01.RELARC_01.Field.Management.DefoliationManager
            MicroClimate: a_interception=0; b_interception=1; c_interception=0; d_interception=0; SoilHeatFluxFraction=0.4; MinimumHeightDiffForNewLayer=0; NightInterceptionFraction=0.5; ReferenceHeight=2
            SurfaceOrganicMatter: InitialResidueName=grass; InitialResidueType=grass; InitialResidueMass=500; InitialStandingFraction=0; InitialCPR=0; InitialCNR=40
            Irrigation
            Fertiliser
            Soil HagerstownSoil: SoilType=Typic Hapludult (US); LocalName=Ramsey fine-loam; State=West Virginia; Country=USA; NaturalVegetation=Forest; Latitude=0; Longitude=0; DataSource=National Cooperative Soil Survey, US
              Comments=Generic soil description based on data of the same sol type from different locations
              Chemical: Thickness=[100, 120, 130, 200, 300, 300, 350]; PH=[6, 6, 6, 6, 6, 6, 6]; PHUnits=Water
              Physical: same as Validation.USA.RELARC_01.RELARC_01.Field.HagerstownSoil.Physical
              WaterBalance SoilWater: same as Validation.USA.RELARC_01.RELARC_01.Field.HagerstownSoil.SoilWater
              Organic: same as Validation.USA.RELARC_01.RELARC_01.Field.HagerstownSoil.Organic
              Water: Thickness=[100, 120, 130, 200, 300, 300, 350]; InitialValues=[0.26915, 0.2555, 0.23005, 0.2156, 0.2493, 0.27375, 0.2895]; FilledFromTop=false
              Nutrient
              Solute NO3: Thickness=[100, 120, 130, 200, 300, 300, 350]; InitialValues=[10, 6, 2.173, 2.173, 0.353, 0.353, 0.353]; InitialValuesUnits=ppm; WaterTableConcentration=0; D0=0; DepthConstant=0; MaxDepthSoluteAccessible=0; RunoffEffectivenessAtMovingSolute=0; MaxEffectiveRunoff=0
              Solute NH4: same as Validation.USA.RELARC_01.RELARC_01.Field.HagerstownSoil.NH4
              Solute Urea: same as Validation.USA.RELARC_01.RELARC_01.Field.HagerstownSoil.Urea
              SoilTemperature Temperature: InteractionsPerDay=8
            Plant PlantainForage
            Report BaseReport: VariableNames=// variables defined in 'Replacements'; EventNames=[Clock].DoReport
            Report CumReport: VariableNames=// variables defined in 'Replacements'; EventNames=[Clock].DoReport
            Report CropReport: VariableNames=// variables defined in 'Replacements'; EventNames=[Clock].DoReport
            Report DiagnosisReport: VariableNames=// variables defined in 'Replacements'; EventNames=[Clock].DoReport
            Report ValidationReport: same as Validation.USA.RELARC_01.RELARC_01.Field.ValidationReport
      Memo SubTitle
        ### All data from USA
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