Simulations: Version=204
  DataStore
    ExcelInput Observed: SheetNames=[Observed, Phenology]
      FileNames=[%root%/Tests/Validation/Wheat/Phenology/Observed/Observed.xlsx, %root%/Tests/Validation/Wheat/Phenology/Observed/Phenology.xlsx, %root%/Tests/Validation/Wheat/Phenology/Observed/ObservedFlagLeaf.xlsx, %root%/Tests/Validation/Wheat/Phenology/Observed/Obs_APSIMX_NPIField2020_Wheat.xlsx, %root%/Tests/Validation/Wheat/Phenology/Observed/Obs_APSIMX_NPIField2019_Wheat.xlsx, %root%/Tests/Validation/Wheat/Phenology/Observed/LaTrobeCE_Obs.xlsx, %root%/Tests/Validation/Wheat/Phenology/Observed/LincolnCE_Obs.xlsx, %root%/Tests/Validation/Wheat/Phenology/Observed/PalmerstonNorthCE_Obs.xlsx, %root%/Tests/Validation/Wheat/Phenology/Observed/NPIValidation.xlsx, %root%/Tests/Validation/Wheat/Phenology/Observed/OtherPhenologyObs.xlsx]
    PredictedObserved HarvestObsPred: PredictedTableName=HarvestReport; ObservedTableName=Observed; FieldNameUsedForMatch=SimulationName; FieldName2UsedForMatch=Wheat.Phenology.CurrentStageName; AllColumns=true
    PredictedObserved DailyObsPred: PredictedTableName=DailyReport; ObservedTableName=Observed; FieldNameUsedForMatch=SimulationName; FieldName2UsedForMatch=Clock.Today; AllColumns=true
  Folder Replacements
    Cultivar Accroc (disabled)
      Command:
        [Phenology].Phyllochron.BasePhyllochron.FixedValue = 150
        [Phenology].PhyllochronPpSensitivity.FixedValue = 0.6
        [Phenology].HeadEmergenceLongDayBase.FixedValue = 43.31
        [Phenology].HeadEmergencePpSensitivity.FixedValue = 2
        [Phenology].CAMP.FLNparams.MinLN = 6
        [Phenology].CAMP.FLNparams.PpLN = 10
        [Phenology].CAMP.FLNparams.VrnLN = 12
        [Phenology].CAMP.FLNparams.VxPLN = 5
        [Phenology].CAMP.EnvData.VrnTreatTemp = 6
        [Phenology].CAMP.EnvData.VrnTreatDuration = 120
    Cultivar BigRed (disabled)
      Command:
        [Phenology].Phyllochron.BasePhyllochron.FixedValue = 150
        [Phenology].PhyllochronPpSensitivity.FixedValue = 1.5
        [Phenology].HeadEmergenceLongDayBase.FixedValue = 50
        [Phenology].HeadEmergencePpSensitivity.FixedValue = 1.9
        [Phenology].CAMP.FLNparams.MinLN = 5.8
        [Phenology].CAMP.FLNparams.PpLN = 10
        [Phenology].CAMP.FLNparams.VrnLN = 18
        [Phenology].CAMP.FLNparams.VxPLN = 5
        [Phenology].CAMP.EnvData.VrnTreatTemp = 6
        [Phenology].CAMP.EnvData.VrnTreatDuration = 120
    Cultivar Calibro (disabled)
      Command:
        [Phenology].Phyllochron.BasePhyllochron.FixedValue = 150
        [Phenology].PhyllochronPpSensitivity.FixedValue = 1.69
        [Phenology].HeadEmergenceLongDayBase.FixedValue = 50
        [Phenology].HeadEmergencePpSensitivity.FixedValue = 2
        [Phenology].CAMP.FLNparams.MinLN = 6
        [Phenology].CAMP.FLNparams.PpLN = 8
        [Phenology].CAMP.FLNparams.VrnLN = 12
        [Phenology].CAMP.FLNparams.VxPLN = 5
        [Phenology].CAMP.EnvData.VrnTreatTemp = 6
        [Phenology].CAMP.EnvData.VrnTreatDuration = 120
    Cultivar Rockstar (disabled)
      Command:
        [Phenology].Phyllochron.BasePhyllochron.FixedValue = 150
        [Phenology].PhyllochronPpSensitivity.FixedValue = 0.2
        [Phenology].HeadEmergenceLongDayBase.FixedValue = 200
        [Phenology].HeadEmergencePpSensitivity.FixedValue = 1
        [Phenology].CAMP.FLNparams.MinLN = 4.9
        [Phenology].CAMP.FLNparams.PpLN = 8
        [Phenology].CAMP.FLNparams.VrnLN = 5
        [Phenology].CAMP.FLNparams.VxPLN = 5.5
        [Phenology].CAMP.EnvData.VrnTreatTemp = 3.5
        [Phenology].CAMP.EnvData.VrnTreatDuration = 250
    Cultivar Scepter (disabled)
      Command:
        [Phenology].Phyllochron.BasePhyllochron.FixedValue = 107.602580952482
        [Phenology].PhyllochronPpSensitivity.FixedValue = 0.23032920462638
        [Phenology].CAMP.EnvData.VrnTreatTemp = 6
        [Phenology].CAMP.EnvData.VrnTreatDuration = 60
        [Phenology].CAMP.FLNparams.MinLN = 6.5
        [Phenology].CAMP.FLNparams.PpLN = 1.5
        [Phenology].CAMP.FLNparams.VrnLN = 5
        [Phenology].CAMP.FLNparams.VxPLN = 0
        [Phenology].HeadEmergenceLongDayBase.FixedValue = 170
        [Phenology].HeadEmergencePpSensitivity.FixedValue = 0
    Cultivar Manning (disabled)
      Command:
        [Phenology].Phyllochron.BasePhyllochron.FixedValue = 104.816433323058
        [Phenology].PhyllochronPpSensitivity.FixedValue = 0.253254338348875
        [Phenology].CAMP.EnvData.VrnTreatTemp = 6
        [Phenology].CAMP.EnvData.VrnTreatDuration = 60
        [Phenology].CAMP.FLNparams.MinLN = 9
        [Phenology].CAMP.FLNparams.PpLN = 6
        [Phenology].CAMP.FLNparams.VrnLN = 8
        [Phenology].CAMP.FLNparams.VxPLN = 0
        [Phenology].HeadEmergenceLongDayBase.FixedValue = 230
        [Phenology].HeadEmergencePpSensitivity.FixedValue = 0
    Report HarvestReport: EventNames=[Wheat].Harvesting
      VariableNames:
        [Clock].Today
        [Clock].StartDate
        [Wheat].SowingDate
        [Wheat].SowingData.Cultivar
        [Wheat].SowingData.Population
        [Wheat].SowingDate.DayOfYear
        [Wheat].SowingData.RowSpacing
        [IWeather].Latitude
        [IWeather].Longitude
        [IWeather].FileName
        [LocationInfo].Script.Country
        [LocationInfo].Script.State
        [LocationInfo].Script.Region
        [Wheat].AboveGround.N
        [Wheat].AboveGround.NConc
        [Wheat].AboveGround.Wt
        [Wheat].Ear.N
        [Wheat].Ear.NConc
        [Wheat].Ear.Wt
        [Wheat].Grain.N
        [Wheat].Grain.NConc
        [Wheat].Grain.Number
        [Wheat].Grain.Protein
        [Wheat].Grain.Size
        [Wheat].Grain.Wt
        [Wheat].Leaf.N
        [Wheat].Leaf.StemPopulation
        [Wheat].Leaf.Wt
        [Wheat].Phenology.CAMP.TSHS
        [Wheat].Phenology.CAMP.VSHS
        [Wheat].Phenology.CurrentStageName
        [Wheat].Phenology.EmergenceDAS
        [Wheat].Phenology.FinalLeafNumber
        [Wheat].Phenology.FlagLeafDAS
        [Wheat].Phenology.FloweringDAS
        [Wheat].Phenology.HeadingDAS
        [Wheat].Phenology.MaturityDAS
        [Wheat].Phenology.TerminalSpikeletDAS
        [Wheat].Spike.HeadNumber
        [Wheat].Spike.N
        [Wheat].Spike.Wt
        [Wheat].Stem.N
        [Wheat].Stem.NConc
        [Wheat].Stem.Wt
    Manager Harvesting
```csharp
using APSIM.Core;
using Models.Soils.Nutrients;
using System;
using Models.Core;
using System.Collections.Generic;
using System.Text;
using Models.Soils;
using Models.PMF;
using Models;
using System.Xml.Serialization;
using APSIM.Shared.Utilities;
using Models.PMF.Phen;

namespace Models
{
    [Serializable] 
    public class Script : Model, IStructureDependency
    {
        [Link] private Plant Wheat;
        [Link] private Simulation sim;
        [Link] private Clock clock;
        [Link(Type = LinkType.Path, Path = "[Wheat].Phenology")]
        private Phenology phenology;
        public IStructure Structure { private get; set; }


        

        [EventSubscribe("DoManagement")]
        private void OnDoManagement(object sender, EventArgs e)
        {
            if (phenology.CurrentPhase.Name == "GrainRipening")
            {
                Wheat.Harvest();
                Wheat.EndCrop();
                Structure.Set("Clock.EndDate", clock.Today, relativeTo: sim);  
            }
        }

        [EventSubscribe("EndOfDay")]
        private void OnEndOfDay(object sender, EventArgs e)
        {
            if ((clock.Today.Equals(clock.EndDate))&&(Wheat.IsAlive))
            {
                Wheat.Harvest();
                Wheat.EndCrop();
                Structure.Set("Clock.EndDate", clock.Today, relativeTo: sim);  
            }
        }

    }
}
```
    Report DailyReport: EventNames=[Clock].EndOfDay
      VariableNames:
        [Clock].Today
        [Wheat].SowingData.Cultivar
        [Wheat].Phenology.Zadok.Stage
        [Wheat].Phenology.Photoperiod
        [Wheat].Phenology.HaunStage
        [Wheat].DaysAfterSowing
  Folder FARAwardPhenology
    Experiment FARAwardPhenology
      Factors
        Factor Site
          CompositeFactor Trial_1
            Specifications:
              [Clock]
              [Weather]
              [Soil]
              [Operations]
            Clock: Start=2020-01-01; End=2021-04-24
            Weather
              FileName=%root%/Tests/Validation/Wheat/Phenology/WeatherFiles/-35.97_146.67.met
            Soil Chromosol: ASCOrder=Chromosol; Country=Australia
              Comments=Typical Chromosol - median values of all Chromosols in APSoil as at 08/04/2013
              Physical
                Thickness  BD     AirDry  LL15   DUL    SAT
                150        1.528  0.03    0.059  0.151  0.374
                150        1.6    0.061   0.076  0.17   0.346
                300        1.6    0.125   0.125  0.223  0.346
                300        1.6    0.125   0.125  0.263  0.346
                300        1.621  0.125   0.125  0.273  0.338
                300        1.6    0.125   0.125  0.283  0.346
                300        1.6    0.125   0.125  0.276  0.346
                300        1.63   0.125   0.125  0.25   0.335
                300        1.655  0.125   0.125  0.235  0.325
                300        1.615  0.125   0.125  0.217  0.341
                300        1.5    0.125   0.125  0.176  0.384
                300        1.5    0.125   0.125  0.16   0.384
                SoilCrop WheatSoil
                  LL=[0.059, 0.076, 0.125, 0.161, 0.218, 0.245, 0.262, 0.22, 0.22, 0.192, 0.16, 0.16]
                  KL=[0.06, 0.06, 0.06, 0.04, 0.04, 0.02, 0.01, 0.01, 0.01, 0.01, 0.01, 0.01]
                  XF=[1, 1, 1, 1, 1, 1, 1, 1, 1, 1, 0, 0]
              WaterBalance SoilWater: SummerDate=1-Nov; SummerU=6; SummerCona=3.5; WinterDate=1-Apr; WinterU=2; WinterCona=2; DiffusConst=88; DiffusSlope=35; Salb=0.13; CN2Bare=73; CNRed=20; CNCov=0.8; PSIDul=-100
                Thickness=[150, 150, 300, 300, 300, 300, 300, 300, 300, 300, 300, 300]
                SWCON=[0.7, 0.7, 0.7, 0.5, 0.5, 0.5, 0.5, 0.5, 0.5, 0.5, 0.5, 0.5]
              Solute NO3: InitialValuesUnits=ppm; WaterTableConcentration=0; D0=0; DepthConstant=0; MaxDepthSoluteAccessible=0; RunoffEffectivenessAtMovingSolute=0; MaxEffectiveRunoff=0
                Thickness=[150, 150, 300, 300, 300, 300, 300, 300, 300, 300, 300, 300]
                InitialValues=[1.57104, 1.57104, 1.57104, 1.57104, 1.55875, 1.5526, 1.5526, 1.55786, 1.56838, 1.56838, 1.56838, 1.66667]
              Solute NH4: InitialValuesUnits=ppm; WaterTableConcentration=0; D0=0; DepthConstant=0; MaxDepthSoluteAccessible=0; RunoffEffectivenessAtMovingSolute=0; MaxEffectiveRunoff=0
                Thickness=[150, 150, 300, 300, 300, 300, 300, 300, 300, 300, 300, 300]
                InitialValues=[0.314209, 0.314209, 0.314209, 0.314209, 0.31175, 0.31052, 0.31052, 0.311572, 0.313676, 0.313676, 0.313676, 0.333333]
              Solute Urea: Thickness=[1000, 1000, 1000, 300]; InitialValues=[0, 0, 0, 0]; InitialValuesUnits=kg/ha; WaterTableConcentration=0; D0=0; DepthConstant=0; MaxDepthSoluteAccessible=0; RunoffEffectivenessAtMovingSolute=0; MaxEffectiveRunoff=0
              Organic: FOMCNRatio=40; CarbonUnits=Total
                Thickness  Carbon  SoilCNRatio  FBiom  FInert  FOM
                150        0.954   12           0.035  0.4     223.547
                150        0.44    12           0.02   0.5     195.05
                300        0.23    12           0.015  0.7     148.492
                300        0.16    12           0.015  0.95    113.047
                300        0.1     12           0.01   0.95    86.0626
                300        0.1     12           0.01   0.95    65.5195
                300        0.1     12           0.01   0.95    49.88
                300        0.1     12           0.01   0.95    37.9737
                300        0.1     12           0.01   0.95    28.9094
                300        0.1     12           0.01   0.95    22.0087
                300        0.1     12           0.01   0.95    16.7552
                300        0.1     12           0.01   0.95    12.7558
              Chemical: PHUnits=Water
                Thickness=[150, 150, 300, 300, 300, 300, 300, 300, 300, 300, 300, 300]
                PH=[5.833, 5.817, 6.65, 7.033, 7.225, 6.943, 7.121, 6.9, 6.05, 6.65, 5.5, 6.9]
              Water: FilledFromTop=false
                Thickness=[150, 150, 300, 300, 300, 300, 300, 300, 300, 300, 300, 300]
                InitialValues=[0.0682, 0.0854, 0.1348, 0.1388, 0.1398, 0.1408, 0.1401, 0.1375, 0.136, 0.1342, 0.1301, 0.1285]
              Nutrient
              SoilTemperature Temperature
            Operations
              2020-04-25  [Sowing].Script.Sow("Trojan", 200, 30, 300.0)
              2020-04-25  [ApplyFertiliser].Script.Apply(10.0,0,0,0,0,0,0,0,0)
              2020-04-25  [ApplyFertiliser].Script.Apply(23.0,0,0,0,0,0,0,0,0)
              2020-06-10  [ApplyFertiliser].Script.Apply(46.0,0,0,0,0,0,0,0,0)
              2020-07-27  [ApplyFertiliser].Script.Apply(46.0,0,0,0,0,0,0,0,0)
          CompositeFactor Trial_2
            Specifications:
              [Clock]
              [Weather]
              [Soil]
              [Operations]
            Clock: Start=2020-01-01; End=2021-03-15
            Weather
              FileName=%root%/Tests/Validation/Wheat/Phenology/WeatherFiles/-35.86_147.00.met
            Soil Sodosol: ASCOrder=Sodosol; Country=Australia
              Comments=Typical Sodosol - median values of all Sodosols in APSoil as at 08/04/2013
              Physical
                Thickness  BD     AirDry  LL15   DUL    SAT
                150        1.496  0.043   0.086  0.215  0.385
                150        1.533  0.112   0.14   0.268  0.371
                300        1.5    0.186   0.186  0.311  0.384
                300        1.537  0.186   0.186  0.303  0.37
                300        1.565  0.186   0.186  0.31   0.359
                300        1.55   0.186   0.186  0.3    0.365
                300        1.5    0.186   0.186  0.28   0.384
                300        1.5    0.186   0.186  0.26   0.384
                300        1.5    0.186   0.186  0.26   0.384
                300        1.438  0.186   0.186  0.237  0.408
                300        1.438  0.182   0.182  0.195  0.408
                300        1.4    0.15    0.15   0.16   0.422
                SoilCrop WheatSoil
                  LL=[0.086, 0.14, 0.186, 0.243, 0.267, 0.279, 0.28, 0.233, 0.24, 0.227, 0.182, 0.15]
                  KL=[0.06, 0.06, 0.06, 0.04, 0.04, 0.02, 0.01, 0.01, 0.01, 0.01, 0.01, 0.01]
                  XF=[1, 1, 1, 1, 1, 1, 1, 1, 1, 1, 0, 0]
              WaterBalance SoilWater: SummerDate=1-Nov; SummerU=6; SummerCona=3.5; WinterDate=1-Apr; WinterU=2; WinterCona=2; DiffusConst=88; DiffusSlope=35; Salb=0.13; CN2Bare=73; CNRed=20; CNCov=0.8; PSIDul=-100
                Thickness=[150, 150, 300, 300, 300, 300, 300, 300, 300, 300, 300, 300]
                SWCON=[0.7, 0.5, 0.5, 0.5, 0.5, 0.5, 0.5, 0.5, 0.5, 0.5, 0.5, 0.5]
              Solute NO3: InitialValuesUnits=ppm; WaterTableConcentration=0; D0=0; DepthConstant=0; MaxDepthSoluteAccessible=0; RunoffEffectivenessAtMovingSolute=0; MaxEffectiveRunoff=0
                Thickness=[150, 150, 300, 300, 300, 300, 300, 300, 300, 300, 300, 300]
                InitialValues=[1.64263, 1.64263, 1.64263, 1.64263, 1.63829, 1.63613, 1.63613, 1.66043, 1.70905, 1.70905, 1.70905, 1.78571]
              Solute NH4: InitialValuesUnits=ppm; WaterTableConcentration=0; D0=0; DepthConstant=0; MaxDepthSoluteAccessible=0; RunoffEffectivenessAtMovingSolute=0; MaxEffectiveRunoff=0
                Thickness=[150, 150, 300, 300, 300, 300, 300, 300, 300, 300, 300, 300]
                InitialValues=[0.328526, 0.328526, 0.328526, 0.328526, 0.327659, 0.327225, 0.327225, 0.332087, 0.34181, 0.34181, 0.34181, 0.357143]
              Solute Urea: same as FARAwardPhenology.FARAwardPhenology.Factors.Site.Trial_1.Chromosol.Urea
              Organic: FOMCNRatio=40; CarbonUnits=Total
                Thickness  Carbon  SoilCNRatio  FBiom  FInert  FOM
                150        1       12           0.035  0.4     223.547
                150        0.5     12           0.02   0.5     195.05
                300        0.3     12           0.015  0.7     148.492
                300        0.181   12           0.015  0.95    113.047
                300        0.117   12           0.01   0.95    86.0626
                300        0.1     12           0.01   0.95    65.5195
                300        0.1     12           0.01   0.95    49.88
                300        0.1     12           0.01   0.95    37.9737
                300        0.1     12           0.01   0.95    28.9094
                300        0.1     12           0.01   0.95    22.0087
                300        0.1     12           0.01   0.95    16.7552
                300        0.1     12           0.01   0.95    12.7558
              Chemical: PHUnits=Water
                Thickness=[150, 150, 300, 300, 300, 300, 300, 300, 300, 300, 300, 300]
                PH=[6.517, 7.6, 8.3, 8.65, 8.8, 8.3, 7.4, 6.4, 6.4, 7, 6.55, 7.7]
              Water: FilledFromTop=false
                Thickness=[150, 150, 300, 300, 300, 300, 300, 300, 300, 300, 300, 300]
                InitialValues=[0.0989, 0.1528, 0.1985, 0.1977, 0.1984, 0.1974, 0.1954, 0.1934, 0.1934, 0.1911, 0.1833, 0.151]
              Nutrient
              SoilTemperature Temperature
            Operations
              2020-03-16  [Sowing].Script.Sow("Accroc", 200, 30, 230.0)
              2020-03-16  [ApplyFertiliser].Script.Apply(9.0,0,0,0,0,0,0,0,0)
              2020-03-16  [ApplyFertiliser].Script.Apply(10.12,0,0,0,0,0,0,0,0)
              2020-05-07  [ApplyFertiliser].Script.Apply(36.8,0,0,0,0,0,0,0,0)
              2020-07-24  [ApplyFertiliser].Script.Apply(41.4,0,0,0,0,0,0,0,0)
          CompositeFactor Trial_3
            Specifications:
              [Clock]
              [Weather]
              [Soil]
              [Operations]
            Clock: Start=2020-01-01; End=2021-05-11
            Weather
              FileName=%root%/Tests/Validation/Wheat/Phenology/WeatherFiles/-35.86_146.12.met
            Soil Sodosol: same as FARAwardPhenology.FARAwardPhenology.Factors.Site.Trial_2.Sodosol
            Operations
              2020-05-12  [Sowing].Script.Sow("Scepter", 200, 30, 250.0)
              2020-05-12  [ApplyFertiliser].Script.Apply(8.0,0,0,0,0,0,0,0,0)
              2020-06-05  [ApplyFertiliser].Script.Apply(46.0,0,0,0,0,0,0,0,0)
              2020-08-05  [ApplyFertiliser].Script.Apply(46.0,0,0,0,0,0,0,0,0)
          CompositeFactor Trial_5
            Specifications:
              [Clock]
              [Weather]
              [Soil]
              [Operations]
            Clock: Start=2020-01-01; End=2021-05-14
            Weather
              FileName=%root%/Tests/Validation/Wheat/Phenology/WeatherFiles/-35.64_147.00.met
            Soil Sodosol: same as FARAwardPhenology.FARAwardPhenology.Factors.Site.Trial_2.Sodosol
            Operations
              2020-05-15  [Sowing].Script.Sow("Trojan", 200, 30, 250.0)
              2020-05-15  [ApplyFertiliser].Script.Apply(10.0,0,0,0,0,0,0,0,0)
              2020-06-11  [ApplyFertiliser].Script.Apply(69.0,0,0,0,0,0,0,0,0)
              2020-08-17  [ApplyFertiliser].Script.Apply(69.0,0,0,0,0,0,0,0,0)
          CompositeFactor Trial_6
            Specifications:
              [Clock]
              [Weather]
              [Soil]
              [Operations]
            Clock: Start=2020-01-01; End=2021-03-19
            Weather
              FileName=%root%/Tests/Validation/Wheat/Phenology/WeatherFiles/-35.86_146.67.met
            Soil Dermosol: ASCOrder=Dermosol; Country=Australia
              Comments=Typical Dermosol - median values of all Dermosols in APSoil as at 08/04/2013
              Physical
                Thickness  BD     AirDry  LL15   DUL    SAT
                150        1.433  0.055   0.11   0.249  0.409
                150        1.47   0.1     0.125  0.242  0.395
                300        1.512  0.156   0.156  0.27   0.379
                300        1.5    0.156   0.156  0.265  0.384
                300        1.532  0.156   0.156  0.291  0.372
                300        1.576  0.156   0.156  0.258  0.355
                300        1.555  0.156   0.156  0.265  0.363
                300        1.326  0.156   0.156  0.238  0.45
                300        1.313  0.156   0.156  0.237  0.455
                300        1.313  0.156   0.156  0.237  0.455
                300        1.263  0.156   0.156  0.241  0.473
                SoilCrop WheatSoil
                  LL=[0.11, 0.125, 0.156, 0.183, 0.204, 0.21, 0.22, 0.237, 0.227, 0.227, 0.227]
                  KL=[0.06, 0.06, 0.06, 0.04, 0.04, 0.02, 0.01, 0.01, 0.01, 0.01, 0.01]
                  XF=[1, 1, 1, 1, 1, 1, 1, 1, 1, 1, 0]
              WaterBalance SoilWater: SummerDate=1-Nov; SummerU=6; SummerCona=3.5; WinterDate=1-Apr; WinterU=2; WinterCona=2; DiffusConst=88; DiffusSlope=35; Salb=0.13; CN2Bare=73; CNRed=20; CNCov=0.8; PSIDul=-100; Thickness=[150, 150, 300, 300, 300, 300, 300, 300, 300, 300, 300]; SWCON=[0.5, 0.5, 0.5, 0.5, 0.3, 0.3, 0.3, 0.3, 0.3, 0.3, 0.3]
              Solute NO3: Thickness=[150, 150, 300, 300, 300, 300, 300, 300, 300, 300, 300]; InitialValuesUnits=ppm; WaterTableConcentration=0; D0=0; DepthConstant=0; MaxDepthSoluteAccessible=0; RunoffEffectivenessAtMovingSolute=0; MaxEffectiveRunoff=0
                InitialValues=[1.67532, 1.67532, 1.67532, 1.67532, 1.66154, 1.65464, 1.65464, 1.74447, 1.92411, 1.92411, 1.92411]
              Solute NH4: Thickness=[150, 150, 300, 300, 300, 300, 300, 300, 300, 300, 300]; InitialValuesUnits=ppm; WaterTableConcentration=0; D0=0; DepthConstant=0; MaxDepthSoluteAccessible=0; RunoffEffectivenessAtMovingSolute=0; MaxEffectiveRunoff=0
                InitialValues=[0.335064, 0.335064, 0.335064, 0.335064, 0.332307, 0.330929, 0.330929, 0.348893, 0.384823, 0.384823, 0.384823]
              Solute Urea: Thickness=[1000, 1000, 1000]; InitialValues=[0, 0, 0]; InitialValuesUnits=kg/ha; WaterTableConcentration=0; D0=0; DepthConstant=0; MaxDepthSoluteAccessible=0; RunoffEffectivenessAtMovingSolute=0; MaxEffectiveRunoff=0
              Organic: FOMCNRatio=40; CarbonUnits=Total
                Thickness  Carbon  SoilCNRatio  FBiom  FInert  FOM
                150        1       12           0.035  0.4     240.643
                150        0.65    12           0.02   0.5     207.124
                300        0.37    12           0.015  0.7     153.441
                300        0.231   12           0.015  0.95    113.672
                300        0.152   12           0.01   0.95    84.2101
                300        0.1     12           0.01   0.95    62.3844
                300        0.1     12           0.01   0.95    46.2155
                300        0.1     12           0.01   0.95    34.2373
                300        0.1     12           0.01   0.95    25.3636
                300        0.1     12           0.01   0.95    18.7898
                300        0.1     12           0.01   0.95    13.9198
              Chemical: Thickness=[150, 150, 300, 300, 300, 300, 300, 300, 300, 300, 300]; PHUnits=Water
                PH=[7.153, 7.233, 7.933, 8.2, 8.4, 8.6, 6.3, 4.7, 4.65, 4.65, 4.2]
              Water: Thickness=[150, 150, 300, 300, 300, 300, 300, 300, 300, 300, 300]; FilledFromTop=false
                InitialValues=[0.1239, 0.1367, 0.1674, 0.1669, 0.1695, 0.1662, 0.1669, 0.1642, 0.1641, 0.1641, 0.1645]
              Nutrient
              SoilTemperature Temperature
            Operations
              2020-03-20  [Sowing].Script.Sow("Accroc", 200, 30, 165.0)
              2020-03-23  [ApplyFertiliser].Script.Apply(10.0,0,0,0,0,0,0,0,0)
              2020-07-03  [ApplyFertiliser].Script.Apply(23.0,0,0,0,0,0,0,0,0)
              2020-07-08  [ApplyFertiliser].Script.Apply(46.0,0,0,0,0,0,0,0,0)
              2020-08-06  [ApplyFertiliser].Script.Apply(46.0,0,0,0,0,0,0,0,0)
              2020-09-16  [ApplyFertiliser].Script.Apply(69.0,0,0,0,0,0,0,0,0)
          CompositeFactor Trial_7
            Specifications:
              [Clock]
              [Weather]
              [Soil]
              [Operations]
            Clock: Start=2020-01-01; End=2021-03-19
            Weather
              FileName=%root%/Tests/Validation/Wheat/Phenology/WeatherFiles/-35.86_146.67.met
            Soil Dermosol: same as FARAwardPhenology.FARAwardPhenology.Factors.Site.Trial_6.Dermosol
            Operations
              2020-03-20  [Sowing].Script.Sow("Accroc", 200, 30, 170.0)
              2020-03-23  [ApplyFertiliser].Script.Apply(10.0,0,0,0,0,0,0,0,0)
              2020-07-03  [ApplyFertiliser].Script.Apply(23.0,0,0,0,0,0,0,0,0)
              2020-07-08  [ApplyFertiliser].Script.Apply(46.0,0,0,0,0,0,0,0,0)
              2020-08-06  [ApplyFertiliser].Script.Apply(46.0,0,0,0,0,0,0,0,0)
              2020-09-16  [ApplyFertiliser].Script.Apply(69.0,0,0,0,0,0,0,0,0)
          CompositeFactor Trial_8: same as FARAwardPhenology.FARAwardPhenology.Factors.Site.Trial_5
          CompositeFactor Trial_9
            Specifications:
              [Clock]
              [Weather]
              [Soil]
              [Operations]
            Clock: Start=2020-01-01; End=2021-02-08
            Weather
              FileName=%root%/Tests/Validation/Wheat/Phenology/WeatherFiles/-34.87_149.64.met
            Soil Sodosol: same as FARAwardPhenology.FARAwardPhenology.Factors.Site.Trial_2.Sodosol
            Operations
              2020-02-10  [Sowing].Script.Sow("Manning", 229.0, 30, 250.0)
              1970-01-01  [ApplyFertiliser].Script.Apply(7.0,0,0,0,0,0,0,0,0)
          CompositeFactor Trial_10
            Specifications:
              [Clock]
              [Weather]
              [Soil]
              [Operations]
            Clock: Start=2020-01-01; End=2021-03-20
            Weather
              FileName=%root%/Tests/Validation/Wheat/Phenology/WeatherFiles/-34.87_149.42.met
            Soil Sodosol: same as FARAwardPhenology.FARAwardPhenology.Factors.Site.Trial_2.Sodosol
            Operations
              2020-03-21  [Sowing].Script.Sow("Kittyhawk", 200, 30, 250)
              2020-03-21  [ApplyFertiliser].Script.Apply(8.0,0,0,0,0,0,0,0,0)
              2020-03-21  [ApplyFertiliser].Script.Apply(23.0,0,0,0,0,0,0,0,0)
              2020-06-12  [ApplyFertiliser].Script.Apply(23.0,0,0,0,0,0,0,0,0)
              2020-06-12  [ApplyFertiliser].Script.Apply(0.0,0,0,0,0,0,0,0,0)
              2020-08-07  [ApplyFertiliser].Script.Apply(32.2,0,0,0,0,0,0,0,0)
              2020-09-15  [ApplyFertiliser].Script.Apply(0.0,0,0,0,0,0,0,0,0)
          CompositeFactor Trial_11
            Specifications:
              [Clock]
              [Weather]
              [Soil]
              [Operations]
            Clock: Start=2020-01-01; End=2021-03-14
            Weather
              FileName=%root%/Tests/Validation/Wheat/Phenology/WeatherFiles/-34.87_149.64.met
            Soil Sodosol: same as FARAwardPhenology.FARAwardPhenology.Factors.Site.Trial_2.Sodosol
            Operations
              2020-03-15  [Sowing].Script.Sow("Bennett", 200, 30, 250.0)
              2020-02-25  [ApplyFertiliser].Script.Apply(8.0,0,0,0,0,0,0,0,0)
              2020-02-25  [ApplyFertiliser].Script.Apply(23.0,0,0,0,0,0,0,0,0)
              2020-08-15  [ApplyFertiliser].Script.Apply(69.0,0,0,0,0,0,0,0,0)
          CompositeFactor Trial_12
            Specifications:
              [Clock]
              [Weather]
              [Soil]
              [Operations]
            Clock: Start=2020-01-01; End=2021-02-23
            Weather
              FileName=%root%/Tests/Validation/Wheat/Phenology/WeatherFiles/-34.98_149.64.met
            Soil Sodosol: same as FARAwardPhenology.FARAwardPhenology.Factors.Site.Trial_2.Sodosol
            Operations
              2020-02-25  [Sowing].Script.Sow("Manning", 200, 30, 250.0)
              2020-01-01  [ApplyFertiliser].Script.Apply(0.0,0,0,0,0,0,0,0,0)
              2020-01-25  [ApplyFertiliser].Script.Apply(8.0,0,0,0,0,0,0,0,0)
              2020-01-25  [ApplyFertiliser].Script.Apply(23.0,0,0,0,0,0,0,0,0)
              2020-09-01  [ApplyFertiliser].Script.Apply(92.0,0,0,0,0,0,0,0,0)
          CompositeFactor Trial_13
            Specifications:
              [Clock]
              [Weather]
              [Soil]
              [Operations]
            Clock: Start=2020-01-01; End=2021-02-23
            Weather
              FileName=%root%/Tests/Validation/Wheat/Phenology/WeatherFiles/-34.98_149.64.met
            Soil Sodosol: same as FARAwardPhenology.FARAwardPhenology.Factors.Site.Trial_2.Sodosol
            Operations
              2020-02-25  [Sowing].Script.Sow("Manning", 200, 30, 225.0)
              2020-02-25  [ApplyFertiliser].Script.Apply(8.0,0,0,0,0,0,0,0,0)
              2020-02-25  [ApplyFertiliser].Script.Apply(23.0,0,0,0,0,0,0,0,0)
              2020-08-25  [ApplyFertiliser].Script.Apply(69.0,0,0,0,0,0,0,0,0)
          CompositeFactor Trial_14
            Specifications:
              [Clock]
              [Weather]
              [Soil]
              [Operations]
            Clock: Start=2020-01-01; End=2021-05-15
            Weather
              FileName=%root%/Tests/Validation/Wheat/Phenology/WeatherFiles/-37.18_140.73.met
            Soil Vertosol: ASCOrder=Vertosol; Country=Australia
              Comments=Typical Vertosol - median values of all Vertosols in APSoil as at 08/04/2013
              Physical
                Thickness  BD     AirDry  LL15   DUL    SAT
                150        1.299  0.11    0.22   0.42   0.46
                150        1.304  0.191   0.239  0.42   0.458
                300        1.31   0.25    0.25   0.42   0.456
                300        1.345  0.25    0.25   0.41   0.442
                300        1.372  0.25    0.25   0.4    0.432
                300        1.381  0.25    0.25   0.399  0.429
                300        1.375  0.25    0.25   0.398  0.431
                300        1.21   0.25    0.25   0.467  0.493
                300        1.32   0.25    0.25   0.365  0.452
                300        1.33   0.25    0.25   0.365  0.448
                300        1.3    0.25    0.25   0.445  0.459
                SoilCrop WheatSoil
                  LL=[0.22, 0.239, 0.25, 0.279, 0.317, 0.342, 0.37, 0.45, 0.365, 0.365, 0.445]
                  KL=[0.06, 0.06, 0.06, 0.04, 0.04, 0.02, 0.01, 0.01, 0.01, 0.01, 0.01]
                  XF=[1, 1, 1, 1, 1, 1, 1, 1, 1, 1, 0]
              WaterBalance SoilWater: SummerDate=1-Nov; SummerU=6; SummerCona=3.5; WinterDate=1-Apr; WinterU=2; WinterCona=2; DiffusConst=40; DiffusSlope=16; Salb=0.12; CN2Bare=73; CNRed=20; CNCov=0.8; PSIDul=-100; Thickness=[150, 150, 300, 300, 300, 300, 300, 300, 300, 300, 300]; SWCON=[0.3, 0.3, 0.3, 0.3, 0.3, 0.3, 0.3, 0.3, 0.3, 0.3, 0.3]
              Solute NO3: Thickness=[150, 150, 300, 300, 300, 300, 300, 300, 300, 300, 300]; InitialValuesUnits=ppm; WaterTableConcentration=0; D0=0; DepthConstant=0; MaxDepthSoluteAccessible=0; RunoffEffectivenessAtMovingSolute=0; MaxEffectiveRunoff=0
                InitialValues=[1.888, 1.888, 1.888, 1.888, 1.87015, 1.86123, 1.86123, 1.8789, 1.91424, 1.91424, 1.91424]
              Solute NH4: Thickness=[150, 150, 300, 300, 300, 300, 300, 300, 300, 300, 300]; InitialValuesUnits=ppm; WaterTableConcentration=0; D0=0; DepthConstant=0; MaxDepthSoluteAccessible=0; RunoffEffectivenessAtMovingSolute=0; MaxEffectiveRunoff=0
                InitialValues=[0.377601, 0.377601, 0.377601, 0.377601, 0.37403, 0.372245, 0.372245, 0.37578, 0.382848, 0.382848, 0.382848]
              Solute Urea: same as FARAwardPhenology.FARAwardPhenology.Factors.Site.Trial_6.Dermosol.Urea
              Organic: FOMCNRatio=40; CarbonUnits=Total
                Thickness  Carbon  SoilCNRatio  FBiom  FInert  FOM
                150        0.915   12           0.035  0.4     240.643
                150        0.777   12           0.02   0.5     207.124
                300        0.425   12           0.015  0.7     153.441
                300        0.3     12           0.015  0.95    113.672
                300        0.2     12           0.01   0.95    84.2101
                300        0.123   12           0.01   0.95    62.3844
                300        0.131   12           0.01   0.95    46.2155
                300        0.1     12           0.01   0.95    34.2373
                300        0.1     12           0.01   0.95    25.3636
                300        0.099   12           0.01   0.95    18.7898
                300        0.083   12           0.01   0.95    13.9198
              Chemical: Thickness=[150, 150, 300, 300, 300, 300, 300, 300, 300, 300, 300]; PH=[8.2, 8.5, 8.6, 8.6, 8, 7.5, 8, 8.2, 8.65, 8.6, 8.8]; PHUnits=Water
              Water: Thickness=[150, 150, 300, 300, 300, 300, 300, 300, 300, 300, 300]; FilledFromTop=false
                InitialValues=[0.24, 0.2571, 0.267, 0.266, 0.265, 0.2649, 0.2648, 0.2717, 0.2615, 0.2615, 0.2695]
              Nutrient
              SoilTemperature Temperature
            Operations
              2020-05-16  [Sowing].Script.Sow("Accroc", 200, 30, 305.0)
              2020-04-15  [ApplyFertiliser].Script.Apply(10.0,0,0,0,0,0,0,0,0)
              2020-08-15  [ApplyFertiliser].Script.Apply(0.0,0,0,0,0,0,0,0,0)
              2020-08-31  [ApplyFertiliser].Script.Apply(0.0,0,0,0,0,0,0,0,0)
              2020-09-18  [ApplyFertiliser].Script.Apply(46.0,0,0,0,0,0,0,0,0)
          CompositeFactor Trial_15
            Specifications:
              [Clock]
              [Weather]
              [Soil]
              [Operations]
            Clock: Start=2020-01-01; End=2021-05-20
            Weather
              FileName=%root%/Tests/Validation/Wheat/Phenology/WeatherFiles/-37.18_140.73.met
            Soil Dermosol: same as FARAwardPhenology.FARAwardPhenology.Factors.Site.Trial_6.Dermosol
            Operations
              2020-05-21  [Sowing].Script.Sow("Accroc", 200, 30, 305.0)
          CompositeFactor Trial_16
            Specifications:
              [Clock]
              [Weather]
              [Soil]
              [Operations]
            Clock: Start=2020-01-01; End=2021-05-21
            Weather
              FileName=%root%/Tests/Validation/Wheat/Phenology/WeatherFiles/-37.07_140.73.met
            Soil Dermosol: same as FARAwardPhenology.FARAwardPhenology.Factors.Site.Trial_6.Dermosol
            Operations
              2020-05-22  [Sowing].Script.Sow("Bennett", 200, 30, 305.0)
              2020-05-22  [ApplyFertiliser].Script.Apply(10.0,0,0,0,0,0,0,0,0)
              2020-08-10  [ApplyFertiliser].Script.Apply(92.0,0,0,0,0,0,0,0,0)
              2020-08-11  [ApplyFertiliser].Script.Apply(0.0,0,0,0,0,0,0,0,0)
          CompositeFactor Trial_17
            Specifications:
              [Clock]
              [Weather]
              [Soil]
              [Operations]
            Clock: Start=2020-01-01; End=2021-05-15
            Weather
              FileName=%root%/Tests/Validation/Wheat/Phenology/WeatherFiles/-37.18_140.29.met
            Soil Sodosol: same as FARAwardPhenology.FARAwardPhenology.Factors.Site.Trial_2.Sodosol
            Operations
              2020-05-16  [Sowing].Script.Sow("Accroc", 200, 30, 222.0)
              2020-02-11  [ApplyFertiliser].Script.Apply(8.0,0,0,0,0,0,0,0,0)
              2020-08-02  [ApplyFertiliser].Script.Apply(0.0,0,0,0,0,0,0,0,0)
              2020-08-31  [ApplyFertiliser].Script.Apply(0.0,0,0,0,0,0,0,0,0)
              2020-09-16  [ApplyFertiliser].Script.Apply(46.0,0,0,0,0,0,0,0,0)
              2020-09-18  [ApplyFertiliser].Script.Apply(11.5,0,0,0,0,0,0,0,0)
              2020-09-28  [ApplyFertiliser].Script.Apply(0.0,0,0,0,0,0,0,0,0)
              2020-10-20  [ApplyFertiliser].Script.Apply(0.063,0,0,0,0,0,0,0,0)
          CompositeFactor Trial_18
            Specifications:
              [Clock]
              [Weather]
              [Soil]
              [Operations]
            Clock: Start=2020-01-01; End=2021-05-15
            Weather
              FileName=%root%/Tests/Validation/Wheat/Phenology/WeatherFiles/-37.51_140.73.met
            Soil Dermosol: same as FARAwardPhenology.FARAwardPhenology.Factors.Site.Trial_6.Dermosol
            Operations
              2020-05-16  [Sowing].Script.Sow("Accroc", 200, 30, 203.0)
              2020-05-16  [ApplyFertiliser].Script.Apply(9.0,0,0,0,0,0,0,0,0)
              2020-07-10  [ApplyFertiliser].Script.Apply(23.0,0,0,0,0,0,0,0,0)
              2020-07-23  [ApplyFertiliser].Script.Apply(0.0,0,0,0,0,0,0,0,0)
              2020-08-31  [ApplyFertiliser].Script.Apply(0.0,0,0,0,0,0,0,0,0)
              2020-09-01  [ApplyFertiliser].Script.Apply(55.2,0,0,0,0,0,0,0,0)
              2020-09-01  [ApplyFertiliser].Script.Apply(0.0,0,0,0,0,0,0,0,0)
              2020-10-02  [ApplyFertiliser].Script.Apply(55.2,0,0,0,0,0,0,0,0)
          CompositeFactor Trial_19
            Specifications:
              [Clock]
              [Weather]
              [Soil]
              [Operations]
            Clock: Start=2020-01-01; End=2021-04-27
            Weather
              FileName=%root%/Tests/Validation/Wheat/Phenology/WeatherFiles/-37.29_140.73.met
            Soil Vertosol: same as FARAwardPhenology.FARAwardPhenology.Factors.Site.Trial_14.Vertosol
            Operations
              2020-04-28  [Sowing].Script.Sow("Illabo", 200, 30, 222.0)
              2020-04-28  [ApplyFertiliser].Script.Apply(25.96,0,0,0,0,0,0,0,0)
              2020-05-28  [ApplyFertiliser].Script.Apply(0.0,0,0,0,0,0,0,0,0)
              2020-08-16  [ApplyFertiliser].Script.Apply(46.0,0,0,0,0,0,0,0,0)
              2020-09-09  [ApplyFertiliser].Script.Apply(46.0,0,0,0,0,0,0,0,0)
              2020-10-04  [ApplyFertiliser].Script.Apply(32.2,0,0,0,0,0,0,0,0)
          CompositeFactor Trial_20
            Specifications:
              [Clock]
              [Weather]
              [Soil]
              [Operations]
            Clock: Start=2020-01-01; End=2021-04-25
            Weather
              FileName=%root%/Tests/Validation/Wheat/Phenology/WeatherFiles/-37.29_140.73.met
            Soil Vertosol: same as FARAwardPhenology.FARAwardPhenology.Factors.Site.Trial_14.Vertosol
            Operations
              2020-04-26  [Sowing].Script.Sow("Accroc", 200, 30, 222.0)
              2020-08-16  [ApplyFertiliser].Script.Apply(46.0,0,0,0,0,0,0,0,0)
              2020-09-09  [ApplyFertiliser].Script.Apply(46.0,0,0,0,0,0,0,0,0)
              2020-10-04  [ApplyFertiliser].Script.Apply(32.2,0,0,0,0,0,0,0,0)
          CompositeFactor Trial_21
            Specifications:
              [Clock]
              [Weather]
              [Soil]
              [Operations]
            Clock: Start=2020-01-01; End=2021-05-26
            Weather
              FileName=%root%/Tests/Validation/Wheat/Phenology/WeatherFiles/-37.18_139.96.met
            Soil Vertosol: same as FARAwardPhenology.FARAwardPhenology.Factors.Site.Trial_14.Vertosol
            Operations
              2020-05-27  [Sowing].Script.Sow("Trojan", 200, 30, 178.0)
              2020-05-27  [ApplyFertiliser].Script.Apply(12.0,0,0,0,0,0,0,0,0)
              2020-06-30  [ApplyFertiliser].Script.Apply(27.6,0,0,0,0,0,0,0,0)
              2020-07-17  [ApplyFertiliser].Script.Apply(0.0,0,0,0,0,0,0,0,0)
              2020-07-18  [ApplyFertiliser].Script.Apply(27.6,0,0,0,0,0,0,0,0)
              2020-08-18  [ApplyFertiliser].Script.Apply(36.8,0,0,0,0,0,0,0,0)
              2020-08-28  [ApplyFertiliser].Script.Apply(0.0,0,0,0,0,0,0,0,0)
              2020-08-31  [ApplyFertiliser].Script.Apply(36.8,0,0,0,0,0,0,0,0)
              2020-09-17  [ApplyFertiliser].Script.Apply(36.8,0,0,0,0,0,0,0,0)
          CompositeFactor Trial_22
            Specifications:
              [Clock]
              [Weather]
              [Soil]
              [Operations]
            Clock: Start=2020-01-01; End=2021-05-04
            Weather
              FileName=%root%/Tests/Validation/Wheat/Phenology/WeatherFiles/-37.18_139.96.met
            Soil Vertosol: same as FARAwardPhenology.FARAwardPhenology.Factors.Site.Trial_14.Vertosol
            Operations
              2020-05-05  [Sowing].Script.Sow("Accroc", 200, 30, 178.0)
              2020-05-05  [ApplyFertiliser].Script.Apply(12.0,0,0,0,0,0,0,0,0)
              2020-06-11  [ApplyFertiliser].Script.Apply(32.2,0,0,0,0,0,0,0,0)
              2020-06-29  [ApplyFertiliser].Script.Apply(0.0,0,0,0,0,0,0,0,0)
              2020-07-31  [ApplyFertiliser].Script.Apply(0.0,0,0,0,0,0,0,0,0)
              2020-07-31  [ApplyFertiliser].Script.Apply(0.0,0,0,0,0,0,0,0,0)
              2020-07-31  [ApplyFertiliser].Script.Apply(0.0,0,0,0,0,0,0,0,0)
              2020-08-10  [ApplyFertiliser].Script.Apply(46.0,0,0,0,0,0,0,0,0)
              2020-08-28  [ApplyFertiliser].Script.Apply(0.0,0,0,0,0,0,0,0,0)
              2020-08-31  [ApplyFertiliser].Script.Apply(46.0,0,0,0,0,0,0,0,0)
              2020-09-17  [ApplyFertiliser].Script.Apply(36.8,0,0,0,0,0,0,0,0)
          CompositeFactor Trial_23
            Specifications:
              [Clock]
              [Weather]
              [Soil]
              [Operations]
            Clock: Start=2020-01-01; End=2021-05-16
            Weather
              FileName=%root%/Tests/Validation/Wheat/Phenology/WeatherFiles/-37.40_140.18.met
            Soil Sodosol: same as FARAwardPhenology.FARAwardPhenology.Factors.Site.Trial_2.Sodosol
            Operations
              2020-05-17  [Sowing].Script.Sow("Accroc", 200, 30, 178.0)
              2020-05-17  [ApplyFertiliser].Script.Apply(9.0,0,0,0,0,0,0,0,0)
              2020-07-17  [ApplyFertiliser].Script.Apply(4.3,0,0,0,0,0,0,0,0)
              2020-07-17  [ApplyFertiliser].Script.Apply(0.0,0,0,0,0,0,0,0,0)
              2020-07-17  [ApplyFertiliser].Script.Apply(0.0,0,0,0,0,0,0,0,0)
              2020-07-17  [ApplyFertiliser].Script.Apply(0.0,0,0,0,0,0,0,0,0)
              2020-07-17  [ApplyFertiliser].Script.Apply(46.0,0,0,0,0,0,0,0,0)
              2020-07-31  [ApplyFertiliser].Script.Apply(0.0,0,0,0,0,0,0,0,0)
              2020-07-31  [ApplyFertiliser].Script.Apply(0.0,0,0,0,0,0,0,0,0)
              2020-07-31  [ApplyFertiliser].Script.Apply(0.0,0,0,0,0,0,0,0,0)
              2020-08-31  [ApplyFertiliser].Script.Apply(46.0,0,0,0,0,0,0,0,0)
              2020-08-31  [ApplyFertiliser].Script.Apply(0.0,0,0,0,0,0,0,0,0)
              2020-08-31  [ApplyFertiliser].Script.Apply(0.0,0,0,0,0,0,0,0,0)
              2020-08-31  [ApplyFertiliser].Script.Apply(0.0,0,0,0,0,0,0,0,0)
          CompositeFactor Trial_24
            Specifications:
              [Clock]
              [Weather]
              [Soil]
              [Operations]
            Clock: Start=2020-01-01; End=2021-05-25
            Weather
              FileName=%root%/Tests/Validation/Wheat/Phenology/WeatherFiles/-37.18_140.73.met
            Soil Vertosol: same as FARAwardPhenology.FARAwardPhenology.Factors.Site.Trial_14.Vertosol
            Operations
              2020-05-26  [Sowing].Script.Sow("Bennett", 200, 30, 305.0)
          CompositeFactor Trial_25
            Specifications:
              [Clock]
              [Weather]
              [Soil]
              [Operations]
            Clock: Start=2020-01-01; End=2021-04-13
            Weather
              FileName=%root%/Tests/Validation/Wheat/Phenology/WeatherFiles/-37.07_140.73.met
            Soil Dermosol: same as FARAwardPhenology.FARAwardPhenology.Factors.Site.Trial_6.Dermosol
            Operations
              2020-04-14  [Sowing].Script.Sow("Accroc", 200, 30, 200.0)
              2020-04-14  [ApplyFertiliser].Script.Apply(10.0,0,0,0,0,0,0,0,0)
              2020-06-11  [ApplyFertiliser].Script.Apply(21.0,0,0,0,0,0,0,0,0)
              2020-08-10  [ApplyFertiliser].Script.Apply(46.0,0,0,0,0,0,0,0,0)
              2020-04-07  [Irrigation].Apply(10)
              2020-08-29  [Irrigation].Apply(12)
              2020-09-14  [Irrigation].Apply(10)
              2020-10-29  [Irrigation].Apply(25)
              2020-11-06  [Irrigation].Apply(25)
          CompositeFactor Trial_26
            Specifications:
              [Clock]
              [Weather]
              [Soil]
              [Operations]
            Clock: Start=2020-01-01; End=2021-05-17
            Weather
              FileName=%root%/Tests/Validation/Wheat/Phenology/WeatherFiles/-37.18_140.73.met
            Soil Vertosol: same as FARAwardPhenology.FARAwardPhenology.Factors.Site.Trial_14.Vertosol
            Operations
              2020-05-18  [Sowing].Script.Sow("Accroc", 200, 30, 305.0)
              2020-05-18  [ApplyFertiliser].Script.Apply(10.0,0,0,0,0,0,0,0,0)
              2020-08-13  [ApplyFertiliser].Script.Apply(92.0,0,0,0,0,0,0,0,0)
              2020-09-18  [ApplyFertiliser].Script.Apply(92.0,0,0,0,0,0,0,0,0)
          CompositeFactor Trial_27
            Specifications:
              [Clock]
              [Weather]
              [Soil]
              [Operations]
            Clock: Start=2020-01-01; End=2021-05-16
            Weather
              FileName=%root%/Tests/Validation/Wheat/Phenology/WeatherFiles/-37.40_140.18.met
            Soil Dermosol: same as FARAwardPhenology.FARAwardPhenology.Factors.Site.Trial_6.Dermosol
            Operations
              2020-05-17  [Sowing].Script.Sow("Accroc", 200, 30, 180.0)
              2020-05-13  [ApplyFertiliser].Script.Apply(8.0,0,0,0,0,0,0,0,0)
              2020-07-17  [ApplyFertiliser].Script.Apply(6.45,0,0,0,0,0,0,0,0)
              2020-07-17  [ApplyFertiliser].Script.Apply(0.0,0,0,0,0,0,0,0,0)
              2020-07-17  [ApplyFertiliser].Script.Apply(0.0,0,0,0,0,0,0,0,0)
              2020-07-17  [ApplyFertiliser].Script.Apply(0.0,0,0,0,0,0,0,0,0)
              2020-07-17  [ApplyFertiliser].Script.Apply(46.0,0,0,0,0,0,0,0,0)
              2020-07-31  [ApplyFertiliser].Script.Apply(0.0,0,0,0,0,0,0,0,0)
              2020-07-31  [ApplyFertiliser].Script.Apply(0.0,0,0,0,0,0,0,0,0)
              2020-08-10  [ApplyFertiliser].Script.Apply(0.0,0,0,0,0,0,0,0,0)
              2020-08-31  [ApplyFertiliser].Script.Apply(50.6,0,0,0,0,0,0,0,0)
              2020-08-31  [ApplyFertiliser].Script.Apply(0.0,0,0,0,0,0,0,0,0)
          CompositeFactor Trial_28
            Specifications:
              [Clock]
              [Weather]
              [Soil]
              [Operations]
            Clock: Start=2020-01-01; End=2021-05-15
            Weather
              FileName=%root%/Tests/Validation/Wheat/Phenology/WeatherFiles/-37.51_140.40.met
            Soil Calcarosol: ASCOrder=Calcarosol; Country=Australia
              Comments=Typical Carcarosol - median values of all Calcarosols in APSoil as at 08/04/2013
              Physical
                Thickness  BD     AirDry  LL15   DUL    SAT
                150        1.367  0.07    0.139  0.287  0.434
                150        1.4    0.111   0.138  0.278  0.422
                300        1.43   0.155   0.155  0.288  0.41
                300        1.48   0.155   0.155  0.293  0.392
                300        1.5    0.155   0.155  0.3    0.384
                300        1.55   0.155   0.155  0.307  0.365
                300        1.485  0.155   0.155  0.35   0.39
                SoilCrop WheatSoil: LL=[0.139, 0.138, 0.155, 0.181, 0.202, 0.263, 0.29]; KL=[0.06, 0.06, 0.06, 0.04, 0.04, 0.02, 0.01]; XF=[1, 1, 1, 1, 1, 1, 1]
              WaterBalance SoilWater: SummerDate=1-Nov; SummerU=6; SummerCona=3.5; WinterDate=1-Apr; WinterU=2; WinterCona=2; DiffusConst=88; DiffusSlope=35; Salb=0.13; CN2Bare=73; CNRed=20; CNCov=0.8; PSIDul=-100; Thickness=[150, 150, 300, 300, 300, 300, 300]; SWCON=[0.5, 0.5, 0.5, 0.5, 0.5, 0.5, 0.5]
              Solute NO3: Thickness=[150, 150, 300, 300, 300, 300, 300]; InitialValuesUnits=ppm; WaterTableConcentration=0; D0=0; DepthConstant=0; MaxDepthSoluteAccessible=0; RunoffEffectivenessAtMovingSolute=0; MaxEffectiveRunoff=0
                InitialValues=[1.73847, 1.73847, 1.73847, 1.73847, 1.68096, 1.65221, 1.65221]
              Solute NH4: Thickness=[150, 150, 300, 300, 300, 300, 300]; InitialValuesUnits=ppm; WaterTableConcentration=0; D0=0; DepthConstant=0; MaxDepthSoluteAccessible=0; RunoffEffectivenessAtMovingSolute=0; MaxEffectiveRunoff=0
                InitialValues=[0.347693, 0.347693, 0.347693, 0.347693, 0.336192, 0.330442, 0.330442]
              Solute Urea: Thickness=[1000, 800]; InitialValues=[0, 0]; InitialValuesUnits=kg/ha; WaterTableConcentration=0; D0=0; DepthConstant=0; MaxDepthSoluteAccessible=0; RunoffEffectivenessAtMovingSolute=0; MaxEffectiveRunoff=0
              Organic: FOMCNRatio=40; CarbonUnits=Total
                Thickness  Carbon  SoilCNRatio  FBiom  FInert  FOM
                150        1.216   12           0.035  0.4     347.129
                150        0.8     12           0.02   0.5     270.344
                300        0.445   12           0.015  0.7     163.972
                300        0.247   12           0.015  0.95    99.4541
                300        0.16    12           0.01   0.95    60.322
                300        0.12    12           0.01   0.95    36.5871
                300        0.14    12           0.01   0.95    22.1912
              Chemical: Thickness=[150, 150, 300, 300, 300, 300, 300]; PH=[8.3, 8.6, 9.063, 9.345, 9.4, 9.45, 9.35]; PHUnits=Water
              Water: Thickness=[150, 150, 300, 300, 300, 300, 300]; InitialValues=[0.1538, 0.152, 0.1683, 0.1688, 0.1695, 0.1702, 0.1745]; FilledFromTop=false
              Nutrient
              SoilTemperature Temperature
            Operations
              2020-05-16  [Sowing].Script.Sow("Accroc", 200, 30, 229.0)
              2020-06-08  [ApplyFertiliser].Script.Apply(69.0,0,0,0,0,0,0,0,0)
              2020-06-27  [ApplyFertiliser].Script.Apply(0.0,0,0,0,0,0,0,0,0)
              2020-07-16  [ApplyFertiliser].Script.Apply(11.0,0,0,0,0,0,0,0,0)
              2020-07-30  [ApplyFertiliser].Script.Apply(69.0,0,0,0,0,0,0,0,0)
              2020-08-21  [ApplyFertiliser].Script.Apply(69.0,0,0,0,0,0,0,0,0)
              2020-08-31  [ApplyFertiliser].Script.Apply(0.0,0,0,0,0,0,0,0,0)
              2020-10-01  [ApplyFertiliser].Script.Apply(0.0,0,0,0,0,0,0,0,0)
          CompositeFactor Trial_29
            Specifications:
              [Clock]
              [Weather]
              [Soil]
              [Operations]
            Clock: Start=2020-01-01; End=2021-04-14
            Weather
              FileName=%root%/Tests/Validation/Wheat/Phenology/WeatherFiles/-41.80_147.11.met
            Soil Sodosol: same as FARAwardPhenology.FARAwardPhenology.Factors.Site.Trial_2.Sodosol
            Operations
              2020-04-15  [Sowing].Script.Sow("Accroc", 200, 30, 250.0)
              2020-04-15  [ApplyFertiliser].Script.Apply(27.0,0,0,0,0,0,0,0,0)
              2020-06-05  [ApplyFertiliser].Script.Apply(0.174,0,0,0,0,0,0,0,0)
              2021-05-16  [ApplyFertiliser].Script.Apply(46.0,0,0,0,0,0,0,0,0)
              2021-08-28  [ApplyFertiliser].Script.Apply(69.0,0,0,0,0,0,0,0,0)
              2021-09-25  [ApplyFertiliser].Script.Apply(69.0,0,0,0,0,0,0,0,0)
              2021-11-07  [ApplyFertiliser].Script.Apply(69.0,0,0,0,0,0,0,0,0)
              2021-11-07  [ApplyFertiliser].Script.Apply(0.0,0,0,0,0,0,0,0,0)
              2020-10-31  [Irrigation].Apply(25)
              2020-11-07  [Irrigation].Apply(25)
              2020-11-14  [Irrigation].Apply(25)
              2020-11-21  [Irrigation].Apply(25)
              2020-11-28  [Irrigation].Apply(25)
          CompositeFactor Trial_30
            Specifications:
              [Clock]
              [Weather]
              [Soil]
              [Operations]
            Clock: Start=2020-01-01; End=2021-04-18
            Weather
              FileName=%root%/Tests/Validation/Wheat/Phenology/WeatherFiles/-41.80_147.11.met
            Soil Sodosol: same as FARAwardPhenology.FARAwardPhenology.Factors.Site.Trial_2.Sodosol
            Operations
              2020-04-19  [Sowing].Script.Sow("Accroc", 200, 30, 250.0)
              2020-04-19  [ApplyFertiliser].Script.Apply(27.0,0,0,0,0,0,0,0,0)
              2020-08-25  [ApplyFertiliser].Script.Apply(69.0,0,0,0,0,0,0,0,0)
              2020-09-24  [ApplyFertiliser].Script.Apply(69.0,0,0,0,0,0,0,0,0)
              2020-10-06  [ApplyFertiliser].Script.Apply(0.0,0,0,0,0,0,0,0,0)
              2020-10-07  [ApplyFertiliser].Script.Apply(69.0,0,0,0,0,0,0,0,0)
              2020-10-31  [Irrigation].Apply(25)
              2020-11-07  [Irrigation].Apply(25)
              2020-11-14  [Irrigation].Apply(25)
              2020-11-21  [Irrigation].Apply(25)
              2020-11-28  [Irrigation].Apply(25)
          CompositeFactor Trial_32
            Specifications:
              [Clock]
              [Weather]
              [Soil]
              [Operations]
            Clock: Start=2020-01-01; End=2021-04-27
            Weather
              FileName=%root%/Tests/Validation/Wheat/Phenology/WeatherFiles/-41.80_147.22.met
            Soil Sodosol: same as FARAwardPhenology.FARAwardPhenology.Factors.Site.Trial_2.Sodosol
            Operations
              2020-04-28  [Sowing].Script.Sow("Accroc", 200, 30, 150.0)
              2021-04-28  [ApplyFertiliser].Script.Apply(22.5,0,0,0,0,0,0,0,0)
              2021-07-21  [ApplyFertiliser].Script.Apply(0.174,0,0,0,0,0,0,0,0)
              2021-09-05  [ApplyFertiliser].Script.Apply(46.0,0,0,0,0,0,0,0,0)
              2021-10-10  [ApplyFertiliser].Script.Apply(46.0,0,0,0,0,0,0,0,0)
          CompositeFactor Trial_33
            Specifications:
              [Clock]
              [Weather]
              [Soil]
              [Operations]
            Clock: Start=2020-01-01; End=2021-03-19
            Weather
              FileName=%root%/Tests/Validation/Wheat/Phenology/WeatherFiles/-42.02_147.55.met
            Soil Ferrosol: ASCOrder=Ferrosol; Country=Australia
              Comments=Typical Ferrosol - median values of all Ferrosols in APSoil as at 08/04/2013
              Physical
                Thickness  BD     AirDry  LL15   DUL    SAT
                150        1.005  0.127   0.255  0.405  0.571
                150        1.125  0.219   0.273  0.429  0.525
                300        1.17   0.329   0.329  0.42   0.508
                300        1.195  0.329   0.329  0.432  0.499
                300        1.19   0.329   0.329  0.468  0.501
                SoilCrop WheatSoil: LL=[0.255, 0.273, 0.329, 0.355, 0.383]; KL=[0.06, 0.06, 0.06, 0.04, 0.04]; XF=[1, 1, 1, 1, 1]
              WaterBalance SoilWater: SummerDate=1-Nov; SummerU=6; SummerCona=3.5; WinterDate=1-Apr; WinterU=2; WinterCona=2; DiffusConst=40; DiffusSlope=16; Salb=0.13; CN2Bare=73; CNRed=20; CNCov=0.8; PSIDul=-100; Thickness=[150, 150, 300, 300, 300]; SWCON=[0.3, 0.3, 0.3, 0.3, 0.3]
              Solute NO3: Thickness=[150, 150, 300, 300, 300]; InitialValues=[2.1777, 2.1777, 2.1777, 2.1777, 2.12646]; InitialValuesUnits=ppm; WaterTableConcentration=0; D0=0; DepthConstant=0; MaxDepthSoluteAccessible=0; RunoffEffectivenessAtMovingSolute=0; MaxEffectiveRunoff=0
              Solute NH4: Thickness=[150, 150, 300, 300, 300]; InitialValues=[0.43554, 0.43554, 0.43554, 0.43554, 0.425292]; InitialValuesUnits=ppm; WaterTableConcentration=0; D0=0; DepthConstant=0; MaxDepthSoluteAccessible=0; RunoffEffectivenessAtMovingSolute=0; MaxEffectiveRunoff=0
              Solute Urea: Thickness=[1000, 200]; InitialValues=[0, 0]; InitialValuesUnits=kg/ha; WaterTableConcentration=0; D0=0; DepthConstant=0; MaxDepthSoluteAccessible=0; RunoffEffectivenessAtMovingSolute=0; MaxEffectiveRunoff=0
              Organic: FOMCNRatio=40; CarbonUnits=Total
                Thickness  Carbon  SoilCNRatio  FBiom  FInert  FOM
                150        5.105   12           0.035  0.4     446.88
                150        3.756   12           0.02   0.5     307.136
                300        1.193   12           0.015  0.7     145.081
                300        0.787   12           0.015  0.95    68.5313
                300        0.348   12           0.01   0.95    32.3719
              Chemical: Thickness=[150, 150, 300, 300, 300]; PH=[6.25, 6.117, 5.933, 6.05, 6.095]; PHUnits=Water
              Water: Thickness=[150, 150, 300, 300, 300]; InitialValues=[0.27, 0.2886, 0.3381, 0.3393, 0.3429]; FilledFromTop=false
              Nutrient
              SoilTemperature Temperature
            Operations
              2020-03-20  [Sowing].Script.Sow("Manning", 200, 30, 165.0)
              2020-03-20  [ApplyFertiliser].Script.Apply(22.0,0,0,0,0,0,0,0,0)
              2020-04-24  [ApplyFertiliser].Script.Apply(57.5,0,0,0,0,0,0,0,0)
              2020-08-30  [ApplyFertiliser].Script.Apply(34.5,0,0,0,0,0,0,0,0)
              2020-08-30  [ApplyFertiliser].Script.Apply(15.75,0,0,0,0,0,0,0,0)
              2020-09-17  [ApplyFertiliser].Script.Apply(0.14,0,0,0,0,0,0,0,0)
              2020-09-20  [ApplyFertiliser].Script.Apply(46.0,0,0,0,0,0,0,0,0)
              2020-09-20  [ApplyFertiliser].Script.Apply(0.0,0,0,0,0,0,0,0,0)
              2020-10-21  [ApplyFertiliser].Script.Apply(57.5,0,0,0,0,0,0,0,0)
              2020-10-30  [Irrigation].Apply(36)
              2020-11-06  [Irrigation].Apply(36)
              2020-11-13  [Irrigation].Apply(36)
              2020-11-20  [Irrigation].Apply(36)
              2020-11-27  [Irrigation].Apply(36)
              2020-12-04  [Irrigation].Apply(36)
              2020-12-11  [Irrigation].Apply(36)
          CompositeFactor Trial_34
            Specifications:
              [Clock]
              [Weather]
              [Soil]
              [Operations]
            Clock: Start=2020-01-01; End=2021-05-20
            Weather
              FileName=%root%/Tests/Validation/Wheat/Phenology/WeatherFiles/-42.02_147.55.met
            Soil Sodosol: same as FARAwardPhenology.FARAwardPhenology.Factors.Site.Trial_2.Sodosol
            Operations
              2020-05-21  [Sowing].Script.Sow("Manning", 200, 30, 165.0)
              2020-03-21  [ApplyFertiliser].Script.Apply(22.0,0,0,0,0,0,0,0,0)
              2020-04-24  [ApplyFertiliser].Script.Apply(57.5,0,0,0,0,0,0,0,0)
              2020-08-31  [ApplyFertiliser].Script.Apply(34.5,0,0,0,0,0,0,0,0)
              2020-08-31  [ApplyFertiliser].Script.Apply(15.75,0,0,0,0,0,0,0,0)
              2020-09-18  [ApplyFertiliser].Script.Apply(0.14,0,0,0,0,0,0,0,0)
              2020-09-20  [ApplyFertiliser].Script.Apply(46.0,0,0,0,0,0,0,0,0)
              2020-09-20  [ApplyFertiliser].Script.Apply(0.0,0,0,0,0,0,0,0,0)
              2020-10-22  [ApplyFertiliser].Script.Apply(57.5,0,0,0,0,0,0,0,0)
              2020-11-09  [ApplyFertiliser].Script.Apply(46.0,0,0,0,0,0,0,0,0)
              2020-10-30  [Irrigation].Apply(25)
              2020-11-06  [Irrigation].Apply(25)
              2020-11-13  [Irrigation].Apply(25)
              2020-11-20  [Irrigation].Apply(25)
              2020-11-27  [Irrigation].Apply(25)
              2020-12-04  [Irrigation].Apply(25)
              2020-12-11  [Irrigation].Apply(25)
          CompositeFactor Trial_35
            Specifications:
              [Clock]
              [Weather]
              [Soil]
              [Operations]
            Clock: Start=2020-01-01; End=2021-05-05
            Weather
              FileName=%root%/Tests/Validation/Wheat/Phenology/WeatherFiles/-41.69_147.44.met
            Soil Sodosol: same as FARAwardPhenology.FARAwardPhenology.Factors.Site.Trial_2.Sodosol
            Operations
              2020-05-06  [Sowing].Script.Sow("Bennett", 200, 30, 200.0)
              2020-05-06  [ApplyFertiliser].Script.Apply(0.0,0,0,0,0,0,0,0,0)
              2020-05-06  [ApplyFertiliser].Script.Apply(21.0,0,0,0,0,0,0,0,0)
              2020-07-31  [ApplyFertiliser].Script.Apply(33.0,0,0,0,0,0,0,0,0)
              2020-08-29  [ApplyFertiliser].Script.Apply(46.0,0,0,0,0,0,0,0,0)
              2020-09-29  [ApplyFertiliser].Script.Apply(34.5,0,0,0,0,0,0,0,0)
              2020-09-29  [ApplyFertiliser].Script.Apply(0.0,0,0,0,0,0,0,0,0)
              2020-11-04  [Irrigation].Apply(12)
              2020-11-07  [Irrigation].Apply(15)
              2020-11-12  [Irrigation].Apply(15)
              2020-11-18  [Irrigation].Apply(15)
              2020-11-24  [Irrigation].Apply(15)
              2020-12-02  [Irrigation].Apply(15)
          CompositeFactor Trial_36
            Specifications:
              [Clock]
              [Weather]
              [Soil]
              [Operations]
            Clock: Start=2020-01-01; End=2021-05-06
            Weather
              FileName=%root%/Tests/Validation/Wheat/Phenology/WeatherFiles/-41.80_147.44.met
            Soil Sodosol: same as FARAwardPhenology.FARAwardPhenology.Factors.Site.Trial_2.Sodosol
            Operations
              2020-05-07  [Sowing].Script.Sow("Bennett", 200, 30, 200.0)
              2020-05-07  [ApplyFertiliser].Script.Apply(0.0,0,0,0,0,0,0,0,0)
              2020-05-07  [ApplyFertiliser].Script.Apply(21.0,0,0,0,0,0,0,0,0)
              2020-07-28  [ApplyFertiliser].Script.Apply(33.0,0,0,0,0,0,0,0,0)
              2020-08-29  [ApplyFertiliser].Script.Apply(46.0,0,0,0,0,0,0,0,0)
              2020-09-28  [ApplyFertiliser].Script.Apply(34.5,0,0,0,0,0,0,0,0)
              2020-09-28  [ApplyFertiliser].Script.Apply(0.0,0,0,0,0,0,0,0,0)
              2020-11-08  [Irrigation].Apply(25)
              2020-11-15  [Irrigation].Apply(38)
              2020-12-02  [Irrigation].Apply(38)
          CompositeFactor Trial_37
            Specifications:
              [Clock]
              [Weather]
              [Soil]
              [Operations]
            Clock: Start=2020-01-01; End=2021-05-06
            Weather
              FileName=%root%/Tests/Validation/Wheat/Phenology/WeatherFiles/-41.14_146.01.met
            Soil Ferrosol: same as FARAwardPhenology.FARAwardPhenology.Factors.Site.Trial_33.Ferrosol
            Operations
              2020-05-07  [Sowing].Script.Sow("Calibro", 200, 30, 125.0)
              2020-05-06  [ApplyFertiliser].Script.Apply(70.0,0,0,0,0,0,0,0,0)
              2020-06-05  [ApplyFertiliser].Script.Apply(45.5,0,0,0,0,0,0,0,0)
              2020-08-17  [ApplyFertiliser].Script.Apply(46.0,0,0,0,0,0,0,0,0)
              2020-08-17  [ApplyFertiliser].Script.Apply(21.0,0,0,0,0,0,0,0,0)
              2020-09-14  [ApplyFertiliser].Script.Apply(46.0,0,0,0,0,0,0,0,0)
              2020-10-05  [ApplyFertiliser].Script.Apply(0.0,0,0,0,0,0,0,0,0)
          CompositeFactor Trial_38
            Specifications:
              [Clock]
              [Weather]
              [Soil]
              [Operations]
            Clock: Start=2020-01-01; End=2021-05-06
            Weather
              FileName=%root%/Tests/Validation/Wheat/Phenology/WeatherFiles/-41.14_146.01.met
            Soil Ferrosol: same as FARAwardPhenology.FARAwardPhenology.Factors.Site.Trial_33.Ferrosol
            Operations
              2020-05-07  [Sowing].Script.Sow("Calibro", 200, 30, 125.0)
              2020-05-06  [ApplyFertiliser].Script.Apply(70.0,0,0,0,0,0,0,0,0)
              2020-06-05  [ApplyFertiliser].Script.Apply(45.5,0,0,0,0,0,0,0,0)
              2020-08-17  [ApplyFertiliser].Script.Apply(46.0,0,0,0,0,0,0,0,0)
              2020-08-17  [ApplyFertiliser].Script.Apply(21.0,0,0,0,0,0,0,0,0)
              2020-09-14  [ApplyFertiliser].Script.Apply(46.0,0,0,0,0,0,0,0,0)
              2020-10-05  [ApplyFertiliser].Script.Apply(0.0,0,0,0,0,0,0,0,0)
              2020-10-15  [Irrigation].Apply(25)
              2020-10-22  [Irrigation].Apply(25)
              2020-11-01  [Irrigation].Apply(25)
              2020-11-08  [Irrigation].Apply(25)
              2020-11-15  [Irrigation].Apply(25)
              2020-11-22  [Irrigation].Apply(25)
              2020-11-29  [Irrigation].Apply(25)
              2020-12-06  [Irrigation].Apply(25)
              2020-12-13  [Irrigation].Apply(25)
              2020-12-20  [Irrigation].Apply(25)
          CompositeFactor Trial_39
            Specifications:
              [Clock]
              [Weather]
              [Soil]
              [Operations]
            Clock: Start=2020-01-01; End=2021-05-14
            Weather
              FileName=%root%/Tests/Validation/Wheat/Phenology/WeatherFiles/-41.14_146.34.met
            Soil Ferrosol: same as FARAwardPhenology.FARAwardPhenology.Factors.Site.Trial_33.Ferrosol
            Operations
              2020-05-15  [Sowing].Script.Sow("Calibro", 200, 30, 125.0)
              2020-05-15  [ApplyFertiliser].Script.Apply(54.0,0,0,0,0,0,0,0,0)
              2020-09-01  [ApplyFertiliser].Script.Apply(69.0,0,0,0,0,0,0,0,0)
              2020-09-19  [ApplyFertiliser].Script.Apply(69.0,0,0,0,0,0,0,0,0)
              2020-10-14  [ApplyFertiliser].Script.Apply(69.0,0,0,0,0,0,0,0,0)
              2020-11-10  [ApplyFertiliser].Script.Apply(0.0,0,0,0,0,0,0,0,0)
          CompositeFactor Trial_40
            Specifications:
              [Clock]
              [Weather]
              [Soil]
              [Operations]
            Clock: Start=2020-01-01; End=2021-04-17
            Weather
              FileName=%root%/Tests/Validation/Wheat/Phenology/WeatherFiles/-41.47_146.89.met
            Soil Dermosol: same as FARAwardPhenology.FARAwardPhenology.Factors.Site.Trial_6.Dermosol
            Operations
              2020-04-18  [Sowing].Script.Sow("Calibro", 200, 30, 125.0)
              2020-04-18  [ApplyFertiliser].Script.Apply(0.0,0,0,0,0,0,0,0,0)
              2020-08-10  [ApplyFertiliser].Script.Apply(26.0,0,0,0,0,0,0,0,0)
              2020-09-11  [ApplyFertiliser].Script.Apply(57.5,0,0,0,0,0,0,0,0)
              2020-09-11  [ApplyFertiliser].Script.Apply(0.0,0,0,0,0,0,0,0,0)
              2020-09-24  [ApplyFertiliser].Script.Apply(57.5,0,0,0,0,0,0,0,0)
          CompositeFactor Trial_42
            Specifications:
              [Clock]
              [Weather]
              [Soil]
              [Operations]
            Clock: Start=2020-01-01; End=2021-05-03
            Weather
              FileName=%root%/Tests/Validation/Wheat/Phenology/WeatherFiles/-41.69_147.33.met
            Soil Sodosol: same as FARAwardPhenology.FARAwardPhenology.Factors.Site.Trial_2.Sodosol
            Operations
              2020-05-04  [Sowing].Script.Sow("Accroc", 200, 30, 180.0)
              2020-05-04  [ApplyFertiliser].Script.Apply(27.0,0,0,0,0,0,0,0,0)
              2020-09-17  [ApplyFertiliser].Script.Apply(69.0,0,0,0,0,0,0,0,0)
              2020-09-30  [ApplyFertiliser].Script.Apply(46.0,0,0,0,0,0,0,0,0)
              2020-10-14  [ApplyFertiliser].Script.Apply(46.0,0,0,0,0,0,0,0,0)
              2020-10-30  [Irrigation].Apply(30)
              2020-11-06  [Irrigation].Apply(30)
              2020-11-13  [Irrigation].Apply(30)
          CompositeFactor Trial_44
            Specifications:
              [Clock]
              [Weather]
              [Soil]
              [Operations]
            Clock: Start=2020-01-01; End=2021-04-04
            Weather
              FileName=%root%/Tests/Validation/Wheat/Phenology/WeatherFiles/-36.08_146.56.met
            Soil Sodosol: same as FARAwardPhenology.FARAwardPhenology.Factors.Site.Trial_2.Sodosol
            Operations
              2020-04-05  [Sowing].Script.Sow("Bennett", 200.0, 30, 250.0)
              2020-05-01  [ApplyFertiliser].Script.Apply(10.0,0,0,0,0,0,0,0,0)
              2020-06-01  [ApplyFertiliser].Script.Apply(69.0,0,0,0,0,0,0,0,0)
              2020-08-01  [ApplyFertiliser].Script.Apply(69.0,0,0,0,0,0,0,0,0)
          CompositeFactor Trial_46
            Specifications:
              [Clock]
              [Weather]
              [Soil]
              [Operations]
            Clock: Start=2020-01-01; End=2021-04-11
            Weather
              FileName=%root%/Tests/Validation/Wheat/Phenology/WeatherFiles/-36.08_146.45.met
            Soil Sodosol: same as FARAwardPhenology.FARAwardPhenology.Factors.Site.Trial_2.Sodosol
            Operations
              2020-04-12  [Sowing].Script.Sow("Bennett", 200, 30, 250.0)
              2020-04-12  [ApplyFertiliser].Script.Apply(8.0,0,0,0,0,0,0,0,0)
              2020-04-14  [ApplyFertiliser].Script.Apply(43.7,0,0,0,0,0,0,0,0)
              2020-07-30  [ApplyFertiliser].Script.Apply(46.0,0,0,0,0,0,0,0,0)
              2020-08-03  [ApplyFertiliser].Script.Apply(23.0,0,0,0,0,0,0,0,0)
          CompositeFactor Trial_47
            Specifications:
              [Clock]
              [Weather]
              [Soil]
              [Operations]
            Clock: Start=2020-01-01; End=2021-05-05
            Weather
              FileName=%root%/Tests/Validation/Wheat/Phenology/WeatherFiles/-38.17_143.92.met
            Soil Sodosol: same as FARAwardPhenology.FARAwardPhenology.Factors.Site.Trial_2.Sodosol
            Operations
              2020-05-06  [Sowing].Script.Sow("Beaufort", 200, 30, 250.0)
              2020-06-09  [ApplyFertiliser].Script.Apply(69.0,0,0,0,0,0,0,0,0)
              2020-08-03  [ApplyFertiliser].Script.Apply(115.0,0,0,0,0,0,0,0,0)
              2020-08-20  [ApplyFertiliser].Script.Apply(0.0,0,0,0,0,0,0,0,0)
              2020-08-20  [ApplyFertiliser].Script.Apply(0.0,0,0,0,0,0,0,0,0)
          CompositeFactor Trial_48
            Specifications:
              [Clock]
              [Weather]
              [Soil]
              [Operations]
            Clock: Start=2020-01-01; End=2021-04-07
            Weather
              FileName=%root%/Tests/Validation/Wheat/Phenology/WeatherFiles/-37.29_143.92.met
            Soil Vertosol: same as FARAwardPhenology.FARAwardPhenology.Factors.Site.Trial_14.Vertosol
            Operations
              2020-04-08  [Sowing].Script.Sow("Accroc", 200, 30, 250.0)
              2020-04-08  [ApplyFertiliser].Script.Apply(12.0,0,0,0,0,0,0,0,0)
              2020-04-08  [ApplyFertiliser].Script.Apply(16.1,0,0,0,0,0,0,0,0)
              2020-04-08  [ApplyFertiliser].Script.Apply(2.15,0,0,0,0,0,0,0,0)
              2020-04-08  [ApplyFertiliser].Script.Apply(0.258,0,0,0,0,0,0,0,0)
              2020-05-14  [ApplyFertiliser].Script.Apply(23.0,0,0,0,0,0,0,0,0)
              2020-06-24  [ApplyFertiliser].Script.Apply(36.8,0,0,0,0,0,0,0,0)
              2020-08-11  [ApplyFertiliser].Script.Apply(64.4,0,0,0,0,0,0,0,0)
              2020-08-17  [ApplyFertiliser].Script.Apply(0.15,0,0,0,0,0,0,0,0)
              2020-09-07  [ApplyFertiliser].Script.Apply(46.0,0,0,0,0,0,0,0,0)
              2020-09-18  [ApplyFertiliser].Script.Apply(0.0,0,0,0,0,0,0,0,0)
              2020-09-18  [ApplyFertiliser].Script.Apply(0.0,0,0,0,0,0,0,0,0)
              2020-09-22  [ApplyFertiliser].Script.Apply(36.8,0,0,0,0,0,0,0,0)
          CompositeFactor Trial_49
            Specifications:
              [Clock]
              [Weather]
              [Soil]
              [Operations]
            Clock: Start=2020-01-01; End=2021-04-14
            Weather
              FileName=%root%/Tests/Validation/Wheat/Phenology/WeatherFiles/-37.95_143.92.met
            Soil Sodosol: same as FARAwardPhenology.FARAwardPhenology.Factors.Site.Trial_2.Sodosol
            Operations
              2020-04-15  [Sowing].Script.Sow("Accroc", 152.0, 30, 250.0)
              2020-04-15  [ApplyFertiliser].Script.Apply(11.0,0,0,0,0,0,0,0,0)
              2020-06-11  [ApplyFertiliser].Script.Apply(36.8,0,0,0,0,0,0,0,0)
              2020-08-02  [ApplyFertiliser].Script.Apply(64.4,0,0,0,0,0,0,0,0)
              2020-08-18  [ApplyFertiliser].Script.Apply(46.0,0,0,0,0,0,0,0,0)
              2021-09-09  [ApplyFertiliser].Script.Apply(0.064,0,0,0,0,0,0,0,0)
          CompositeFactor Trial_50
            Specifications:
              [Clock]
              [Weather]
              [Soil]
              [Operations]
            Clock: Start=2020-01-01; End=2021-05-05
            Weather
              FileName=%root%/Tests/Validation/Wheat/Phenology/WeatherFiles/-37.84_142.71.met
            Soil Sodosol: same as FARAwardPhenology.FARAwardPhenology.Factors.Site.Trial_2.Sodosol
            Operations
              2020-05-06  [Sowing].Script.Sow("Beaufort", 200, 30, 250.0)
              2020-03-20  [ApplyFertiliser].Script.Apply(90.0,0,0,0,0,0,0,0,0)
              2020-05-09  [ApplyFertiliser].Script.Apply(9.0,0,0,0,0,0,0,0,0)
              2020-08-05  [ApplyFertiliser].Script.Apply(29.9,0,0,0,0,0,0,0,0)
              2020-08-26  [ApplyFertiliser].Script.Apply(51.98,0,0,0,0,0,0,0,0)
              2020-08-27  [ApplyFertiliser].Script.Apply(0.0,0,0,0,0,0,0,0,0)
          CompositeFactor Trial_51
            Specifications:
              [Clock]
              [Weather]
              [Soil]
              [Operations]
            Clock: Start=2020-01-01; End=2021-04-19
            Weather
              FileName=%root%/Tests/Validation/Wheat/Phenology/WeatherFiles/-37.84_143.70.met
            Soil Sodosol: same as FARAwardPhenology.FARAwardPhenology.Factors.Site.Trial_2.Sodosol
            Operations
              2020-04-20  [Sowing].Script.Sow("Beaufort", 200, 30, 190.0)
              2020-04-20  [ApplyFertiliser].Script.Apply(28.8,0,0,0,0,0,0,0,0)
              2020-05-19  [ApplyFertiliser].Script.Apply(69.0,0,0,0,0,0,0,0,0)
              2020-06-18  [ApplyFertiliser].Script.Apply(34.5,0,0,0,0,0,0,0,0)
              2020-08-31  [ApplyFertiliser].Script.Apply(0.0,0,0,0,0,0,0,0,0)
              2020-08-31  [ApplyFertiliser].Script.Apply(0.0,0,0,0,0,0,0,0,0)
          CompositeFactor Trial_52
            Specifications:
              [Clock]
              [Weather]
              [Soil]
              [Operations]
            Clock: Start=2020-01-01; End=2021-03-24
            Weather
              FileName=%root%/Tests/Validation/Wheat/Phenology/WeatherFiles/-38.06_143.81.met
            Soil Sodosol: same as FARAwardPhenology.FARAwardPhenology.Factors.Site.Trial_2.Sodosol
            Operations
              2020-03-25  [Sowing].Script.Sow("Accroc", 209.0, 30, 250.0)
              2020-03-25  [ApplyFertiliser].Script.Apply(6.0,0,0,0,0,0,0,0,0)
              2020-03-25  [ApplyFertiliser].Script.Apply(41.4,0,0,0,0,0,0,0,0)
              2020-05-27  [ApplyFertiliser].Script.Apply(69.0,0,0,0,0,0,0,0,0)
              2020-07-08  [ApplyFertiliser].Script.Apply(92.0,0,0,0,0,0,0,0,0)
              2020-08-06  [ApplyFertiliser].Script.Apply(92.0,0,0,0,0,0,0,0,0)
              2020-08-18  [ApplyFertiliser].Script.Apply(0.0,0,0,0,0,0,0,0,0)
              2020-08-18  [ApplyFertiliser].Script.Apply(0.0,0,0,0,0,0,0,0,0)
          CompositeFactor Trial_53
            Specifications:
              [Clock]
              [Weather]
              [Soil]
              [Operations]
            Clock: Start=2020-01-01; End=2021-05-04
            Weather
              FileName=%root%/Tests/Validation/Wheat/Phenology/WeatherFiles/-38.17_144.03.met
            Soil Sodosol: same as FARAwardPhenology.FARAwardPhenology.Factors.Site.Trial_2.Sodosol
            Operations
              2020-05-05  [Sowing].Script.Sow("Trojan", 208.0, 30, 300.0)
              2020-05-05  [ApplyFertiliser].Script.Apply(3.0,0,0,0,0,0,0,0,0)
              2020-07-17  [ApplyFertiliser].Script.Apply(55.2,0,0,0,0,0,0,0,0)
              2020-07-23  [ApplyFertiliser].Script.Apply(0.0,0,0,0,0,0,0,0,0)
              2020-08-07  [ApplyFertiliser].Script.Apply(63.02,0,0,0,0,0,0,0,0)
              2020-09-01  [ApplyFertiliser].Script.Apply(39.56,0,0,0,0,0,0,0,0)
          CompositeFactor Trial_54
            Specifications:
              [Clock]
              [Weather]
              [Soil]
              [Operations]
            Clock: Start=2020-01-01; End=2021-05-06
            Weather
              FileName=%root%/Tests/Validation/Wheat/Phenology/WeatherFiles/-37.95_143.59.met
            Soil Sodosol: same as FARAwardPhenology.FARAwardPhenology.Factors.Site.Trial_2.Sodosol
            Operations
              2020-05-07  [Sowing].Script.Sow("Accroc", 200, 30, 250.0)
              2020-05-07  [ApplyFertiliser].Script.Apply(18.0,0,0,0,0,0,0,0,0)
              2020-06-17  [ApplyFertiliser].Script.Apply(0.0,0,0,0,0,0,0,0,0)
              2020-07-15  [ApplyFertiliser].Script.Apply(36.8,0,0,0,0,0,0,0,0)
              2020-08-18  [ApplyFertiliser].Script.Apply(36.8,0,0,0,0,0,0,0,0)
              2020-08-26  [ApplyFertiliser].Script.Apply(0.0,0,0,0,0,0,0,0,0)
              2020-09-17  [ApplyFertiliser].Script.Apply(32.2,0,0,0,0,0,0,0,0)
          CompositeFactor Trial_55
            Specifications:
              [Clock]
              [Weather]
              [Soil]
              [Operations]
            Clock: Start=2020-01-01; End=2021-04-17
            Weather
              FileName=%root%/Tests/Validation/Wheat/Phenology/WeatherFiles/-37.73_144.25.met
            Soil Sodosol: same as FARAwardPhenology.FARAwardPhenology.Factors.Site.Trial_2.Sodosol
            Operations
              2020-04-18  [Sowing].Script.Sow("Trojan", 181.0, 30, 250.0)
              2020-04-18  [ApplyFertiliser].Script.Apply(8.0,0,0,0,0,0,0,0,0)
              2020-04-18  [ApplyFertiliser].Script.Apply(18.4,0,0,0,0,0,0,0,0)
              2020-08-11  [ApplyFertiliser].Script.Apply(46.0,0,0,0,0,0,0,0,0)
              2020-09-01  [ApplyFertiliser].Script.Apply(0.0,0,0,0,0,0,0,0,0)
              2020-09-01  [ApplyFertiliser].Script.Apply(0.0,0,0,0,0,0,0,0,0)
              2020-09-08  [ApplyFertiliser].Script.Apply(80.5,0,0,0,0,0,0,0,0)
              2020-09-25  [ApplyFertiliser].Script.Apply(59.34,0,0,0,0,0,0,0,0)
          CompositeFactor Trial_56
            Specifications:
              [Clock]
              [Weather]
              [Soil]
              [Operations]
            Clock: Start=2020-01-01; End=2021-04-24
            Weather
              FileName=%root%/Tests/Validation/Wheat/Phenology/WeatherFiles/-37.51_142.93.met
            Soil Sodosol: same as FARAwardPhenology.FARAwardPhenology.Factors.Site.Trial_2.Sodosol
            Operations
              2020-04-25  [Sowing].Script.Sow("Revenue", 233.0, 30, 250.0)
              2020-04-10  [ApplyFertiliser].Script.Apply(0.0,0,0,0,0,0,0,0,0)
              2020-04-25  [ApplyFertiliser].Script.Apply(10.0,0,0,0,0,0,0,0,0)
              2020-05-28  [ApplyFertiliser].Script.Apply(46.0,0,0,0,0,0,0,0,0)
              2020-07-10  [ApplyFertiliser].Script.Apply(46.0,0,0,0,0,0,0,0,0)
              2020-08-15  [ApplyFertiliser].Script.Apply(69.0,0,0,0,0,0,0,0,0)
          CompositeFactor Trial_57
            Specifications:
              [Clock]
              [Weather]
              [Soil]
              [Operations]
            Clock: Start=2020-01-01; End=2021-04-05
            Weather
              FileName=%root%/Tests/Validation/Wheat/Phenology/WeatherFiles/-37.84_142.82.met
            Soil Sodosol: same as FARAwardPhenology.FARAwardPhenology.Factors.Site.Trial_2.Sodosol
            Operations
              2020-04-06  [Sowing].Script.Sow("Accroc", 200, 30, 250.0)
              2020-04-06  [ApplyFertiliser].Script.Apply(46.0,0,0,0,0,0,0,0,0)
              2020-04-06  [ApplyFertiliser].Script.Apply(12.0,0,0,0,0,0,0,0,0)
              2020-06-15  [ApplyFertiliser].Script.Apply(46.0,0,0,0,0,0,0,0,0)
              2020-09-08  [ApplyFertiliser].Script.Apply(0.0,0,0,0,0,0,0,0,0)
          CompositeFactor Trial_58
            Specifications:
              [Clock]
              [Weather]
              [Soil]
              [Operations]
            Clock: Start=2020-01-01; End=2021-04-26
            Weather
              FileName=%root%/Tests/Validation/Wheat/Phenology/WeatherFiles/-37.95_143.15.met
            Soil Sodosol: same as FARAwardPhenology.FARAwardPhenology.Factors.Site.Trial_2.Sodosol
            Operations
              2020-04-27  [Sowing].Script.Sow("Beaufort", 200, 30, 250.0)
              2020-04-26  [ApplyFertiliser].Script.Apply(9.0,0,0,0,0,0,0,0,0)
              2020-04-26  [ApplyFertiliser].Script.Apply(23.0,0,0,0,0,0,0,0,0)
              2020-05-29  [ApplyFertiliser].Script.Apply(69.0,0,0,0,0,0,0,0,0)
              2020-09-05  [ApplyFertiliser].Script.Apply(0.0,0,0,0,0,0,0,0,0)
              2020-09-05  [ApplyFertiliser].Script.Apply(0.0,0,0,0,0,0,0,0,0)
          CompositeFactor Trial_59
            Specifications:
              [Clock]
              [Weather]
              [Soil]
              [Operations]
            Clock: Start=2020-01-01; End=2021-04-26
            Weather
              FileName=%root%/Tests/Validation/Wheat/Phenology/WeatherFiles/-37.73_143.37.met
            Soil Sodosol: same as FARAwardPhenology.FARAwardPhenology.Factors.Site.Trial_2.Sodosol
            Operations
              2020-04-27  [Sowing].Script.Sow("Beaufort", 211.0, 30, 250.0)
              2020-04-27  [ApplyFertiliser].Script.Apply(28.2,0,0,0,0,0,0,0,0)
              2020-06-10  [ApplyFertiliser].Script.Apply(69.0,0,0,0,0,0,0,0,0)
              2020-07-09  [ApplyFertiliser].Script.Apply(34.5,0,0,0,0,0,0,0,0)
              2020-08-17  [ApplyFertiliser].Script.Apply(0.0,0,0,0,0,0,0,0,0)
              2020-08-17  [ApplyFertiliser].Script.Apply(0.0,0,0,0,0,0,0,0,0)
          CompositeFactor Trial_60
            Specifications:
              [Clock]
              [Weather]
              [Soil]
              [Operations]
            Clock: Start=2020-01-01; End=2021-04-08
            Weather
              FileName=%root%/Tests/Validation/Wheat/Phenology/WeatherFiles/-37.40_143.70.met
            Soil Chromosol: same as FARAwardPhenology.FARAwardPhenology.Factors.Site.Trial_1.Chromosol
            Operations
              2020-04-09  [Sowing].Script.Sow("Accroc", 200, 30, 250.0)
              2020-04-01  [ApplyFertiliser].Script.Apply(0.0,0,0,0,0,0,0,0,0)
              2020-04-09  [ApplyFertiliser].Script.Apply(10.0,0,0,0,0,0,0,0,0)
              2020-04-28  [ApplyFertiliser].Script.Apply(36.8,0,0,0,0,0,0,0,0)
              2020-06-16  [ApplyFertiliser].Script.Apply(23.0,0,0,0,0,0,0,0,0)
              2020-07-30  [ApplyFertiliser].Script.Apply(0.128,0,0,0,0,0,0,0,0)
              2020-08-02  [ApplyFertiliser].Script.Apply(69.0,0,0,0,0,0,0,0,0)
              2020-08-03  [ApplyFertiliser].Script.Apply(0.128,0,0,0,0,0,0,0,0)
              2020-09-06  [ApplyFertiliser].Script.Apply(69.0,0,0,0,0,0,0,0,0)
          CompositeFactor Trial_61
            Specifications:
              [Clock]
              [Weather]
              [Soil]
              [Operations]
            Clock: Start=2020-01-01; End=2021-05-27
            Weather
              FileName=%root%/Tests/Validation/Wheat/Phenology/WeatherFiles/-38.06_144.03.met
            Soil Sodosol: same as FARAwardPhenology.FARAwardPhenology.Factors.Site.Trial_2.Sodosol
            Operations
              2020-05-28  [Sowing].Script.Sow("Scepter", 200, 30, 250.0)
              2020-06-15  [ApplyFertiliser].Script.Apply(46.0,0,0,0,0,0,0,0,0)
              2020-07-28  [ApplyFertiliser].Script.Apply(46.0,0,0,0,0,0,0,0,0)
              2020-08-10  [ApplyFertiliser].Script.Apply(0.0,0,0,0,0,0,0,0,0)
              2020-08-15  [ApplyFertiliser].Script.Apply(36.8,0,0,0,0,0,0,0,0)
          CompositeFactor Trial_62
            Specifications:
              [Clock]
              [Weather]
              [Soil]
              [Operations]
            Clock: Start=2020-01-01; End=2021-05-17
            Weather
              FileName=%root%/Tests/Validation/Wheat/Phenology/WeatherFiles/-37.95_143.92.met
            Soil Sodosol: same as FARAwardPhenology.FARAwardPhenology.Factors.Site.Trial_2.Sodosol
            Operations
              2020-05-18  [Sowing].Script.Sow("Trojan", 239.0, 30, 250.0)
              2020-05-18  [ApplyFertiliser].Script.Apply(64.0,0,0,0,0,0,0,0,0)
              2020-07-02  [ApplyFertiliser].Script.Apply(69.0,0,0,0,0,0,0,0,0)
              2020-08-01  [ApplyFertiliser].Script.Apply(0.0,0,0,0,0,0,0,0,0)
              2020-08-01  [ApplyFertiliser].Script.Apply(0.0,0,0,0,0,0,0,0,0)
              2020-08-04  [ApplyFertiliser].Script.Apply(69.0,0,0,0,0,0,0,0,0)
              2020-09-24  [ApplyFertiliser].Script.Apply(46.0,0,0,0,0,0,0,0,0)
          CompositeFactor Trial_63
            Specifications:
              [Clock]
              [Weather]
              [Soil]
              [Operations]
            Clock: Start=2020-01-01; End=2021-04-15
            Weather
              FileName=%root%/Tests/Validation/Wheat/Phenology/WeatherFiles/-37.95_143.70.met
            Soil Sodosol: same as FARAwardPhenology.FARAwardPhenology.Factors.Site.Trial_2.Sodosol
            Operations
              2020-04-16  [Sowing].Script.Sow("Accroc", 200, 30, 300.0)
              2020-04-16  [ApplyFertiliser].Script.Apply(9.0,0,0,0,0,0,0,0,0)
              2020-05-29  [ApplyFertiliser].Script.Apply(69.0,0,0,0,0,0,0,0,0)
              2020-07-03  [ApplyFertiliser].Script.Apply(0.0,0,0,0,0,0,0,0,0)
              2020-08-03  [ApplyFertiliser].Script.Apply(71.3,0,0,0,0,0,0,0,0)
              2020-08-10  [ApplyFertiliser].Script.Apply(0.0,0,0,0,0,0,0,0,0)
          CompositeFactor Trial_65
            Specifications:
              [Clock]
              [Weather]
              [Soil]
              [Operations]
            Clock: Start=2020-01-01; End=2021-03-22
            Weather
              FileName=%root%/Tests/Validation/Wheat/Phenology/WeatherFiles/-37.84_143.81.met
            Soil Sodosol: same as FARAwardPhenology.FARAwardPhenology.Factors.Site.Trial_2.Sodosol
            Operations
              2020-03-23  [Sowing].Script.Sow("Accroc", 200, 30, 225.0)
              2020-03-23  [ApplyFertiliser].Script.Apply(12.0,0,0,0,0,0,0,0,0)
              2020-04-22  [ApplyFertiliser].Script.Apply(69.0,0,0,0,0,0,0,0,0)
              2020-09-14  [ApplyFertiliser].Script.Apply(69.0,0,0,0,0,0,0,0,0)
          CompositeFactor Trial_66
            Specifications:
              [Clock]
              [Weather]
              [Soil]
              [Operations]
            Clock: Start=2020-01-01; End=2021-04-28
            Weather
              FileName=%root%/Tests/Validation/Wheat/Phenology/WeatherFiles/-37.95_143.92.met
            Soil Sodosol: same as FARAwardPhenology.FARAwardPhenology.Factors.Site.Trial_2.Sodosol
            Operations
              2020-04-29  [Sowing].Script.Sow("Beaufort", 215.0, 30, 250.0)
              2020-04-29  [ApplyFertiliser].Script.Apply(64.0,0,0,0,0,0,0,0,0)
              2020-07-01  [ApplyFertiliser].Script.Apply(69.0,0,0,0,0,0,0,0,0)
              2020-07-30  [ApplyFertiliser].Script.Apply(0.0,0,0,0,0,0,0,0,0)
              2020-07-30  [ApplyFertiliser].Script.Apply(0.0,0,0,0,0,0,0,0,0)
              2020-08-07  [ApplyFertiliser].Script.Apply(69.0,0,0,0,0,0,0,0,0)
          CompositeFactor Trial_68
            Specifications:
              [Clock]
              [Weather]
              [Soil]
              [Operations]
            Clock: Start=2020-01-01; End=2021-05-23
            Weather
              FileName=%root%/Tests/Validation/Wheat/Phenology/WeatherFiles/-34.54_117.74.met
            Soil Tenosol: ASCOrder=Tenosol; Country=Australia
              Comments=Typical Tenosol - median values of all Tenosols in APSoil as at 08/04/2013
              Physical
                Thickness  BD     AirDry  LL15   DUL    SAT
                150        1.59   0.015   0.03   0.089  0.35
                150        1.7    0.026   0.033  0.1    0.308
                300        1.69   0.04    0.04   0.108  0.312
                300        1.666  0.04    0.04   0.115  0.321
                300        1.648  0.04    0.04   0.113  0.328
                300        1.6    0.04    0.04   0.105  0.346
                300        1.61   0.04    0.04   0.11   0.342
                300        1.6    0.04    0.04   0.11   0.346
                300        1.69   0.04    0.04   0.13   0.312
                300        1.65   0.04    0.04   0.13   0.327
                SoilCrop WheatSoil
                  LL=[0.03, 0.033, 0.04, 0.045, 0.055, 0.057, 0.06, 0.06, 0.07, 0.08]
                  KL=[0.06, 0.06, 0.06, 0.04, 0.04, 0.02, 0.01, 0.01, 0.01, 0.01]
                  XF=[1, 1, 1, 1, 1, 1, 1, 1, 1, 1]
              WaterBalance SoilWater: SummerDate=1-Nov; SummerU=6; SummerCona=3.5; WinterDate=1-Apr; WinterU=2; WinterCona=2; DiffusConst=250; DiffusSlope=22; Salb=0.13; CN2Bare=68; CNRed=20; CNCov=0.8; PSIDul=-100; Thickness=[150, 150, 300, 300, 300, 300, 300, 300, 300, 300]; SWCON=[0.7, 0.7, 0.7, 0.7, 0.7, 0.7, 0.7, 0.7, 0.7, 0.7]
              Solute NO3: Thickness=[150, 150, 300, 300, 300, 300, 300, 300, 300, 300]; InitialValuesUnits=ppm; WaterTableConcentration=0; D0=0; DepthConstant=0; MaxDepthSoluteAccessible=0; RunoffEffectivenessAtMovingSolute=0; MaxEffectiveRunoff=0
                InitialValues=[1.50141, 1.50141, 1.50141, 1.50141, 1.534, 1.55029, 1.55029, 1.53554, 1.50602, 1.50602]
              Solute NH4: Thickness=[150, 150, 300, 300, 300, 300, 300, 300, 300, 300]; InitialValuesUnits=ppm; WaterTableConcentration=0; D0=0; DepthConstant=0; MaxDepthSoluteAccessible=0; RunoffEffectivenessAtMovingSolute=0; MaxEffectiveRunoff=0
                InitialValues=[0.300282, 0.300282, 0.300282, 0.300282, 0.3068, 0.310058, 0.310058, 0.307107, 0.301205, 0.301205]
              Solute Urea: Thickness=[1000, 1000, 700]; InitialValues=[0, 0, 0]; InitialValuesUnits=kg/ha; WaterTableConcentration=0; D0=0; DepthConstant=0; MaxDepthSoluteAccessible=0; RunoffEffectivenessAtMovingSolute=0; MaxEffectiveRunoff=0
              Organic: FOMCNRatio=40; CarbonUnits=Total
                Thickness  Carbon  SoilCNRatio  FBiom  FInert  FOM
                150        0.533   12           0.035  0.4     260.587
                150        0.29    12           0.02   0.5     220.582
                300        0.153   12           0.015  0.7     158.054
                300        0.1     12           0.015  0.95    113.251
                300        0.09    12           0.01   0.95    81.1478
                300        0.1     12           0.01   0.95    58.1449
                300        0.1     12           0.01   0.95    41.6626
                300        0.1     12           0.01   0.95    29.8526
                300        0.1     12           0.01   0.95    21.3903
                300        0.1     12           0.01   0.95    15.3268
              Chemical: Thickness=[150, 150, 300, 300, 300, 300, 300, 300, 300, 300]; PHUnits=Water
                PH=[5.467, 5.167, 5.467, 5.933, 6.024, 6.048, 6.05, 6, 6, 5.75]
              Water: Thickness=[150, 150, 300, 300, 300, 300, 300, 300, 300, 300]; FilledFromTop=false
                InitialValues=[0.0359, 0.0397, 0.0468, 0.0475, 0.0473, 0.0465, 0.047, 0.047, 0.049, 0.049]
              Nutrient
              SoilTemperature Temperature
            Operations
              2020-05-24  [Sowing].Script.Sow("Calingiri", 200, 30, 266.0)
              2020-05-24  [ApplyFertiliser].Script.Apply(9.12,0,0,0,0,0,0,0,0)
              2020-05-24  [ApplyFertiliser].Script.Apply(0.0,0,0,0,0,0,0,0,0)
              2020-05-24  [ApplyFertiliser].Script.Apply(0.0,0,0,0,0,0,0,0,0)
              2020-06-16  [ApplyFertiliser].Script.Apply(18.4,0,0,0,0,0,0,0,0)
              2020-06-16  [ApplyFertiliser].Script.Apply(12.6,0,0,0,0,0,0,0,0)
              2020-06-16  [ApplyFertiliser].Script.Apply(0.0,0,0,0,0,0,0,0,0)
              2020-07-31  [ApplyFertiliser].Script.Apply(27.6,0,0,0,0,0,0,0,0)
              2020-09-11  [ApplyFertiliser].Script.Apply(21.0,0,0,0,0,0,0,0,0)
          CompositeFactor Trial_69
            Specifications:
              [Clock]
              [Weather]
              [Soil]
              [Operations]
            Clock: Start=2020-01-01; End=2021-05-25
            Weather
              FileName=%root%/Tests/Validation/Wheat/Phenology/WeatherFiles/-34.54_118.29.met
            Soil Tenosol: same as FARAwardPhenology.FARAwardPhenology.Factors.Site.Trial_68.Tenosol
            Operations
              2020-05-26  [Sowing].Script.Sow("Scepter", 200, 30, 305.0)
              2020-05-26  [ApplyFertiliser].Script.Apply(12.5,0,0,0,0,0,0,0,0)
              2020-06-20  [ApplyFertiliser].Script.Apply(37.723,0,0,0,0,0,0,0,0)
              2020-08-07  [ApplyFertiliser].Script.Apply(37.723,0,0,0,0,0,0,0,0)
              2020-08-07  [ApplyFertiliser].Script.Apply(0.0,0,0,0,0,0,0,0,0)
              2020-08-25  [ApplyFertiliser].Script.Apply(27.3,0,0,0,0,0,0,0,0)
          CompositeFactor Trial_72
            Specifications:
              [Clock]
              [Weather]
              [Soil]
              [Operations]
            Clock: Start=2020-01-01; End=2021-05-25
            Weather
              FileName=%root%/Tests/Validation/Wheat/Phenology/WeatherFiles/-34.65_117.52.met
            Soil Sodosol: same as FARAwardPhenology.FARAwardPhenology.Factors.Site.Trial_2.Sodosol
            Operations
              2020-05-26  [Sowing].Script.Sow("Scepter", 200, 30, 250.0)
              2020-05-26  [ApplyFertiliser].Script.Apply(9.02,0,0,0,0,0,0,0,0)
              2020-05-26  [ApplyFertiliser].Script.Apply(0.0,0,0,0,0,0,0,0,0)
              2020-05-26  [ApplyFertiliser].Script.Apply(2.5,0,0,0,0,0,0,0,0)
              2020-05-26  [ApplyFertiliser].Script.Apply(21.0,0,0,0,0,0,0,0,0)
              2020-07-03  [ApplyFertiliser].Script.Apply(29.44,0,0,0,0,0,0,0,0)
              2020-07-03  [ApplyFertiliser].Script.Apply(0.0,0,0,0,0,0,0,0,0)
              2020-09-01  [ApplyFertiliser].Script.Apply(46.0,0,0,0,0,0,0,0,0)
          CompositeFactor Trial_73
            Specifications:
              [Clock]
              [Weather]
              [Soil]
              [Operations]
            Clock: Start=2020-01-01; End=2021-04-12
            Weather
              FileName=%root%/Tests/Validation/Wheat/Phenology/WeatherFiles/-34.32_116.86.met
            Soil Kandosol: ASCOrder=Kandosol; Country=Australia
              Comments=Typical Kandosol - median values of all Kandosols in APSoil as at 08/04/2013
              Physical
                Thickness  BD     AirDry  LL15   DUL    SAT
                150        1.567  0.025   0.05   0.133  0.359
                150        1.6    0.049   0.061  0.147  0.346
                300        1.617  0.077   0.077  0.168  0.34
                300        1.6    0.077   0.077  0.17   0.346
                300        1.595  0.077   0.077  0.175  0.348
                300        1.6    0.077   0.077  0.17   0.346
                300        1.6    0.077   0.077  0.175  0.346
                300        1.625  0.077   0.077  0.16   0.337
                300        1.68   0.077   0.077  0.16   0.316
                300        1.68   0.077   0.077  0.16   0.316
                300        1.326  0.077   0.077  0.235  0.45
                SoilCrop WheatSoil
                  LL=[0.05, 0.061, 0.077, 0.09, 0.102, 0.113, 0.132, 0.123, 0.12, 0.12, 0.217]
                  KL=[0.06, 0.06, 0.06, 0.04, 0.04, 0.02, 0.01, 0.01, 0.01, 0.01, 0.01]
                  XF=[1, 1, 1, 1, 1, 1, 1, 1, 1, 1, 0]
              WaterBalance SoilWater: SummerDate=1-Nov; SummerU=6; SummerCona=3.5; WinterDate=1-Apr; WinterU=2; WinterCona=2; DiffusConst=88; DiffusSlope=35; Salb=0.13; CN2Bare=68; CNRed=20; CNCov=0.8; PSIDul=-100; Thickness=[150, 150, 300, 300, 300, 300, 300, 300, 300, 300, 300]; SWCON=[0.7, 0.7, 0.7, 0.7, 0.7, 0.7, 0.7, 0.7, 0.7, 0.7, 0.7]
              Solute NO3: Thickness=[150, 150, 300, 300, 300, 300, 300, 300, 300, 300, 300]; InitialValuesUnits=ppm; WaterTableConcentration=0; D0=0; DepthConstant=0; MaxDepthSoluteAccessible=0; RunoffEffectivenessAtMovingSolute=0; MaxEffectiveRunoff=0
                InitialValues=[1.56284, 1.56284, 1.56284, 1.56284, 1.56002, 1.5586, 1.5586, 1.57043, 1.59408, 1.59408, 1.59408]
              Solute NH4: Thickness=[150, 150, 300, 300, 300, 300, 300, 300, 300, 300, 300]; InitialValuesUnits=ppm; WaterTableConcentration=0; D0=0; DepthConstant=0; MaxDepthSoluteAccessible=0; RunoffEffectivenessAtMovingSolute=0; MaxEffectiveRunoff=0
                InitialValues=[0.312568, 0.312568, 0.312568, 0.312568, 0.312003, 0.311721, 0.311721, 0.314086, 0.318817, 0.318817, 0.318817]
              Solute Urea: same as FARAwardPhenology.FARAwardPhenology.Factors.Site.Trial_6.Dermosol.Urea
              Organic: FOMCNRatio=40; CarbonUnits=Total
                Thickness  Carbon  SoilCNRatio  FBiom  FInert  FOM
                150        0.7     12           0.035  0.4     240.643
                150        0.323   12           0.02   0.5     207.124
                300        0.2     12           0.015  0.7     153.441
                300        0.133   12           0.015  0.95    113.672
                300        0.1     12           0.01   0.95    84.2101
                300        0.1     12           0.01   0.95    62.3844
                300        0.1     12           0.01   0.95    46.2155
                300        0.1     12           0.01   0.95    34.2373
                300        0.1     12           0.01   0.95    25.3636
                300        0.1     12           0.01   0.95    18.7898
                300        0.1     12           0.01   0.95    13.9198
              Chemical: Thickness=[150, 150, 300, 300, 300, 300, 300, 300, 300, 300, 300]; PHUnits=Water
                PH=[5.733, 6, 6.567, 6.367, 6.583, 6.3, 6, 5.35, 5.2, 5.2, 4.6]
              Water: Thickness=[150, 150, 300, 300, 300, 300, 300, 300, 300, 300, 300]; FilledFromTop=false
                InitialValues=[0.0583, 0.0696, 0.0861, 0.0863, 0.0868, 0.0863, 0.0868, 0.0853, 0.0853, 0.0853, 0.0928]
              Nutrient
              SoilTemperature Temperature
            Operations
              2020-04-13  [Sowing].Script.Sow("Illabo", 200, 30, 280.0)
              2020-04-16  [ApplyFertiliser].Script.Apply(0.0,0,0,0,0,0,0,0,0)
              2020-05-16  [ApplyFertiliser].Script.Apply(10.0,0,0,0,0,0,0,0,0)
              2020-05-25  [ApplyFertiliser].Script.Apply(42.45,0,0,0,0,0,0,0,0)
              2020-07-08  [ApplyFertiliser].Script.Apply(50.6,0,0,0,0,0,0,0,0)
              2020-08-03  [ApplyFertiliser].Script.Apply(42.45,0,0,0,0,0,0,0,0)
          CompositeFactor Trial_74
            Specifications:
              [Clock]
              [Weather]
              [Soil]
              [Operations]
            Clock: Start=2020-01-01; End=2021-05-25
            Weather
              FileName=%root%/Tests/Validation/Wheat/Phenology/WeatherFiles/-34.54_117.52.met
            Soil Sodosol: same as FARAwardPhenology.FARAwardPhenology.Factors.Site.Trial_2.Sodosol
            Operations
              2020-05-26  [Sowing].Script.Sow("Scepter", 200, 30, 250.0)
              2020-06-06  [ApplyFertiliser].Script.Apply(9.02,0,0,0,0,0,0,0,0)
              2020-06-06  [ApplyFertiliser].Script.Apply(2.5,0,0,0,0,0,0,0,0)
              2020-06-06  [ApplyFertiliser].Script.Apply(0.0,0,0,0,0,0,0,0,0)
              2020-06-06  [ApplyFertiliser].Script.Apply(21.0,0,0,0,0,0,0,0,0)
              2020-07-17  [ApplyFertiliser].Script.Apply(29.44,0,0,0,0,0,0,0,0)
              2020-07-17  [ApplyFertiliser].Script.Apply(0.0,0,0,0,0,0,0,0,0)
              2020-09-17  [ApplyFertiliser].Script.Apply(46.0,0,0,0,0,0,0,0,0)
          CompositeFactor Trial_75
            Specifications:
              [Clock]
              [Weather]
              [Soil]
              [Operations]
            Clock: Start=2020-01-01; End=2021-05-14
            Weather
              FileName=%root%/Tests/Validation/Wheat/Phenology/WeatherFiles/-34.32_117.08.met
            Soil Tenosol: same as FARAwardPhenology.FARAwardPhenology.Factors.Site.Trial_68.Tenosol
            Operations
              2020-05-15  [Sowing].Script.Sow("Scepter", 200, 30, 250.0)
              2020-03-10  [ApplyFertiliser].Script.Apply(0.0,0,0,0,0,0,0,0,0)
              2020-05-15  [ApplyFertiliser].Script.Apply(17.64,0,0,0,0,0,0,0,0)
              2020-05-15  [ApplyFertiliser].Script.Apply(0.0,0,0,0,0,0,0,0,0)
              2020-06-01  [ApplyFertiliser].Script.Apply(36.8,0,0,0,0,0,0,0,0)
              2020-06-01  [ApplyFertiliser].Script.Apply(0.0,0,0,0,0,0,0,0,0)
              2020-07-07  [ApplyFertiliser].Script.Apply(36.8,0,0,0,0,0,0,0,0)
          CompositeFactor Trial_77
            Specifications:
              [Clock]
              [Weather]
              [Soil]
              [Operations]
            Clock: Start=2020-01-01; End=2021-05-26
            Weather
              FileName=%root%/Tests/Validation/Wheat/Phenology/WeatherFiles/-34.32_117.19.met
            Soil Sodosol: same as FARAwardPhenology.FARAwardPhenology.Factors.Site.Trial_2.Sodosol
            Operations
              2020-05-27  [Sowing].Script.Sow("Scepter", 200, 30, 250.0)
              2020-05-27  [ApplyFertiliser].Script.Apply(0.0,0,0,0,0,0,0,0,0)
              2020-06-19  [ApplyFertiliser].Script.Apply(56.6,0,0,0,0,0,0,0,0)
              2020-07-23  [ApplyFertiliser].Script.Apply(82.8,0,0,0,0,0,0,0,0)
          CompositeFactor Trial_78
            Specifications:
              [Clock]
              [Weather]
              [Soil]
              [Operations]
            Clock: Start=2021-01-01; End=2022-05-07
            Weather
              FileName=%root%/Tests/Validation/Wheat/Phenology/WeatherFiles/-35.64_147.11.met
            Soil Sodosol: same as FARAwardPhenology.FARAwardPhenology.Factors.Site.Trial_2.Sodosol
            Operations
              2021-05-08  [Sowing].Script.Sow("Rockstar", 200, 30, 185.0)
              2021-05-08  [ApplyFertiliser].Script.Apply(10.0,0,0,0,0,0,0,0,0)
              2021-05-21  [ApplyFertiliser].Script.Apply(69.0,0,0,0,0,0,0,0,0)
              2021-07-29  [ApplyFertiliser].Script.Apply(92.0,0,0,0,0,0,0,0,0)
              2021-08-15  [ApplyFertiliser].Script.Apply(21.0,0,0,0,0,0,0,0,0)
              2021-08-22  [ApplyFertiliser].Script.Apply(0.0,0,0,0,0,0,0,0,0)
          CompositeFactor Trial_79
            Specifications:
              [Clock]
              [Weather]
              [Soil]
              [Operations]
            Clock: Start=2021-01-01; End=2022-04-30
            Weather
              FileName=%root%/Tests/Validation/Wheat/Phenology/WeatherFiles/-35.75_146.67.met
            Soil Sodosol: same as FARAwardPhenology.FARAwardPhenology.Factors.Site.Trial_2.Sodosol
            Operations
              2021-05-01  [Sowing].Script.Sow("Scepter", 200, 30, 300.0)
              2021-05-01  [ApplyFertiliser].Script.Apply(10.0,0,0,0,0,0,0,0,0)
              2021-05-01  [ApplyFertiliser].Script.Apply(23.0,0,0,0,0,0,0,0,0)
              2021-07-04  [ApplyFertiliser].Script.Apply(46.0,0,0,0,0,0,0,0,0)
              2021-08-05  [ApplyFertiliser].Script.Apply(32.2,0,0,0,0,0,0,0,0)
          CompositeFactor Trial_80
            Specifications:
              [Clock]
              [Weather]
              [Soil]
              [Operations]
            Clock: Start=2021-01-01; End=2022-04-05
            Weather
              FileName=%root%/Tests/Validation/Wheat/Phenology/WeatherFiles/-35.86_145.79.met
            Soil Kandosol: same as FARAwardPhenology.FARAwardPhenology.Factors.Site.Trial_73.Kandosol
            Operations
              2021-04-06  [Sowing].Script.Sow("Kittyhawk", 200, 30, 250.0)
              2021-04-06  [ApplyFertiliser].Script.Apply(8.0,0,0,0,0,0,0,0,0)
              2021-05-24  [ApplyFertiliser].Script.Apply(55.2,0,0,0,0,0,0,0,0)
              2021-07-13  [ApplyFertiliser].Script.Apply(46.0,0,0,0,0,0,0,0,0)
              2021-07-26  [ApplyFertiliser].Script.Apply(46.0,0,0,0,0,0,0,0,0)
          CompositeFactor Trial_81
            Specifications:
              [Clock]
              [Weather]
              [Soil]
              [Operations]
            Clock: Start=2021-01-01; End=2022-03-17
            Weather
              FileName=%root%/Tests/Validation/Wheat/Phenology/WeatherFiles/-35.86_147.00.met
            Soil Sodosol: same as FARAwardPhenology.FARAwardPhenology.Factors.Site.Trial_2.Sodosol
            Operations
              2021-03-18  [Sowing].Script.Sow("Bennett", 200, 30, 225.0)
              2021-03-18  [ApplyFertiliser].Script.Apply(8.0,0,0,0,0,0,0,0,0)
              2021-03-18  [ApplyFertiliser].Script.Apply(23.0,0,0,0,0,0,0,0,0)
              2021-06-05  [ApplyFertiliser].Script.Apply(36.8,0,0,0,0,0,0,0,0)
              2021-09-03  [ApplyFertiliser].Script.Apply(36.8,0,0,0,0,0,0,0,0)
          CompositeFactor Trial_82
            Specifications:
              [Clock]
              [Weather]
              [Soil]
              [Operations]
            Clock: Start=2021-01-01; End=2022-03-27
            Weather
              FileName=%root%/Tests/Validation/Wheat/Phenology/WeatherFiles/-35.97_148.10.met
            Soil Kandosol: same as FARAwardPhenology.FARAwardPhenology.Factors.Site.Trial_73.Kandosol
            Operations
              2021-03-28  [Sowing].Script.Sow("Accroc", 250.0, 30, 250.0)
              2021-03-28  [ApplyFertiliser].Script.Apply(10.0,0,0,0,0,0,0,0,0)
              2021-06-27  [ApplyFertiliser].Script.Apply(21.0,0,0,0,0,0,0,0,0)
              2021-06-30  [ApplyFertiliser].Script.Apply(46.0,0,0,0,0,0,0,0,0)
              2021-08-28  [ApplyFertiliser].Script.Apply(46.0,0,0,0,0,0,0,0,0)
              2021-09-18  [ApplyFertiliser].Script.Apply(73.6,0,0,0,0,0,0,0,0)
              2021-10-06  [ApplyFertiliser].Script.Apply(48.3,0,0,0,0,0,0,0,0)
          CompositeFactor Trial_85
            Specifications:
              [Clock]
              [Weather]
              [Soil]
              [Operations]
            Clock: Start=2021-01-01; End=2022-05-14
            Weather
              FileName=%root%/Tests/Validation/Wheat/Phenology/WeatherFiles/-37.51_140.18.met
            Soil Vertosol: same as FARAwardPhenology.FARAwardPhenology.Factors.Site.Trial_14.Vertosol
            Operations
              2021-05-15  [Sowing].Script.Sow("Rockstar", 200, 30, 178.0)
          CompositeFactor Trial_87
            Specifications:
              [Clock]
              [Weather]
              [Soil]
              [Operations]
            Clock: Start=2021-01-01; End=2022-05-14
            Weather
              FileName=%root%/Tests/Validation/Wheat/Phenology/WeatherFiles/-37.18_140.73.met
            Soil Calcarosol: same as FARAwardPhenology.FARAwardPhenology.Factors.Site.Trial_28.Calcarosol
            Operations
              2021-05-15  [Sowing].Script.Sow("Rockstar", 200, 30, 305.0)
              2021-06-14  [ApplyFertiliser].Script.Apply(10.0,0,0,0,0,0,0,0,0)
              2021-08-09  [ApplyFertiliser].Script.Apply(0.0,0,0,0,0,0,0,0,0)
              2021-08-27  [ApplyFertiliser].Script.Apply(115.0,0,0,0,0,0,0,0,0)
              2021-09-23  [ApplyFertiliser].Script.Apply(0.0,0,0,0,0,0,0,0,0)
              2021-09-27  [ApplyFertiliser].Script.Apply(69.0,0,0,0,0,0,0,0,0)
              2021-10-09  [ApplyFertiliser].Script.Apply(0.0,0,0,0,0,0,0,0,0)
              2021-10-09  [ApplyFertiliser].Script.Apply(0.063,0,0,0,0,0,0,0,0)
          CompositeFactor Trial_89
            Specifications:
              [Clock]
              [Weather]
              [Soil]
              [Operations]
            Clock: Start=2021-01-01; End=2022-05-14
            Weather
              FileName=%root%/Tests/Validation/Wheat/Phenology/WeatherFiles/-37.18_140.29.met
            Soil Calcarosol: same as FARAwardPhenology.FARAwardPhenology.Factors.Site.Trial_28.Calcarosol
            Operations
              2021-05-15  [Sowing].Script.Sow("Accroc", 200, 30, 222.0)
              2021-05-16  [ApplyFertiliser].Script.Apply(10.0,0,0,0,0,0,0,0,0)
              2021-08-27  [ApplyFertiliser].Script.Apply(0.0,0,0,0,0,0,0,0,0)
              2021-08-27  [ApplyFertiliser].Script.Apply(45.0,0,0,0,0,0,0,0,0)
              2021-09-16  [ApplyFertiliser].Script.Apply(0.0,0,0,0,0,0,0,0,0)
              2021-09-17  [ApplyFertiliser].Script.Apply(46.0,0,0,0,0,0,0,0,0)
              2021-10-08  [ApplyFertiliser].Script.Apply(0.0,0,0,0,0,0,0,0,0)
          CompositeFactor Trial_90
            Specifications:
              [Clock]
              [Weather]
              [Soil]
              [Operations]
            Clock: Start=2021-01-01; End=2022-05-24
            Weather
              FileName=%root%/Tests/Validation/Wheat/Phenology/WeatherFiles/-37.18_139.96.met
            Soil Sodosol: same as FARAwardPhenology.FARAwardPhenology.Factors.Site.Trial_2.Sodosol
            Operations
              2021-05-25  [Sowing].Script.Sow("Rockstar", 200, 30, 179.0)
              2021-05-25  [ApplyFertiliser].Script.Apply(12.0,0,0,0,0,0,0,0,0)
              2021-07-08  [ApplyFertiliser].Script.Apply(0.0,0,0,0,0,0,0,0,0)
              2021-07-08  [ApplyFertiliser].Script.Apply(0.0,0,0,0,0,0,0,0,0)
              2021-07-08  [ApplyFertiliser].Script.Apply(0.0,0,0,0,0,0,0,0,0)
              2021-07-08  [ApplyFertiliser].Script.Apply(0.0,0,0,0,0,0,0,0,0)
              2021-07-12  [ApplyFertiliser].Script.Apply(32.2,0,0,0,0,0,0,0,0)
              2021-08-19  [ApplyFertiliser].Script.Apply(0.0,0,0,0,0,0,0,0,0)
              2021-08-19  [ApplyFertiliser].Script.Apply(59.8,0,0,0,0,0,0,0,0)
              2021-08-27  [ApplyFertiliser].Script.Apply(0.0,0,0,0,0,0,0,0,0)
              2021-08-27  [ApplyFertiliser].Script.Apply(0.0,0,0,0,0,0,0,0,0)
              2021-08-27  [ApplyFertiliser].Script.Apply(0.0,0,0,0,0,0,0,0,0)
              2021-08-29  [ApplyFertiliser].Script.Apply(46.0,0,0,0,0,0,0,0,0)
          CompositeFactor Trial_91
            Specifications:
              [Clock]
              [Weather]
              [Soil]
              [Operations]
            Clock: Start=2021-01-01; End=2022-05-20
            Weather
              FileName=%root%/Tests/Validation/Wheat/Phenology/WeatherFiles/-37.29_140.18.met
            Soil Vertosol: same as FARAwardPhenology.FARAwardPhenology.Factors.Site.Trial_14.Vertosol
            Operations
              2021-05-21  [Sowing].Script.Sow("Accroc", 223.0, 30, 178.0)
              2021-05-21  [ApplyFertiliser].Script.Apply(23.4,0,0,0,0,0,0,0,0)
              2022-06-29  [ApplyFertiliser].Script.Apply(0.0,0,0,0,0,0,0,0,0)
              2022-08-18  [ApplyFertiliser].Script.Apply(21.5,0,0,0,0,0,0,0,0)
              2022-08-18  [ApplyFertiliser].Script.Apply(0.0,0,0,0,0,0,0,0,0)
              2022-08-26  [ApplyFertiliser].Script.Apply(78.2,0,0,0,0,0,0,0,0)
              2022-09-10  [ApplyFertiliser].Script.Apply(21.5,0,0,0,0,0,0,0,0)
              2022-09-10  [ApplyFertiliser].Script.Apply(0.0,0,0,0,0,0,0,0,0)
              2022-09-10  [ApplyFertiliser].Script.Apply(0.0,0,0,0,0,0,0,0,0)
              2022-09-23  [ApplyFertiliser].Script.Apply(69.0,0,0,0,0,0,0,0,0)
          CompositeFactor Trial_92
            Specifications:
              [Clock]
              [Weather]
              [Soil]
              [Operations]
            Clock: Start=2021-01-01; End=2022-05-06
            Weather
              FileName=%root%/Tests/Validation/Wheat/Phenology/WeatherFiles/-37.40_140.73.met
            Soil Vertosol: same as FARAwardPhenology.FARAwardPhenology.Factors.Site.Trial_14.Vertosol
            Operations
              2021-05-07  [Sowing].Script.Sow("Accroc", 200, 30, 222.0)
              2021-05-07  [ApplyFertiliser].Script.Apply(0.0,0,0,0,0,0,0,0,0)
              2021-06-14  [ApplyFertiliser].Script.Apply(0.0,0,0,0,0,0,0,0,0)
              2021-06-14  [ApplyFertiliser].Script.Apply(23.0,0,0,0,0,0,0,0,0)
              2021-07-01  [ApplyFertiliser].Script.Apply(46.0,0,0,0,0,0,0,0,0)
              2021-08-01  [ApplyFertiliser].Script.Apply(69.0,0,0,0,0,0,0,0,0)
          CompositeFactor Trial_93
            Specifications:
              [Clock]
              [Weather]
              [Soil]
              [Operations]
            Clock: Start=2021-01-01; End=2022-05-13
            Weather
              FileName=%root%/Tests/Validation/Wheat/Phenology/WeatherFiles/-37.51_140.40.met
            Soil Sodosol: same as FARAwardPhenology.FARAwardPhenology.Factors.Site.Trial_2.Sodosol
            Operations
              2021-05-14  [Sowing].Script.Sow("Accroc", 200, 30, 229.0)
              2021-03-14  [ApplyFertiliser].Script.Apply(0.0,0,0,0,0,0,0,0,0)
              2021-05-14  [ApplyFertiliser].Script.Apply(12.0,0,0,0,0,0,0,0,0)
              2021-06-08  [ApplyFertiliser].Script.Apply(21.0,0,0,0,0,0,0,0,0)
              2021-06-08  [ApplyFertiliser].Script.Apply(23.0,0,0,0,0,0,0,0,0)
              2021-06-30  [ApplyFertiliser].Script.Apply(46.0,0,0,0,0,0,0,0,0)
              2021-07-20  [ApplyFertiliser].Script.Apply(46.0,0,0,0,0,0,0,0,0)
              2021-08-20  [ApplyFertiliser].Script.Apply(55.2,0,0,0,0,0,0,0,0)
          CompositeFactor Trial_94
            Specifications:
              [Clock]
              [Weather]
              [Soil]
              [Operations]
            Clock: Start=2021-01-01; End=2022-05-13
            Weather
              FileName=%root%/Tests/Validation/Wheat/Phenology/WeatherFiles/-37.51_140.29.met
            Soil Calcarosol: same as FARAwardPhenology.FARAwardPhenology.Factors.Site.Trial_28.Calcarosol
            Operations
              2021-05-14  [Sowing].Script.Sow("Accroc", 200, 30, 178.0)
              2021-05-14  [ApplyFertiliser].Script.Apply(18.0,0,0,0,0,0,0,0,0)
              2021-07-13  [ApplyFertiliser].Script.Apply(46.0,0,0,0,0,0,0,0,0)
              2021-08-09  [ApplyFertiliser].Script.Apply(0.2,0,0,0,0,0,0,0,0)
              2021-08-09  [ApplyFertiliser].Script.Apply(0.0,0,0,0,0,0,0,0,0)
              2021-08-09  [ApplyFertiliser].Script.Apply(2.9,0,0,0,0,0,0,0,0)
              2021-08-09  [ApplyFertiliser].Script.Apply(0.0,0,0,0,0,0,0,0,0)
              2021-08-09  [ApplyFertiliser].Script.Apply(0.0,0,0,0,0,0,0,0,0)
              2021-08-28  [ApplyFertiliser].Script.Apply(55.2,0,0,0,0,0,0,0,0)
              2021-08-28  [ApplyFertiliser].Script.Apply(0.0,0,0,0,0,0,0,0,0)
              2021-08-28  [ApplyFertiliser].Script.Apply(0.0,0,0,0,0,0,0,0,0)
              2021-09-26  [ApplyFertiliser].Script.Apply(0.0,0,0,0,0,0,0,0,0)
              2021-10-26  [ApplyFertiliser].Script.Apply(0.0,0,0,0,0,0,0,0,0)
          CompositeFactor Trial_95
            Specifications:
              [Clock]
              [Weather]
              [Soil]
              [Operations]
            Clock: Start=2021-01-01; End=2022-05-14
            Weather
              FileName=%root%/Tests/Validation/Wheat/Phenology/WeatherFiles/-37.18_140.18.met
            Soil Calcarosol: same as FARAwardPhenology.FARAwardPhenology.Factors.Site.Trial_28.Calcarosol
            Operations
              2021-05-15  [Sowing].Script.Sow("Accroc", 200, 30, 222.0)
              2021-05-18  [ApplyFertiliser].Script.Apply(10.0,0,0,0,0,0,0,0,0)
              2021-08-26  [ApplyFertiliser].Script.Apply(0.0,0,0,0,0,0,0,0,0)
              2021-08-26  [ApplyFertiliser].Script.Apply(45.0,0,0,0,0,0,0,0,0)
              2021-09-16  [ApplyFertiliser].Script.Apply(46.0,0,0,0,0,0,0,0,0)
              2021-09-16  [ApplyFertiliser].Script.Apply(0.0,0,0,0,0,0,0,0,0)
          CompositeFactor Trial_96
            Specifications:
              [Clock]
              [Weather]
              [Soil]
              [Operations]
            Clock: Start=2021-01-01; End=2022-05-13
            Weather
              FileName=%root%/Tests/Validation/Wheat/Phenology/WeatherFiles/-37.51_140.40.met
            Soil Sodosol: same as FARAwardPhenology.FARAwardPhenology.Factors.Site.Trial_2.Sodosol
            Operations
              2021-05-14  [Sowing].Script.Sow("Accroc", 200, 30, 229.0)
              2021-03-14  [ApplyFertiliser].Script.Apply(0.0,0,0,0,0,0,0,0,0)
              2021-03-14  [ApplyFertiliser].Script.Apply(0.0,0,0,0,0,0,0,0,0)
              2021-05-14  [ApplyFertiliser].Script.Apply(12.0,0,0,0,0,0,0,0,0)
              2021-06-08  [ApplyFertiliser].Script.Apply(14.7,0,0,0,0,0,0,0,0)
              2021-06-08  [ApplyFertiliser].Script.Apply(36.8,0,0,0,0,0,0,0,0)
              2021-06-30  [ApplyFertiliser].Script.Apply(46.0,0,0,0,0,0,0,0,0)
              2021-07-20  [ApplyFertiliser].Script.Apply(46.0,0,0,0,0,0,0,0,0)
              2021-08-20  [ApplyFertiliser].Script.Apply(55.2,0,0,0,0,0,0,0,0)
          CompositeFactor Trial_97
            Specifications:
              [Clock]
              [Weather]
              [Soil]
              [Operations]
            Clock: Start=2021-01-01; End=2022-05-11
            Weather
              FileName=%root%/Tests/Validation/Wheat/Phenology/WeatherFiles/-37.51_140.40.met
            Soil Calcarosol: same as FARAwardPhenology.FARAwardPhenology.Factors.Site.Trial_28.Calcarosol
            Operations
              2021-05-12  [Sowing].Script.Sow("Accroc", 212.0, 30, 178.0)
              2021-05-12  [ApplyFertiliser].Script.Apply(23.4,0,0,0,0,0,0,0,0)
              2021-06-21  [ApplyFertiliser].Script.Apply(0.0,0,0,0,0,0,0,0,0)
              2021-08-18  [ApplyFertiliser].Script.Apply(21.5,0,0,0,0,0,0,0,0)
              2021-08-18  [ApplyFertiliser].Script.Apply(0.0,0,0,0,0,0,0,0,0)
              2021-08-27  [ApplyFertiliser].Script.Apply(78.2,0,0,0,0,0,0,0,0)
              2021-09-18  [ApplyFertiliser].Script.Apply(59.8,0,0,0,0,0,0,0,0)
              2021-09-29  [ApplyFertiliser].Script.Apply(32.2,0,0,0,0,0,0,0,0)
              2021-10-07  [ApplyFertiliser].Script.Apply(0.0,0,0,0,0,0,0,0,0)
              2021-10-07  [ApplyFertiliser].Script.Apply(0.0,0,0,0,0,0,0,0,0)
          CompositeFactor Trial_98
            Specifications:
              [Clock]
              [Weather]
              [Soil]
              [Operations]
            Clock: Start=2021-01-01; End=2022-05-22
            Weather
              FileName=%root%/Tests/Validation/Wheat/Phenology/WeatherFiles/-37.18_140.73.met
            Soil Podosol: ASCOrder=Podosol; Country=Australia
              Comments=Typical Podosol - median values of all Podosols in APSoil as at 08/04/2013
              Physical
                Thickness  BD     AirDry  LL15   DUL    SAT
                150        1.436  0.029   0.058  0.229  0.408
                150        1.477  0.078   0.097  0.211  0.393
                300        1.554  0.087   0.087  0.157  0.364
                300        1.508  0.087   0.087  0.18   0.381
                300        1.465  0.087   0.087  0.23   0.397
                300        1.48   0.087   0.087  0.21   0.392
                300        1.48   0.087   0.087  0.21   0.392
                300        1.48   0.087   0.087  0.21   0.392
                SoilCrop WheatSoil: LL=[0.058, 0.097, 0.087, 0.096, 0.099, 0.157, 0.17, 0.174]; KL=[0.06, 0.06, 0.06, 0.04, 0.04, 0.02, 0.01, 0.01]; XF=[1, 1, 1, 1, 1, 1, 1, 1]
              WaterBalance SoilWater: SummerDate=1-Nov; SummerU=6; SummerCona=3.5; WinterDate=1-Apr; WinterU=2; WinterCona=2; DiffusConst=88; DiffusSlope=35; Salb=0.13; CN2Bare=73; CNRed=20; CNCov=0.8; PSIDul=-100; Thickness=[150, 150, 300, 300, 300, 300, 300, 300]; SWCON=[0.5, 0.5, 0.7, 0.7, 0.7, 0.7, 0.7, 0.7]
              Solute NO3: Thickness=[150, 150, 300, 300, 300, 300, 300, 300]; InitialValuesUnits=ppm; WaterTableConcentration=0; D0=0; DepthConstant=0; MaxDepthSoluteAccessible=0; RunoffEffectivenessAtMovingSolute=0; MaxEffectiveRunoff=0
                InitialValues=[1.66439, 1.66439, 1.66439, 1.66439, 1.68321, 1.69262, 1.69262, 1.69148]
              Solute NH4: Thickness=[150, 150, 300, 300, 300, 300, 300, 300]; InitialValuesUnits=ppm; WaterTableConcentration=0; D0=0; DepthConstant=0; MaxDepthSoluteAccessible=0; RunoffEffectivenessAtMovingSolute=0; MaxEffectiveRunoff=0
                InitialValues=[0.332878, 0.332878, 0.332878, 0.332878, 0.336642, 0.338524, 0.338524, 0.338295]
              Solute Urea: Thickness=[1000, 1000, 100]; InitialValues=[0, 0, 0]; InitialValuesUnits=kg/ha; WaterTableConcentration=0; D0=0; DepthConstant=0; MaxDepthSoluteAccessible=0; RunoffEffectivenessAtMovingSolute=0; MaxEffectiveRunoff=0
              Organic: FOMCNRatio=40; CarbonUnits=Total
                Thickness  Carbon  SoilCNRatio  FBiom  FInert  FOM
                150        1.944   12           0.035  0.4     312.472
                150        1.456   12           0.02   0.5     252.202
                300        0.141   12           0.015  0.7     164.294
                300        0.248   12           0.015  0.95    107.028
                300        0.543   12           0.01   0.95    69.7219
                300        0.087   12           0.01   0.95    45.4196
                300        0.067   12           0.01   0.95    29.5881
                300        0.04    12           0.01   0.95    19.2748
              Chemical: Thickness=[150, 150, 300, 300, 300, 300, 300, 300]; PH=[4.953, 5.367, 5.565, 5.733, 5.8, 6.667, 6.8, 6.8]; PHUnits=Water
              Water: Thickness=[150, 150, 300, 300, 300, 300, 300, 300]; FilledFromTop=false
                InitialValues=[0.0751, 0.1084, 0.094, 0.0963, 0.1013, 0.0993, 0.0993, 0.0993]
              Nutrient
              SoilTemperature Temperature
            Operations
              2021-05-23  [Sowing].Script.Sow("Accroc", 200, 30, 229.0)
              2021-05-23  [ApplyFertiliser].Script.Apply(18.4,0,0,0,0,0,0,0,0)
              2021-05-23  [ApplyFertiliser].Script.Apply(8.0,0,0,0,0,0,0,0,0)
              2021-07-29  [ApplyFertiliser].Script.Apply(46.0,0,0,0,0,0,0,0,0)
              2021-08-20  [ApplyFertiliser].Script.Apply(34.5,0,0,0,0,0,0,0,0)
              2021-09-03  [ApplyFertiliser].Script.Apply(46.0,0,0,0,0,0,0,0,0)
              2021-09-17  [ApplyFertiliser].Script.Apply(34.5,0,0,0,0,0,0,0,0)
          CompositeFactor Trial_99
            Specifications:
              [Clock]
              [Weather]
              [Soil]
              [Operations]
            Clock: Start=2021-01-01; End=2022-05-30
            Weather
              FileName=%root%/Tests/Validation/Wheat/Phenology/WeatherFiles/-37.51_140.73.met
            Soil Calcarosol: same as FARAwardPhenology.FARAwardPhenology.Factors.Site.Trial_28.Calcarosol
            Operations
              2021-05-31  [Sowing].Script.Sow("Rockstar", 200, 30, 225.0)
              2021-05-31  [ApplyFertiliser].Script.Apply(15.04,0,0,0,0,0,0,0,0)
              2021-07-09  [ApplyFertiliser].Script.Apply(27.6,0,0,0,0,0,0,0,0)
              2021-08-23  [ApplyFertiliser].Script.Apply(46.0,0,0,0,0,0,0,0,0)
              2021-09-01  [ApplyFertiliser].Script.Apply(0.0,0,0,0,0,0,0,0,0)
              2021-09-11  [ApplyFertiliser].Script.Apply(43.7,0,0,0,0,0,0,0,0)
              2021-10-06  [ApplyFertiliser].Script.Apply(2.9,0,0,0,0,0,0,0,0)
              2021-10-06  [ApplyFertiliser].Script.Apply(0.0,0,0,0,0,0,0,0,0)
              2021-10-14  [ApplyFertiliser].Script.Apply(23.0,0,0,0,0,0,0,0,0)
          CompositeFactor Trial_100
            Specifications:
              [Clock]
              [Weather]
              [Soil]
              [Operations]
            Clock: Start=2021-01-01; End=2022-03-16
            Weather
              FileName=%root%/Tests/Validation/Wheat/Phenology/WeatherFiles/-42.02_147.55.met
            Soil Sodosol: same as FARAwardPhenology.FARAwardPhenology.Factors.Site.Trial_2.Sodosol
            Operations
              2021-03-17  [Sowing].Script.Sow("Manning", 200, 30, 165.0)
              2021-03-17  [ApplyFertiliser].Script.Apply(20.0,0,0,0,0,0,0,0,0)
              2021-04-15  [ApplyFertiliser].Script.Apply(57.5,0,0,0,0,0,0,0,0)
              2021-08-31  [ApplyFertiliser].Script.Apply(15.75,0,0,0,0,0,0,0,0)
              2021-08-31  [ApplyFertiliser].Script.Apply(34.5,0,0,0,0,0,0,0,0)
              2021-09-16  [ApplyFertiliser].Script.Apply(46.0,0,0,0,0,0,0,0,0)
              2021-09-16  [ApplyFertiliser].Script.Apply(0.0,0,0,0,0,0,0,0,0)
              2021-10-13  [ApplyFertiliser].Script.Apply(69.0,0,0,0,0,0,0,0,0)
          CompositeFactor Trial_102
            Specifications:
              [Clock]
              [Weather]
              [Soil]
              [Operations]
            Clock: Start=2021-01-01; End=2022-05-04
            Weather
              FileName=%root%/Tests/Validation/Wheat/Phenology/WeatherFiles/-41.14_146.01.met
            Soil Ferrosol: same as FARAwardPhenology.FARAwardPhenology.Factors.Site.Trial_33.Ferrosol
            Operations
              2021-05-05  [Sowing].Script.Sow("Calibro", 200, 30, 125.0)
              2021-08-10  [ApplyFertiliser].Script.Apply(39.0,0,0,0,0,0,0,0,0)
              2021-08-11  [ApplyFertiliser].Script.Apply(52.0,0,0,0,0,0,0,0,0)
              2021-08-25  [ApplyFertiliser].Script.Apply(46.0,0,0,0,0,0,0,0,0)
              2021-08-25  [ApplyFertiliser].Script.Apply(0.0,0,0,0,0,0,0,0,0)
              2021-09-15  [ApplyFertiliser].Script.Apply(46.0,0,0,0,0,0,0,0,0)
              2021-09-15  [ApplyFertiliser].Script.Apply(0.0,0,0,0,0,0,0,0,0)
              2021-10-18  [ApplyFertiliser].Script.Apply(1.6,0,0,0,0,0,0,0,0)
              2021-12-01  [Irrigation].Apply(25)
              2021-12-15  [Irrigation].Apply(25)
          CompositeFactor Trial_103
            Specifications:
              [Clock]
              [Weather]
              [Soil]
              [Operations]
            Clock: Start=2021-01-01; End=2022-04-29
            Weather
              FileName=%root%/Tests/Validation/Wheat/Phenology/WeatherFiles/-41.69_147.33.met
            Soil Sodosol: same as FARAwardPhenology.FARAwardPhenology.Factors.Site.Trial_2.Sodosol
            Operations
              2021-04-30  [Sowing].Script.Sow("Accroc", 200, 30, 150.0)
              2021-04-30  [ApplyFertiliser].Script.Apply(15.0,0,0,0,0,0,0,0,0)
              2021-09-10  [ApplyFertiliser].Script.Apply(69.0,0,0,0,0,0,0,0,0)
              2021-11-04  [ApplyFertiliser].Script.Apply(46.0,0,0,0,0,0,0,0,0)
              2021-11-10  [Irrigation].Apply(30)
              2021-11-24  [Irrigation].Apply(30)
              2021-12-09  [Irrigation].Apply(30)
          CompositeFactor Trial_104
            Specifications:
              [Clock]
              [Weather]
              [Soil]
              [Operations]
            Clock: Start=2021-01-01; End=2022-03-24
            Weather
              FileName=%root%/Tests/Validation/Wheat/Phenology/WeatherFiles/-41.69_147.11.met
            Soil Sodosol: same as FARAwardPhenology.FARAwardPhenology.Factors.Site.Trial_2.Sodosol
            Operations
              2021-03-25  [Sowing].Script.Sow("Accroc", 200, 30, 250.0)
              2021-03-25  [ApplyFertiliser].Script.Apply(15.0,0,0,0,0,0,0,0,0)
              2021-08-19  [ApplyFertiliser].Script.Apply(36.8,0,0,0,0,0,0,0,0)
              2021-09-16  [ApplyFertiliser].Script.Apply(0.0,0,0,0,0,0,0,0,0)
              2021-09-17  [ApplyFertiliser].Script.Apply(69.0,0,0,0,0,0,0,0,0)
              2021-10-13  [ApplyFertiliser].Script.Apply(36.8,0,0,0,0,0,0,0,0)
          CompositeFactor Trial_105
            Specifications:
              [Clock]
              [Weather]
              [Soil]
              [Operations]
            Clock: Start=2021-01-01; End=2022-04-27
            Weather
              FileName=%root%/Tests/Validation/Wheat/Phenology/WeatherFiles/-41.47_146.89.met
            Soil Podosol: same as FARAwardPhenology.FARAwardPhenology.Factors.Site.Trial_98.Podosol
            Operations
              2021-04-28  [Sowing].Script.Sow("Calibro", 200, 30, 125.0)
              2021-04-28  [ApplyFertiliser].Script.Apply(18.0,0,0,0,0,0,0,0,0)
              2021-08-29  [ApplyFertiliser].Script.Apply(64.4,0,0,0,0,0,0,0,0)
              2021-09-17  [ApplyFertiliser].Script.Apply(64.4,0,0,0,0,0,0,0,0)
              2021-10-14  [ApplyFertiliser].Script.Apply(21.0,0,0,0,0,0,0,0,0)
              2021-10-14  [ApplyFertiliser].Script.Apply(25.76,0,0,0,0,0,0,0,0)
          CompositeFactor Trial_106
            Specifications:
              [Clock]
              [Weather]
              [Soil]
              [Operations]
            Clock: Start=2021-01-01; End=2022-05-05
            Weather
              FileName=%root%/Tests/Validation/Wheat/Phenology/WeatherFiles/-41.47_146.89.met
            Soil Sodosol: same as FARAwardPhenology.FARAwardPhenology.Factors.Site.Trial_2.Sodosol
            Operations
              2021-05-06  [Sowing].Script.Sow("Calibro", 200, 30, 125.0)
              2021-08-29  [ApplyFertiliser].Script.Apply(26.0,0,0,0,0,0,0,0,0)
              2021-09-15  [ApplyFertiliser].Script.Apply(57.5,0,0,0,0,0,0,0,0)
              2021-10-12  [ApplyFertiliser].Script.Apply(57.5,0,0,0,0,0,0,0,0)
          CompositeFactor Trial_107
            Specifications:
              [Clock]
              [Weather]
              [Soil]
              [Operations]
            Clock: Start=2021-01-01; End=2022-05-20
            Weather
              FileName=%root%/Tests/Validation/Wheat/Phenology/WeatherFiles/-41.80_147.22.met
            Soil Sodosol: same as FARAwardPhenology.FARAwardPhenology.Factors.Site.Trial_2.Sodosol
            Operations
              2021-05-21  [Sowing].Script.Sow("Accroc", 200, 30, 150.0)
              2021-05-21  [ApplyFertiliser].Script.Apply(22.5,0,0,0,0,0,0,0,0)
              2021-07-13  [ApplyFertiliser].Script.Apply(34.5,0,0,0,0,0,0,0,0)
              2021-07-13  [ApplyFertiliser].Script.Apply(15.75,0,0,0,0,0,0,0,0)
              2021-08-30  [ApplyFertiliser].Script.Apply(46.0,0,0,0,0,0,0,0,0)
              2021-09-29  [ApplyFertiliser].Script.Apply(46.0,0,0,0,0,0,0,0,0)
          CompositeFactor Trial_108
            Specifications:
              [Clock]
              [Weather]
              [Soil]
              [Operations]
            Clock: Start=2021-01-01; End=2022-04-18
            Weather
              FileName=%root%/Tests/Validation/Wheat/Phenology/WeatherFiles/-41.80_147.11.met
            Soil Sodosol: same as FARAwardPhenology.FARAwardPhenology.Factors.Site.Trial_2.Sodosol
            Operations
              2021-04-19  [Sowing].Script.Sow("Accroc", 200, 30, 150.0)
              2021-04-19  [ApplyFertiliser].Script.Apply(20.0,0,0,0,0,0,0,0,0)
              2021-08-10  [ApplyFertiliser].Script.Apply(0.174,0,0,0,0,0,0,0,0)
              2021-08-20  [ApplyFertiliser].Script.Apply(34.5,0,0,0,0,0,0,0,0)
              2021-08-20  [ApplyFertiliser].Script.Apply(15.75,0,0,0,0,0,0,0,0)
              2021-09-15  [ApplyFertiliser].Script.Apply(69.0,0,0,0,0,0,0,0,0)
              2021-10-20  [ApplyFertiliser].Script.Apply(46.0,0,0,0,0,0,0,0,0)
              2021-11-20  [Irrigation].Apply(20)
              2021-12-10  [Irrigation].Apply(20)
          CompositeFactor Trial_109
            Specifications:
              [Clock]
              [Weather]
              [Soil]
              [Operations]
            Clock: Start=2021-01-01; End=2022-05-04
            Weather
              FileName=%root%/Tests/Validation/Wheat/Phenology/WeatherFiles/-41.80_147.44.met
            Soil Sodosol: same as FARAwardPhenology.FARAwardPhenology.Factors.Site.Trial_2.Sodosol
            Operations
              2021-05-05  [Sowing].Script.Sow("Bennett", 200, 30, 125.0)
              2021-05-05  [ApplyFertiliser].Script.Apply(21.0,0,0,0,0,0,0,0,0)
              2021-06-24  [ApplyFertiliser].Script.Apply(18.4,0,0,0,0,0,0,0,0)
              2021-06-24  [ApplyFertiliser].Script.Apply(12.6,0,0,0,0,0,0,0,0)
              2021-08-19  [ApplyFertiliser].Script.Apply(23.0,0,0,0,0,0,0,0,0)
              2021-08-19  [ApplyFertiliser].Script.Apply(10.5,0,0,0,0,0,0,0,0)
              2021-08-28  [ApplyFertiliser].Script.Apply(0.0,0,0,0,0,0,0,0,0)
              2021-09-16  [ApplyFertiliser].Script.Apply(46.0,0,0,0,0,0,0,0,0)
              2021-09-16  [ApplyFertiliser].Script.Apply(46.0,0,0,0,0,0,0,0,0)
              2021-09-17  [ApplyFertiliser].Script.Apply(0.14,0,0,0,0,0,0,0,0)
              2021-10-08  [Irrigation].Apply(25)
              2021-11-17  [Irrigation].Apply(32)
              2021-11-29  [Irrigation].Apply(37.5)
              2021-12-06  [Irrigation].Apply(32)
              2021-12-15  [Irrigation].Apply(37.5)
          CompositeFactor Trial_113
            Specifications:
              [Clock]
              [Weather]
              [Soil]
              [Operations]
            Clock: Start=2021-01-01; End=2022-05-05
            Weather
              FileName=%root%/Tests/Validation/Wheat/Phenology/WeatherFiles/-41.58_147.11.met
            Soil Sodosol: same as FARAwardPhenology.FARAwardPhenology.Factors.Site.Trial_2.Sodosol
            Operations
              2021-05-06  [Sowing].Script.Sow("Accroc", 200, 30, 166.0)
              2021-05-06  [ApplyFertiliser].Script.Apply(16.2,0,0,0,0,0,0,0,0)
              2021-08-30  [ApplyFertiliser].Script.Apply(13.23,0,0,0,0,0,0,0,0)
              2021-08-30  [ApplyFertiliser].Script.Apply(28.98,0,0,0,0,0,0,0,0)
              2021-09-13  [ApplyFertiliser].Script.Apply(46.0,0,0,0,0,0,0,0,0)
              2021-09-20  [ApplyFertiliser].Script.Apply(46.0,0,0,0,0,0,0,0,0)
              2021-10-12  [ApplyFertiliser].Script.Apply(46.0,0,0,0,0,0,0,0,0)
          CompositeFactor Trial_114
            Specifications:
              [Clock]
              [Weather]
              [Soil]
              [Operations]
            Clock: Start=2021-01-01; End=2022-05-09
            Weather
              FileName=%root%/Tests/Validation/Wheat/Phenology/WeatherFiles/-36.85_142.93.met
            Soil Sodosol: same as FARAwardPhenology.FARAwardPhenology.Factors.Site.Trial_2.Sodosol
            Operations
              2021-05-10  [Sowing].Script.Sow("Rockstar", 200, 30, 305.0)
              2021-05-10  [ApplyFertiliser].Script.Apply(9.0,0,0,0,0,0,0,0,0)
              2021-05-10  [ApplyFertiliser].Script.Apply(20.7,0,0,0,0,0,0,0,0)
              2021-07-07  [ApplyFertiliser].Script.Apply(0.0,0,0,0,0,0,0,0,0)
              2021-07-09  [ApplyFertiliser].Script.Apply(69.0,0,0,0,0,0,0,0,0)
              2021-08-18  [ApplyFertiliser].Script.Apply(36.8,0,0,0,0,0,0,0,0)
              2021-08-22  [ApplyFertiliser].Script.Apply(0.0,0,0,0,0,0,0,0,0)
          CompositeFactor Trial_116
            Specifications:
              [Clock]
              [Weather]
              [Soil]
              [Operations]
            Clock: Start=2021-01-01; End=2022-04-30
            Weather
              FileName=%root%/Tests/Validation/Wheat/Phenology/WeatherFiles/-36.08_146.12.met
            Soil Sodosol: same as FARAwardPhenology.FARAwardPhenology.Factors.Site.Trial_2.Sodosol
            Operations
              2021-05-01  [Sowing].Script.Sow("Scepter", 200, 30, 300.0)
              2021-05-01  [ApplyFertiliser].Script.Apply(10.5,0,0,0,0,0,0,0,0)
              2021-06-06  [ApplyFertiliser].Script.Apply(41.4,0,0,0,0,0,0,0,0)
              2021-07-25  [ApplyFertiliser].Script.Apply(46.0,0,0,0,0,0,0,0,0)
              2021-08-18  [ApplyFertiliser].Script.Apply(55.2,0,0,0,0,0,0,0,0)
          CompositeFactor Trial_117
            Specifications:
              [Clock]
              [Weather]
              [Soil]
              [Operations]
            Clock: Start=2021-01-01; End=2022-04-28
            Weather
              FileName=%root%/Tests/Validation/Wheat/Phenology/WeatherFiles/-36.08_146.01.met
            Soil Sodosol: same as FARAwardPhenology.FARAwardPhenology.Factors.Site.Trial_2.Sodosol
            Operations
              2021-04-29  [Sowing].Script.Sow("Scepter", 200, 30, 250.0)
              2021-04-29  [ApplyFertiliser].Script.Apply(6.0,0,0,0,0,0,0,0,0)
              2021-06-02  [ApplyFertiliser].Script.Apply(46.0,0,0,0,0,0,0,0,0)
              2021-07-10  [ApplyFertiliser].Script.Apply(40.02,0,0,0,0,0,0,0,0)
              2021-08-13  [ApplyFertiliser].Script.Apply(33.58,0,0,0,0,0,0,0,0)
          CompositeFactor Trial_119
            Specifications:
              [Clock]
              [Weather]
              [Soil]
              [Operations]
            Clock: Start=2021-01-01; End=2022-05-02
            Weather
              FileName=%root%/Tests/Validation/Wheat/Phenology/WeatherFiles/-38.17_144.03.met
            Soil Sodosol: same as FARAwardPhenology.FARAwardPhenology.Factors.Site.Trial_2.Sodosol
            Operations
              2021-05-03  [Sowing].Script.Sow("Rockstar", 200, 30, 300.0)
              2021-05-03  [ApplyFertiliser].Script.Apply(5.0,0,0,0,0,0,0,0,0)
              2021-07-09  [ApplyFertiliser].Script.Apply(71.3,0,0,0,0,0,0,0,0)
              2021-07-23  [ApplyFertiliser].Script.Apply(0.0,0,0,0,0,0,0,0,0)
              2021-08-12  [ApplyFertiliser].Script.Apply(71.3,0,0,0,0,0,0,0,0)
              2021-09-12  [ApplyFertiliser].Script.Apply(64.4,0,0,0,0,0,0,0,0)
              2021-10-01  [ApplyFertiliser].Script.Apply(28.98,0,0,0,0,0,0,0,0)
          CompositeFactor Trial_120
            Specifications:
              [Clock]
              [Weather]
              [Soil]
              [Operations]
            Clock: Start=2021-01-01; End=2022-03-30
            Weather
              FileName=%root%/Tests/Validation/Wheat/Phenology/WeatherFiles/-37.95_143.92.met
            Soil Sodosol: same as FARAwardPhenology.FARAwardPhenology.Factors.Site.Trial_2.Sodosol
            Operations
              2021-03-31  [Sowing].Script.Sow("Accroc", 215.0, 30, 250.0)
              2021-03-31  [ApplyFertiliser].Script.Apply(64.0,0,0,0,0,0,0,0,0)
              2021-06-04  [ApplyFertiliser].Script.Apply(92.0,0,0,0,0,0,0,0,0)
              2021-08-13  [ApplyFertiliser].Script.Apply(92.0,0,0,0,0,0,0,0,0)
              2021-09-08  [ApplyFertiliser].Script.Apply(0.0,0,0,0,0,0,0,0,0)
          CompositeFactor Trial_121
            Specifications:
              [Clock]
              [Weather]
              [Soil]
              [Operations]
            Clock: Start=2021-01-01; End=2022-04-17
            Weather
              FileName=%root%/Tests/Validation/Wheat/Phenology/WeatherFiles/-37.84_143.70.met
            Soil Sodosol: same as FARAwardPhenology.FARAwardPhenology.Factors.Site.Trial_2.Sodosol
            Operations
              2021-04-18  [Sowing].Script.Sow("Accroc", 200, 30, 191.0)
              2021-04-18  [ApplyFertiliser].Script.Apply(19.53,0,0,0,0,0,0,0,0)
              2021-05-20  [ApplyFertiliser].Script.Apply(0.0,0,0,0,0,0,0,0,0)
              2021-05-20  [ApplyFertiliser].Script.Apply(0.0,0,0,0,0,0,0,0,0)
              2021-05-27  [ApplyFertiliser].Script.Apply(92.0,0,0,0,0,0,0,0,0)
              2021-07-27  [ApplyFertiliser].Script.Apply(92.0,0,0,0,0,0,0,0,0)
          CompositeFactor Trial_122
            Specifications:
              [Clock]
              [Weather]
              [Soil]
              [Operations]
            Clock: Start=2021-01-01; End=2022-05-17
            Weather
              FileName=%root%/Tests/Validation/Wheat/Phenology/WeatherFiles/-38.28_143.81.met
            Soil Sodosol: same as FARAwardPhenology.FARAwardPhenology.Factors.Site.Trial_2.Sodosol
            Operations
              2021-05-18  [Sowing].Script.Sow("Beaufort", 167.0, 30, 250.0)
              2020-12-30  [ApplyFertiliser].Script.Apply(120.0,0,0,0,0,0,0,0,0)
              2021-05-18  [ApplyFertiliser].Script.Apply(42.0,0,0,0,0,0,0,0,0)
              2021-07-08  [ApplyFertiliser].Script.Apply(69.0,0,0,0,0,0,0,0,0)
              2021-08-30  [ApplyFertiliser].Script.Apply(0.0,0,0,0,0,0,0,0,0)
              2021-09-20  [ApplyFertiliser].Script.Apply(69.0,0,0,0,0,0,0,0,0)
          CompositeFactor Trial_123
            Specifications:
              [Clock]
              [Weather]
              [Soil]
              [Operations]
            Clock: Start=2021-01-01; End=2022-05-10
            Weather
              FileName=%root%/Tests/Validation/Wheat/Phenology/WeatherFiles/-37.73_142.82.met
            Soil Sodosol: same as FARAwardPhenology.FARAwardPhenology.Factors.Site.Trial_2.Sodosol
            Operations
              2021-05-11  [Sowing].Script.Sow("Beaufort", 200, 30, 178.0)
              2021-05-11  [ApplyFertiliser].Script.Apply(8.0,0,0,0,0,0,0,0,0)
              2021-06-14  [ApplyFertiliser].Script.Apply(57.5,0,0,0,0,0,0,0,0)
              2021-08-07  [ApplyFertiliser].Script.Apply(57.5,0,0,0,0,0,0,0,0)
              2021-08-18  [ApplyFertiliser].Script.Apply(57.5,0,0,0,0,0,0,0,0)
              2022-08-27  [ApplyFertiliser].Script.Apply(0.0,0,0,0,0,0,0,0,0)
          CompositeFactor Trial_124
            Specifications:
              [Clock]
              [Weather]
              [Soil]
              [Operations]
            Clock: Start=2021-01-01; End=2022-04-30
            Weather
              FileName=%root%/Tests/Validation/Wheat/Phenology/WeatherFiles/-37.51_142.93.met
            Soil Sodosol: same as FARAwardPhenology.FARAwardPhenology.Factors.Site.Trial_2.Sodosol
            Operations
              2021-05-01  [Sowing].Script.Sow("Beaufort", 222.0, 30, 248.0)
              2021-05-07  [ApplyFertiliser].Script.Apply(10.0,0,0,0,0,0,0,0,0)
              2021-06-22  [ApplyFertiliser].Script.Apply(46.0,0,0,0,0,0,0,0,0)
              2021-07-29  [ApplyFertiliser].Script.Apply(41.4,0,0,0,0,0,0,0,0)
              2021-09-17  [ApplyFertiliser].Script.Apply(55.2,0,0,0,0,0,0,0,0)
          CompositeFactor Trial_125
            Specifications:
              [Clock]
              [Weather]
              [Soil]
              [Operations]
            Clock: Start=2021-01-01; End=2022-05-05
            Weather
              FileName=%root%/Tests/Validation/Wheat/Phenology/WeatherFiles/-37.84_142.93.met
            Soil Sodosol: same as FARAwardPhenology.FARAwardPhenology.Factors.Site.Trial_2.Sodosol
            Operations
              2021-05-06  [Sowing].Script.Sow("Rockstar", 200, 30, 250.0)
              2021-05-06  [ApplyFertiliser].Script.Apply(46.0,0,0,0,0,0,0,0,0)
              2021-05-06  [ApplyFertiliser].Script.Apply(12.0,0,0,0,0,0,0,0,0)
              2021-07-11  [ApplyFertiliser].Script.Apply(46.0,0,0,0,0,0,0,0,0)
              2021-08-11  [ApplyFertiliser].Script.Apply(46.0,0,0,0,0,0,0,0,0)
              2021-09-02  [ApplyFertiliser].Script.Apply(0.0,0,0,0,0,0,0,0,0)
          CompositeFactor Trial_127
            Specifications:
              [Clock]
              [Weather]
              [Soil]
              [Operations]
            Clock: Start=2021-01-01; End=2022-04-07
            Weather
              FileName=%root%/Tests/Validation/Wheat/Phenology/WeatherFiles/-38.06_142.38.met
            Soil Sodosol: same as FARAwardPhenology.FARAwardPhenology.Factors.Site.Trial_2.Sodosol
            Operations
              2021-04-08  [Sowing].Script.Sow("Accroc", 200, 30, 250.0)
              2021-04-08  [ApplyFertiliser].Script.Apply(10.0,0,0,0,0,0,0,0,0)
              2021-06-21  [ApplyFertiliser].Script.Apply(0.0,0,0,0,0,0,0,0,0)
              2021-06-21  [ApplyFertiliser].Script.Apply(0.0,0,0,0,0,0,0,0,0)
              2021-07-08  [ApplyFertiliser].Script.Apply(69.0,0,0,0,0,0,0,0,0)
              2021-08-20  [ApplyFertiliser].Script.Apply(69.0,0,0,0,0,0,0,0,0)
          CompositeFactor Trial_128
            Specifications:
              [Clock]
              [Weather]
              [Soil]
              [Operations]
            Clock: Start=2021-01-01; End=2022-05-04
            Weather
              FileName=%root%/Tests/Validation/Wheat/Phenology/WeatherFiles/-37.73_142.27.met
            Soil Sodosol: same as FARAwardPhenology.FARAwardPhenology.Factors.Site.Trial_2.Sodosol
            Operations
              2021-05-05  [Sowing].Script.Sow("Revenue", 200, 30, 215.0)
              2021-05-05  [ApplyFertiliser].Script.Apply(8.8,0,0,0,0,0,0,0,0)
              2021-08-24  [ApplyFertiliser].Script.Apply(69.0,0,0,0,0,0,0,0,0)
              2021-09-08  [ApplyFertiliser].Script.Apply(69.0,0,0,0,0,0,0,0,0)
          CompositeFactor Trial_129
            Specifications:
              [Clock]
              [Weather]
              [Soil]
              [Operations]
            Clock: Start=2021-01-01; End=2022-04-14
            Weather
              FileName=%root%/Tests/Validation/Wheat/Phenology/WeatherFiles/-37.84_143.92.met
            Soil Sodosol: same as FARAwardPhenology.FARAwardPhenology.Factors.Site.Trial_2.Sodosol
            Operations
              2021-04-15  [Sowing].Script.Sow("Accroc", 230.0, 30, 250.0)
              2021-02-01  [ApplyFertiliser].Script.Apply(0.0,0,0,0,0,0,0,0,0)
              2021-04-15  [ApplyFertiliser].Script.Apply(12.0,0,0,0,0,0,0,0,0)
              2021-05-20  [ApplyFertiliser].Script.Apply(46.0,0,0,0,0,0,0,0,0)
              2021-07-01  [ApplyFertiliser].Script.Apply(69.0,0,0,0,0,0,0,0,0)
              2021-08-25  [ApplyFertiliser].Script.Apply(69.0,0,0,0,0,0,0,0,0)
              2021-09-20  [ApplyFertiliser].Script.Apply(36.8,0,0,0,0,0,0,0,0)
          CompositeFactor Trial_130
            Specifications:
              [Clock]
              [Weather]
              [Soil]
              [Operations]
            Clock: Start=2021-01-01; End=2022-04-30
            Weather
              FileName=%root%/Tests/Validation/Wheat/Phenology/WeatherFiles/-38.06_144.14.met
            Soil Sodosol: same as FARAwardPhenology.FARAwardPhenology.Factors.Site.Trial_2.Sodosol
            Operations
              2021-05-01  [Sowing].Script.Sow("Beaufort", 213.0, 30, 250.0)
              2021-01-15  [ApplyFertiliser].Script.Apply(0.0,0,0,0,0,0,0,0,0)
              2021-05-01  [ApplyFertiliser].Script.Apply(48.0,0,0,0,0,0,0,0,0)
              2021-06-04  [ApplyFertiliser].Script.Apply(0.0,0,0,0,0,0,0,0,0)
              2021-06-04  [ApplyFertiliser].Script.Apply(0.0,0,0,0,0,0,0,0,0)
              2021-06-06  [ApplyFertiliser].Script.Apply(69.0,0,0,0,0,0,0,0,0)
              2021-08-06  [ApplyFertiliser].Script.Apply(57.5,0,0,0,0,0,0,0,0)
              2021-08-09  [ApplyFertiliser].Script.Apply(0.0,0,0,0,0,0,0,0,0)
              2021-08-09  [ApplyFertiliser].Script.Apply(0.0,0,0,0,0,0,0,0,0)
          CompositeFactor Trial_131
            Specifications:
              [Clock]
              [Weather]
              [Soil]
              [Operations]
            Clock: Start=2021-01-01; End=2022-04-08
            Weather
              FileName=%root%/Tests/Validation/Wheat/Phenology/WeatherFiles/-37.29_143.92.met
            Soil Vertosol: same as FARAwardPhenology.FARAwardPhenology.Factors.Site.Trial_14.Vertosol
            Operations
              2021-04-09  [Sowing].Script.Sow("Accroc", 200, 30, 250.0)
              2021-04-08  [ApplyFertiliser].Script.Apply(16.1,0,0,0,0,0,0,0,0)
              2021-04-08  [ApplyFertiliser].Script.Apply(0.258,0,0,0,0,0,0,0,0)
              2021-04-08  [ApplyFertiliser].Script.Apply(12.0,0,0,0,0,0,0,0,0)
              2021-06-18  [ApplyFertiliser].Script.Apply(0.0,0,0,0,0,0,0,0,0)
              2021-06-22  [ApplyFertiliser].Script.Apply(32.2,0,0,0,0,0,0,0,0)
              2021-08-18  [ApplyFertiliser].Script.Apply(36.8,0,0,0,0,0,0,0,0)
              2021-09-02  [ApplyFertiliser].Script.Apply(69.0,0,0,0,0,0,0,0,0)
              2021-09-30  [ApplyFertiliser].Script.Apply(0.0,0,0,0,0,0,0,0,0)
          CompositeFactor Trial_132
            Specifications:
              [Clock]
              [Weather]
              [Soil]
              [Operations]
            Clock: Start=2021-01-01; End=2022-05-17
            Weather
              FileName=%root%/Tests/Validation/Wheat/Phenology/WeatherFiles/-37.73_144.25.met
            Soil Sodosol: same as FARAwardPhenology.FARAwardPhenology.Factors.Site.Trial_2.Sodosol
            Operations
              2021-05-18  [Sowing].Script.Sow("Beaufort", 200, 30, 250.0)
              2021-05-18  [ApplyFertiliser].Script.Apply(8.0,0,0,0,0,0,0,0,0)
              2021-05-18  [ApplyFertiliser].Script.Apply(18.4,0,0,0,0,0,0,0,0)
              2021-08-18  [ApplyFertiliser].Script.Apply(69.0,0,0,0,0,0,0,0,0)
              2021-09-09  [ApplyFertiliser].Script.Apply(80.5,0,0,0,0,0,0,0,0)
              2021-09-30  [ApplyFertiliser].Script.Apply(46.0,0,0,0,0,0,0,0,0)
              2021-10-28  [ApplyFertiliser].Script.Apply(46.0,0,0,0,0,0,0,0,0)
          CompositeFactor Trial_133
            Specifications:
              [Clock]
              [Weather]
              [Soil]
              [Operations]
            Clock: Start=2021-01-01; End=2022-04-06
            Weather
              FileName=%root%/Tests/Validation/Wheat/Phenology/WeatherFiles/-38.06_143.37.met
            Soil Sodosol: same as FARAwardPhenology.FARAwardPhenology.Factors.Site.Trial_2.Sodosol
            Operations
              2021-04-07  [Sowing].Script.Sow("Accroc", 178.0, 30, 250.0)
              2021-04-07  [ApplyFertiliser].Script.Apply(26.04,0,0,0,0,0,0,0,0)
              2021-06-02  [ApplyFertiliser].Script.Apply(69.0,0,0,0,0,0,0,0,0)
              2021-06-21  [ApplyFertiliser].Script.Apply(0.0,0,0,0,0,0,0,0,0)
              2021-07-04  [ApplyFertiliser].Script.Apply(70.84,0,0,0,0,0,0,0,0)
          CompositeFactor Trial_134
            Specifications:
              [Clock]
              [Weather]
              [Soil]
              [Operations]
            Clock: Start=2021-01-01; End=2022-05-01
            Weather
              FileName=%root%/Tests/Validation/Wheat/Phenology/WeatherFiles/-37.62_143.04.met
            Soil Sodosol: same as FARAwardPhenology.FARAwardPhenology.Factors.Site.Trial_2.Sodosol
            Operations
              2021-05-02  [Sowing].Script.Sow("Beaufort", 200, 30, 250.0)
              2021-04-29  [ApplyFertiliser].Script.Apply(60.0,0,0,0,0,0,0,0,0)
              2021-08-18  [ApplyFertiliser].Script.Apply(0.0,0,0,0,0,0,0,0,0)
              2021-08-18  [ApplyFertiliser].Script.Apply(0.0,0,0,0,0,0,0,0,0)
          CompositeFactor Trial_135
            Specifications:
              [Clock]
              [Weather]
              [Soil]
              [Operations]
            Clock: Start=2021-01-01; End=2022-05-14
            Weather
              FileName=%root%/Tests/Validation/Wheat/Phenology/WeatherFiles/-37.40_143.70.met
            Soil Sodosol: same as FARAwardPhenology.FARAwardPhenology.Factors.Site.Trial_2.Sodosol
            Operations
              2021-05-15  [Sowing].Script.Sow("Accroc", 200, 30, 250.0)
              2020-02-01  [ApplyFertiliser].Script.Apply(0.0,0,0,0,0,0,0,0,0)
              2021-03-24  [ApplyFertiliser].Script.Apply(0.0,0,0,0,0,0,0,0,0)
              2021-04-01  [ApplyFertiliser].Script.Apply(15.0,0,0,0,0,0,0,0,0)
              2021-05-30  [ApplyFertiliser].Script.Apply(69.0,0,0,0,0,0,0,0,0)
              2021-06-16  [ApplyFertiliser].Script.Apply(69.0,0,0,0,0,0,0,0,0)
              2021-08-01  [ApplyFertiliser].Script.Apply(92.0,0,0,0,0,0,0,0,0)
              2021-08-21  [ApplyFertiliser].Script.Apply(0.0,0,0,0,0,0,0,0,0)
              2021-08-21  [ApplyFertiliser].Script.Apply(0.0,0,0,0,0,0,0,0,0)
              2021-09-08  [ApplyFertiliser].Script.Apply(69.0,0,0,0,0,0,0,0,0)
          CompositeFactor Trial_136
            Specifications:
              [Clock]
              [Weather]
              [Soil]
              [Operations]
            Clock: Start=2021-01-01; End=2022-04-07
            Weather
              FileName=%root%/Tests/Validation/Wheat/Phenology/WeatherFiles/-37.95_143.92.met
            Soil Sodosol: same as FARAwardPhenology.FARAwardPhenology.Factors.Site.Trial_2.Sodosol
            Operations
              2021-04-08  [Sowing].Script.Sow("Accroc", 143.0, 30, 250.0)
              2021-04-08  [ApplyFertiliser].Script.Apply(9.0,0,0,0,0,0,0,0,0)
              2021-07-26  [ApplyFertiliser].Script.Apply(64.4,0,0,0,0,0,0,0,0)
              2021-08-09  [ApplyFertiliser].Script.Apply(55.2,0,0,0,0,0,0,0,0)
              2021-08-18  [ApplyFertiliser].Script.Apply(0.0,0,0,0,0,0,0,0,0)
              2021-08-18  [ApplyFertiliser].Script.Apply(0.0,0,0,0,0,0,0,0,0)
              2021-09-15  [ApplyFertiliser].Script.Apply(0.064,0,0,0,0,0,0,0,0)
          CompositeFactor Trial_137
            Specifications:
              [Clock]
              [Weather]
              [Soil]
              [Operations]
            Clock: Start=2021-01-01; End=2022-04-25
            Weather
              FileName=%root%/Tests/Validation/Wheat/Phenology/WeatherFiles/-37.62_142.93.met
            Soil Sodosol: same as FARAwardPhenology.FARAwardPhenology.Factors.Site.Trial_2.Sodosol
            Operations
              2021-04-26  [Sowing].Script.Sow("Beaufort", 200, 30, 250.0)
              2021-04-24  [ApplyFertiliser].Script.Apply(10.0,0,0,0,0,0,0,0,0)
              2021-04-24  [ApplyFertiliser].Script.Apply(32.2,0,0,0,0,0,0,0,0)
              2021-07-07  [ApplyFertiliser].Script.Apply(57.5,0,0,0,0,0,0,0,0)
              2021-08-11  [ApplyFertiliser].Script.Apply(57.5,0,0,0,0,0,0,0,0)
              2021-08-27  [ApplyFertiliser].Script.Apply(32.2,0,0,0,0,0,0,0,0)
          CompositeFactor Trial_138
            Specifications:
              [Clock]
              [Weather]
              [Soil]
              [Operations]
            Clock: Start=2021-01-01; End=2022-05-11
            Weather
              FileName=%root%/Tests/Validation/Wheat/Phenology/WeatherFiles/-37.84_142.38.met
            Soil Sodosol: same as FARAwardPhenology.FARAwardPhenology.Factors.Site.Trial_2.Sodosol
            Operations
              2021-05-12  [Sowing].Script.Sow("Accroc", 200, 30, 250.0)
              2021-05-12  [ApplyFertiliser].Script.Apply(9.0,0,0,0,0,0,0,0,0)
              2021-05-12  [ApplyFertiliser].Script.Apply(23.0,0,0,0,0,0,0,0,0)
              2021-06-10  [ApplyFertiliser].Script.Apply(46.0,0,0,0,0,0,0,0,0)
              2021-07-25  [ApplyFertiliser].Script.Apply(69.0,0,0,0,0,0,0,0,0)
              2021-08-24  [ApplyFertiliser].Script.Apply(46.0,0,0,0,0,0,0,0,0)
              2021-09-01  [ApplyFertiliser].Script.Apply(0.0,0,0,0,0,0,0,0,0)
          CompositeFactor Trial_139
            Specifications:
              [Clock]
              [Weather]
              [Soil]
              [Operations]
            Clock: Start=2021-01-01; End=2022-05-05
            Weather
              FileName=%root%/Tests/Validation/Wheat/Phenology/WeatherFiles/-37.73_143.15.met
            Soil Sodosol: same as FARAwardPhenology.FARAwardPhenology.Factors.Site.Trial_2.Sodosol
            Operations
              2021-05-06  [Sowing].Script.Sow("Beaufort", 200, 30, 250.0)
              2021-05-06  [ApplyFertiliser].Script.Apply(10.0,0,0,0,0,0,0,0,0)
              2021-05-06  [ApplyFertiliser].Script.Apply(32.2,0,0,0,0,0,0,0,0)
              2021-06-16  [ApplyFertiliser].Script.Apply(92.0,0,0,0,0,0,0,0,0)
              2021-07-15  [ApplyFertiliser].Script.Apply(69.0,0,0,0,0,0,0,0,0)
              2021-08-23  [ApplyFertiliser].Script.Apply(0.0,0,0,0,0,0,0,0,0)
          CompositeFactor Trial_141
            Specifications:
              [Clock]
              [Weather]
              [Soil]
              [Operations]
            Clock: Start=2021-01-01; End=2022-04-14
            Weather
              FileName=%root%/Tests/Validation/Wheat/Phenology/WeatherFiles/-33.88_116.97.met
            Soil Chromosol: same as FARAwardPhenology.FARAwardPhenology.Factors.Site.Trial_1.Chromosol
            Operations
              2021-04-15  [Sowing].Script.Sow("Accroc", 200, 30, 250.0)
              2021-04-02  [ApplyFertiliser].Script.Apply(42.0,0,0,0,0,0,0,0,0)
              2021-04-02  [ApplyFertiliser].Script.Apply(0.0,0,0,0,0,0,0,0,0)
              2021-04-14  [ApplyFertiliser].Script.Apply(0.0,0,0,0,0,0,0,0,0)
              2021-04-15  [ApplyFertiliser].Script.Apply(4.7,0,0,0,0,0,0,0,0)
              2021-06-07  [ApplyFertiliser].Script.Apply(23.0,0,0,0,0,0,0,0,0)
              2021-07-07  [ApplyFertiliser].Script.Apply(23.0,0,0,0,0,0,0,0,0)
              2021-08-10  [ApplyFertiliser].Script.Apply(21.5,0,0,0,0,0,0,0,0)
              2021-09-09  [ApplyFertiliser].Script.Apply(21.5,0,0,0,0,0,0,0,0)
          CompositeFactor Trial_142
            Specifications:
              [Clock]
              [Weather]
              [Soil]
              [Operations]
            Clock: Start=2021-01-01; End=2022-05-10
            Weather
              FileName=%root%/Tests/Validation/Wheat/Phenology/WeatherFiles/-33.88_116.97.met
            Soil Chromosol: same as FARAwardPhenology.FARAwardPhenology.Factors.Site.Trial_1.Chromosol
            Operations
              2021-05-11  [Sowing].Script.Sow("Scepter", 200, 30, 250.0)
              2021-05-06  [ApplyFertiliser].Script.Apply(7.0,0,0,0,0,0,0,0,0)
              2021-05-06  [ApplyFertiliser].Script.Apply(0.0,0,0,0,0,0,0,0,0)
              2021-05-06  [ApplyFertiliser].Script.Apply(0.0,0,0,0,0,0,0,0,0)
              2021-06-10  [ApplyFertiliser].Script.Apply(57.5,0,0,0,0,0,0,0,0)
              2021-06-10  [ApplyFertiliser].Script.Apply(0.0,0,0,0,0,0,0,0,0)
              2021-08-01  [ApplyFertiliser].Script.Apply(17.2,0,0,0,0,0,0,0,0)
          CompositeFactor Trial_144
            Specifications:
              [Clock]
              [Weather]
              [Soil]
              [Operations]
            Clock: Start=2021-01-01; End=2022-05-11
            Weather
              FileName=%root%/Tests/Validation/Wheat/Phenology/WeatherFiles/-34.21_118.29.met
            Soil Sodosol: same as FARAwardPhenology.FARAwardPhenology.Factors.Site.Trial_2.Sodosol
            Operations
              2021-05-12  [Sowing].Script.Sow("Scepter", 200, 30, 250.0)
              2021-05-11  [ApplyFertiliser].Script.Apply(32.2,0,0,0,0,0,0,0,0)
              2021-05-12  [ApplyFertiliser].Script.Apply(0.0,0,0,0,0,0,0,0,0)
              2021-06-28  [ApplyFertiliser].Script.Apply(0.0,0,0,0,0,0,0,0,0)
          CompositeFactor Trial_146
            Specifications:
              [Clock]
              [Weather]
              [Soil]
              [Operations]
            Clock: Start=2021-01-01; End=2022-04-25
            Weather
              FileName=%root%/Tests/Validation/Wheat/Phenology/WeatherFiles/-33.88_116.75.met
            Soil Sodosol: same as FARAwardPhenology.FARAwardPhenology.Factors.Site.Trial_2.Sodosol
            Operations
              2021-04-26  [Sowing].Script.Sow("Illabo", 200, 30, 250.0)
              2021-04-01  [ApplyFertiliser].Script.Apply(0.0,0,0,0,0,0,0,0,0)
              2021-04-24  [ApplyFertiliser].Script.Apply(16.8,0,0,0,0,0,0,0,0)
              2021-04-24  [ApplyFertiliser].Script.Apply(10.5,0,0,0,0,0,0,0,0)
              2021-06-01  [ApplyFertiliser].Script.Apply(23.0,0,0,0,0,0,0,0,0)
              2021-06-15  [ApplyFertiliser].Script.Apply(0.0,0,0,0,0,0,0,0,0)
              2021-08-05  [ApplyFertiliser].Script.Apply(36.8,0,0,0,0,0,0,0,0)
              2021-08-26  [ApplyFertiliser].Script.Apply(36.8,0,0,0,0,0,0,0,0)
          CompositeFactor Trial_148
            Specifications:
              [Clock]
              [Weather]
              [Soil]
              [Operations]
            Clock: Start=2021-01-01; End=2022-05-12
            Weather
              FileName=%root%/Tests/Validation/Wheat/Phenology/WeatherFiles/-34.10_117.08.met
            Soil Sodosol: same as FARAwardPhenology.FARAwardPhenology.Factors.Site.Trial_2.Sodosol
            Operations
              2021-05-13  [Sowing].Script.Sow("Rockstar", 200, 30, 250.0)
              2021-05-11  [ApplyFertiliser].Script.Apply(9.3,0,0,0,0,0,0,0,0)
              2021-05-11  [ApplyFertiliser].Script.Apply(0.0,0,0,0,0,0,0,0,0)
              2021-05-11  [ApplyFertiliser].Script.Apply(0.0,0,0,0,0,0,0,0,0)
              2021-05-11  [ApplyFertiliser].Script.Apply(21.0,0,0,0,0,0,0,0,0)
              2021-06-17  [ApplyFertiliser].Script.Apply(0.0,0,0,0,0,0,0,0,0)
              2021-06-17  [ApplyFertiliser].Script.Apply(48.3,0,0,0,0,0,0,0,0)
              2021-07-07  [ApplyFertiliser].Script.Apply(29.4,0,0,0,0,0,0,0,0)
              2021-07-07  [ApplyFertiliser].Script.Apply(0.0,0,0,0,0,0,0,0,0)
          CompositeFactor Trial_149
            Specifications:
              [Clock]
              [Weather]
              [Soil]
              [Operations]
            Clock: Start=2021-01-01; End=2022-03-04
            Weather
              FileName=%root%/Tests/Validation/Wheat/Phenology/WeatherFiles/-34.54_117.63.met
            Soil Sodosol: same as FARAwardPhenology.FARAwardPhenology.Factors.Site.Trial_2.Sodosol
            Operations
              2021-03-05  [Sowing].Script.Sow("Illabo", 200, 30, 250.0)
              2021-03-05  [ApplyFertiliser].Script.Apply(12.474,0,0,0,0,0,0,0,0)
              2021-03-05  [ApplyFertiliser].Script.Apply(0.0,0,0,0,0,0,0,0,0)
              2021-03-05  [ApplyFertiliser].Script.Apply(0.0,0,0,0,0,0,0,0,0)
              2021-03-31  [ApplyFertiliser].Script.Apply(64.4,0,0,0,0,0,0,0,0)
              2021-03-31  [ApplyFertiliser].Script.Apply(0.0,0,0,0,0,0,0,0,0)
              2021-04-15  [ApplyFertiliser].Script.Apply(0.0,0,0,0,0,0,0,0,0)
              2021-06-11  [ApplyFertiliser].Script.Apply(46.0,0,0,0,0,0,0,0,0)
              2022-08-18  [ApplyFertiliser].Script.Apply(69.0,0,0,0,0,0,0,0,0)
          CompositeFactor Trial_151
            Specifications:
              [Clock]
              [Weather]
              [Soil]
              [Operations]
            Clock: Start=2022-01-01; End=2023-05-19
            Weather
              FileName=%root%/Tests/Validation/Wheat/Phenology/WeatherFiles/-35.75_146.12.met
            Soil Sodosol: same as FARAwardPhenology.FARAwardPhenology.Factors.Site.Trial_2.Sodosol
            Operations
              2022-05-20  [Sowing].Script.Sow("Scepter", 200.0, 30, 300.0)
              2022-07-05  [ApplyFertiliser].Script.Apply(46.0,0,0,0,0,0,0,0,0)
              2022-09-05  [ApplyFertiliser].Script.Apply(46.0,0,0,0,0,0,0,0,0)
              2022-09-25  [ApplyFertiliser].Script.Apply(46.0,0,0,0,0,0,0,0,0)
          CompositeFactor Trial_152
            Specifications:
              [Clock]
              [Weather]
              [Soil]
              [Operations]
            Clock: Start=2022-01-01; End=2023-05-10
            Weather
              FileName=%root%/Tests/Validation/Wheat/Phenology/WeatherFiles/-35.75_146.12.met
            Soil Sodosol: same as FARAwardPhenology.FARAwardPhenology.Factors.Site.Trial_2.Sodosol
            Operations
              2022-05-11  [Sowing].Script.Sow("Scepter", 200, 30, 304.0)
              2022-03-01  [ApplyFertiliser].Script.Apply(0.0,0,0,0,0,0,0,0,0)
              2022-03-15  [ApplyFertiliser].Script.Apply(0.0,0,0,0,0,0,0,0,0)
              2022-06-01  [ApplyFertiliser].Script.Apply(69.0,0,0,0,0,0,0,0,0)
              2022-08-01  [ApplyFertiliser].Script.Apply(69.0,0,0,0,0,0,0,0,0)
          CompositeFactor Trial_153
            Specifications:
              [Clock]
              [Weather]
              [Soil]
              [Operations]
            Clock: Start=2022-01-01; End=2023-05-03
            Weather
              FileName=%root%/Tests/Validation/Wheat/Phenology/WeatherFiles/-35.86_146.12.met
            Soil Sodosol: same as FARAwardPhenology.FARAwardPhenology.Factors.Site.Trial_2.Sodosol
            Operations
              2022-05-04  [Sowing].Script.Sow("Scepter", 200, 30, 250.0)
              2022-05-04  [ApplyFertiliser].Script.Apply(7.0,0,0,0,0,0,0,0,0)
              2022-06-14  [ApplyFertiliser].Script.Apply(46.0,0,0,0,0,0,0,0,0)
              2022-07-19  [ApplyFertiliser].Script.Apply(55.2,0,0,0,0,0,0,0,0)
              2022-08-03  [ApplyFertiliser].Script.Apply(46.0,0,0,0,0,0,0,0,0)
          CompositeFactor Trial_154
            Specifications:
              [Clock]
              [Weather]
              [Soil]
              [Operations]
            Clock: Start=2022-01-01; End=2023-05-09
            Weather
              FileName=%root%/Tests/Validation/Wheat/Phenology/WeatherFiles/-36.08_148.10.met
            Soil Chromosol: same as FARAwardPhenology.FARAwardPhenology.Factors.Site.Trial_1.Chromosol
            Operations
              2022-05-10  [Sowing].Script.Sow("Cesario", 129.0, 30, 250.0)
              2022-05-10  [ApplyFertiliser].Script.Apply(10.0,0,0,0,0,0,0,0,0)
              2022-07-01  [ApplyFertiliser].Script.Apply(21.0,0,0,0,0,0,0,0,0)
              2022-08-15  [ApplyFertiliser].Script.Apply(59.8,0,0,0,0,0,0,0,0)
              2022-09-15  [ApplyFertiliser].Script.Apply(59.8,0,0,0,0,0,0,0,0)
          CompositeFactor Trial_155
            Specifications:
              [Clock]
              [Weather]
              [Soil]
              [Operations]
            Clock: Start=2022-01-01; End=2023-04-30
            Weather
              FileName=%root%/Tests/Validation/Wheat/Phenology/WeatherFiles/-34.98_147.44.met
            Soil Kandosol: same as FARAwardPhenology.FARAwardPhenology.Factors.Site.Trial_73.Kandosol
            Operations
              2022-05-01  [Sowing].Script.Sow("Rockstar", 223.0, 30, 250.0)
              2022-05-01  [ApplyFertiliser].Script.Apply(6.0,0,0,0,0,0,0,0,0)
              2022-07-10  [ApplyFertiliser].Script.Apply(46.0,0,0,0,0,0,0,0,0)
              2022-08-11  [ApplyFertiliser].Script.Apply(46.0,0,0,0,0,0,0,0,0)
              2022-09-01  [ApplyFertiliser].Script.Apply(69.0,0,0,0,0,0,0,0,0)
              2022-09-07  [ApplyFertiliser].Script.Apply(0.0,0,0,0,0,0,0,0,0)
              2022-09-07  [ApplyFertiliser].Script.Apply(0.065,0,0,0,0,0,0,0,0)
              2022-09-07  [ApplyFertiliser].Script.Apply(0.036,0,0,0,0,0,0,0,0)
          CompositeFactor Trial_156
            Specifications:
              [Clock]
              [Weather]
              [Soil]
              [Operations]
            Clock: Start=2022-01-01; End=2023-04-30
            Weather
              FileName=%root%/Tests/Validation/Wheat/Phenology/WeatherFiles/-35.97_147.00.met
            Soil Sodosol: same as FARAwardPhenology.FARAwardPhenology.Factors.Site.Trial_2.Sodosol
            Operations
              2022-05-01  [Sowing].Script.Sow("Rockstar", 200, 30, 225.0)
              2022-05-07  [ApplyFertiliser].Script.Apply(10.0,0,0,0,0,0,0,0,0)
              2022-06-21  [ApplyFertiliser].Script.Apply(46.0,0,0,0,0,0,0,0,0)
              2022-08-10  [ApplyFertiliser].Script.Apply(82.8,0,0,0,0,0,0,0,0)
              2022-09-14  [ApplyFertiliser].Script.Apply(36.8,0,0,0,0,0,0,0,0)
          CompositeFactor Trial_157
            Specifications:
              [Clock]
              [Weather]
              [Soil]
              [Operations]
            Clock: Start=2022-01-01; End=2023-05-12
            Weather
              FileName=%root%/Tests/Validation/Wheat/Phenology/WeatherFiles/-37.18_140.07.met
            Soil Vertosol: same as FARAwardPhenology.FARAwardPhenology.Factors.Site.Trial_14.Vertosol
            Operations
              2022-05-13  [Sowing].Script.Sow("Rockstar", 200, 30, 250)
              2022-05-13  [ApplyFertiliser].Script.Apply(12.0,0,0,0,0,0,0,0,0)
              2022-07-01  [ApplyFertiliser].Script.Apply(46.0,0,0,0,0,0,0,0,0)
              2022-08-01  [ApplyFertiliser].Script.Apply(46.0,0,0,0,0,0,0,0,0)
              2022-09-01  [ApplyFertiliser].Script.Apply(46.0,0,0,0,0,0,0,0,0)
          CompositeFactor Trial_158
            Specifications:
              [Clock]
              [Weather]
              [Soil]
              [Operations]
            Clock: Start=2022-01-01; End=2023-05-29
            Weather
              FileName=%root%/Tests/Validation/Wheat/Phenology/WeatherFiles/-37.18_140.73.met
            Soil Podosol: same as FARAwardPhenology.FARAwardPhenology.Factors.Site.Trial_98.Podosol
            Operations
              2022-05-30  [Sowing].Script.Sow("Trojan", 200, 30, 229.0)
              2022-05-30  [ApplyFertiliser].Script.Apply(8.0,0,0,0,0,0,0,0,0)
              2022-08-09  [ApplyFertiliser].Script.Apply(0.0,0,0,0,0,0,0,0,0)
              2022-08-09  [ApplyFertiliser].Script.Apply(0.2,0,0,0,0,0,0,0,0)
              2022-08-17  [ApplyFertiliser].Script.Apply(46.0,0,0,0,0,0,0,0,0)
              2022-09-07  [ApplyFertiliser].Script.Apply(0.0,0,0,0,0,0,0,0,0)
              2022-09-07  [ApplyFertiliser].Script.Apply(0.0,0,0,0,0,0,0,0,0)
              2022-09-19  [ApplyFertiliser].Script.Apply(55.2,0,0,0,0,0,0,0,0)
              2022-09-29  [ApplyFertiliser].Script.Apply(0.0,0,0,0,0,0,0,0,0)
          CompositeFactor Trial_161
            Specifications:
              [Clock]
              [Weather]
              [Soil]
              [Operations]
            Clock: Start=2022-01-01; End=2023-05-24
            Weather
              FileName=%root%/Tests/Validation/Wheat/Phenology/WeatherFiles/-37.51_140.73.met
            Soil Vertosol: same as FARAwardPhenology.FARAwardPhenology.Factors.Site.Trial_14.Vertosol
            Operations
              2022-05-25  [Sowing].Script.Sow("Rockstar", 200, 30, 222.0)
              2022-05-25  [ApplyFertiliser].Script.Apply(12.0,0,0,0,0,0,0,0,0)
              2022-05-25  [ApplyFertiliser].Script.Apply(0.0,0,0,0,0,0,0,0,0)
              2022-08-21  [ApplyFertiliser].Script.Apply(46.0,0,0,0,0,0,0,0,0)
              2022-08-21  [ApplyFertiliser].Script.Apply(0.0,0,0,0,0,0,0,0,0)
              2022-09-07  [ApplyFertiliser].Script.Apply(46.0,0,0,0,0,0,0,0,0)
              2022-09-09  [ApplyFertiliser].Script.Apply(0.0,0,0,0,0,0,0,0,0)
              2022-10-01  [ApplyFertiliser].Script.Apply(0.0,0,0,0,0,0,0,0,0)
              2022-10-01  [ApplyFertiliser].Script.Apply(0.0,0,0,0,0,0,0,0,0)
              2022-10-03  [ApplyFertiliser].Script.Apply(58.88,0,0,0,0,0,0,0,0)
              2022-10-22  [ApplyFertiliser].Script.Apply(2.9,0,0,0,0,0,0,0,0)
              2022-10-22  [ApplyFertiliser].Script.Apply(0.0,0,0,0,0,0,0,0,0)
          CompositeFactor Trial_162
            Specifications:
              [Clock]
              [Weather]
              [Soil]
              [Operations]
            Clock: Start=2022-01-01; End=2023-05-27
            Weather
              FileName=%root%/Tests/Validation/Wheat/Phenology/WeatherFiles/-37.18_140.29.met
            Soil Tenosol: same as FARAwardPhenology.FARAwardPhenology.Factors.Site.Trial_68.Tenosol
            Operations
              2022-05-28  [Sowing].Script.Sow("Rockstar", 200, 30, 203.0)
              2022-05-28  [ApplyFertiliser].Script.Apply(18.9,0,0,0,0,0,0,0,0)
              2022-07-09  [ApplyFertiliser].Script.Apply(46.0,0,0,0,0,0,0,0,0)
              2022-07-19  [ApplyFertiliser].Script.Apply(0.0,0,0,0,0,0,0,0,0)
              2022-08-16  [ApplyFertiliser].Script.Apply(46.0,0,0,0,0,0,0,0,0)
              2022-08-20  [ApplyFertiliser].Script.Apply(0.0,0,0,0,0,0,0,0,0)
              2022-09-09  [ApplyFertiliser].Script.Apply(46.0,0,0,0,0,0,0,0,0)
          CompositeFactor Trial_163
            Specifications:
              [Clock]
              [Weather]
              [Soil]
              [Operations]
            Clock: Start=2022-01-01; End=2023-05-16
            Weather
              FileName=%root%/Tests/Validation/Wheat/Phenology/WeatherFiles/-37.18_140.18.met
            Soil Tenosol: same as FARAwardPhenology.FARAwardPhenology.Factors.Site.Trial_68.Tenosol
            Operations
              2022-05-17  [Sowing].Script.Sow("Accroc", 200, 30, 222.0)
              2022-05-17  [ApplyFertiliser].Script.Apply(10.0,0,0,0,0,0,0,0,0)
              2022-08-31  [ApplyFertiliser].Script.Apply(45.0,0,0,0,0,0,0,0,0)
              2022-09-04  [ApplyFertiliser].Script.Apply(0.0,0,0,0,0,0,0,0,0)
              2022-09-20  [ApplyFertiliser].Script.Apply(55.2,0,0,0,0,0,0,0,0)
              2022-10-11  [ApplyFertiliser].Script.Apply(0.0,0,0,0,0,0,0,0,0)
              2022-10-11  [ApplyFertiliser].Script.Apply(0.0,0,0,0,0,0,0,0,0)
              2022-10-11  [ApplyFertiliser].Script.Apply(0.0,0,0,0,0,0,0,0,0)
          CompositeFactor Trial_164
            Specifications:
              [Clock]
              [Weather]
              [Soil]
              [Operations]
            Clock: Start=2022-01-01; End=2023-05-17
            Weather
              FileName=%root%/Tests/Validation/Wheat/Phenology/WeatherFiles/-37.40_140.18.met
            Soil Sodosol: same as FARAwardPhenology.FARAwardPhenology.Factors.Site.Trial_2.Sodosol
            Operations
              2022-05-18  [Sowing].Script.Sow("BigRed", 200, 30, 178.0)
              2022-05-18  [ApplyFertiliser].Script.Apply(10.0,0,0,0,0,0,0,0,0)
              2022-06-20  [ApplyFertiliser].Script.Apply(0.0,0,0,0,0,0,0,0,0)
              2022-06-20  [ApplyFertiliser].Script.Apply(0.0,0,0,0,0,0,0,0,0)
              2022-07-14  [ApplyFertiliser].Script.Apply(46.0,0,0,0,0,0,0,0,0)
              2022-08-03  [ApplyFertiliser].Script.Apply(69.0,0,0,0,0,0,0,0,0)
              2022-08-14  [ApplyFertiliser].Script.Apply(0.0,0,0,0,0,0,0,0,0)
              2022-09-02  [ApplyFertiliser].Script.Apply(0.0,0,0,0,0,0,0,0,0)
              2022-09-02  [ApplyFertiliser].Script.Apply(0.0,0,0,0,0,0,0,0,0)
              2022-10-03  [ApplyFertiliser].Script.Apply(0.0,0,0,0,0,0,0,0,0)
              2022-10-03  [ApplyFertiliser].Script.Apply(0.0,0,0,0,0,0,0,0,0)
          CompositeFactor Trial_165
            Specifications:
              [Clock]
              [Weather]
              [Soil]
              [Operations]
            Clock: Start=2022-01-01; End=2023-05-22
            Weather
              FileName=%root%/Tests/Validation/Wheat/Phenology/WeatherFiles/-37.51_140.29.met
            Soil Sodosol: same as FARAwardPhenology.FARAwardPhenology.Factors.Site.Trial_2.Sodosol
            Operations
              2022-05-23  [Sowing].Script.Sow("Accroc", 200, 30, 178.0)
              2022-05-23  [ApplyFertiliser].Script.Apply(11.0,0,0,0,0,0,0,0,0)
              2022-05-23  [ApplyFertiliser].Script.Apply(0.0,0,0,0,0,0,0,0,0)
              2022-07-04  [ApplyFertiliser].Script.Apply(0.0,0,0,0,0,0,0,0,0)
              2022-07-04  [ApplyFertiliser].Script.Apply(0.0,0,0,0,0,0,0,0,0)
              2022-07-04  [ApplyFertiliser].Script.Apply(0.0,0,0,0,0,0,0,0,0)
              2022-07-28  [ApplyFertiliser].Script.Apply(46.0,0,0,0,0,0,0,0,0)
              2022-08-08  [ApplyFertiliser].Script.Apply(0.0,0,0,0,0,0,0,0,0)
              2022-08-08  [ApplyFertiliser].Script.Apply(0.0,0,0,0,0,0,0,0,0)
              2022-08-08  [ApplyFertiliser].Script.Apply(0.0,0,0,0,0,0,0,0,0)
              2022-08-08  [ApplyFertiliser].Script.Apply(0.2,0,0,0,0,0,0,0,0)
              2022-09-05  [ApplyFertiliser].Script.Apply(80.5,0,0,0,0,0,0,0,0)
              2022-10-09  [ApplyFertiliser].Script.Apply(0.0,0,0,0,0,0,0,0,0)
              2022-10-09  [ApplyFertiliser].Script.Apply(0.0,0,0,0,0,0,0,0,0)
          CompositeFactor Trial_167
            Specifications:
              [Clock]
              [Weather]
              [Soil]
              [Operations]
            Clock: Start=2022-01-01; End=2023-05-27
            Weather
              FileName=%root%/Tests/Validation/Wheat/Phenology/WeatherFiles/-37.18_140.84.met
            Soil Podosol: same as FARAwardPhenology.FARAwardPhenology.Factors.Site.Trial_98.Podosol
            Operations
              2022-05-28  [Sowing].Script.Sow("Rockstar", 200, 30, 254.0)
              2022-05-28  [ApplyFertiliser].Script.Apply(10.0,0,0,0,0,0,0,0,0)
              2022-05-28  [ApplyFertiliser].Script.Apply(2.3,0,0,0,0,0,0,0,0)
              2022-08-10  [ApplyFertiliser].Script.Apply(4.7,0,0,0,0,0,0,0,0)
              2022-08-17  [ApplyFertiliser].Script.Apply(55.2,0,0,0,0,0,0,0,0)
              2022-09-20  [ApplyFertiliser].Script.Apply(7.05,0,0,0,0,0,0,0,0)
          CompositeFactor Trial_168
            Specifications:
              [Clock]
              [Weather]
              [Soil]
              [Operations]
            Clock: Start=2022-01-01; End=2023-05-17
            Weather
              FileName=%root%/Tests/Validation/Wheat/Phenology/WeatherFiles/-37.29_140.73.met
            Soil Vertosol: same as FARAwardPhenology.FARAwardPhenology.Factors.Site.Trial_14.Vertosol
            Operations
              2022-05-18  [Sowing].Script.Sow("Manning", 200, 30, 254.0)
              2022-05-28  [ApplyFertiliser].Script.Apply(10.0,0,0,0,0,0,0,0,0)
              2022-05-28  [ApplyFertiliser].Script.Apply(2.3,0,0,0,0,0,0,0,0)
              2022-07-06  [ApplyFertiliser].Script.Apply(4.7,0,0,0,0,0,0,0,0)
              2022-07-07  [ApplyFertiliser].Script.Apply(24.0,0,0,0,0,0,0,0,0)
              2022-08-28  [ApplyFertiliser].Script.Apply(55.2,0,0,0,0,0,0,0,0)
              2022-09-30  [ApplyFertiliser].Script.Apply(4.7,0,0,0,0,0,0,0,0)
          CompositeFactor Trial_169
            Specifications:
              [Clock]
              [Weather]
              [Soil]
              [Operations]
            Clock: Start=2022-01-01; End=2023-04-30
            Weather
              FileName=%root%/Tests/Validation/Wheat/Phenology/WeatherFiles/-37.40_140.40.met
            Soil Sodosol: same as FARAwardPhenology.FARAwardPhenology.Factors.Site.Trial_2.Sodosol
            Operations
              2022-05-01  [Sowing].Script.Sow("Accroc", 200, 30, 229.0)
          CompositeFactor Trial_174
            Specifications:
              [Clock]
              [Weather]
              [Soil]
              [Operations]
            Clock: Start=2022-01-01; End=2023-03-09
            Weather
              FileName=%root%/Tests/Validation/Wheat/Phenology/WeatherFiles/-42.02_147.55.met
            Soil Sodosol: same as FARAwardPhenology.FARAwardPhenology.Factors.Site.Trial_2.Sodosol
            Operations
              2022-03-10  [Sowing].Script.Sow("Manning", 200, 30, 165.0)
              2022-03-10  [ApplyFertiliser].Script.Apply(28.0,0,0,0,0,0,0,0,0)
              2022-09-27  [ApplyFertiliser].Script.Apply(69.0,0,0,0,0,0,0,0,0)
              2022-10-02  [ApplyFertiliser].Script.Apply(0.0,0,0,0,0,0,0,0,0)
              2022-10-02  [ApplyFertiliser].Script.Apply(46.0,0,0,0,0,0,0,0,0)
          CompositeFactor Trial_175
            Specifications:
              [Clock]
              [Weather]
              [Soil]
              [Operations]
            Clock: Start=2022-01-01; End=2023-04-26
            Weather
              FileName=%root%/Tests/Validation/Wheat/Phenology/WeatherFiles/-41.69_147.33.met
            Soil Sodosol: same as FARAwardPhenology.FARAwardPhenology.Factors.Site.Trial_2.Sodosol
            Operations
              2022-04-27  [Sowing].Script.Sow("Accroc", 200, 30, 200.0)
              2022-04-27  [ApplyFertiliser].Script.Apply(7.0,0,0,0,0,0,0,0,0)
              2022-09-02  [ApplyFertiliser].Script.Apply(34.5,0,0,0,0,0,0,0,0)
              2022-09-02  [ApplyFertiliser].Script.Apply(15.75,0,0,0,0,0,0,0,0)
              2022-09-13  [ApplyFertiliser].Script.Apply(46.0,0,0,0,0,0,0,0,0)
          CompositeFactor Trial_177
            Specifications:
              [Clock]
              [Weather]
              [Soil]
              [Operations]
            Clock: Start=2022-01-01; End=2023-04-26
            Weather
              FileName=%root%/Tests/Validation/Wheat/Phenology/WeatherFiles/-41.47_146.89.met
            Soil Dermosol: same as FARAwardPhenology.FARAwardPhenology.Factors.Site.Trial_6.Dermosol
            Operations
              2022-04-27  [Sowing].Script.Sow("Cesario", 200, 30, 125.0)
              2022-07-09  [ApplyFertiliser].Script.Apply(46.0,0,0,0,0,0,0,0,0)
              2022-09-27  [ApplyFertiliser].Script.Apply(57.5,0,0,0,0,0,0,0,0)
          CompositeFactor Trial_178
            Specifications:
              [Clock]
              [Weather]
              [Soil]
              [Operations]
            Clock: Start=2022-01-01; End=2023-04-30
            Weather
              FileName=%root%/Tests/Validation/Wheat/Phenology/WeatherFiles/-41.80_147.22.met
            Soil Sodosol: same as FARAwardPhenology.FARAwardPhenology.Factors.Site.Trial_2.Sodosol
            Operations
              2022-05-01  [Sowing].Script.Sow("Accroc", 200, 30, 150.0)
              2022-05-23  [ApplyFertiliser].Script.Apply(5.0,0,0,0,0,0,0,0,0)
              2022-06-23  [ApplyFertiliser].Script.Apply(34.5,0,0,0,0,0,0,0,0)
              2022-06-23  [ApplyFertiliser].Script.Apply(15.75,0,0,0,0,0,0,0,0)
              2022-09-21  [ApplyFertiliser].Script.Apply(46.0,0,0,0,0,0,0,0,0)
          CompositeFactor Trial_181
            Specifications:
              [Clock]
              [Weather]
              [Soil]
              [Operations]
            Clock: Start=2022-01-01; End=2023-05-08
            Weather
              FileName=%root%/Tests/Validation/Wheat/Phenology/WeatherFiles/-41.69_147.11.met
            Soil Sodosol: same as FARAwardPhenology.FARAwardPhenology.Factors.Site.Trial_2.Sodosol
            Operations
              2022-05-09  [Sowing].Script.Sow("Accroc", 200, 30, 178.0)
              2022-05-09  [ApplyFertiliser].Script.Apply(7.2,0,0,0,0,0,0,0,0)
              2022-08-29  [ApplyFertiliser].Script.Apply(55.2,0,0,0,0,0,0,0,0)
              2022-09-09  [ApplyFertiliser].Script.Apply(0.0,0,0,0,0,0,0,0,0)
              2022-11-15  [ApplyFertiliser].Script.Apply(0.0,0,0,0,0,0,0,0,0)
              2022-11-18  [ApplyFertiliser].Script.Apply(36.8,0,0,0,0,0,0,0,0)
          CompositeFactor Trial_182
            Specifications:
              [Clock]
              [Weather]
              [Soil]
              [Operations]
            Clock: Start=2022-01-01; End=2023-06-30
            Weather
              FileName=%root%/Tests/Validation/Wheat/Phenology/WeatherFiles/-41.80_147.44.met
            Soil Sodosol: same as FARAwardPhenology.FARAwardPhenology.Factors.Site.Trial_2.Sodosol
            Operations
              2022-07-01  [Sowing].Script.Sow("Rockstar", 200, 30, 125.0)
              2022-07-01  [ApplyFertiliser].Script.Apply(21.0,0,0,0,0,0,0,0,0)
              2022-08-30  [ApplyFertiliser].Script.Apply(33.0,0,0,0,0,0,0,0,0)
              2022-09-27  [ApplyFertiliser].Script.Apply(69.0,0,0,0,0,0,0,0,0)
              2022-09-30  [ApplyFertiliser].Script.Apply(0.0,0,0,0,0,0,0,0,0)
              2022-11-25  [ApplyFertiliser].Script.Apply(46.0,0,0,0,0,0,0,0,0)
              2022-11-29  [Irrigation].Apply(25)
              2022-12-14  [Irrigation].Apply(30)
          CompositeFactor Trial_183
            Specifications:
              [Clock]
              [Weather]
              [Soil]
              [Operations]
            Clock: Start=2022-01-01; End=2023-04-12
            Weather
              FileName=%root%/Tests/Validation/Wheat/Phenology/WeatherFiles/-41.91_147.44.met
            Soil Sodosol: same as FARAwardPhenology.FARAwardPhenology.Factors.Site.Trial_2.Sodosol
            Operations
              2022-04-13  [Sowing].Script.Sow("Accroc", 200, 30, 240.0)
              2022-04-13  [ApplyFertiliser].Script.Apply(9.0,0,0,0,0,0,0,0,0)
              2022-08-15  [ApplyFertiliser].Script.Apply(27.0,0,0,0,0,0,0,0,0)
              2022-09-05  [ApplyFertiliser].Script.Apply(39.6,0,0,0,0,0,0,0,0)
              2022-09-15  [ApplyFertiliser].Script.Apply(46.0,0,0,0,0,0,0,0,0)
              2022-10-08  [ApplyFertiliser].Script.Apply(23.0,0,0,0,0,0,0,0,0)
              2022-10-19  [ApplyFertiliser].Script.Apply(0.0,0,0,0,0,0,0,0,0)
              2022-10-19  [ApplyFertiliser].Script.Apply(0.0,0,0,0,0,0,0,0,0)
          CompositeFactor Trial_184
            Specifications:
              [Clock]
              [Weather]
              [Soil]
              [Operations]
            Clock: Start=2022-01-01; End=2023-03-07
            Weather
              FileName=%root%/Tests/Validation/Wheat/Phenology/WeatherFiles/-41.91_147.55.met
            Soil Sodosol: same as FARAwardPhenology.FARAwardPhenology.Factors.Site.Trial_2.Sodosol
            Operations
              2022-03-08  [Sowing].Script.Sow("Accroc", 200, 30, 240.0)
              2022-08-11  [ApplyFertiliser].Script.Apply(27.0,0,0,0,0,0,0,0,0)
              2022-09-05  [ApplyFertiliser].Script.Apply(39.6,0,0,0,0,0,0,0,0)
              2022-09-15  [ApplyFertiliser].Script.Apply(46.0,0,0,0,0,0,0,0,0)
              2022-10-08  [ApplyFertiliser].Script.Apply(23.0,0,0,0,0,0,0,0,0)
              2022-10-19  [ApplyFertiliser].Script.Apply(0.0,0,0,0,0,0,0,0,0)
          CompositeFactor Trial_186
            Specifications:
              [Clock]
              [Weather]
              [Soil]
              [Operations]
            Clock: Start=2022-01-01; End=2023-04-30
            Weather
              FileName=%root%/Tests/Validation/Wheat/Phenology/WeatherFiles/-36.63_145.35.met
            Soil Sodosol: same as FARAwardPhenology.FARAwardPhenology.Factors.Site.Trial_2.Sodosol
            Operations
              2022-05-01  [Sowing].Script.Sow("Scepter", 200, 30, 300.0)
              2022-05-10  [ApplyFertiliser].Script.Apply(7.8,0,0,0,0,0,0,0,0)
              2022-05-10  [ApplyFertiliser].Script.Apply(20.64,0,0,0,0,0,0,0,0)
              2022-06-20  [ApplyFertiliser].Script.Apply(36.8,0,0,0,0,0,0,0,0)
              2022-07-16  [ApplyFertiliser].Script.Apply(46.0,0,0,0,0,0,0,0,0)
              2022-08-09  [ApplyFertiliser].Script.Apply(46.0,0,0,0,0,0,0,0,0)
          CompositeFactor Trial_187
            Specifications:
              [Clock]
              [Weather]
              [Soil]
              [Operations]
            Clock: Start=2022-01-01; End=2023-04-21
            Weather
              FileName=%root%/Tests/Validation/Wheat/Phenology/WeatherFiles/-36.08_146.45.met
            Soil Sodosol: same as FARAwardPhenology.FARAwardPhenology.Factors.Site.Trial_2.Sodosol
            Operations
              2022-04-22  [Sowing].Script.Sow("Bennett", 200, 30, 250.0)
              2022-04-21  [ApplyFertiliser].Script.Apply(46.0,0,0,0,0,0,0,0,0)
              2022-04-22  [ApplyFertiliser].Script.Apply(8.0,0,0,0,0,0,0,0,0)
              2022-05-18  [ApplyFertiliser].Script.Apply(5.0,0,0,0,0,0,0,0,0)
              2022-06-20  [ApplyFertiliser].Script.Apply(46.0,0,0,0,0,0,0,0,0)
              2022-08-02  [ApplyFertiliser].Script.Apply(69.0,0,0,0,0,0,0,0,0)
          CompositeFactor Trial_188
            Specifications:
              [Clock]
              [Weather]
              [Soil]
              [Operations]
            Clock: Start=2022-01-01; End=2023-05-02
            Weather
              FileName=%root%/Tests/Validation/Wheat/Phenology/WeatherFiles/-37.40_143.81.met
            Soil Sodosol: same as FARAwardPhenology.FARAwardPhenology.Factors.Site.Trial_2.Sodosol
            Operations
              2022-05-03  [Sowing].Script.Sow("Cesario", 200, 30, 250.0)
              2022-05-04  [ApplyFertiliser].Script.Apply(10.0,0,0,0,0,0,0,0,0)
              2022-05-29  [ApplyFertiliser].Script.Apply(55.2,0,0,0,0,0,0,0,0)
              2022-07-01  [ApplyFertiliser].Script.Apply(36.8,0,0,0,0,0,0,0,0)
              2022-07-19  [ApplyFertiliser].Script.Apply(0.0,0,0,0,0,0,0,0,0)
              2022-08-28  [ApplyFertiliser].Script.Apply(0.0,0,0,0,0,0,0,0,0)
              2022-08-28  [ApplyFertiliser].Script.Apply(0.0,0,0,0,0,0,0,0,0)
              2022-09-12  [ApplyFertiliser].Script.Apply(55.2,0,0,0,0,0,0,0,0)
          CompositeFactor Trial_189
            Specifications:
              [Clock]
              [Weather]
              [Soil]
              [Operations]
            Clock: Start=2022-01-01; End=2023-04-13
            Weather
              FileName=%root%/Tests/Validation/Wheat/Phenology/WeatherFiles/-38.17_144.03.met
            Soil Sodosol: same as FARAwardPhenology.FARAwardPhenology.Factors.Site.Trial_2.Sodosol
            Operations
              2022-04-14  [Sowing].Script.Sow("BigRed", 164.0, 30, 300.0)
              2022-04-14  [ApplyFertiliser].Script.Apply(8.0,0,0,0,0,0,0,0,0)
              2022-07-25  [ApplyFertiliser].Script.Apply(0.0,0,0,0,0,0,0,0,0)
              2022-08-01  [ApplyFertiliser].Script.Apply(46.0,0,0,0,0,0,0,0,0)
              2022-09-01  [ApplyFertiliser].Script.Apply(78.2,0,0,0,0,0,0,0,0)
              2022-09-01  [ApplyFertiliser].Script.Apply(0.28,0,0,0,0,0,0,0,0)
              2022-09-22  [ApplyFertiliser].Script.Apply(69.0,0,0,0,0,0,0,0,0)
          CompositeFactor Trial_190
            Specifications:
              [Clock]
              [Weather]
              [Soil]
              [Operations]
            Clock: Start=2022-01-01; End=2023-05-07
            Weather
              FileName=%root%/Tests/Validation/Wheat/Phenology/WeatherFiles/-37.40_142.38.met
            Soil Sodosol: same as FARAwardPhenology.FARAwardPhenology.Factors.Site.Trial_2.Sodosol
            Operations
              2022-05-08  [Sowing].Script.Sow("Accroc", 200, 30, 300.0)
              2022-05-09  [ApplyFertiliser].Script.Apply(12.0,0,0,0,0,0,0,0,0)
              2022-06-24  [ApplyFertiliser].Script.Apply(40.0,0,0,0,0,0,0,0,0)
              2022-09-23  [ApplyFertiliser].Script.Apply(52.8,0,0,0,0,0,0,0,0)
              2022-10-10  [ApplyFertiliser].Script.Apply(46.0,0,0,0,0,0,0,0,0)
          CompositeFactor Trial_191
            Specifications:
              [Clock]
              [Weather]
              [Soil]
              [Operations]
            Clock: Start=2022-01-01; End=2023-04-21
            Weather
              FileName=%root%/Tests/Validation/Wheat/Phenology/WeatherFiles/-37.73_142.05.met
            Soil Sodosol: same as FARAwardPhenology.FARAwardPhenology.Factors.Site.Trial_2.Sodosol
            Operations
              2022-04-22  [Sowing].Script.Sow("Accroc", 200, 30, 150.0)
              2022-04-22  [ApplyFertiliser].Script.Apply(10.0,0,0,0,0,0,0,0,0)
              2022-04-22  [ApplyFertiliser].Script.Apply(0.0,0,0,0,0,0,0,0,0)
              2022-06-18  [ApplyFertiliser].Script.Apply(46.0,0,0,0,0,0,0,0,0)
              2022-07-19  [ApplyFertiliser].Script.Apply(55.2,0,0,0,0,0,0,0,0)
              2022-08-12  [ApplyFertiliser].Script.Apply(46.0,0,0,0,0,0,0,0,0)
              2022-08-28  [ApplyFertiliser].Script.Apply(0.0,0,0,0,0,0,0,0,0)
          CompositeFactor Trial_192
            Specifications:
              [Clock]
              [Weather]
              [Soil]
              [Operations]
            Clock: Start=2022-01-01; End=2023-04-30
            Weather
              FileName=%root%/Tests/Validation/Wheat/Phenology/WeatherFiles/-37.84_142.49.met
            Soil Sodosol: same as FARAwardPhenology.FARAwardPhenology.Factors.Site.Trial_2.Sodosol
            Operations
              2022-05-01  [Sowing].Script.Sow("BigRed", 200, 30, 250.0)
              2022-05-01  [ApplyFertiliser].Script.Apply(14.0,0,0,0,0,0,0,0,0)
              2022-06-30  [ApplyFertiliser].Script.Apply(0.0,0,0,0,0,0,0,0,0)
              2022-07-01  [ApplyFertiliser].Script.Apply(46.0,0,0,0,0,0,0,0,0)
              2022-08-11  [ApplyFertiliser].Script.Apply(46.0,0,0,0,0,0,0,0,0)
              2022-09-20  [ApplyFertiliser].Script.Apply(46.0,0,0,0,0,0,0,0,0)
          CompositeFactor Trial_193
            Specifications:
              [Clock]
              [Weather]
              [Soil]
              [Operations]
            Clock: Start=2022-01-01; End=2023-04-17
            Weather
              FileName=%root%/Tests/Validation/Wheat/Phenology/WeatherFiles/-38.06_142.38.met
            Soil Chromosol: same as FARAwardPhenology.FARAwardPhenology.Factors.Site.Trial_1.Chromosol
            Operations
              2022-04-18  [Sowing].Script.Sow("Cesario", 200, 30, 250.0)
              2022-04-01  [ApplyFertiliser].Script.Apply(0.0,0,0,0,0,0,0,0,0)
              2022-04-18  [ApplyFertiliser].Script.Apply(8.0,0,0,0,0,0,0,0,0)
              2022-07-05  [ApplyFertiliser].Script.Apply(69.0,0,0,0,0,0,0,0,0)
              2022-08-26  [ApplyFertiliser].Script.Apply(69.0,0,0,0,0,0,0,0,0)
          CompositeFactor Trial_195
            Specifications:
              [Clock]
              [Weather]
              [Soil]
              [Operations]
            Clock: Start=2022-01-01; End=2023-05-12
            Weather
              FileName=%root%/Tests/Validation/Wheat/Phenology/WeatherFiles/-37.73_142.27.met
            Soil Sodosol: same as FARAwardPhenology.FARAwardPhenology.Factors.Site.Trial_2.Sodosol
            Operations
              2022-05-13  [Sowing].Script.Sow("Revenue", 200, 30, 225.0)
              2022-05-13  [ApplyFertiliser].Script.Apply(15.0,0,0,0,0,0,0,0,0)
              2022-09-19  [ApplyFertiliser].Script.Apply(69.0,0,0,0,0,0,0,0,0)
              2022-10-26  [ApplyFertiliser].Script.Apply(59.8,0,0,0,0,0,0,0,0)
          CompositeFactor Trial_196
            Specifications:
              [Clock]
              [Weather]
              [Soil]
              [Operations]
            Clock: Start=2022-01-01; End=2023-04-21
            Weather
              FileName=%root%/Tests/Validation/Wheat/Phenology/WeatherFiles/-37.84_142.16.met
            Soil Sodosol: same as FARAwardPhenology.FARAwardPhenology.Factors.Site.Trial_2.Sodosol
            Operations
              2022-04-22  [Sowing].Script.Sow("Accroc", 200, 30, 200.0)
              2022-04-23  [ApplyFertiliser].Script.Apply(10.0,0,0,0,0,0,0,0,0)
              2022-07-14  [ApplyFertiliser].Script.Apply(0.0,0,0,0,0,0,0,0,0)
              2022-07-15  [ApplyFertiliser].Script.Apply(13.8,0,0,0,0,0,0,0,0)
              2022-07-15  [ApplyFertiliser].Script.Apply(10.5,0,0,0,0,0,0,0,0)
              2022-08-15  [ApplyFertiliser].Script.Apply(46.0,0,0,0,0,0,0,0,0)
              2022-08-26  [ApplyFertiliser].Script.Apply(0.0,0,0,0,0,0,0,0,0)
              2022-09-14  [ApplyFertiliser].Script.Apply(69.0,0,0,0,0,0,0,0,0)
          CompositeFactor Trial_197
            Specifications:
              [Clock]
              [Weather]
              [Soil]
              [Operations]
            Clock: Start=2022-01-01; End=2023-04-12
            Weather
              FileName=%root%/Tests/Validation/Wheat/Phenology/WeatherFiles/-37.95_143.92.met
            Soil Sodosol: same as FARAwardPhenology.FARAwardPhenology.Factors.Site.Trial_2.Sodosol
            Operations
              2022-04-13  [Sowing].Script.Sow("Accroc", 200, 30, 250.0)
              2022-04-13  [ApplyFertiliser].Script.Apply(8.0,0,0,0,0,0,0,0,0)
              2022-07-17  [ApplyFertiliser].Script.Apply(46.0,0,0,0,0,0,0,0,0)
              2022-08-09  [ApplyFertiliser].Script.Apply(46.0,0,0,0,0,0,0,0,0)
              2022-08-22  [ApplyFertiliser].Script.Apply(39.1,0,0,0,0,0,0,0,0)
              2022-09-23  [ApplyFertiliser].Script.Apply(0.0,0,0,0,0,0,0,0,0)
          CompositeFactor Trial_198
            Specifications:
              [Clock]
              [Weather]
              [Soil]
              [Operations]
            Clock: Start=2022-01-01; End=2023-05-08
            Weather
              FileName=%root%/Tests/Validation/Wheat/Phenology/WeatherFiles/-38.17_143.48.met
            Soil Sodosol: same as FARAwardPhenology.FARAwardPhenology.Factors.Site.Trial_2.Sodosol
            Operations
              2022-05-09  [Sowing].Script.Sow("Rockstar", 200, 30, 250.0)
              2022-05-09  [ApplyFertiliser].Script.Apply(6.5,0,0,0,0,0,0,0,0)
              2022-05-09  [ApplyFertiliser].Script.Apply(21.5,0,0,0,0,0,0,0,0)
              2022-08-11  [ApplyFertiliser].Script.Apply(46.0,0,0,0,0,0,0,0,0)
          CompositeFactor Trial_199
            Specifications:
              [Clock]
              [Weather]
              [Soil]
              [Operations]
            Clock: Start=2022-01-01; End=2023-04-15
            Weather
              FileName=%root%/Tests/Validation/Wheat/Phenology/WeatherFiles/-38.06_143.92.met
            Soil Sodosol: same as FARAwardPhenology.FARAwardPhenology.Factors.Site.Trial_2.Sodosol
            Operations
              2022-04-16  [Sowing].Script.Sow("Accroc", 200, 30, 250.0)
              2022-04-16  [ApplyFertiliser].Script.Apply(10.0,0,0,0,0,0,0,0,0)
              2022-04-16  [ApplyFertiliser].Script.Apply(46.0,0,0,0,0,0,0,0,0)
              2022-06-20  [ApplyFertiliser].Script.Apply(64.5,0,0,0,0,0,0,0,0)
              2022-07-01  [ApplyFertiliser].Script.Apply(64.5,0,0,0,0,0,0,0,0)
              2022-08-20  [ApplyFertiliser].Script.Apply(0.0,0,0,0,0,0,0,0,0)
              2022-08-20  [ApplyFertiliser].Script.Apply(0.0,0,0,0,0,0,0,0,0)
          CompositeFactor Trial_200
            Specifications:
              [Clock]
              [Weather]
              [Soil]
              [Operations]
            Clock: Start=2022-01-01; End=2023-04-14
            Weather
              FileName=%root%/Tests/Validation/Wheat/Phenology/WeatherFiles/-37.84_143.70.met
            Soil Sodosol: same as FARAwardPhenology.FARAwardPhenology.Factors.Site.Trial_2.Sodosol
            Operations
              2022-04-15  [Sowing].Script.Sow("Accroc", 200, 30, 250.0)
              2022-04-15  [ApplyFertiliser].Script.Apply(15.19,0,0,0,0,0,0,0,0)
              2022-06-16  [ApplyFertiliser].Script.Apply(46.0,0,0,0,0,0,0,0,0)
              2022-08-11  [ApplyFertiliser].Script.Apply(46.0,0,0,0,0,0,0,0,0)
          CompositeFactor Trial_201
            Specifications:
              [Clock]
              [Weather]
              [Soil]
              [Operations]
            Clock: Start=2022-01-01; End=2023-05-04
            Weather
              FileName=%root%/Tests/Validation/Wheat/Phenology/WeatherFiles/-38.06_143.37.met
            Soil Sodosol: same as FARAwardPhenology.FARAwardPhenology.Factors.Site.Trial_2.Sodosol
            Operations
              2022-05-05  [Sowing].Script.Sow("Beaufort", 174.0, 30, 250.0)
              2022-05-05  [ApplyFertiliser].Script.Apply(8.0,0,0,0,0,0,0,0,0)
              2022-05-05  [ApplyFertiliser].Script.Apply(46.0,0,0,0,0,0,0,0,0)
              2022-07-13  [ApplyFertiliser].Script.Apply(0.0,0,0,0,0,0,0,0,0)
              2022-07-13  [ApplyFertiliser].Script.Apply(0.0,0,0,0,0,0,0,0,0)
              2022-07-15  [ApplyFertiliser].Script.Apply(69.0,0,0,0,0,0,0,0,0)
              2022-08-09  [ApplyFertiliser].Script.Apply(36.8,0,0,0,0,0,0,0,0)
              2022-09-06  [ApplyFertiliser].Script.Apply(0.0,0,0,0,0,0,0,0,0)
              2022-09-06  [ApplyFertiliser].Script.Apply(0.0,0,0,0,0,0,0,0,0)
          CompositeFactor Trial_202
            Specifications:
              [Clock]
              [Weather]
              [Soil]
              [Operations]
            Clock: Start=2022-01-01; End=2023-04-27
            Weather
              FileName=%root%/Tests/Validation/Wheat/Phenology/WeatherFiles/-37.73_142.60.met
            Soil Sodosol: same as FARAwardPhenology.FARAwardPhenology.Factors.Site.Trial_2.Sodosol
            Operations
              2022-04-28  [Sowing].Script.Sow("Beaufort", 200, 30, 175.0)
              2022-04-14  [ApplyFertiliser].Script.Apply(0.0,0,0,0,0,0,0,0,0)
              2022-04-28  [ApplyFertiliser].Script.Apply(6.0,0,0,0,0,0,0,0,0)
              2022-04-28  [ApplyFertiliser].Script.Apply(0.0,0,0,0,0,0,0,0,0)
              2022-06-19  [ApplyFertiliser].Script.Apply(55.2,0,0,0,0,0,0,0,0)
              2022-07-15  [ApplyFertiliser].Script.Apply(46.0,0,0,0,0,0,0,0,0)
              2022-08-09  [ApplyFertiliser].Script.Apply(50.6,0,0,0,0,0,0,0,0)
              2022-08-09  [ApplyFertiliser].Script.Apply(0.0,0,0,0,0,0,0,0,0)
              2022-09-13  [ApplyFertiliser].Script.Apply(46.0,0,0,0,0,0,0,0,0)
          CompositeFactor Trial_203
            Specifications:
              [Clock]
              [Weather]
              [Soil]
              [Operations]
            Clock: Start=2022-01-01; End=2023-04-22
            Weather
              FileName=%root%/Tests/Validation/Wheat/Phenology/WeatherFiles/-37.40_142.93.met
            Soil Sodosol: same as FARAwardPhenology.FARAwardPhenology.Factors.Site.Trial_2.Sodosol
            Operations
              2022-04-23  [Sowing].Script.Sow("Calibro", 223.0, 30, 247.0)
              2022-04-23  [ApplyFertiliser].Script.Apply(7.5,0,0,0,0,0,0,0,0)
              2022-07-20  [ApplyFertiliser].Script.Apply(46.0,0,0,0,0,0,0,0,0)
              2022-08-20  [ApplyFertiliser].Script.Apply(46.0,0,0,0,0,0,0,0,0)
          CompositeFactor Trial_204
            Specifications:
              [Clock]
              [Weather]
              [Soil]
              [Operations]
            Clock: Start=2022-01-01; End=2023-05-18
            Weather
              FileName=%root%/Tests/Validation/Wheat/Phenology/WeatherFiles/-37.84_142.82.met
            Soil Sodosol: same as FARAwardPhenology.FARAwardPhenology.Factors.Site.Trial_2.Sodosol
            Operations
              2022-05-19  [Sowing].Script.Sow("Rockstar", 200, 30, 250.0)
              2022-05-19  [ApplyFertiliser].Script.Apply(8.0,0,0,0,0,0,0,0,0)
              2022-06-22  [ApplyFertiliser].Script.Apply(46.0,0,0,0,0,0,0,0,0)
              2022-08-22  [ApplyFertiliser].Script.Apply(69.0,0,0,0,0,0,0,0,0)
              2022-08-30  [ApplyFertiliser].Script.Apply(0.0,0,0,0,0,0,0,0,0)
              2022-09-22  [ApplyFertiliser].Script.Apply(46.0,0,0,0,0,0,0,0,0)
          CompositeFactor Trial_205
            Specifications:
              [Clock]
              [Weather]
              [Soil]
              [Operations]
            Clock: Start=2022-01-01; End=2023-04-30
            Weather
              FileName=%root%/Tests/Validation/Wheat/Phenology/WeatherFiles/-36.41_141.39.met
            Soil Sodosol: same as FARAwardPhenology.FARAwardPhenology.Factors.Site.Trial_2.Sodosol
            Operations
              2022-05-01  [Sowing].Script.Sow("Scepter", 200, 30, 299.0)
              2022-05-01  [ApplyFertiliser].Script.Apply(7.7,0,0,0,0,0,0,0,0)
              2022-07-15  [ApplyFertiliser].Script.Apply(23.0,0,0,0,0,0,0,0,0)
              2022-08-15  [ApplyFertiliser].Script.Apply(69.0,0,0,0,0,0,0,0,0)
          CompositeFactor Trial_207
            Specifications:
              [Clock]
              [Weather]
              [Soil]
              [Operations]
            Clock: Start=2022-01-01; End=2023-04-03
            Weather
              FileName=%root%/Tests/Validation/Wheat/Phenology/WeatherFiles/-37.62_143.04.met
            Soil Sodosol: same as FARAwardPhenology.FARAwardPhenology.Factors.Site.Trial_2.Sodosol
            Operations
              2022-04-04  [Sowing].Script.Sow("Cesario", 200, 30, 250.0)
              2022-07-05  [ApplyFertiliser].Script.Apply(69.0,0,0,0,0,0,0,0,0)
              2022-08-26  [ApplyFertiliser].Script.Apply(46.0,0,0,0,0,0,0,0,0)
              2022-08-28  [ApplyFertiliser].Script.Apply(0.0,0,0,0,0,0,0,0,0)
          CompositeFactor Trial_208
            Specifications:
              [Clock]
              [Weather]
              [Soil]
              [Operations]
            Clock: Start=2022-01-01; End=2023-04-06
            Weather
              FileName=%root%/Tests/Validation/Wheat/Phenology/WeatherFiles/-37.29_143.92.met
            Soil Vertosol: same as FARAwardPhenology.FARAwardPhenology.Factors.Site.Trial_14.Vertosol
            Operations
              2022-04-07  [Sowing].Script.Sow("Accroc", 200, 30, 250.0)
              2022-04-07  [ApplyFertiliser].Script.Apply(12.0,0,0,0,0,0,0,0,0)
              2022-06-24  [ApplyFertiliser].Script.Apply(36.8,0,0,0,0,0,0,0,0)
              2022-07-29  [ApplyFertiliser].Script.Apply(55.2,0,0,0,0,0,0,0,0)
              2022-09-05  [ApplyFertiliser].Script.Apply(69.0,0,0,0,0,0,0,0,0)
          CompositeFactor Trial_209
            Specifications:
              [Clock]
              [Weather]
              [Soil]
              [Operations]
            Clock: Start=2022-01-01; End=2023-05-15
            Weather
              FileName=%root%/Tests/Validation/Wheat/Phenology/WeatherFiles/-34.43_117.41.met
            Soil Sodosol: same as FARAwardPhenology.FARAwardPhenology.Factors.Site.Trial_2.Sodosol
            Operations
              2022-05-16  [Sowing].Script.Sow("Illabo", 200, 30, 165.0)
              2022-05-16  [ApplyFertiliser].Script.Apply(9.9,0,0,0,0,0,0,0,0)
              2022-05-16  [ApplyFertiliser].Script.Apply(0.0,0,0,0,0,0,0,0,0)
              2022-05-16  [ApplyFertiliser].Script.Apply(6.0,0,0,0,0,0,0,0,0)
              2022-06-11  [ApplyFertiliser].Script.Apply(34.3,0,0,0,0,0,0,0,0)
              2022-07-17  [ApplyFertiliser].Script.Apply(32.2,0,0,0,0,0,0,0,0)
              2022-08-12  [ApplyFertiliser].Script.Apply(23.0,0,0,0,0,0,0,0,0)
          CompositeFactor Trial_211
            Specifications:
              [Clock]
              [Weather]
              [Soil]
              [Operations]
            Clock: Start=2022-01-01; End=2023-04-30
            Weather
              FileName=%root%/Tests/Validation/Wheat/Phenology/WeatherFiles/-34.32_118.18.met
            Soil Sodosol: same as FARAwardPhenology.FARAwardPhenology.Factors.Site.Trial_2.Sodosol
            Operations
              2022-05-01  [Sowing].Script.Sow("Scepter", 200, 30, 250.0)
              2022-05-11  [ApplyFertiliser].Script.Apply(32.2,0,0,0,0,0,0,0,0)
              2022-05-12  [ApplyFertiliser].Script.Apply(5.5,0,0,0,0,0,0,0,0)
              2022-06-28  [ApplyFertiliser].Script.Apply(0.0,0,0,0,0,0,0,0,0)
          CompositeFactor Trial_212
            Specifications:
              [Clock]
              [Weather]
              [Soil]
              [Operations]
            Clock: Start=2022-01-01; End=2023-05-16
            Weather
              FileName=%root%/Tests/Validation/Wheat/Phenology/WeatherFiles/-34.21_118.95.met
            Soil Sodosol: same as FARAwardPhenology.FARAwardPhenology.Factors.Site.Trial_2.Sodosol
            Operations
              2022-05-17  [Sowing].Script.Sow("Scepter", 200, 30, 250.0)
              2022-05-17  [ApplyFertiliser].Script.Apply(21.0,0,0,0,0,0,0,0,0)
              2022-05-17  [ApplyFertiliser].Script.Apply(5.0,0,0,0,0,0,0,0,0)
              2022-07-01  [ApplyFertiliser].Script.Apply(46.0,0,0,0,0,0,0,0,0)
              2022-07-01  [ApplyFertiliser].Script.Apply(0.0,0,0,0,0,0,0,0,0)
              2022-08-10  [ApplyFertiliser].Script.Apply(36.8,0,0,0,0,0,0,0,0)
          CompositeFactor Trial_214
            Specifications:
              [Clock]
              [Weather]
              [Soil]
              [Operations]
            Clock: Start=2022-01-01; End=2023-04-30
            Weather
              FileName=%root%/Tests/Validation/Wheat/Phenology/WeatherFiles/-34.54_117.52.met
            Soil Sodosol: same as FARAwardPhenology.FARAwardPhenology.Factors.Site.Trial_2.Sodosol
            Operations
              2022-05-01  [Sowing].Script.Sow("Rockstar", 200, 30, 250.0)
              2022-05-23  [ApplyFertiliser].Script.Apply(8.69,0,0,0,0,0,0,0,0)
              2022-05-23  [ApplyFertiliser].Script.Apply(2.4,0,0,0,0,0,0,0,0)
              2022-05-23  [ApplyFertiliser].Script.Apply(0.0,0,0,0,0,0,0,0,0)
              2022-06-13  [ApplyFertiliser].Script.Apply(0.0,0,0,0,0,0,0,0,0)
              2022-07-07  [ApplyFertiliser].Script.Apply(41.4,0,0,0,0,0,0,0,0)
              2022-07-07  [ApplyFertiliser].Script.Apply(0.0,0,0,0,0,0,0,0,0)
              2022-09-02  [ApplyFertiliser].Script.Apply(36.8,0,0,0,0,0,0,0,0)
          CompositeFactor Trial_216
            Specifications:
              [Clock]
              [Weather]
              [Soil]
              [Operations]
            Clock: Start=2022-01-01; End=2023-05-20
            Weather
              FileName=%root%/Tests/Validation/Wheat/Phenology/WeatherFiles/-33.88_116.75.met
            Soil Sodosol: same as FARAwardPhenology.FARAwardPhenology.Factors.Site.Trial_2.Sodosol
            Operations
              2022-05-21  [Sowing].Script.Sow("Rockstar", 200, 30, 250.0)
              2022-05-01  [ApplyFertiliser].Script.Apply(0.0,0,0,0,0,0,0,0,0)
              2022-05-21  [ApplyFertiliser].Script.Apply(16.8,0,0,0,0,0,0,0,0)
              2022-05-21  [ApplyFertiliser].Script.Apply(11.97,0,0,0,0,0,0,0,0)
              2022-06-22  [ApplyFertiliser].Script.Apply(55.2,0,0,0,0,0,0,0,0)
              2022-08-12  [ApplyFertiliser].Script.Apply(27.6,0,0,0,0,0,0,0,0)
          CompositeFactor Trial_217
            Specifications:
              [Clock]
              [Weather]
              [Soil]
              [Operations]
            Clock: Start=2022-01-01; End=2023-03-21
            Weather
              FileName=%root%/Tests/Validation/Wheat/Phenology/WeatherFiles/-33.88_116.97.met
            Soil Chromosol: same as FARAwardPhenology.FARAwardPhenology.Factors.Site.Trial_1.Chromosol
            Operations
              2022-03-22  [Sowing].Script.Sow("Accroc", 200, 30, 250.0)
              2022-03-15  [ApplyFertiliser].Script.Apply(31.5,0,0,0,0,0,0,0,0)
              2022-06-01  [ApplyFertiliser].Script.Apply(23.0,0,0,0,0,0,0,0,0)
              2022-07-15  [ApplyFertiliser].Script.Apply(23.0,0,0,0,0,0,0,0,0)
              2022-09-10  [ApplyFertiliser].Script.Apply(46.0,0,0,0,0,0,0,0,0)
          CompositeFactor Trial_218
            Specifications:
              [Clock]
              [Weather]
              [Soil]
              [Operations]
            Clock: Start=2022-01-01; End=2023-04-02
            Weather
              FileName=%root%/Tests/Validation/Wheat/Phenology/WeatherFiles/-34.54_117.30.met
            Soil Chromosol: same as FARAwardPhenology.FARAwardPhenology.Factors.Site.Trial_1.Chromosol
            Operations
              2022-04-03  [Sowing].Script.Sow("Bennett", 200, 30, 250.0)
              2022-04-03  [ApplyFertiliser].Script.Apply(42.0,0,0,0,0,0,0,0,0)
              2022-04-03  [ApplyFertiliser].Script.Apply(2.014,0,0,0,0,0,0,0,0)
              2022-04-03  [ApplyFertiliser].Script.Apply(5.544,0,0,0,0,0,0,0,0)
              2022-04-03  [ApplyFertiliser].Script.Apply(10.56,0,0,0,0,0,0,0,0)
              2022-06-23  [ApplyFertiliser].Script.Apply(42.0,0,0,0,0,0,0,0,0)
              2022-06-23  [ApplyFertiliser].Script.Apply(0.0,0,0,0,0,0,0,0,0)
              2022-06-23  [ApplyFertiliser].Script.Apply(0.0,0,0,0,0,0,0,0,0)
              2022-07-31  [ApplyFertiliser].Script.Apply(50.4,0,0,0,0,0,0,0,0)
              2022-07-31  [ApplyFertiliser].Script.Apply(0.0,0,0,0,0,0,0,0,0)
              2022-07-31  [ApplyFertiliser].Script.Apply(0.0,0,0,0,0,0,0,0,0)
              2022-08-28  [ApplyFertiliser].Script.Apply(58.8,0,0,0,0,0,0,0,0)
              2022-08-28  [ApplyFertiliser].Script.Apply(0.0,0,0,0,0,0,0,0,0)
              2022-08-28  [ApplyFertiliser].Script.Apply(0.0,0,0,0,0,0,0,0,0)
              2022-10-16  [ApplyFertiliser].Script.Apply(25.2,0,0,0,0,0,0,0,0)
          CompositeFactor Trial_219
            Specifications:
              [Clock]
              [Weather]
              [Soil]
              [Operations]
            Clock: Start=2022-01-01; End=2023-04-04
            Weather
              FileName=%root%/Tests/Validation/Wheat/Phenology/WeatherFiles/-34.54_117.41.met
            Soil Chromosol: same as FARAwardPhenology.FARAwardPhenology.Factors.Site.Trial_1.Chromosol
            Operations
              2022-04-05  [Sowing].Script.Sow("Accroc", 200, 30, 114.0)
              2022-04-05  [ApplyFertiliser].Script.Apply(9.9,0,0,0,0,0,0,0,0)
              2022-04-05  [ApplyFertiliser].Script.Apply(0.0,0,0,0,0,0,0,0,0)
              2022-04-05  [ApplyFertiliser].Script.Apply(6.0,0,0,0,0,0,0,0,0)
              2022-05-10  [ApplyFertiliser].Script.Apply(27.44,0,0,0,0,0,0,0,0)
              2022-06-09  [ApplyFertiliser].Script.Apply(27.6,0,0,0,0,0,0,0,0)
              2022-07-18  [ApplyFertiliser].Script.Apply(34.5,0,0,0,0,0,0,0,0)
              2022-08-12  [ApplyFertiliser].Script.Apply(23.0,0,0,0,0,0,0,0,0)
          CompositeFactor Trial_221
            Specifications:
              [Clock]
              [Weather]
              [Soil]
              [Operations]
            Clock: Start=2023-01-01; End=2024-02-29
            Weather
              FileName=%root%/Tests/Validation/Wheat/Phenology/WeatherFiles/-35.75_146.12.met
            Soil Sodosol: same as FARAwardPhenology.FARAwardPhenology.Factors.Site.Trial_2.Sodosol
            Operations
              2023-05-14  [Sowing].Script.Sow("Scepter", 200, 30, 330.0)
              2023-05-14  [ApplyFertiliser].Script.Apply(9.0,0,0,0,0,0,0,0,0)
              2023-06-02  [ApplyFertiliser].Script.Apply(69.0,0,0,0,0,0,0,0,0)
              2023-07-15  [ApplyFertiliser].Script.Apply(69.0,0,0,0,0,0,0,0,0)
              2024-09-02  [ApplyFertiliser].Script.Apply(23.0,0,0,0,0,0,0,0,0)
              2023-09-12  [Irrigation].Apply(100)
          CompositeFactor Trial_222
            Specifications:
              [Clock]
              [Weather]
              [Soil]
              [Operations]
            Clock: Start=2023-01-01; End=2024-02-29
            Weather
              FileName=%root%/Tests/Validation/Wheat/Phenology/WeatherFiles/-35.86_146.12.met
            Soil Sodosol: same as FARAwardPhenology.FARAwardPhenology.Factors.Site.Trial_2.Sodosol
            Operations
              2023-05-09  [Sowing].Script.Sow("Scepter", 200, 30, 250.0)
              2023-05-09  [ApplyFertiliser].Script.Apply(8.0,0,0,0,0,0,0,0,0)
              2023-06-30  [ApplyFertiliser].Script.Apply(55.2,0,0,0,0,0,0,0,0)
              2023-08-04  [ApplyFertiliser].Script.Apply(46.0,0,0,0,0,0,0,0,0)
          CompositeFactor Trial_223
            Specifications:
              [Clock]
              [Weather]
              [Soil]
              [Operations]
            Clock: Start=2023-01-01; End=2024-02-29
            Weather
              FileName=%root%/Tests/Validation/Wheat/Phenology/WeatherFiles/-34.98_147.44.met
            Soil Kandosol: same as FARAwardPhenology.FARAwardPhenology.Factors.Site.Trial_73.Kandosol
            Operations
              2023-04-29  [Sowing].Script.Sow("Rockstar", 93.0, 30, 250.0)
              2023-04-29  [ApplyFertiliser].Script.Apply(8.0,0,0,0,0,0,0,0,0)
              2023-06-14  [ApplyFertiliser].Script.Apply(46.0,0,0,0,0,0,0,0,0)
              2023-07-09  [ApplyFertiliser].Script.Apply(0.0,0,0,0,0,0,0,0,0)
              2023-07-21  [ApplyFertiliser].Script.Apply(69.0,0,0,0,0,0,0,0,0)
          CompositeFactor Trial_224
            Specifications:
              [Clock]
              [Weather]
              [Soil]
              [Operations]
            Clock: Start=2023-01-01; End=2024-02-29
            Weather
              FileName=%root%/Tests/Validation/Wheat/Phenology/WeatherFiles/-35.86_147.00.met
            Soil Sodosol: same as FARAwardPhenology.FARAwardPhenology.Factors.Site.Trial_2.Sodosol
            Operations
              2023-05-13  [Sowing].Script.Sow("Scepter", 200, 30, 225.0)
              2023-04-04  [ApplyFertiliser].Script.Apply(8.5,0,0,0,0,0,0,0,0)
              2023-04-04  [ApplyFertiliser].Script.Apply(13.8,0,0,0,0,0,0,0,0)
              2023-05-13  [ApplyFertiliser].Script.Apply(4.0,0,0,0,0,0,0,0,0)
              2023-05-27  [ApplyFertiliser].Script.Apply(40.48,0,0,0,0,0,0,0,0)
              2023-08-28  [ApplyFertiliser].Script.Apply(40.48,0,0,0,0,0,0,0,0)
          CompositeFactor Trial_225
            Specifications:
              [Clock]
              [Weather]
              [Soil]
              [Operations]
            Clock: Start=2023-01-01; End=2024-02-29
            Weather
              FileName=%root%/Tests/Validation/Wheat/Phenology/WeatherFiles/-35.86_146.89.met
            Soil Sodosol: same as FARAwardPhenology.FARAwardPhenology.Factors.Site.Trial_2.Sodosol
            Operations
              2023-03-16  [Sowing].Script.Sow("Bennett", 200, 30, 225.0)
              2023-03-16  [ApplyFertiliser].Script.Apply(8.0,0,0,0,0,0,0,0,0)
              2023-03-24  [ApplyFertiliser].Script.Apply(36.8,0,0,0,0,0,0,0,0)
              2023-05-29  [ApplyFertiliser].Script.Apply(16.8,0,0,0,0,0,0,0,0)
              2023-06-28  [ApplyFertiliser].Script.Apply(46.0,0,0,0,0,0,0,0,0)
              2023-07-25  [ApplyFertiliser].Script.Apply(0.0,0,0,0,0,0,0,0,0)
              2023-07-26  [ApplyFertiliser].Script.Apply(46.0,0,0,0,0,0,0,0,0)
              2023-09-07  [ApplyFertiliser].Script.Apply(41.4,0,0,0,0,0,0,0,0)
          CompositeFactor Trial_226
            Specifications:
              [Clock]
              [Weather]
              [Soil]
              [Operations]
            Clock: Start=2023-01-01; End=2024-02-29
            Weather
              FileName=%root%/Tests/Validation/Wheat/Phenology/WeatherFiles/-35.86_146.67.met
            Soil Sodosol: same as FARAwardPhenology.FARAwardPhenology.Factors.Site.Trial_2.Sodosol
            Operations
              2023-05-15  [Sowing].Script.Sow("Scepter", 200, 30, 300.0)
              2023-05-15  [ApplyFertiliser].Script.Apply(8.0,0,0,0,0,0,0,0,0)
              2023-06-25  [ApplyFertiliser].Script.Apply(27.6,0,0,0,0,0,0,0,0)
              2023-07-26  [ApplyFertiliser].Script.Apply(20.7,0,0,0,0,0,0,0,0)
              2023-07-26  [ApplyFertiliser].Script.Apply(8.4,0,0,0,0,0,0,0,0)
              2023-08-15  [ApplyFertiliser].Script.Apply(23.0,0,0,0,0,0,0,0,0)
              2023-08-15  [ApplyFertiliser].Script.Apply(4.2,0,0,0,0,0,0,0,0)
              2023-08-16  [ApplyFertiliser].Script.Apply(2.9,0,0,0,0,0,0,0,0)
              2023-08-16  [ApplyFertiliser].Script.Apply(0.0,0,0,0,0,0,0,0,0)
          CompositeFactor Trial_227
            Specifications:
              [Clock]
              [Weather]
              [Soil]
              [Operations]
            Clock: Start=2023-01-01; End=2024-02-29
            Weather
              FileName=%root%/Tests/Validation/Wheat/Phenology/WeatherFiles/-35.64_147.11.met
            Soil Sodosol: same as FARAwardPhenology.FARAwardPhenology.Factors.Site.Trial_2.Sodosol
            Operations
              2023-05-18  [Sowing].Script.Sow("Rockstar", 200, 30, 185.0)
              2023-04-01  [ApplyFertiliser].Script.Apply(0.0,0,0,0,0,0,0,0,0)
              2023-05-18  [ApplyFertiliser].Script.Apply(10.0,0,0,0,0,0,0,0,0)
              2023-06-04  [ApplyFertiliser].Script.Apply(69.0,0,0,0,0,0,0,0,0)
              2023-08-20  [ApplyFertiliser].Script.Apply(69.0,0,0,0,0,0,0,0,0)
          CompositeFactor Trial_228
            Specifications:
              [Clock]
              [Weather]
              [Soil]
              [Operations]
            Clock: Start=2023-01-01; End=2024-02-29
            Weather
              FileName=%root%/Tests/Validation/Wheat/Phenology/WeatherFiles/-36.96_140.95.met
            Soil Vertosol: same as FARAwardPhenology.FARAwardPhenology.Factors.Site.Trial_14.Vertosol
            Operations
              2023-05-11  [Sowing].Script.Sow("BigRed", 200, 30, 254.0)
              2023-05-11  [ApplyFertiliser].Script.Apply(0.0,0,0,0,0,0,0,0,0)
              2023-05-11  [ApplyFertiliser].Script.Apply(8.0,0,0,0,0,0,0,0,0)
              2023-06-12  [ApplyFertiliser].Script.Apply(46.0,0,0,0,0,0,0,0,0)
              2023-09-05  [ApplyFertiliser].Script.Apply(59.8,0,0,0,0,0,0,0,0)
              2023-09-06  [ApplyFertiliser].Script.Apply(0.0,0,0,0,0,0,0,0,0)
              2023-09-18  [ApplyFertiliser].Script.Apply(36.8,0,0,0,0,0,0,0,0)
          CompositeFactor Trial_229
            Specifications:
              [Clock]
              [Weather]
              [Soil]
              [Operations]
            Clock: Start=2023-01-01; End=2024-02-29
            Weather
              FileName=%root%/Tests/Validation/Wheat/Phenology/WeatherFiles/-37.18_140.73.met
            Soil Podosol: same as FARAwardPhenology.FARAwardPhenology.Factors.Site.Trial_98.Podosol
            Operations
              2023-05-10  [Sowing].Script.Sow("Rockstar", 200, 30, 254.0)
              2023-05-10  [ApplyFertiliser].Script.Apply(10.0,0,0,0,0,0,0,0,0)
              2023-07-05  [ApplyFertiliser].Script.Apply(92.0,0,0,0,0,0,0,0,0)
              2023-07-25  [ApplyFertiliser].Script.Apply(0.0,0,0,0,0,0,0,0,0)
              2023-07-25  [ApplyFertiliser].Script.Apply(0.0,0,0,0,0,0,0,0,0)
              2023-08-15  [ApplyFertiliser].Script.Apply(92.0,0,0,0,0,0,0,0,0)
          CompositeFactor Trial_230
            Specifications:
              [Clock]
              [Weather]
              [Soil]
              [Operations]
            Clock: Start=2023-01-01; End=2024-02-29
            Weather
              FileName=%root%/Tests/Validation/Wheat/Phenology/WeatherFiles/-37.18_140.73.met
            Soil Vertosol: same as FARAwardPhenology.FARAwardPhenology.Factors.Site.Trial_14.Vertosol
            Operations
              2023-05-14  [Sowing].Script.Sow("Cesario", 200, 30, 305.0)
              2023-05-14  [ApplyFertiliser].Script.Apply(10.0,0,0,0,0,0,0,0,0)
              2023-09-01  [ApplyFertiliser].Script.Apply(0.0,0,0,0,0,0,0,0,0)
              2023-09-07  [ApplyFertiliser].Script.Apply(92.0,0,0,0,0,0,0,0,0)
              2023-09-17  [ApplyFertiliser].Script.Apply(92.0,0,0,0,0,0,0,0,0)
              2023-09-27  [ApplyFertiliser].Script.Apply(0.0,0,0,0,0,0,0,0,0)
              2023-09-27  [ApplyFertiliser].Script.Apply(0.0,0,0,0,0,0,0,0,0)
              2023-09-27  [ApplyFertiliser].Script.Apply(0.0,0,0,0,0,0,0,0,0)
              2023-09-27  [ApplyFertiliser].Script.Apply(0.1,0,0,0,0,0,0,0,0)
              2023-10-20  [ApplyFertiliser].Script.Apply(0.0,0,0,0,0,0,0,0,0)
          CompositeFactor Trial_232
            Specifications:
              [Clock]
              [Weather]
              [Soil]
              [Operations]
            Clock: Start=2023-01-01; End=2024-02-29
            Weather
              FileName=%root%/Tests/Validation/Wheat/Phenology/WeatherFiles/-37.18_140.29.met
            Soil Tenosol: same as FARAwardPhenology.FARAwardPhenology.Factors.Site.Trial_68.Tenosol
            Operations
              2023-05-16  [Sowing].Script.Sow("Cesario", 200, 30, 178.0)
              2023-03-23  [ApplyFertiliser].Script.Apply(0.0,0,0,0,0,0,0,0,0)
              2023-05-16  [ApplyFertiliser].Script.Apply(10.0,0,0,0,0,0,0,0,0)
              2023-07-25  [ApplyFertiliser].Script.Apply(0.12,0,0,0,0,0,0,0,0)
              2023-08-15  [ApplyFertiliser].Script.Apply(0.09,0,0,0,0,0,0,0,0)
              2023-08-31  [ApplyFertiliser].Script.Apply(45.0,0,0,0,0,0,0,0,0)
              2023-09-06  [ApplyFertiliser].Script.Apply(0.0,0,0,0,0,0,0,0,0)
              2023-10-03  [ApplyFertiliser].Script.Apply(46.0,0,0,0,0,0,0,0,0)
              2023-10-09  [ApplyFertiliser].Script.Apply(0.09,0,0,0,0,0,0,0,0)
              2023-10-09  [ApplyFertiliser].Script.Apply(0.0,0,0,0,0,0,0,0,0)
              2023-10-09  [ApplyFertiliser].Script.Apply(0.0,0,0,0,0,0,0,0,0)
          CompositeFactor Trial_233
            Specifications:
              [Clock]
              [Weather]
              [Soil]
              [Operations]
            Clock: Start=2023-01-01; End=2024-02-29
            Weather
              FileName=%root%/Tests/Validation/Wheat/Phenology/WeatherFiles/-37.18_140.18.met
            Soil Tenosol: same as FARAwardPhenology.FARAwardPhenology.Factors.Site.Trial_68.Tenosol
            Operations
              2023-05-15  [Sowing].Script.Sow("Accroc", 200, 30, 178.0)
              2023-03-23  [ApplyFertiliser].Script.Apply(0.0,0,0,0,0,0,0,0,0)
              2023-05-15  [ApplyFertiliser].Script.Apply(10.0,0,0,0,0,0,0,0,0)
              2023-08-31  [ApplyFertiliser].Script.Apply(45.0,0,0,0,0,0,0,0,0)
              2023-09-05  [ApplyFertiliser].Script.Apply(0.0,0,0,0,0,0,0,0,0)
              2023-10-01  [ApplyFertiliser].Script.Apply(0.0,0,0,0,0,0,0,0,0)
              2023-10-01  [ApplyFertiliser].Script.Apply(0.0,0,0,0,0,0,0,0,0)
              2023-10-01  [ApplyFertiliser].Script.Apply(0.0,0,0,0,0,0,0,0,0)
              2023-10-31  [ApplyFertiliser].Script.Apply(46.0,0,0,0,0,0,0,0,0)
          CompositeFactor Trial_234
            Specifications:
              [Clock]
              [Weather]
              [Soil]
              [Operations]
            Clock: Start=2023-01-01; End=2024-02-29
            Weather
              FileName=%root%/Tests/Validation/Wheat/Phenology/WeatherFiles/-37.51_140.29.met
            Soil Vertosol: same as FARAwardPhenology.FARAwardPhenology.Factors.Site.Trial_14.Vertosol
            Operations
              2023-05-18  [Sowing].Script.Sow("Cesario", 200, 30, 178.0)
              2023-07-28  [ApplyFertiliser].Script.Apply(0.0,0,0,0,0,0,0,0,0)
              2023-07-28  [ApplyFertiliser].Script.Apply(0.0,0,0,0,0,0,0,0,0)
              2023-08-20  [ApplyFertiliser].Script.Apply(2.9,0,0,0,0,0,0,0,0)
              2023-08-28  [ApplyFertiliser].Script.Apply(0.0,0,0,0,0,0,0,0,0)
              2023-08-28  [ApplyFertiliser].Script.Apply(0.0,0,0,0,0,0,0,0,0)
              2023-08-28  [ApplyFertiliser].Script.Apply(57.5,0,0,0,0,0,0,0,0)
              2023-10-01  [ApplyFertiliser].Script.Apply(0.0,0,0,0,0,0,0,0,0)
              2023-10-01  [ApplyFertiliser].Script.Apply(0.0,0,0,0,0,0,0,0,0)
          CompositeFactor Trial_235
            Specifications:
              [Clock]
              [Weather]
              [Soil]
              [Operations]
            Clock: Start=2023-01-01; End=2024-02-29
            Weather
              FileName=%root%/Tests/Validation/Wheat/Phenology/WeatherFiles/-37.51_140.29.met
            Soil Vertosol: same as FARAwardPhenology.FARAwardPhenology.Factors.Site.Trial_14.Vertosol
            Operations
              2023-05-04  [Sowing].Script.Sow("BigRed", 200, 30, 178.0)
              2023-05-04  [ApplyFertiliser].Script.Apply(9.5,0,0,0,0,0,0,0,0)
              2023-06-15  [ApplyFertiliser].Script.Apply(0.0,0,0,0,0,0,0,0,0)
              2023-06-15  [ApplyFertiliser].Script.Apply(0.0,0,0,0,0,0,0,0,0)
              2023-07-02  [ApplyFertiliser].Script.Apply(0.0,0,0,0,0,0,0,0,0)
              2023-07-02  [ApplyFertiliser].Script.Apply(0.0,0,0,0,0,0,0,0,0)
              2023-07-02  [ApplyFertiliser].Script.Apply(0.0,0,0,0,0,0,0,0,0)
              2023-07-21  [ApplyFertiliser].Script.Apply(46.0,0,0,0,0,0,0,0,0)
              2023-08-25  [ApplyFertiliser].Script.Apply(0.0,0,0,0,0,0,0,0,0)
              2023-08-25  [ApplyFertiliser].Script.Apply(0.0,0,0,0,0,0,0,0,0)
              2023-08-25  [ApplyFertiliser].Script.Apply(0.0,0,0,0,0,0,0,0,0)
              2023-09-04  [ApplyFertiliser].Script.Apply(69.0,0,0,0,0,0,0,0,0)
              2023-10-17  [ApplyFertiliser].Script.Apply(1.45,0,0,0,0,0,0,0,0)
              2023-10-17  [ApplyFertiliser].Script.Apply(0.0,0,0,0,0,0,0,0,0)
              2023-10-17  [ApplyFertiliser].Script.Apply(0.0,0,0,0,0,0,0,0,0)
          CompositeFactor Trial_236
            Specifications:
              [Clock]
              [Weather]
              [Soil]
              [Operations]
            Clock: Start=2023-01-01; End=2024-02-29
            Weather
              FileName=%root%/Tests/Validation/Wheat/Phenology/WeatherFiles/-37.51_140.40.met
            Soil Sodosol: same as FARAwardPhenology.FARAwardPhenology.Factors.Site.Trial_2.Sodosol
            Operations
              2023-05-17  [Sowing].Script.Sow("Cesario", 200, 30, 178.0)
              2023-05-12  [ApplyFertiliser].Script.Apply(0.0,0,0,0,0,0,0,0,0)
              2023-05-17  [ApplyFertiliser].Script.Apply(12.0,0,0,0,0,0,0,0,0)
              2023-06-22  [ApplyFertiliser].Script.Apply(12.9,0,0,0,0,0,0,0,0)
              2023-06-22  [ApplyFertiliser].Script.Apply(0.0,0,0,0,0,0,0,0,0)
              2023-08-17  [ApplyFertiliser].Script.Apply(40.85,0,0,0,0,0,0,0,0)
              2023-08-17  [ApplyFertiliser].Script.Apply(0.0,0,0,0,0,0,0,0,0)
              2023-09-08  [ApplyFertiliser].Script.Apply(49.45,0,0,0,0,0,0,0,0)
              2023-09-08  [ApplyFertiliser].Script.Apply(0.0,0,0,0,0,0,0,0,0)
              2023-10-05  [ApplyFertiliser].Script.Apply(15.05,0,0,0,0,0,0,0,0)
              2023-10-17  [ApplyFertiliser].Script.Apply(0.63,0,0,0,0,0,0,0,0)
              2023-10-17  [ApplyFertiliser].Script.Apply(0.0,0,0,0,0,0,0,0,0)
              2023-10-17  [ApplyFertiliser].Script.Apply(0.0,0,0,0,0,0,0,0,0)
          CompositeFactor Trial_237
            Specifications:
              [Clock]
              [Weather]
              [Soil]
              [Operations]
            Clock: Start=2023-01-01; End=2024-02-29
            Weather
              FileName=%root%/Tests/Validation/Wheat/Phenology/WeatherFiles/-37.51_140.29.met
            Soil Vertosol: same as FARAwardPhenology.FARAwardPhenology.Factors.Site.Trial_14.Vertosol
            Operations
              2023-05-15  [Sowing].Script.Sow("BigRed", 200, 30, 229.0)
              2023-05-15  [ApplyFertiliser].Script.Apply(12.0,0,0,0,0,0,0,0,0)
              2023-08-15  [ApplyFertiliser].Script.Apply(55.2,0,0,0,0,0,0,0,0)
              2023-09-06  [ApplyFertiliser].Script.Apply(46.0,0,0,0,0,0,0,0,0)
              2023-09-14  [ApplyFertiliser].Script.Apply(0.0,0,0,0,0,0,0,0,0)
              2023-10-26  [ApplyFertiliser].Script.Apply(0.0,0,0,0,0,0,0,0,0)
          CompositeFactor Trial_238
            Specifications:
              [Clock]
              [Weather]
              [Soil]
              [Operations]
            Clock: Start=2023-01-01; End=2024-02-29
            Weather
              FileName=%root%/Tests/Validation/Wheat/Phenology/WeatherFiles/-37.51_140.40.met
            Soil Vertosol: same as FARAwardPhenology.FARAwardPhenology.Factors.Site.Trial_14.Vertosol
            Operations
              2023-05-01  [Sowing].Script.Sow("Cesario", 200, 30, 229.0)
              2023-05-02  [ApplyFertiliser].Script.Apply(14.0,0,0,0,0,0,0,0,0)
              2023-06-03  [ApplyFertiliser].Script.Apply(60.0,0,0,0,0,0,0,0,0)
              2023-06-11  [ApplyFertiliser].Script.Apply(46.0,0,0,0,0,0,0,0,0)
              2023-08-28  [ApplyFertiliser].Script.Apply(0.0,0,0,0,0,0,0,0,0)
          CompositeFactor Trial_239
            Specifications:
              [Clock]
              [Weather]
              [Soil]
              [Operations]
            Clock: Start=2023-01-01; End=2024-02-29
            Weather
              FileName=%root%/Tests/Validation/Wheat/Phenology/WeatherFiles/-42.02_147.55.met
            Soil Sodosol: same as FARAwardPhenology.FARAwardPhenology.Factors.Site.Trial_2.Sodosol
            Operations
              2023-05-24  [Sowing].Script.Sow("BigRed", 200, 30, 165.0)
              2023-05-24  [ApplyFertiliser].Script.Apply(28.0,0,0,0,0,0,0,0,0)
              2023-09-11  [ApplyFertiliser].Script.Apply(46.0,0,0,0,0,0,0,0,0)
              2023-09-11  [ApplyFertiliser].Script.Apply(21.0,0,0,0,0,0,0,0,0)
              2023-09-26  [ApplyFertiliser].Script.Apply(0.0,0,0,0,0,0,0,0,0)
              2023-09-26  [ApplyFertiliser].Script.Apply(69.0,0,0,0,0,0,0,0,0)
              2023-09-23  [Irrigation].Apply(15)
              2023-09-30  [Irrigation].Apply(30)
              2023-10-07  [Irrigation].Apply(30)
              2023-10-14  [Irrigation].Apply(30)
              2023-10-21  [Irrigation].Apply(30)
              2023-11-04  [Irrigation].Apply(30)
              2023-11-11  [Irrigation].Apply(30)
              2023-11-18  [Irrigation].Apply(30)
          CompositeFactor Trial_240
            Specifications:
              [Clock]
              [Weather]
              [Soil]
              [Operations]
            Clock: Start=2023-01-01; End=2024-02-29
            Weather
              FileName=%root%/Tests/Validation/Wheat/Phenology/WeatherFiles/-42.13_147.33.met
            Soil Chromosol: same as FARAwardPhenology.FARAwardPhenology.Factors.Site.Trial_1.Chromosol
            Operations
              2023-03-14  [Sowing].Script.Sow("Calibro", 200, 30, 190.0)
              2023-03-14  [ApplyFertiliser].Script.Apply(18.0,0,0,0,0,0,0,0,0)
              2023-04-26  [ApplyFertiliser].Script.Apply(0.0,0,0,0,0,0,0,0,0)
              2023-04-26  [ApplyFertiliser].Script.Apply(0.0,0,0,0,0,0,0,0,0)
              2023-08-10  [ApplyFertiliser].Script.Apply(0.0,0,0,0,0,0,0,0,0)
              2023-08-15  [ApplyFertiliser].Script.Apply(0.0,0,0,0,0,0,0,0,0)
              2023-08-15  [ApplyFertiliser].Script.Apply(0.0,0,0,0,0,0,0,0,0)
              2023-09-14  [ApplyFertiliser].Script.Apply(69.0,0,0,0,0,0,0,0,0)
              2023-10-08  [ApplyFertiliser].Script.Apply(46.0,0,0,0,0,0,0,0,0)
          CompositeFactor Trial_241
            Specifications:
              [Clock]
              [Weather]
              [Soil]
              [Operations]
            Clock: Start=2023-01-01; End=2024-02-29
            Weather
              FileName=%root%/Tests/Validation/Wheat/Phenology/WeatherFiles/-41.91_147.55.met
            Soil Sodosol: same as FARAwardPhenology.FARAwardPhenology.Factors.Site.Trial_2.Sodosol
            Operations
              2023-05-01  [Sowing].Script.Sow("Cesario", 200, 30, 250.0)
              2023-04-09  [ApplyFertiliser].Script.Apply(14.0,0,0,0,0,0,0,0,0)
              2023-08-21  [ApplyFertiliser].Script.Apply(33.0,0,0,0,0,0,0,0,0)
              2023-09-04  [ApplyFertiliser].Script.Apply(0.14,0,0,0,0,0,0,0,0)
              2023-09-07  [ApplyFertiliser].Script.Apply(69.0,0,0,0,0,0,0,0,0)
          CompositeFactor Trial_242
            Specifications:
              [Clock]
              [Weather]
              [Soil]
              [Operations]
            Clock: Start=2023-01-01; End=2024-02-29
            Weather
              FileName=%root%/Tests/Validation/Wheat/Phenology/WeatherFiles/-41.69_147.33.met
            Soil Sodosol: same as FARAwardPhenology.FARAwardPhenology.Factors.Site.Trial_2.Sodosol
            Operations
              2023-05-01  [Sowing].Script.Sow("Accroc", 200, 30, 165.0)
              2023-05-01  [ApplyFertiliser].Script.Apply(18.0,0,0,0,0,0,0,0,0)
              2023-08-12  [ApplyFertiliser].Script.Apply(57.5,0,0,0,0,0,0,0,0)
              2023-08-12  [ApplyFertiliser].Script.Apply(15.75,0,0,0,0,0,0,0,0)
              2023-09-04  [ApplyFertiliser].Script.Apply(69.0,0,0,0,0,0,0,0,0)
              2023-09-20  [ApplyFertiliser].Script.Apply(46.0,0,0,0,0,0,0,0,0)
              2023-10-23  [Irrigation].Apply(15)
              2023-10-30  [Irrigation].Apply(15)
              2023-11-06  [Irrigation].Apply(15)
              2023-11-13  [Irrigation].Apply(15)
              2023-11-20  [Irrigation].Apply(15)
          CompositeFactor Trial_243
            Specifications:
              [Clock]
              [Weather]
              [Soil]
              [Operations]
            Clock: Start=2023-01-01; End=2024-02-29
            Weather
              FileName=%root%/Tests/Validation/Wheat/Phenology/WeatherFiles/-41.47_146.89.met
            Soil Podosol: same as FARAwardPhenology.FARAwardPhenology.Factors.Site.Trial_98.Podosol
            Operations
              2023-05-23  [Sowing].Script.Sow("Calibro", 200, 30, 150.0)
              2023-05-23  [ApplyFertiliser].Script.Apply(28.44,0,0,0,0,0,0,0,0)
              2023-10-02  [ApplyFertiliser].Script.Apply(62.56,0,0,0,0,0,0,0,0)
              2023-10-14  [ApplyFertiliser].Script.Apply(57.96,0,0,0,0,0,0,0,0)
          CompositeFactor Trial_245
            Specifications:
              [Clock]
              [Weather]
              [Soil]
              [Operations]
            Clock: Start=2023-01-01; End=2024-02-29
            Weather
              FileName=%root%/Tests/Validation/Wheat/Phenology/WeatherFiles/-41.69_147.11.met
            Soil Sodosol: same as FARAwardPhenology.FARAwardPhenology.Factors.Site.Trial_2.Sodosol
            Operations
              2023-05-05  [Sowing].Script.Sow("Cesario", 200, 30, 150.0)
              2023-05-05  [ApplyFertiliser].Script.Apply(7.2,0,0,0,0,0,0,0,0)
              2023-09-27  [ApplyFertiliser].Script.Apply(69.0,0,0,0,0,0,0,0,0)
              2023-10-19  [ApplyFertiliser].Script.Apply(0.0,0,0,0,0,0,0,0,0)
              2023-10-20  [ApplyFertiliser].Script.Apply(46.0,0,0,0,0,0,0,0,0)
          CompositeFactor Trial_251
            Specifications:
              [Clock]
              [Weather]
              [Soil]
              [Operations]
            Clock: Start=2023-01-01; End=2024-02-29
            Weather
              FileName=%root%/Tests/Validation/Wheat/Phenology/WeatherFiles/-36.63_145.35.met
            Soil Sodosol: same as FARAwardPhenology.FARAwardPhenology.Factors.Site.Trial_2.Sodosol
            Operations
              2023-05-05  [Sowing].Script.Sow("Scepter", 200, 30, 300.0)
              2023-05-05  [ApplyFertiliser].Script.Apply(36.8,0,0,0,0,0,0,0,0)
              2023-05-05  [ApplyFertiliser].Script.Apply(8.0,0,0,0,0,0,0,0,0)
              2023-07-01  [ApplyFertiliser].Script.Apply(23.0,0,0,0,0,0,0,0,0)
          CompositeFactor Trial_252
            Specifications:
              [Clock]
              [Weather]
              [Soil]
              [Operations]
            Clock: Start=2023-01-01; End=2024-02-29
            Weather
              FileName=%root%/Tests/Validation/Wheat/Phenology/WeatherFiles/-38.17_144.03.met
            Soil Sodosol: same as FARAwardPhenology.FARAwardPhenology.Factors.Site.Trial_2.Sodosol
            Operations
              2023-04-23  [Sowing].Script.Sow("Stockade", 200, 30, 300.0)
              2023-04-23  [ApplyFertiliser].Script.Apply(5.0,0,0,0,0,0,0,0,0)
              2023-06-18  [ApplyFertiliser].Script.Apply(0.0,0,0,0,0,0,0,0,0)
              2023-07-17  [ApplyFertiliser].Script.Apply(66.7,0,0,0,0,0,0,0,0)
              2023-08-07  [ApplyFertiliser].Script.Apply(0.0,0,0,0,0,0,0,0,0)
              2023-08-07  [ApplyFertiliser].Script.Apply(0.0,0,0,0,0,0,0,0,0)
              2023-08-22  [ApplyFertiliser].Script.Apply(50.6,0,0,0,0,0,0,0,0)
              2023-09-07  [ApplyFertiliser].Script.Apply(50.6,0,0,0,0,0,0,0,0)
          CompositeFactor Trial_253
            Specifications:
              [Clock]
              [Weather]
              [Soil]
              [Operations]
            Clock: Start=2023-01-01; End=2024-02-29
            Weather
              FileName=%root%/Tests/Validation/Wheat/Phenology/WeatherFiles/-38.06_143.37.met
            Soil Sodosol: same as FARAwardPhenology.FARAwardPhenology.Factors.Site.Trial_2.Sodosol
            Operations
              2023-04-30  [Sowing].Script.Sow("Cesario", 215.0, 30, 250.0)
              2023-04-30  [ApplyFertiliser].Script.Apply(8.0,0,0,0,0,0,0,0,0)
              2023-04-30  [ApplyFertiliser].Script.Apply(55.2,0,0,0,0,0,0,0,0)
              2023-07-25  [ApplyFertiliser].Script.Apply(46.0,0,0,0,0,0,0,0,0)
              2023-09-04  [ApplyFertiliser].Script.Apply(0.0,0,0,0,0,0,0,0,0)
              2023-09-04  [ApplyFertiliser].Script.Apply(0.0,0,0,0,0,0,0,0,0)
          CompositeFactor Trial_254
            Specifications:
              [Clock]
              [Weather]
              [Soil]
              [Operations]
            Clock: Start=2023-01-01; End=2024-02-29
            Weather
              FileName=%root%/Tests/Validation/Wheat/Phenology/WeatherFiles/-38.06_143.48.met
            Soil Sodosol: same as FARAwardPhenology.FARAwardPhenology.Factors.Site.Trial_2.Sodosol
            Operations
              2023-05-11  [Sowing].Script.Sow("Rockstar", 200, 30, 250.0)
              2023-05-11  [ApplyFertiliser].Script.Apply(0.086,0,0,0,0,0,0,0,0)
              2023-05-11  [ApplyFertiliser].Script.Apply(8.0,0,0,0,0,0,0,0,0)
              2023-07-26  [ApplyFertiliser].Script.Apply(46.0,0,0,0,0,0,0,0,0)
              2023-09-23  [ApplyFertiliser].Script.Apply(46.0,0,0,0,0,0,0,0,0)
          CompositeFactor Trial_255
            Specifications:
              [Clock]
              [Weather]
              [Soil]
              [Operations]
            Clock: Start=2023-01-01; End=2024-02-29
            Weather
              FileName=%root%/Tests/Validation/Wheat/Phenology/WeatherFiles/-37.84_143.92.met
            Soil Sodosol: same as FARAwardPhenology.FARAwardPhenology.Factors.Site.Trial_2.Sodosol
            Operations
              2023-03-30  [Sowing].Script.Sow("Cesario", 200, 30, 250.0)
              2023-01-03  [ApplyFertiliser].Script.Apply(36.0,0,0,0,0,0,0,0,0)
              2023-03-30  [ApplyFertiliser].Script.Apply(8.0,0,0,0,0,0,0,0,0)
              2023-05-01  [ApplyFertiliser].Script.Apply(41.4,0,0,0,0,0,0,0,0)
              2023-06-12  [ApplyFertiliser].Script.Apply(41.4,0,0,0,0,0,0,0,0)
              2023-08-25  [ApplyFertiliser].Script.Apply(41.4,0,0,0,0,0,0,0,0)
              2023-09-19  [ApplyFertiliser].Script.Apply(0.0,0,0,0,0,0,0,0,0)
          CompositeFactor Trial_256
            Specifications:
              [Clock]
              [Weather]
              [Soil]
              [Operations]
            Clock: Start=2023-01-01; End=2024-02-29
            Weather
              FileName=%root%/Tests/Validation/Wheat/Phenology/WeatherFiles/-37.51_142.93.met
            Soil Sodosol: same as FARAwardPhenology.FARAwardPhenology.Factors.Site.Trial_2.Sodosol
            Operations
              2023-04-06  [Sowing].Script.Sow("Calibro", 223.0, 30, 190.0)
              2023-06-04  [ApplyFertiliser].Script.Apply(8.0,0,0,0,0,0,0,0,0)
              2023-08-27  [ApplyFertiliser].Script.Apply(46.0,0,0,0,0,0,0,0,0)
              2023-09-18  [ApplyFertiliser].Script.Apply(0.0,0,0,0,0,0,0,0,0)
          CompositeFactor Trial_257
            Specifications:
              [Clock]
              [Weather]
              [Soil]
              [Operations]
            Clock: Start=2023-01-01; End=2024-02-29
            Weather
              FileName=%root%/Tests/Validation/Wheat/Phenology/WeatherFiles/-37.29_143.92.met
            Soil Vertosol: same as FARAwardPhenology.FARAwardPhenology.Factors.Site.Trial_14.Vertosol
            Operations
              2023-04-20  [Sowing].Script.Sow("BigRed", 161.0, 30, 250.0)
              2023-04-20  [ApplyFertiliser].Script.Apply(12.0,0,0,0,0,0,0,0,0)
              2023-04-20  [ApplyFertiliser].Script.Apply(0.258,0,0,0,0,0,0,0,0)
              2023-07-18  [ApplyFertiliser].Script.Apply(46.0,0,0,0,0,0,0,0,0)
              2023-08-23  [ApplyFertiliser].Script.Apply(46.0,0,0,0,0,0,0,0,0)
              2023-09-11  [ApplyFertiliser].Script.Apply(46.0,0,0,0,0,0,0,0,0)
          CompositeFactor Trial_258
            Specifications:
              [Clock]
              [Weather]
              [Soil]
              [Operations]
            Clock: Start=2023-01-01; End=2024-02-29
            Weather
              FileName=%root%/Tests/Validation/Wheat/Phenology/WeatherFiles/-37.95_143.92.met
            Soil Sodosol: same as FARAwardPhenology.FARAwardPhenology.Factors.Site.Trial_2.Sodosol
            Operations
              2023-05-12  [Sowing].Script.Sow("Beaufort", 291.0, 30, 250.0)
              2023-05-12  [ApplyFertiliser].Script.Apply(28.0,0,0,0,0,0,0,0,0)
              2023-08-01  [ApplyFertiliser].Script.Apply(46.0,0,0,0,0,0,0,0,0)
              2023-09-08  [ApplyFertiliser].Script.Apply(0.0,0,0,0,0,0,0,0,0)
              2023-09-15  [ApplyFertiliser].Script.Apply(46.0,0,0,0,0,0,0,0,0)
          CompositeFactor Trial_259
            Specifications:
              [Clock]
              [Weather]
              [Soil]
              [Operations]
            Clock: Start=2023-01-01; End=2024-02-29
            Weather
              FileName=%root%/Tests/Validation/Wheat/Phenology/WeatherFiles/-38.17_143.70.met
            Soil Sodosol: same as FARAwardPhenology.FARAwardPhenology.Factors.Site.Trial_2.Sodosol
            Operations
              2023-04-21  [Sowing].Script.Sow("BigRed", 200, 30, 250.0)
              2023-04-21  [ApplyFertiliser].Script.Apply(8.0,0,0,0,0,0,0,0,0)
              2023-08-01  [ApplyFertiliser].Script.Apply(15.05,0,0,0,0,0,0,0,0)
              2023-08-23  [ApplyFertiliser].Script.Apply(64.4,0,0,0,0,0,0,0,0)
              2023-09-18  [ApplyFertiliser].Script.Apply(43.7,0,0,0,0,0,0,0,0)
          CompositeFactor Trial_260
            Specifications:
              [Clock]
              [Weather]
              [Soil]
              [Operations]
            Clock: Start=2023-01-01; End=2024-02-29
            Weather
              FileName=%root%/Tests/Validation/Wheat/Phenology/WeatherFiles/-37.95_143.70.met
            Soil Sodosol: same as FARAwardPhenology.FARAwardPhenology.Factors.Site.Trial_2.Sodosol
            Operations
              2023-04-15  [Sowing].Script.Sow("BigRed", 200, 30, 300.0)
              2023-04-15  [ApplyFertiliser].Script.Apply(9.0,0,0,0,0,0,0,0,0)
              2023-07-05  [ApplyFertiliser].Script.Apply(41.4,0,0,0,0,0,0,0,0)
              2023-08-09  [ApplyFertiliser].Script.Apply(46.0,0,0,0,0,0,0,0,0)
              2023-08-25  [ApplyFertiliser].Script.Apply(0.0,0,0,0,0,0,0,0,0)
              2023-08-25  [ApplyFertiliser].Script.Apply(0.0,0,0,0,0,0,0,0,0)
              2023-09-06  [ApplyFertiliser].Script.Apply(32.2,0,0,0,0,0,0,0,0)
          CompositeFactor Trial_261
            Specifications:
              [Clock]
              [Weather]
              [Soil]
              [Operations]
            Clock: Start=2023-01-01; End=2024-02-29
            Weather
              FileName=%root%/Tests/Validation/Wheat/Phenology/WeatherFiles/-37.95_143.81.met
            Soil Sodosol: same as FARAwardPhenology.FARAwardPhenology.Factors.Site.Trial_2.Sodosol
            Operations
              2023-05-12  [Sowing].Script.Sow("Beaufort", 200, 30, 250.0)
              2023-05-12  [ApplyFertiliser].Script.Apply(21.7,0,0,0,0,0,0,0,0)
              2023-06-29  [ApplyFertiliser].Script.Apply(69.0,0,0,0,0,0,0,0,0)
              2023-09-11  [ApplyFertiliser].Script.Apply(0.0,0,0,0,0,0,0,0,0)
              2023-09-11  [ApplyFertiliser].Script.Apply(0.0,0,0,0,0,0,0,0,0)
              2023-09-15  [ApplyFertiliser].Script.Apply(69.0,0,0,0,0,0,0,0,0)
          CompositeFactor Trial_262
            Specifications:
              [Clock]
              [Weather]
              [Soil]
              [Operations]
            Clock: Start=2023-01-01; End=2024-02-29
            Weather
              FileName=%root%/Tests/Validation/Wheat/Phenology/WeatherFiles/-37.84_143.48.met
            Soil Sodosol: same as FARAwardPhenology.FARAwardPhenology.Factors.Site.Trial_2.Sodosol
            Operations
              2023-05-17  [Sowing].Script.Sow("Cesario", 200, 30, 250.0)
              2023-07-26  [ApplyFertiliser].Script.Apply(69.0,0,0,0,0,0,0,0,0)
              2023-08-21  [ApplyFertiliser].Script.Apply(92.0,0,0,0,0,0,0,0,0)
              2023-09-12  [ApplyFertiliser].Script.Apply(0.0,0,0,0,0,0,0,0,0)
          CompositeFactor Trial_263
            Specifications:
              [Clock]
              [Weather]
              [Soil]
              [Operations]
            Clock: Start=2023-01-01; End=2024-02-29
            Weather
              FileName=%root%/Tests/Validation/Wheat/Phenology/WeatherFiles/-37.73_142.71.met
            Soil Sodosol: same as FARAwardPhenology.FARAwardPhenology.Factors.Site.Trial_2.Sodosol
            Operations
              2023-03-26  [Sowing].Script.Sow("Cesario", 200, 30, 178.0)
              2023-03-25  [ApplyFertiliser].Script.Apply(4.0,0,0,0,0,0,0,0,0)
              2023-05-23  [ApplyFertiliser].Script.Apply(46.0,0,0,0,0,0,0,0,0)
              2023-08-16  [ApplyFertiliser].Script.Apply(46.0,0,0,0,0,0,0,0,0)
              2023-09-06  [ApplyFertiliser].Script.Apply(69.0,0,0,0,0,0,0,0,0)
              2023-09-17  [ApplyFertiliser].Script.Apply(0.0,0,0,0,0,0,0,0,0)
          CompositeFactor Trial_264
            Specifications:
              [Clock]
              [Weather]
              [Soil]
              [Operations]
            Clock: Start=2023-01-01; End=2024-02-29
            Weather
              FileName=%root%/Tests/Validation/Wheat/Phenology/WeatherFiles/-37.84_142.49.met
            Soil Sodosol: same as FARAwardPhenology.FARAwardPhenology.Factors.Site.Trial_2.Sodosol
            Operations
              2023-05-22  [Sowing].Script.Sow("BigRed", 200, 30, 250.0)
              2023-05-22  [ApplyFertiliser].Script.Apply(12.0,0,0,0,0,0,0,0,0)
              2023-06-25  [ApplyFertiliser].Script.Apply(46.0,0,0,0,0,0,0,0,0)
              2023-08-28  [ApplyFertiliser].Script.Apply(46.0,0,0,0,0,0,0,0,0)
              2023-08-28  [ApplyFertiliser].Script.Apply(0.0,0,0,0,0,0,0,0,0)
              2023-09-18  [ApplyFertiliser].Script.Apply(46.0,0,0,0,0,0,0,0,0)
          CompositeFactor Trial_265
            Specifications:
              [Clock]
              [Weather]
              [Soil]
              [Operations]
            Clock: Start=2023-01-01; End=2024-02-29
            Weather
              FileName=%root%/Tests/Validation/Wheat/Phenology/WeatherFiles/-37.73_142.27.met
            Soil Sodosol: same as FARAwardPhenology.FARAwardPhenology.Factors.Site.Trial_2.Sodosol
            Operations
              2023-04-23  [Sowing].Script.Sow("Accroc", 200, 30, 200.0)
              2023-04-23  [ApplyFertiliser].Script.Apply(10.0,0,0,0,0,0,0,0,0)
              2023-07-24  [ApplyFertiliser].Script.Apply(34.5,0,0,0,0,0,0,0,0)
              2023-07-24  [ApplyFertiliser].Script.Apply(5.25,0,0,0,0,0,0,0,0)
              2023-07-24  [ApplyFertiliser].Script.Apply(0.0,0,0,0,0,0,0,0,0)
              2023-08-15  [ApplyFertiliser].Script.Apply(57.5,0,0,0,0,0,0,0,0)
              2023-08-15  [ApplyFertiliser].Script.Apply(5.25,0,0,0,0,0,0,0,0)
              2023-09-13  [ApplyFertiliser].Script.Apply(0.0,0,0,0,0,0,0,0,0)
          CompositeFactor Trial_266
            Specifications:
              [Clock]
              [Weather]
              [Soil]
              [Operations]
            Clock: Start=2023-01-01; End=2024-02-29
            Weather
              FileName=%root%/Tests/Validation/Wheat/Phenology/WeatherFiles/-37.84_142.05.met
            Soil Sodosol: same as FARAwardPhenology.FARAwardPhenology.Factors.Site.Trial_2.Sodosol
            Operations
              2023-04-18  [Sowing].Script.Sow("Accroc", 200, 30, 150.0)
              2023-04-18  [ApplyFertiliser].Script.Apply(10.0,0,0,0,0,0,0,0,0)
              2023-07-17  [ApplyFertiliser].Script.Apply(46.0,0,0,0,0,0,0,0,0)
              2023-07-17  [ApplyFertiliser].Script.Apply(0.0,0,0,0,0,0,0,0,0)
              2023-08-14  [ApplyFertiliser].Script.Apply(46.0,0,0,0,0,0,0,0,0)
              2023-08-25  [ApplyFertiliser].Script.Apply(0.0,0,0,0,0,0,0,0,0)
          CompositeFactor Trial_267
            Specifications:
              [Clock]
              [Weather]
              [Soil]
              [Operations]
            Clock: Start=2023-01-01; End=2024-02-29
            Weather
              FileName=%root%/Tests/Validation/Wheat/Phenology/WeatherFiles/-37.95_142.49.met
            Soil Sodosol: same as FARAwardPhenology.FARAwardPhenology.Factors.Site.Trial_2.Sodosol
            Operations
              2023-05-01  [Sowing].Script.Sow("Cesario", 200, 30, 250.0)
              2023-05-18  [ApplyFertiliser].Script.Apply(12.0,0,0,0,0,0,0,0,0)
              2023-08-01  [ApplyFertiliser].Script.Apply(34.5,0,0,0,0,0,0,0,0)
              2023-08-28  [ApplyFertiliser].Script.Apply(69.0,0,0,0,0,0,0,0,0)
          CompositeFactor Trial_268
            Specifications:
              [Clock]
              [Weather]
              [Soil]
              [Operations]
            Clock: Start=2023-01-01; End=2024-02-29
            Weather
              FileName=%root%/Tests/Validation/Wheat/Phenology/WeatherFiles/-37.95_142.38.met
            Soil Sodosol: same as FARAwardPhenology.FARAwardPhenology.Factors.Site.Trial_2.Sodosol
            Operations
              2023-05-10  [Sowing].Script.Sow("BigRed", 200, 30, 250.0)
              2023-05-10  [ApplyFertiliser].Script.Apply(8.0,0,0,0,0,0,0,0,0)
              2023-07-14  [ApplyFertiliser].Script.Apply(8.4,0,0,0,0,0,0,0,0)
              2023-07-14  [ApplyFertiliser].Script.Apply(18.4,0,0,0,0,0,0,0,0)
              2023-08-03  [ApplyFertiliser].Script.Apply(8.4,0,0,0,0,0,0,0,0)
              2023-08-03  [ApplyFertiliser].Script.Apply(18.4,0,0,0,0,0,0,0,0)
              2023-08-25  [ApplyFertiliser].Script.Apply(46.0,0,0,0,0,0,0,0,0)
          CompositeFactor Trial_269
            Specifications:
              [Clock]
              [Weather]
              [Soil]
              [Operations]
            Clock: Start=2023-01-01; End=2024-02-29
            Weather
              FileName=%root%/Tests/Validation/Wheat/Phenology/WeatherFiles/-37.62_143.04.met
            Soil Sodosol: same as FARAwardPhenology.FARAwardPhenology.Factors.Site.Trial_2.Sodosol
            Operations
              2023-05-10  [Sowing].Script.Sow("Cesario", 200, 30, 250.0)
              2023-05-10  [ApplyFertiliser].Script.Apply(18.0,0,0,0,0,0,0,0,0)
              2023-08-14  [ApplyFertiliser].Script.Apply(0.0,0,0,0,0,0,0,0,0)
              2023-08-14  [ApplyFertiliser].Script.Apply(0.0,0,0,0,0,0,0,0,0)
              2023-08-23  [ApplyFertiliser].Script.Apply(45.08,0,0,0,0,0,0,0,0)
          CompositeFactor Trial_270
            Specifications:
              [Clock]
              [Weather]
              [Soil]
              [Operations]
            Clock: Start=2023-01-01; End=2024-02-29
            Weather
              FileName=%root%/Tests/Validation/Wheat/Phenology/WeatherFiles/-36.30_141.50.met
            Soil Sodosol: same as FARAwardPhenology.FARAwardPhenology.Factors.Site.Trial_2.Sodosol
            Operations
              2023-05-01  [Sowing].Script.Sow("Scepter", 200, 30, 300.0)
              2023-05-01  [ApplyFertiliser].Script.Apply(8.25,0,0,0,0,0,0,0,0)
              2023-05-01  [ApplyFertiliser].Script.Apply(23.0,0,0,0,0,0,0,0,0)
              2023-07-28  [ApplyFertiliser].Script.Apply(92.0,0,0,0,0,0,0,0,0)
          CompositeFactor Trial_271
            Specifications:
              [Clock]
              [Weather]
              [Soil]
              [Operations]
            Clock: Start=2023-01-01; End=2024-02-29
            Weather
              FileName=%root%/Tests/Validation/Wheat/Phenology/WeatherFiles/-38.17_143.92.met
            Soil Sodosol: same as FARAwardPhenology.FARAwardPhenology.Factors.Site.Trial_2.Sodosol
            Operations
              2023-04-20  [Sowing].Script.Sow("Stockade", 200, 30, 250.0)
              2023-04-20  [ApplyFertiliser].Script.Apply(10.8,0,0,0,0,0,0,0,0)
              2023-08-01  [ApplyFertiliser].Script.Apply(63.48,0,0,0,0,0,0,0,0)
              2023-09-01  [ApplyFertiliser].Script.Apply(36.8,0,0,0,0,0,0,0,0)
          CompositeFactor Trial_272
            Specifications:
              [Clock]
              [Weather]
              [Soil]
              [Operations]
            Clock: Start=2023-01-01; End=2024-02-29
            Weather
              FileName=%root%/Tests/Validation/Wheat/Phenology/WeatherFiles/-37.84_142.93.met
            Soil Sodosol: same as FARAwardPhenology.FARAwardPhenology.Factors.Site.Trial_2.Sodosol
            Operations
              2023-04-20  [Sowing].Script.Sow("Cesario", 200, 30, 250.0)
              2023-04-20  [ApplyFertiliser].Script.Apply(9.0,0,0,0,0,0,0,0,0)
              2023-08-15  [ApplyFertiliser].Script.Apply(69.0,0,0,0,0,0,0,0,0)
              2023-08-15  [ApplyFertiliser].Script.Apply(0.0,0,0,0,0,0,0,0,0)
          CompositeFactor Trial_273
            Specifications:
              [Clock]
              [Weather]
              [Soil]
              [Operations]
            Clock: Start=2023-01-01; End=2024-02-29
            Weather
              FileName=%root%/Tests/Validation/Wheat/Phenology/WeatherFiles/-37.40_143.70.met
            Soil Sodosol: same as FARAwardPhenology.FARAwardPhenology.Factors.Site.Trial_2.Sodosol
            Operations
              2023-04-05  [Sowing].Script.Sow("BigRed", 200, 30, 250.0)
              2023-05-04  [ApplyFertiliser].Script.Apply(10.0,0,0,0,0,0,0,0,0)
              2023-08-07  [ApplyFertiliser].Script.Apply(69.0,0,0,0,0,0,0,0,0)
              2023-09-06  [ApplyFertiliser].Script.Apply(41.4,0,0,0,0,0,0,0,0)
              2023-09-12  [ApplyFertiliser].Script.Apply(0.0,0,0,0,0,0,0,0,0)
              2023-09-12  [ApplyFertiliser].Script.Apply(0.0,0,0,0,0,0,0,0,0)
          CompositeFactor Trial_274
            Specifications:
              [Clock]
              [Weather]
              [Soil]
              [Operations]
            Clock: Start=2023-01-01; End=2024-02-29
            Weather
              FileName=%root%/Tests/Validation/Wheat/Phenology/WeatherFiles/-37.40_142.38.met
            Soil Sodosol: same as FARAwardPhenology.FARAwardPhenology.Factors.Site.Trial_2.Sodosol
            Operations
              2023-05-14  [Sowing].Script.Sow("Accroc", 200, 30, 300.0)
              2023-05-12  [ApplyFertiliser].Script.Apply(11.5,0,0,0,0,0,0,0,0)
              2023-07-08  [ApplyFertiliser].Script.Apply(48.0,0,0,0,0,0,0,0,0)
              2023-08-18  [ApplyFertiliser].Script.Apply(79.2,0,0,0,0,0,0,0,0)
              2023-09-22  [ApplyFertiliser].Script.Apply(46.0,0,0,0,0,0,0,0,0)
          CompositeFactor Trial_276
            Specifications:
              [Clock]
              [Weather]
              [Soil]
              [Operations]
            Clock: Start=2023-01-01; End=2024-02-29
            Weather
              FileName=%root%/Tests/Validation/Wheat/Phenology/WeatherFiles/-33.88_116.75.met
            Soil Sodosol: same as FARAwardPhenology.FARAwardPhenology.Factors.Site.Trial_2.Sodosol
            Operations
              2023-05-11  [Sowing].Script.Sow("Rockstar", 200, 30, 250)
              2023-04-01  [ApplyFertiliser].Script.Apply(0.0,0,0,0,0,0,0,0,0)
              2023-05-11  [ApplyFertiliser].Script.Apply(12.0,0,0,0,0,0,0,0,0)
              2023-05-11  [ApplyFertiliser].Script.Apply(12.9,0,0,0,0,0,0,0,0)
              2023-06-29  [ApplyFertiliser].Script.Apply(55.2,0,0,0,0,0,0,0,0)
              2023-08-10  [ApplyFertiliser].Script.Apply(0.0,0,0,0,0,0,0,0,0)
              2023-08-10  [ApplyFertiliser].Script.Apply(46.0,0,0,0,0,0,0,0,0)
          CompositeFactor Trial_277
            Specifications:
              [Clock]
              [Weather]
              [Soil]
              [Operations]
            Clock: Start=2023-01-01; End=2024-02-29
            Weather
              FileName=%root%/Tests/Validation/Wheat/Phenology/WeatherFiles/-33.99_116.64.met
            Soil Tenosol: same as FARAwardPhenology.FARAwardPhenology.Factors.Site.Trial_68.Tenosol
            Operations
              2023-04-12  [Sowing].Script.Sow("Accroc", 200, 30, 250)
              2023-04-12  [ApplyFertiliser].Script.Apply(5.796,0,0,0,0,0,0,0,0)
              2023-04-12  [ApplyFertiliser].Script.Apply(1.98,0,0,0,0,0,0,0,0)
              2023-04-12  [ApplyFertiliser].Script.Apply(0.0,0,0,0,0,0,0,0,0)
              2023-04-12  [ApplyFertiliser].Script.Apply(4.92,0,0,0,0,0,0,0,0)
              2023-04-25  [ApplyFertiliser].Script.Apply(34.4,0,0,0,0,0,0,0,0)
              2023-06-06  [ApplyFertiliser].Script.Apply(44.77,0,0,0,0,0,0,0,0)
              2023-06-06  [ApplyFertiliser].Script.Apply(0.0,0,0,0,0,0,0,0,0)
              2023-07-26  [ApplyFertiliser].Script.Apply(91.54,0,0,0,0,0,0,0,0)
              2023-07-26  [ApplyFertiliser].Script.Apply(0.0,0,0,0,0,0,0,0,0)
          CompositeFactor Trial_278
            Specifications:
              [Clock]
              [Weather]
              [Soil]
              [Operations]
            Clock: Start=2023-01-01; End=2024-02-29
            Weather
              FileName=%root%/Tests/Validation/Wheat/Phenology/WeatherFiles/-33.88_116.97.met
            Soil Chromosol: same as FARAwardPhenology.FARAwardPhenology.Factors.Site.Trial_1.Chromosol
            Operations
              2023-05-25  [Sowing].Script.Sow("Rockstar", 200, 30, 250)
              2023-05-21  [ApplyFertiliser].Script.Apply(21.5,0,0,0,0,0,0,0,0)
              2023-05-21  [ApplyFertiliser].Script.Apply(4.32,0,0,0,0,0,0,0,0)
              2023-07-17  [ApplyFertiliser].Script.Apply(36.8,0,0,0,0,0,0,0,0)
          CompositeFactor Trial_279
            Specifications:
              [Clock]
              [Weather]
              [Soil]
              [Operations]
            Clock: Start=2023-01-01; End=2024-02-29
            Weather
              FileName=%root%/Tests/Validation/Wheat/Phenology/WeatherFiles/-33.88_116.97.met
            Soil Chromosol: same as FARAwardPhenology.FARAwardPhenology.Factors.Site.Trial_1.Chromosol
            Operations
              2023-05-13  [Sowing].Script.Sow("Rockstar", 200, 30, 250)
              2023-02-22  [ApplyFertiliser].Script.Apply(0.0,0,0,0,0,0,0,0,0)
              2023-05-15  [ApplyFertiliser].Script.Apply(16.8,0,0,0,0,0,0,0,0)
              2023-05-15  [ApplyFertiliser].Script.Apply(8.1,0,0,0,0,0,0,0,0)
              2023-06-14  [ApplyFertiliser].Script.Apply(2.7,0,0,0,0,0,0,0,0)
              2023-08-15  [ApplyFertiliser].Script.Apply(46.0,0,0,0,0,0,0,0,0)
          CompositeFactor Trial_283
            Specifications:
              [Clock]
              [Weather]
              [Soil]
              [Operations]
            Clock: Start=2023-01-01; End=2024-02-29
            Weather
              FileName=%root%/Tests/Validation/Wheat/Phenology/WeatherFiles/-33.99_116.75.met
            Soil Sodosol: same as FARAwardPhenology.FARAwardPhenology.Factors.Site.Trial_2.Sodosol
            Operations
              2023-05-28  [Sowing].Script.Sow("Rockstar", 200, 30, 250)
              2023-05-28  [ApplyFertiliser].Script.Apply(11.04,0,0,0,0,0,0,0,0)
              2023-05-28  [ApplyFertiliser].Script.Apply(2.58,0,0,0,0,0,0,0,0)
              2023-05-28  [ApplyFertiliser].Script.Apply(17.2,0,0,0,0,0,0,0,0)
              2023-06-22  [ApplyFertiliser].Script.Apply(41.4,0,0,0,0,0,0,0,0)
              2023-06-22  [ApplyFertiliser].Script.Apply(0.0,0,0,0,0,0,0,0,0)
              2023-06-22  [ApplyFertiliser].Script.Apply(10.5,0,0,0,0,0,0,0,0)
              2023-07-24  [ApplyFertiliser].Script.Apply(36.8,0,0,0,0,0,0,0,0)
              2023-07-24  [ApplyFertiliser].Script.Apply(0.0,0,0,0,0,0,0,0,0)
              2023-07-24  [ApplyFertiliser].Script.Apply(4.2,0,0,0,0,0,0,0,0)
              2023-08-20  [ApplyFertiliser].Script.Apply(43.0,0,0,0,0,0,0,0,0)
              2023-09-17  [ApplyFertiliser].Script.Apply(21.5,0,0,0,0,0,0,0,0)
      Simulation
        Clock: Start=2020-01-01; End=2024-12-31
        Summary
        Weather: FileName=87124.met
        SoilArbitrator
        MicroClimate: a_interception=0; b_interception=1; c_interception=0; d_interception=0; SoilHeatFluxFraction=0.4; MinimumHeightDiffForNewLayer=0; NightInterceptionFraction=0.5; ReferenceHeight=2
        Manager LocationInfo
          Country = Australia
          State = Unknown
          Region = Unknown
```csharp
using Models.Soils;
using System;
using Models.Core;
using Models.PMF;
using APSIM.Shared.Utilities;

namespace Models
{
    [Serializable]
    public class Script : Model
    {
        [Link] Clock Clock;
        [Link] Fertiliser Fertiliser;
        [Link] Summary Summary;
        
        [Description("Country")]
        public string Country { get; set; }

        [Description("State")]
        public string State { get; set; }

        [Description("Region")]
        public string Region { get; set; }

    }
}
```
        Zone Field: Area=1; Slope=0; AspectAngle=0; Altitude=50
          Report HarvestReport: EventNames=[Wheat].Harvesting
            VariableNames:
              [Clock].Today
              [Clock].StartDate
              [Wheat].SowingDate
              [Wheat].SowingData.Cultivar
              [Wheat].SowingData.Population
              [Wheat].SowingDate.DayOfYear
              [Wheat].SowingData.RowSpacing
              [IWeather].Latitude
              [IWeather].Longitude
              [IWeather].FileName
              [LocationInfo].Script.Country
              [LocationInfo].Script.State
              [LocationInfo].Script.Region
              [Wheat].Phenology.CurrentStageName
              [Wheat].AboveGround.Wt
              [Wheat].Grain.Number
              [Wheat].Grain.Protein
              [Wheat].Grain.Wt
              ([Wheat].Grain.Wt/100) as yield
              [Sowing].Script.Cultivar as cultivar
              [PhenologyTimes].Script.SowDate as sow_date
              [PhenologyTimes].Script.FlagDate as flag_date
              [PhenologyTimes].Script.FloweringDate as flowering_date
              [PhenologyTimes].Script.HarvestDate as harvest_date
              [PhenologyTimes].Script.SowDays as sow_days
              [PhenologyTimes].Script.FlagDays as flag_days
              [Wheat].Phenology.FlagLeafDAS
              [PhenologyTimes].Script.FloweringDays as flowering_days
              [Wheat].Phenology.FloweringDAS
              [PhenologyTimes].Script.HarvestDays as harvest_days
          Report DailyReport: EventNames=[Clock].EndOfDay
            VariableNames:
              [Clock].Today
              [Wheat].SowingData.Cultivar
              [Wheat].Phenology.Zadok.Stage
              [Wheat].Phenology.Photoperiod
          Fertiliser
          SurfaceOrganicMatter: InitialResidueName=wheat_stubble; InitialResidueType=wheat; InitialResidueMass=0; InitialStandingFraction=0; InitialCPR=0; InitialCNR=80
          Plant Wheat
          Operations
          Manager Sowing
```csharp
using System;
using Models.Core;
using Models.Interfaces;
using Models.PMF;
using APSIM.Shared.Utilities;

namespace Models
{
    [Serializable]
    public class Script : Model
    {
        [Link] IClock Clock;
        [Link] IPlant Plant;
        [Link] ISummary Summary;
        
        
        public string Cultivar {get; set;}

		public void Sow(string cultivar, double population, double depth, double rowSpacing)
		{
		    Cultivar = cultivar;
		    Plant.Sow(Cultivar, population, depth, rowSpacing);
		}
    }
}
```
          Manager ApplyFertiliser
```csharp
using System;
using Models.Core;
using Models.Interfaces;
using Models.PMF;
using APSIM.Shared.Utilities;

namespace Models
{
    [Serializable]
    public class Script : Model
    {
        [Link] IClock Clock;
        [Link] ISummary Summary;
        [Link] Fertiliser Fertiliser;

        public void Apply(double N, double P, double K, double S, double CA, double ZN, double MG, double MN, double CU)
        {
            if (N > 0)
                Fertiliser.Apply(N, "NO3N", 0, -1, true);
        }
    }
}
```
          Manager PhenologyTimes
            EmergenceDelay = 0
```csharp
using APSIM.Shared.Utilities;
using Models.Utilities;
using Models.Soils;
using Models.PMF;
using Models.Core;
using Models.PMF.Phen;
using System;
using System.Linq;

namespace Models
{
    [Serializable] 
    public class Script : Model
    {    
        [Description("Days between Sowing and Emergence. 0 to not override")] 
        public int EmergenceDelay {get; set;}
    
        [Link] Summary Summary;    
        [Link] Plant Wheat;
    
        public int days {get; set;}
        
        public DateTime SowDate {get; set;}
        public DateTime FlagDate {get; set;}
        public DateTime FloweringDate {get; set;}
        public DateTime HarvestDate {get; set;}
        
        public double SowDays {get; set;}
        public double FlagDays {get; set;}
        public double FloweringDays {get; set;}
        public double HarvestDays {get; set;}
        
        private bool start = false;
        [Link] private Clock Clock;
        
        [EventSubscribe("Sowing")]
        private void OnSowing(object sender, EventArgs e)
        {
            start = true;
            days = 0;
            SowDate = Clock.Today;
            SowDays = Clock.Today.DayOfYear-1;
        }
        
        [EventSubscribe("PhaseChanged")]
        private void OnPhaseChanged(object sender, PhaseChangedType change)
        {
            if (change.StageName == "Germination" && EmergenceDelay > 0) 
            {
                string emergenceDate = (SowDate.AddDays(EmergenceDelay)).ToString("dd-MMM");
                Wheat.Phenology.SetPhaseCompletionDate(emergenceDate,"Emerging");
            }
            if (change.StageName == "FlagLeafAppearance") 
            {
                FlagDate = Clock.Today;
                FlagDays = (FlagDate - SowDate).TotalDays + 1;
            }
            if (change.StageName == "Anthesis") 
            {
                FloweringDate = Clock.Today;
                FloweringDays = (FloweringDate - SowDate).TotalDays + 1;
            }
        }
        
        [EventSubscribe("DoManagement")]
        private void OnDoManagement(object sender, EventArgs e)
        {
            if (start)
            {
                days += 1;
            }
            if (Wheat.IsReadyForHarvesting)
            {
                HarvestDate = Clock.Today;
                HarvestDays = (HarvestDate - SowDate).TotalDays + 1;
                Wheat.Harvest();
                Wheat.EndCrop();
            }
        }
    }
}
```
          Irrigation
          Soil: SoilType=Black Vertosol; Site=Lawes; NearestTown=Lawes, Q 4343; Region=Lockyer; State=Queensland; Country=Australia; NaturalVegetation=Blue Gum, Moreton Bay Ash, Tea Tree; ApsoilNumber=38; Latitude=-27.537; Longitude=152.336; LocationAccuracy=+-20m; DataSource=CSIRO Sustainable Ecosystems, Toowoomba
            Comments=Soil naming structure: \State\Region\Classification-Local Name (Site/district and locator number); oc and ph estimated
            Physical
              Thickness  ParticleSizeSand  ParticleSizeSilt  ParticleSizeClay  Rocks  BD    AirDry  LL15  DUL   SAT
              150        5                 65                30                0      1.32  0.13    0.26  0.41  0.47
              150        5                 65                30                0      1.3   0.208   0.26  0.43  0.48
              300        5                 65                30                0      1.23  0.26    0.26  0.46  0.51
              300        5                 65                30                0      1.27  0.26    0.26  0.44  0.49
              300        5                 65                30                0      1.37  0.25    0.25  0.4   0.45
              300        5                 65                30                0      1.35  0.26    0.26  0.41  0.46
              300        5                 65                30                0      1.35  0.26    0.26  0.38  0.46
              Rocks, ParticleSizeSand, ParticleSizeSilt, ParticleSizeClay source: Calculated
              SoilCrop WheatSoil: LL=[0.26, 0.26, 0.26, 0.26, 0.25, 0.29, 0.36]; KL=[0.06, 0.06, 0.06, 0.04, 0.04, 0.02, 0.02]; XF=[1, 1, 1, 1, 1, 1, 1]
            WaterBalance SoilWater: SummerDate=1-Nov; SummerU=6; SummerCona=3.5; WinterDate=1-Apr; WinterU=4; WinterCona=2.5; DiffusConst=40; DiffusSlope=16; Salb=0.12; CN2Bare=73; CNRed=20; CNCov=0.8; PSIDul=-100; Thickness=[150, 150, 300, 300, 300, 300, 300]; SWCON=[0.3, 0.3, 0.3, 0.3, 0.3, 0.3, 0.3]
            Organic: FOMCNRatio=40; CarbonUnits=Total
              Thickness  Carbon  SoilCNRatio  FBiom  FInert  FOM
              150        0.9538  12           0.04   0.4     347.129
              150        0.9538  12           0.02   0.6     270.3444
              300        0.9615  12           0.02   0.8     163.9721
              300        0.8462  12           0.02   1       99.4541
              300        0.5462  12           0.01   1       60.322
              300        0.2615  12           0.01   1       36.5871
              300        0.2     12           0.01   1       22.1912
            Chemical: Thickness=[150, 150, 300, 300, 300, 300, 300]; PH=[8, 8, 8, 8, 8, 8, 8]; PHUnits=Water
            Water: Thickness=[150, 150, 300, 300, 300, 300, 300]; InitialValues=[0.41, 0.43, 0.46, 0.44, 0.4, 0.41, 0.38]; FilledFromTop=true
            Nutrient
            Solute NO3: Thickness=[150, 150, 300, 300, 300, 300, 300]; InitialValues=[10.101, 10.2564, 2.71, 0.7874, 0.4866, 0.2469, 0.2469]; InitialValuesUnits=ppm; WaterTableConcentration=0; D0=0; DepthConstant=0; MaxDepthSoluteAccessible=0; RunoffEffectivenessAtMovingSolute=0; MaxEffectiveRunoff=0
            Solute NH4: Thickness=[150, 150, 300, 300, 300, 300, 300]; InitialValues=[0.5051, 0.5128, 0.271, 0.2625, 0.2433, 0.2469, 0.2469]; InitialValuesUnits=ppm; WaterTableConcentration=0; D0=0; DepthConstant=0; MaxDepthSoluteAccessible=0; RunoffEffectivenessAtMovingSolute=0; MaxEffectiveRunoff=0
            Solute Urea: Thickness=[150, 150, 300, 300, 300, 300, 300]; InitialValues=[0, 0, 0, 0, 0, 0, 0]; InitialValuesUnits=kg/ha; WaterTableConcentration=0; D0=0; DepthConstant=0; MaxDepthSoluteAccessible=0; RunoffEffectivenessAtMovingSolute=0; MaxEffectiveRunoff=0
            SoilTemperature Temperature
          Manager N Unlimited (disabled)
            FertiliserType = NO3N
            Threshold = 200
            FertiliseDepth = 10
```csharp
using APSIM.Numerics;
using Models.Soils.Nutrients;
using System.Linq;
using System;
using Models.Core;
using Models.PMF;
using Models.Soils.Nutrients;
using APSIM.Shared.Utilities;
using Models.Soils;
namespace Models
{
    [Serializable]
    public class Script : Model
    {
        [Link] Clock Clock;
        [Link] Fertiliser Fertiliser;
        [Link(ByName=true)] Solute NO3;

        [Description("Type of fertiliser to apply? ")] 
        [Display(Type = DisplayType.FertiliserType)]public string FertiliserType { get; set; }
    
        [Description("Threshold amount of NO3 to topup to (kg/ha)")]
        public double Threshold { get; set;}
        
        [Description("Fertilise depth (mm)")]
        public double FertiliseDepth { get; set; }
        
        [EventSubscribe("DoManagement")]
        private void OnDoManagement(object sender, EventArgs e)
        {
            double Amount = Threshold - MathUtilities.Sum(NO3.kgha);
            Fertiliser.Apply(amount: Amount, type: FertiliserType, depth: FertiliseDepth);
        }
    }
}
```
          Manager Water Unlimited (disabled)
            Crop = [Wheat]
            AutoIrrigationOn = True
            FASWThreshold = 0.9
            FASWDepth = 600
            weeks = 1
            afterSowing = 2
```csharp
using APSIM.Numerics;
using Models.Interfaces;
using APSIM.Shared.Utilities;
using System.Xml.Serialization;
using Models;
using Models.PMF;
using Models.Soils;
using System.Text;
using System.Collections.Generic;
using Models.Core;
using System.Linq;
using System;
using Models.Interfaces;
namespace Models
{
    [Serializable] 
    public class Script : Model
    {
        [Link] private Zone zone;
        [Link] private Irrigation irrigation;
        [Link] private ISoilWater waterBalance;
        [Link] private IPhysical soilPhysical;
        public double FASW { get; set; }
        public double WaterDeficit  { get; set; }
    


        [Description("Crop to irrigate")]
        public IPlant Crop { get; set; }
        
        [Description("Auto irrigation on?")]
        public bool AutoIrrigationOn { get; set; }

        [Description("Threshold fraction available water (0-1)")]
        public double FASWThreshold { get; set; }

        [Description("Soil depth (mm) to which fraction available water is calculated")]
        public double FASWDepth { get; set; }

        [Description("Minimum weeks between irrigations")]
        public double weeks { get; set; }

        [Description("Minimum days after sowing for first irrigation")]
        public int afterSowing { get; set; }

        private double irrigationGap = 0;    // gap between irrigations

        /// <summary>Called at start of simulation. Performs some basic error checking. </summary>
        [EventSubscribe("StartOfSimulation")]
        private void ErrorChecking(object sender, EventArgs args)
        {
            if (Crop == null)
                throw new Exception("No crop was specified in script " + Parent.Name);
        }

        [EventSubscribe("DoManagement")]
        private void OnDoManagement(object sender, EventArgs e)
        {
            if (AutoIrrigationOn && Crop.IsAlive)
            {
                   irrigationGap += 1;                // increment gap between irrigations
                CalculateFASW();                // calc FASW and WaterDeficit
                if ((FASW < FASWThreshold) && (irrigationGap >= weeks * 7))
                {
                    irrigation.Apply(WaterDeficit, depth: 0);
                    irrigationGap = 0;            // reset
                }
            }
            else
            {
                irrigationGap = weeks * 7 - afterSowing - 1;    // allow irrigation a number of days after it becomes alive/sown
            }
        }

        // Calculate the fraction of the potential available sw
        // Calculate the deficit amount from DUL
        private void CalculateFASW()
        {
            double[] LL15 = MathUtilities.Multiply(soilPhysical.LL15, soilPhysical.Thickness);
            double[] DUL = MathUtilities.Multiply(soilPhysical.DUL, soilPhysical.Thickness);
        
            int nlayr = GetLayerIndex(FASWDepth);
            nlayr = Math.Min(nlayr, soilPhysical.Thickness.Length-1);
            double cumdep = MathUtilities.Sum(soilPhysical.Thickness, 0, nlayr, 0.0);    // tricky function that sums up to before nlayr

            double part_layer = MathUtilities.Divide((FASWDepth - cumdep), soilPhysical.Thickness[nlayr], 0.0);

            // note that results may be strange if swdep < ll15
            double avail_sw = (MathUtilities.Sum(waterBalance.SWmm, 0, nlayr, 0.0) + part_layer * waterBalance.SWmm[nlayr])
                            - (MathUtilities.Sum(LL15, 0, nlayr, 0.0) + part_layer * LL15[nlayr]);

            double pot_avail_sw = (MathUtilities.Sum(DUL, 0, nlayr, 0.0) + part_layer * DUL[nlayr])
                                - (MathUtilities.Sum(LL15, 0, nlayr, 0.0) + part_layer * LL15[nlayr]);
            
            FASW = MathUtilities.Divide(avail_sw, pot_avail_sw, 0.0);
            WaterDeficit = MathUtilities.Constrain(pot_avail_sw - avail_sw, 0.0, 100000);
        }

        // Get index of the layer that has this depth in it 
        private int GetLayerIndex(double pointDepth)
        {
            double[] cumThickness = soilPhysical.ThicknessCumulative;
            int layerIdx = 0;
            while ((layerIdx < cumThickness.Length) && (pointDepth > cumThickness[layerIdx]))
            {
                layerIdx += 1;
            }

            return layerIdx;
        }
    }
}
```
          Manager Harvesting: same as Replacements.Harvesting
  Folder NPIField2019
    Experiment WaggaWagga
      Factors
        Permutation
          Factor TOS
            CompositeFactor 1
              Specifications:
                [Sowing].Script.SowDate = 4-Mar
                [Clock].StartDate = 2019-03-04
                [Sowing].Script.Treat = 1
            CompositeFactor 2
              Specifications:
                [Sowing].Script.SowDate = 18-Mar
                [Clock].StartDate = 2019-03-18
                [Sowing].Script.Treat = 2
            CompositeFactor 3
              Specifications:
                [Sowing].Script.SowDate = 1-Apr
                [Clock].StartDate = 2019-04-01
                [Sowing].Script.Treat = 3
            CompositeFactor 4
              Specifications:
                [Sowing].Script.SowDate = 15-Apr
                [Clock].StartDate = 2019-04-15
                [Sowing].Script.Treat = 4
            CompositeFactor 5
              Specifications:
                [Sowing].Script.SowDate = 29-Apr
                [Clock].StartDate = 2019-04-29
                [Sowing].Script.Treat = 5
            CompositeFactor 6
              Specifications:
                [Sowing].Script.SowDate = 13-May
                [Clock].StartDate = 2019-05-13
                [Sowing].Script.Treat = 6
            CompositeFactor 7
              Specifications:
                [Sowing].Script.SowDate = 27-May
                [Clock].StartDate = 2019-05-27
                [Sowing].Script.Treat = 7
            CompositeFactor 8
              Specifications:
                [Sowing].Script.SowDate = 12-Jun
                [Clock].StartDate = 2019-06-12
                [Sowing].Script.Treat = 8
          Factor Cv
            Specification=[Sowing].Script.CultivarName = Young, Yitpi, Wyalkatchem, Wills, Whistler, Wedgetail, Trojan, Suntop, Sunstate, Sunlamb, Sunbri, Sunbee, Strzelecki, Spitfire, Scythe, Scout, Scepter, Rosella, Revenue, Peake, Ouyen, Mitch, Merinda, Manning, Magenta, Mace, Longsword, Lancer, Kittyhawk, Kellalac, Janz, Hume, H45, Grenade, Gregory, Gauntlet, Forrest, Emu_Rock, Ellison, Eaglehawk, Derrimut, Cutlass, CSIROW105, CSIROW102, CSIROW087, CSIROW077, CSIROW073, CSIROW029, CSIROW027, CSIROW023, CSIROW021, CSIROW018, CSIROW011, CSIROW007, CSIROW005, CSIROW003, CSIROW002, Crusader, Catalina, Calingiri, Braewood, Bolac, Beaufort, Axe
      Simulation WaggaWagga2019Base
        Weather
          FileName=%root%/Tests/Validation/Wheat/Phenology/WeatherFiles/WaggaWagga2019NPIfield.met
        Clock: Start=2019-02-25; End=2020-01-20
        Summary
        SoilArbitrator
        Zone Field: Area=1; Slope=0; AspectAngle=0; Altitude=50
          Soil: SoilType=Black Vertosol; Site=Lawes; NearestTown=Lawes, Q 4343; Region=Lockyer; State=Queensland; Country=Australia; NaturalVegetation=Blue Gum, Moreton Bay Ash, Tea Tree; ApsoilNumber=38; Latitude=-27.537; Longitude=152.336; LocationAccuracy=+-20m; DataSource=CSIRO Sustainable Ecosystems, Toowoomba
            Comments=Soil naming structure: \State\Region\Classification-Local Name (Site/district and locator number); oc and ph estimated
            Physical
              Thickness  BD    AirDry  LL15  DUL   SAT
              150        1.32  0.13    0.26  0.41  0.47
              150        1.3   0.208   0.26  0.43  0.48
              300        1.23  0.26    0.26  0.46  0.51
              300        1.27  0.26    0.26  0.44  0.49
              300        1.37  0.25    0.25  0.4   0.45
              300        1.35  0.26    0.26  0.41  0.46
              300        1.35  0.26    0.26  0.38  0.46
              SoilCrop WheatSoil: LL=[0.26, 0.26, 0.26, 0.26, 0.25, 0.29, 0.36]; KL=[0.06, 0.06, 0.06, 0.04, 0.04, 0.02, 0.02]; XF=[1, 1, 1, 1, 1, 1, 1]
            WaterBalance SoilWater: same as FARAwardPhenology.FARAwardPhenology.Simulation.Field.Soil.SoilWater
            Organic: FOMCNRatio=40; CarbonUnits=Total
              Thickness  Carbon  SoilCNRatio  FBiom  FInert  FOM
              150        0.9538  12           0.04   0.4     347.129
              150        0.9538  12           0.02   0.6     270.344
              300        0.9615  12           0.02   0.8     163.972
              300        0.8462  12           0.02   1       99.4541
              300        0.5462  12           0.01   1       60.322
              300        0.2615  12           0.01   1       36.5871
              300        0.2     12           0.01   1       22.1912
            Chemical: Thickness=[150, 150, 300, 300, 300, 300, 300]; PH=[8, 8, 8, 8, 8, 8, 8]; PHUnits=Water
            Water: Thickness=[150, 150, 300, 300, 300, 300, 300]; InitialValues=[0.41, 0.43, 0.46, 0.44, 0.4, 0.41, 0.38]; FilledFromTop=true
            Nutrient
            Solute NO3: Thickness=[150, 150, 300, 300, 300, 300, 300]; InitialValuesUnits=ppm; WaterTableConcentration=0; D0=0; DepthConstant=0; MaxDepthSoluteAccessible=0; RunoffEffectivenessAtMovingSolute=0; MaxEffectiveRunoff=0
              InitialValues=[10.101, 10.2564, 2.71003, 0.787402, 0.486618, 0.246914, 0.246914]
            Solute NH4: Thickness=[150, 150, 300, 300, 300, 300, 300]; InitialValuesUnits=ppm; WaterTableConcentration=0; D0=0; DepthConstant=0; MaxDepthSoluteAccessible=0; RunoffEffectivenessAtMovingSolute=0; MaxEffectiveRunoff=0
              InitialValues=[0.505051, 0.512821, 0.271003, 0.262467, 0.243309, 0.246914, 0.246914]
            Solute Urea: same as FARAwardPhenology.FARAwardPhenology.Simulation.Field.Soil.Urea
            SoilTemperature Temperature
          Report DailyReport
          Report HarvestReport
          Fertiliser
          SurfaceOrganicMatter: InitialResidueName=wheat_stubble; InitialResidueType=wheat; InitialResidueMass=500; InitialStandingFraction=0; InitialCPR=0; InitialCNR=100
          Plant Wheat
          MicroClimate: a_interception=0; b_interception=1; c_interception=0; d_interception=0; SoilHeatFluxFraction=0.4; MinimumHeightDiffForNewLayer=0; NightInterceptionFraction=0.5; ReferenceHeight=2
          Manager Sowing
            SowDate =
            Treat =
            CultivarName =
            SowingDepth = 50
            RowSpacing = 250
            Population = 150
            FilePath = %root%\Tests\Validation\Wheat\inputs\WaggaWaggaEmergenceDates.csv
```csharp
using Newtonsoft.Json;
using System.Data;
using System.Xml.Serialization;
using Models;
using System.Text;
using System.Collections.Generic;
using Models.Interfaces;
using System.Globalization;
using System;
using Models.Core;
using Models.PMF;
using Models.Soils;
using Models.Utilities;
using APSIM.Shared.Utilities;

namespace Models
{
    [Serializable]
    public class Script : Model
    {
        [Link] Clock Clock;
        [Link] Fertiliser Fertiliser;
        [Link] Summary Summary;
        [Link] Soil Soil;
        [Link] Plant Wheat;
        [Link] Simulation Simulation;
        Accumulator accumulatedRain;
        
        [Description("Sowing date (d-mmm)")]
        public string SowDate { get; set; }
        [Description("Treatment Name")]
        public string Treat { get; set; }
        [Display(Type = DisplayType.CultivarName)]
        [Description("Cultivar to be sown")]
        public string CultivarName { get; set; }
        [Description("Sowing depth (mm)")]
        public double SowingDepth { get; set; }
        [Description("Row spacing (mm)")]
        public double RowSpacing { get; set; }
        [Description("Plant population (/m2)")]
        public double Population { get; set; }

        [Description("Emergence Date File Path")]
        public string FilePath {get; set;}

        private DateTime EmergenceDate {get; set;}
        private string EmergenceString {get; set;}

        [JsonIgnore] private DataTable EmergDates{ get; set; }

        [EventSubscribe("StartOfSimulation")]
        private void OnStartOfSimulation(object sender, EventArgs e)
        {
            
            string fullFileName = PathUtilities.GetAbsolutePath(FilePath, Simulation.FileName);
            
            ApsimTextFile textFile = new ApsimTextFile();
            textFile.Open(fullFileName);
            EmergDates = textFile.ToTable();
            textFile.Close();
        }

        [EventSubscribe("DoManagement")]
        private void OnDoManagement(object sender, EventArgs e)
        {

            if (DateUtilities.WithinDates(SowDate, Clock.Today, SowDate))
            {
                
                foreach (DataRow row in EmergDates.Rows)
                {
                    string Env = Convert.ToString(row["TOS"]);
                    if (Env == Treat)
                    {
                        EmergenceDate = Convert.ToDateTime(row[CultivarName]);
                        EmergenceString = EmergenceDate.ToString("dd-MMM", CultureInfo.InvariantCulture);
                    }
                }

                Wheat.Sow(population: Population, cultivar: CultivarName, depth: SowingDepth, rowSpacing: RowSpacing);    
                Wheat.Phenology.SetPhaseCompletionDate(EmergenceString,"Emerging");
            }
        
        }
        
    }
}
```
          Manager SowingFertiliser
            Amount = 200
            CropName = wheat
```csharp
using Models.Soils;
using System;
using Models.Core;
using Models.PMF;
namespace Models
{
    [Serializable]
    public class Script : Model
    {
        [Link] Clock Clock;
        [Link] Fertiliser Fertiliser;
        [Link] Summary Summary;
        
        
        [Description("Amount of fertiliser to be applied (kg/ha)")]
        public double Amount { get; set;}
        
        [Description("Crop to be fertilised")]
        public string CropName { get; set;}
        
        
        

        [EventSubscribe("Sowing")]
        private void OnSowing(object sender, EventArgs e)
        {
            Model crop = sender as Model;
            if (crop.Name.ToLower()==CropName.ToLower())
                Fertiliser.Apply(amount: Amount, type: "NO3N");
        }
        
    }
}
```
          Manager Harvesting
          Operations Management
          Irrigation
        Manager LocationInfo
          Country = Australia
          State = New South Wales
          Region = NSW VIC Slopes
          script: same as in FARAwardPhenology.FARAwardPhenology.Simulation.LocationInfo
    Experiment Callington
      Factors
        Permutation
          Factor TOS
            CompositeFactor 1
              Specifications:
                [Sowing].Script.SowDate = 6-Mar
                [Clock].StartDate = 2019-03-06
                [Sowing].Script.Treat = 1
            CompositeFactor 2
              Specifications:
                [Sowing].Script.SowDate = 15-Mar
                [Clock].StartDate = 2019-03-15
                [Sowing].Script.Treat = 2
            CompositeFactor 3
              Specifications:
                [Sowing].Script.SowDate = 29-Mar
                [Clock].StartDate = 2019-03-29
                [Sowing].Script.Treat = 3
            CompositeFactor 4
              Specifications:
                [Sowing].Script.SowDate = 12-Apr
                [Clock].StartDate = 2019-04-12
                [Sowing].Script.Treat = 4
            CompositeFactor 5
              Specifications:
                [Sowing].Script.SowDate = 29-Apr
                [Clock].StartDate = 2019-04-29
                [Sowing].Script.Treat = 5
            CompositeFactor 6
              Specifications:
                [Sowing].Script.SowDate = 13-May
                [Clock].StartDate = 2019-05-13
                [Sowing].Script.Treat = 6
            CompositeFactor 7
              Specifications:
                [Sowing].Script.SowDate = 27-May
                [Clock].StartDate = 2019-05-27
                [Sowing].Script.Treat = 7
            CompositeFactor 8
              Specifications:
                [Sowing].Script.SowDate = 11-Jun
                [Clock].StartDate = 2019-06-11
                [Sowing].Script.Treat = 8
          Factor Cv: same as NPIField2019.WaggaWagga.Factors.Permutation.Cv
      Simulation Callington2019Base
        Weather
          FileName=%root%/Tests/Validation/Wheat/Phenology/WeatherFiles/Callington2019NPIfield.met
        Clock: Start=2019-02-25; End=2020-01-20
        Summary
        SoilArbitrator
        Zone Field: Area=1; Slope=0; AspectAngle=0; Altitude=50
          Soil: same as NPIField2019.WaggaWagga.WaggaWagga2019Base.Field.Soil
          Report DailyReport
          Report HarvestReport
          Fertiliser
          SurfaceOrganicMatter: InitialResidueName=wheat_stubble; InitialResidueType=wheat; InitialResidueMass=500; InitialStandingFraction=0; InitialCPR=0; InitialCNR=100
          Plant Wheat
          MicroClimate: a_interception=0; b_interception=1; c_interception=0; d_interception=0; SoilHeatFluxFraction=0.4; MinimumHeightDiffForNewLayer=0; NightInterceptionFraction=0.5; ReferenceHeight=2
          Manager Sowing
            SowDate =
            Treat =
            CultivarName =
            SowingDepth = 50
            RowSpacing = 250
            Population = 150
            FilePath = %root%\Tests\Validation\Wheat\inputs\CallingtonEmergenceDates.csv
            script: same as in NPIField2019.WaggaWagga.WaggaWagga2019Base.Field.Sowing
          Manager SowingFertiliser: same as NPIField2019.WaggaWagga.WaggaWagga2019Base.Field.SowingFertiliser
          Operations Management
          Irrigation
          Manager Harvesting
        Manager LocationInfo
          Country = Australia
          State = South Australia
          Region = SA VIC Mallee
          script: same as in FARAwardPhenology.FARAwardPhenology.Simulation.LocationInfo
    Experiment Dale
      Factors
        Permutation
          Factor TOS
            CompositeFactor 1
              Specifications:
                [Sowing].Script.SowDate = 20-Mar
                [Clock].StartDate = 2019-03-20
                [Sowing].Script.Treat = 1
            CompositeFactor 2
              Specifications:
                [Sowing].Script.SowDate = 10-Apr
                [Clock].StartDate = 2019-04-10
                [Sowing].Script.Treat = 2
            CompositeFactor 3
              Specifications:
                [Sowing].Script.SowDate = 17-Apr
                [Clock].StartDate = 2019-04-17
                [Sowing].Script.Treat = 3
            CompositeFactor 4
              Specifications:
                [Sowing].Script.SowDate = 1-May
                [Clock].StartDate = 2019-05-01
                [Sowing].Script.Treat = 4
            CompositeFactor 5
              Specifications:
                [Sowing].Script.SowDate = 17-May
                [Clock].StartDate = 2019-05-17
                [Sowing].Script.Treat = 5
            CompositeFactor 6
              Specifications:
                [Sowing].Script.SowDate = 28-May
                [Clock].StartDate = 2019-05-28
                [Sowing].Script.Treat = 6
            CompositeFactor 7
              Specifications:
                [Sowing].Script.SowDate = 12-Jun
                [Clock].StartDate = 2019-06-12
                [Sowing].Script.Treat = 7
            CompositeFactor 8
              Specifications:
                [Sowing].Script.SowDate = 1-Jul
                [Clock].StartDate = 2019-07-01
                [Sowing].Script.Treat = 8
          Factor Cv: same as NPIField2019.WaggaWagga.Factors.Permutation.Cv
      Simulation Dale2019Base
        Weather
          FileName=%root%/Tests/Validation/Wheat/Phenology/WeatherFiles/dale2019NPIfield.met
        Clock: Start=2019-02-25; End=2020-01-20
        Summary
        SoilArbitrator
        Zone Field: Area=1; Slope=0; AspectAngle=0; Altitude=50
          Soil: same as NPIField2019.WaggaWagga.WaggaWagga2019Base.Field.Soil
          Report DailyReport
          Report HarvestReport
          Fertiliser
          SurfaceOrganicMatter: InitialResidueName=wheat_stubble; InitialResidueType=wheat; InitialResidueMass=500; InitialStandingFraction=0; InitialCPR=0; InitialCNR=100
          Plant Wheat
          MicroClimate: a_interception=0; b_interception=1; c_interception=0; d_interception=0; SoilHeatFluxFraction=0.4; MinimumHeightDiffForNewLayer=0; NightInterceptionFraction=0.5; ReferenceHeight=2
          Manager Sowing
            SowDate =
            Treat =
            CultivarName =
            SowingDepth = 50
            RowSpacing = 250
            Population = 150
            FilePath = %root%\Tests\Validation\Wheat\inputs\DaleEmergenceDates.csv
            script: same as in NPIField2019.WaggaWagga.WaggaWagga2019Base.Field.Sowing
          Manager SowingFertiliser: same as NPIField2019.WaggaWagga.WaggaWagga2019Base.Field.SowingFertiliser
          Operations Management
          Irrigation
          Manager Harvesting
        Manager LocationInfo
          Country = Australia
          State = Western Australia
          Region = WA Central Zone
          script: same as in FARAwardPhenology.FARAwardPhenology.Simulation.LocationInfo
    Experiment YanYean
      Factors
        Permutation
          Factor TOS
            CompositeFactor 1
              Specifications:
                [Sowing].Script.SowDate = 5-Mar
                [Clock].StartDate = 2019-03-05
                [Sowing].Script.Treat = 1
            CompositeFactor 9
              Specifications:
                [Sowing].Script.SowDate = 16-Jul
                [Clock].StartDate = 2019-07-16
                [Sowing].Script.Treat = 9
            CompositeFactor 3
              Specifications:
                [Sowing].Script.SowDate = 1-Apr
                [Clock].StartDate = 2019-04-01
                [Sowing].Script.Treat = 3
            CompositeFactor 4
              Specifications:
                [Sowing].Script.SowDate = 15-Apr
                [Clock].StartDate = 2019-04-15
                [Sowing].Script.Treat = 4
            CompositeFactor 5
              Specifications:
                [Sowing].Script.SowDate = 1-May
                [Clock].StartDate = 2019-05-01
                [Sowing].Script.Treat = 5
            CompositeFactor 6
              Specifications:
                [Sowing].Script.SowDate = 15-May
                [Clock].StartDate = 2019-05-15
                [Sowing].Script.Treat = 6
            CompositeFactor 7
              Specifications:
                [Sowing].Script.SowDate = 31-May
                [Clock].StartDate = 2019-05-31
                [Sowing].Script.Treat = 7
            CompositeFactor 8
              Specifications:
                [Sowing].Script.SowDate = 14-Jun
                [Clock].StartDate = 2019-06-14
                [Sowing].Script.Treat = 8
          Factor Cv: same as NPIField2019.WaggaWagga.Factors.Permutation.Cv
      Simulation YanYean2019Base
        Weather
          FileName=%root%/Tests/Validation/Wheat/Phenology/WeatherFiles/yanyean2019NPIfield.met
        Clock: Start=2019-02-25; End=2020-01-20
        Summary
        SoilArbitrator
        Zone Field: Area=1; Slope=0; AspectAngle=0; Altitude=50
          Soil: same as NPIField2019.WaggaWagga.WaggaWagga2019Base.Field.Soil
          Report DailyReport
          Report HarvestReport
          Fertiliser
          SurfaceOrganicMatter: InitialResidueName=wheat_stubble; InitialResidueType=wheat; InitialResidueMass=500; InitialStandingFraction=0; InitialCPR=0; InitialCNR=100
          Plant Wheat
          MicroClimate: a_interception=0; b_interception=1; c_interception=0; d_interception=0; SoilHeatFluxFraction=0.4; MinimumHeightDiffForNewLayer=0; NightInterceptionFraction=0.5; ReferenceHeight=2
          Manager Sowing
            SowDate =
            Treat =
            CultivarName =
            SowingDepth = 50
            RowSpacing = 250
            Population = 150
            FilePath = %root%\Tests\Validation\Wheat\inputs\YanYeanEmergenceDates.csv
            script: same as in NPIField2019.WaggaWagga.WaggaWagga2019Base.Field.Sowing
          Manager SowingFertiliser: same as NPIField2019.WaggaWagga.WaggaWagga2019Base.Field.SowingFertiliser
          Operations Management
            2019-03-06  [Irrigation].Apply(amount:18);
            2019-03-18  [Irrigation].Apply(amount:18);
            2019-04-04  [Irrigation].Apply(amount:18);
            2019-04-17  [Irrigation].Apply(amount:18);
          Irrigation
          Manager Harvesting
        Manager LocationInfo
          Country = Australia
          State = Victoria
          Region =
          script: same as in FARAwardPhenology.FARAwardPhenology.Simulation.LocationInfo
  Folder NPIField2020
    Experiment WaggaWagga2020
      Factors
        Permutation
          Factor TOS
            CompositeFactor 1
              Specifications:
                [Sowing].Script.SowDate = 3-Mar
                [Clock].StartDate = 2020-03-03
                [Sowing].Script.Treat = 1
            CompositeFactor 2
              Specifications:
                [Sowing].Script.SowDate = 17-Mar
                [Clock].StartDate = 2020-03-17
                [Sowing].Script.Treat = 2
            CompositeFactor 3
              Specifications:
                [Sowing].Script.SowDate = 30-Mar
                [Clock].StartDate = 2020-03-30
                [Sowing].Script.Treat = 3
            CompositeFactor 4
              Specifications:
                [Sowing].Script.SowDate = 14-Apr
                [Clock].StartDate = 2020-04-14
                [Sowing].Script.Treat = 4
            CompositeFactor 5
              Specifications:
                [Sowing].Script.SowDate = 28-Apr
                [Clock].StartDate = 2020-04-28
                [Sowing].Script.Treat = 5
            CompositeFactor 6
              Specifications:
                [Sowing].Script.SowDate = 12-May
                [Clock].StartDate = 2020-05-12
                [Sowing].Script.Treat = 6
            CompositeFactor 7
              Specifications:
                [Sowing].Script.SowDate = 26-May
                [Clock].StartDate = 2020-05-26
                [Sowing].Script.Treat = 7
            CompositeFactor 8
              Specifications:
                [Sowing].Script.SowDate = 9-Jun
                [Clock].StartDate = 2020-06-09
                [Sowing].Script.Treat = 8
          Factor Cv
            Specification=[Sowing].Script.CultivarName = Young, Yitpi, Wyalkatchem, Wills, Whistler, Wedgetail, Trojan, Suntop, Sunstate, Sunlamb, Sunbri, Sunbee, Strzelecki, Spitfire, Scythe, Scout, Scepter, Revenue, Peake, Ouyen, Mitch, Merinda, Manning, Magenta, Mace, Longsword, Lancer, Kittyhawk, Kellalac, Janz, Hume, H45, Grenade, Gregory, Gauntlet, Forrest, Emu_Rock, Ellison, Eaglehawk, Derrimut, Cutlass, CSIROW105, CSIROW102, CSIROW087, CSIROW077, CSIROW073, CSIROW029, CSIROW027, CSIROW023, CSIROW021, CSIROW018, CSIROW011, CSIROW007, CSIROW005, CSIROW003, CSIROW002, Crusader, Catalina, Calingiri, Braewood, Bolac, Beaufort, Axe
      Simulation WaggaWagga2020Base
        Weather
          FileName=%root%/Tests/Validation/Wheat/Phenology/WeatherFiles/2020NPI_WaggaWagga.met
        Clock: Start=2020-03-03; End=2020-11-11
        Summary
        SoilArbitrator
        Zone Field: Area=1; Slope=0; AspectAngle=0; Altitude=50
          Soil: SoilType=Black Vertosol; Site=Lawes; NearestTown=Lawes, Q 4343; Region=Lockyer; State=Queensland; Country=Australia; NaturalVegetation=Blue Gum, Moreton Bay Ash, Tea Tree; ApsoilNumber=38; Latitude=-27.537; Longitude=152.336; LocationAccuracy=+-20m; DataSource=CSIRO Sustainable Ecosystems, Toowoomba
            Comments=Soil naming structure: \State\Region\Classification-Local Name (Site/district and locator number); oc and ph estimated
            Physical: same as NPIField2019.WaggaWagga.WaggaWagga2019Base.Field.Soil.Physical
            WaterBalance SoilWater: same as FARAwardPhenology.FARAwardPhenology.Simulation.Field.Soil.SoilWater
            Organic: same as FARAwardPhenology.FARAwardPhenology.Simulation.Field.Soil.Organic
            Chemical: Thickness=[150, 150, 300, 300, 300, 300, 300]; PH=[8, 8, 8, 8, 8, 8, 8]; PHUnits=Water
            Water: Thickness=[150, 150, 300, 300, 300, 300, 300]; InitialValues=[0.41, 0.43, 0.46, 0.44, 0.4, 0.41, 0.38]; FilledFromTop=true
            Nutrient
            Solute NO3: same as FARAwardPhenology.FARAwardPhenology.Simulation.Field.Soil.NO3
            Solute NH4: same as FARAwardPhenology.FARAwardPhenology.Simulation.Field.Soil.NH4
            Solute Urea: same as FARAwardPhenology.FARAwardPhenology.Simulation.Field.Soil.Urea
            SoilTemperature Temperature
          Report DailyReport
          Report HarvestReport
          Fertiliser
          SurfaceOrganicMatter: InitialResidueName=wheat_stubble; InitialResidueType=wheat; InitialResidueMass=500; InitialStandingFraction=0; InitialCPR=0; InitialCNR=100
          Plant Wheat
          MicroClimate: a_interception=0; b_interception=1; c_interception=0; d_interception=0; SoilHeatFluxFraction=0.4; MinimumHeightDiffForNewLayer=0; NightInterceptionFraction=0.5; ReferenceHeight=2
          Manager Sowing
            SowDate =
            Treat =
            CultivarName =
            SowingDepth = 50
            RowSpacing = 250
            Population = 150
            FilePath = %root%\Tests\Validation\Wheat\inputs\WaggaWaggaEmergenceDates2020.csv
```csharp
using Newtonsoft.Json;
using System.Data;
using System.Xml.Serialization;
using Models;
using System.Text;
using System.Collections.Generic;
using Models.Interfaces;
using System;
using Models.Core;
using Models.PMF;
using Models.Soils;
using Models.Utilities;
using APSIM.Shared.Utilities;

namespace Models
{
    [Serializable]
    public class Script : Model
    {
        [Link] Clock Clock;
        [Link] Fertiliser Fertiliser;
        [Link] Summary Summary;
        [Link] Soil Soil;
        [Link] Plant Wheat;
        [Link] Simulation Simulation;
        Accumulator accumulatedRain;
        
        [Description("Sowing date (d-mmm)")]
        public string SowDate { get; set; }
        [Description("Treatment Name")]
        public string Treat { get; set; }
        [Display(Type = DisplayType.CultivarName)]
        [Description("Cultivar to be sown")]
        public string CultivarName { get; set; }
        [Description("Sowing depth (mm)")]
        public double SowingDepth { get; set; }
        [Description("Row spacing (mm)")]
        public double RowSpacing { get; set; }
        [Description("Plant population (/m2)")]
        public double Population { get; set; }

        [Description("Emergence Date File Path")]
        public string FilePath {get; set;}

        private DateTime EmergenceDate {get; set;}
        private string EmergenceString {get; set;}

        [JsonIgnore] private DataTable EmergDates{ get; set; }

        [EventSubscribe("StartOfSimulation")]
        private void OnStartOfSimulation(object sender, EventArgs e)
        {
            
            string fullFileName = PathUtilities.GetAbsolutePath(FilePath, Simulation.FileName);
            
            ApsimTextFile textFile = new ApsimTextFile();
            textFile.Open(fullFileName);
            EmergDates = textFile.ToTable();
            textFile.Close();
        }

        [EventSubscribe("DoManagement")]
        private void OnDoManagement(object sender, EventArgs e)
        {

            if (DateUtilities.WithinDates(SowDate, Clock.Today, SowDate))
            {
                
                foreach (DataRow row in EmergDates.Rows)
                {
                    string Env = Convert.ToString(row["TOS"]);
                    if (Env == Treat)
                    {
                        EmergenceDate = Convert.ToDateTime(row[CultivarName]);
                        EmergenceString = EmergenceDate.ToString("dd-MMM");
                    }
                }

                Wheat.Sow(population: Population, cultivar: CultivarName, depth: SowingDepth, rowSpacing: RowSpacing);    
                Wheat.Phenology.SetPhaseCompletionDate(EmergenceString,"Emerging");
            }
        
        }
        
    }
}
```
          Manager SowingFertiliser: same as NPIField2019.WaggaWagga.WaggaWagga2019Base.Field.SowingFertiliser
          Manager Harvesting
          Operations Management
          Irrigation
        Manager LocationInfo: same as NPIField2019.WaggaWagga.WaggaWagga2019Base.LocationInfo
    Experiment Urrbrae2020
      Factors
        Permutation
          Factor TOS
            CompositeFactor 1
              Specifications:
                [Sowing].Script.SowDate = 2-Mar
                [Clock].StartDate = 2020-03-02
                [Sowing].Script.Treat = 1
            CompositeFactor 2
              Specifications:
                [Sowing].Script.SowDate = 16-Mar
                [Clock].StartDate = 2020-03-16
                [Sowing].Script.Treat = 2
            CompositeFactor 3
              Specifications:
                [Sowing].Script.SowDate = 1-Apr
                [Clock].StartDate = 2020-04-01
                [Sowing].Script.Treat = 3
            CompositeFactor 4
              Specifications:
                [Sowing].Script.SowDate = 14-Apr
                [Clock].StartDate = 2020-04-14
                [Sowing].Script.Treat = 4
            CompositeFactor 5
              Specifications:
                [Sowing].Script.SowDate = 4-May
                [Clock].StartDate = 2020-05-04
                [Sowing].Script.Treat = 5
            CompositeFactor 6
              Specifications:
                [Sowing].Script.SowDate = 15-May
                [Clock].StartDate = 2020-05-15
                [Sowing].Script.Treat = 6
            CompositeFactor 7
              Specifications:
                [Sowing].Script.SowDate = 29-May
                [Clock].StartDate = 2020-05-29
                [Sowing].Script.Treat = 7
            CompositeFactor 8
              Specifications:
                [Sowing].Script.SowDate = 18-Jun
                [Clock].StartDate = 2020-06-18
                [Sowing].Script.Treat = 8
          Factor Cv: same as NPIField2020.WaggaWagga2020.Factors.Permutation.Cv
      Simulation Urrbrae2020Base
        Weather
          FileName=%root%/Tests/Validation/Wheat/Phenology/WeatherFiles/2020NPI_Urrbrae.met
        Clock: Start=2020-03-02; End=2020-11-11
        Summary
        SoilArbitrator
        Zone Field: Area=1; Slope=0; AspectAngle=0; Altitude=50
          Soil: same as NPIField2020.WaggaWagga2020.WaggaWagga2020Base.Field.Soil
          Report DailyReport
          Report HarvestReport
          Fertiliser
          SurfaceOrganicMatter: InitialResidueName=wheat_stubble; InitialResidueType=wheat; InitialResidueMass=500; InitialStandingFraction=0; InitialCPR=0; InitialCNR=100
          Plant Wheat
          MicroClimate: a_interception=0; b_interception=1; c_interception=0; d_interception=0; SoilHeatFluxFraction=0.4; MinimumHeightDiffForNewLayer=0; NightInterceptionFraction=0.5; ReferenceHeight=2
          Manager Sowing
            SowDate =
            Treat =
            CultivarName =
            SowingDepth = 50
            RowSpacing = 250
            Population = 150
            FilePath = %root%\Tests\Validation\Wheat\inputs\UrrbraeEmergenceDates.csv
            script: same as in NPIField2020.WaggaWagga2020.WaggaWagga2020Base.Field.Sowing
          Manager SowingFertiliser: same as NPIField2019.WaggaWagga.WaggaWagga2019Base.Field.SowingFertiliser
          Operations Management
          Irrigation
          Manager Harvesting
        Manager LocationInfo: same as NPIField2019.Callington.Callington2019Base.LocationInfo
    Experiment Dale2020
      Factors
        Permutation
          Factor TOS
            CompositeFactor 1
              Specifications:
                [Sowing].Script.SowDate = 4-Mar
                [Clock].StartDate = 2020-03-04
                [Sowing].Script.Treat = 1
            CompositeFactor 2
              Specifications:
                [Sowing].Script.SowDate = 18-Mar
                [Clock].StartDate = 2020-03-18
                [Sowing].Script.Treat = 2
            CompositeFactor 3
              Specifications:
                [Sowing].Script.SowDate = 1-Apr
                [Clock].StartDate = 2020-04-01
                [Sowing].Script.Treat = 3
            CompositeFactor 4
              Specifications:
                [Sowing].Script.SowDate = 15-Apr
                [Clock].StartDate = 2020-04-15
                [Sowing].Script.Treat = 4
            CompositeFactor 5
              Specifications:
                [Sowing].Script.SowDate = 5-May
                [Clock].StartDate = 2020-05-05
                [Sowing].Script.Treat = 5
            CompositeFactor 6
              Specifications:
                [Sowing].Script.SowDate = 19-May
                [Clock].StartDate = 2020-05-19
                [Sowing].Script.Treat = 6
            CompositeFactor 7
              Specifications:
                [Sowing].Script.SowDate = 2-Jun
                [Clock].StartDate = 2020-06-02
                [Sowing].Script.Treat = 7
            CompositeFactor 8
              Specifications:
                [Sowing].Script.SowDate = 16-Jun
                [Clock].StartDate = 2020-06-16
                [Sowing].Script.Treat = 8
          Factor Cv: same as NPIField2020.WaggaWagga2020.Factors.Permutation.Cv
      Simulation Dale2020Base
        Weather
          FileName=%root%/Tests/Validation/Wheat/Phenology/WeatherFiles/2020NPI_Dale.met
        Clock: Start=2020-03-02; End=2020-11-11
        Summary
        SoilArbitrator
        Zone Field: Area=1; Slope=0; AspectAngle=0; Altitude=50
          Soil: same as NPIField2020.WaggaWagga2020.WaggaWagga2020Base.Field.Soil
          Report DailyReport
          Report HarvestReport
          Fertiliser
          SurfaceOrganicMatter: InitialResidueName=wheat_stubble; InitialResidueType=wheat; InitialResidueMass=500; InitialStandingFraction=0; InitialCPR=0; InitialCNR=100
          Plant Wheat
          MicroClimate: a_interception=0; b_interception=1; c_interception=0; d_interception=0; SoilHeatFluxFraction=0.4; MinimumHeightDiffForNewLayer=0; NightInterceptionFraction=0.5; ReferenceHeight=2
          Manager Sowing
            SowDate =
            Treat =
            CultivarName =
            SowingDepth = 50
            RowSpacing = 250
            Population = 150
            FilePath = %root%\Tests\Validation\Wheat\inputs\DaleEmergenceDates2020.csv
            script: same as in NPIField2020.WaggaWagga2020.WaggaWagga2020Base.Field.Sowing
          Manager SowingFertiliser: same as NPIField2019.WaggaWagga.WaggaWagga2019Base.Field.SowingFertiliser
          Operations Management
          Irrigation
          Manager Harvesting
        Manager LocationInfo: same as NPIField2019.Dale.Dale2019Base.LocationInfo
    Experiment YanYean2020
      Factors
        Permutation
          Factor TOS
            CompositeFactor 1
              Specifications:
                [Sowing].Script.SowDate = 2-Mar
                [Clock].StartDate = 2020-03-02
                [Sowing].Script.Treat = 1
            CompositeFactor 2
              Specifications:
                [Sowing].Script.SowDate = 16-Mar
                [Clock].StartDate = 2020-03-16
                [Sowing].Script.Treat = 2
            CompositeFactor 3
              Specifications:
                [Sowing].Script.SowDate = 1-Apr
                [Clock].StartDate = 2020-04-01
                [Sowing].Script.Treat = 3
            CompositeFactor 4
              Specifications:
                [Sowing].Script.SowDate = 15-Apr
                [Clock].StartDate = 2020-04-15
                [Sowing].Script.Treat = 4
            CompositeFactor 5
              Specifications:
                [Sowing].Script.SowDate = 28-Apr
                [Clock].StartDate = 2020-04-28
                [Sowing].Script.Treat = 5
            CompositeFactor 6 (disabled)
              Specifications:
                [Sowing].Script.SowDate = 15-May
                [Clock].StartDate = 2020-05-15
                [Sowing].Script.Treat = 6
            CompositeFactor 7
              Specifications:
                [Sowing].Script.SowDate = 29-May
                [Clock].StartDate = 2020-05-29
                [Sowing].Script.Treat = 7
            CompositeFactor 8
              Specifications:
                [Sowing].Script.SowDate = 15-Jun
                [Clock].StartDate = 2020-06-15
                [Sowing].Script.Treat = 8
          Factor Cv: same as NPIField2020.WaggaWagga2020.Factors.Permutation.Cv
      Simulation YanYean2020Base
        Weather
          FileName=%root%/Tests/Validation/Wheat/Phenology/WeatherFiles/2020NPI_YanYean.met
        Clock: Start=2020-03-02; End=2020-11-11
        Summary
        SoilArbitrator
        Zone Field: Area=1; Slope=0; AspectAngle=0; Altitude=50
          Soil: same as NPIField2020.WaggaWagga2020.WaggaWagga2020Base.Field.Soil
          Report DailyReport
          Report HarvestReport
          Fertiliser
          SurfaceOrganicMatter: InitialResidueName=wheat_stubble; InitialResidueType=wheat; InitialResidueMass=500; InitialStandingFraction=0; InitialCPR=0; InitialCNR=100
          Plant Wheat
          MicroClimate: a_interception=0; b_interception=1; c_interception=0; d_interception=0; SoilHeatFluxFraction=0.4; MinimumHeightDiffForNewLayer=0; NightInterceptionFraction=0.5; ReferenceHeight=2
          Manager Sowing
            SowDate =
            Treat =
            CultivarName =
            SowingDepth = 50
            RowSpacing = 250
            Population = 150
            FilePath = %root%\Tests\Validation\Wheat\inputs\YanYeanEmergenceDates2020.csv
            script: same as in NPIField2020.WaggaWagga2020.WaggaWagga2020Base.Field.Sowing
          Manager SowingFertiliser: same as NPIField2019.WaggaWagga.WaggaWagga2019Base.Field.SowingFertiliser
          Operations Management: same as NPIField2019.YanYean.YanYean2019Base.Field.Management
          Irrigation
          Manager Harvesting
        Manager LocationInfo: same as NPIField2019.YanYean.YanYean2019Base.LocationInfo
  Folder NPIValidation
    Experiment SGEHEAT_13GEHEAT-1
      Factors
        Factor Cultivar: Specification=[Sowing]
          Operations axe
            2013-05-21  [wheat].Sow(cultivar:"axe", population:150, depth:50, rowSpacing:250);
          Operations wyalkatchem
            2013-05-21  [wheat].Sow(cultivar:"wyalkatchem", population:150, depth:50, rowSpacing:250);
          Operations sunstate
            2013-05-21  [wheat].Sow(cultivar:"sunstate", population:150, depth:50, rowSpacing:250);
          Operations crusader
            2013-05-21  [wheat].Sow(cultivar:"crusader", population:150, depth:50, rowSpacing:250);
          Operations mace
            2013-05-21  [wheat].Sow(cultivar:"mace", population:150, depth:50, rowSpacing:250);
          Operations janz
            2013-05-21  [wheat].Sow(cultivar:"janz", population:150, depth:50, rowSpacing:250);
      Simulation SGEHEAT_13GEHEAT-1
        Clock: Start=2013-05-20; End=2014-01-03
        Summary SummaryFile
        Weather: FileName=%root%/Tests/Validation/Wheat/met/SGEHEAT_13GEHEAT-1.met
        SoilArbitrator
        Zone Field: Area=1; Slope=0; AspectAngle=0; Altitude=50
          Fertiliser
          Soil: ASCOrder=Vertosol; ASCSubOrder=Black; SoilType=Clay; Site=Norwin; NearestTown=Norwin; Region=Darling Downs and Granite Belt; State=Queensland; Country=Australia; NaturalVegetation=Qld. Bluegrass, possible Qld. Blue gum; ApsoilNumber=900; Latitude=-27.5818; Longitude=151.3202; LocationAccuracy=+/- 20m
            DataSource=CSIRO Sustainable Ecosystems, Toowoomba; Characteriesd as part of the GRDC funded project"Doing it better, doing it smarter, managing soil water in Australian agriculture' 2011
            Comments=OC, CLL for all crops estimated-based on Bongeen Mywybilla Soil No1
            Physical
              Thickness  BD      AirDry  LL15    DUL     SAT     KS
              150        1.0106  0.1303  0.2605  0.521   0.5887  20
              150        1.0715  0.1987  0.2484  0.4967  0.5657  20
              300        1.0939  0.28    0.28    0.4884  0.5572  20
              300        1.1586  0.28    0.28    0.4803  0.5328  20
              300        1.173   0.28    0.28    0.4716  0.5274  20
              300        1.1629  0.28    0.28    0.4571  0.5312  20
              300        1.1875  0.28    0.28    0.4523  0.5219  20
              SoilCrop WheatSoil: LL=[0.261, 0.248, 0.28, 0.306, 0.36, 0.392, 0.446]; KL=[0.06, 0.06, 0.06, 0.04, 0.04, 0.02, 0.01]; XF=[1, 1, 1, 1, 1, 1, 1]
            WaterBalance SoilWater: SummerDate=1-Nov; SummerU=5; SummerCona=5; WinterDate=1-Apr; WinterU=5; WinterCona=5; DiffusConst=40; DiffusSlope=16; Salb=0.12; CN2Bare=73; CNRed=20; CNCov=0.8; PSIDul=-100; Thickness=[150, 150, 300, 300, 300, 300, 300]; SWCON=[0.3, 0.3, 0.3, 0.3, 0.3, 0.3, 0.3]
            Nutrient
            Organic: FOMCNRatio=40; CarbonUnits=Total
              Thickness  Carbon  SoilCNRatio  FBiom  FInert  FOM
              150        1.2     12           0.04   0.4     347.129
              150        0.96    12           0.02   0.6     270.3444
              300        0.6     12           0.02   0.8     163.9721
              300        0.3     12           0.02   1       99.4541
              300        0.18    12           0.01   1       60.322
              300        0.12    12           0.01   1       36.5871
              300        0.12    12           0.01   1       22.1912
            Chemical: Thickness=[150, 150, 300, 300, 300, 300, 300]; PH=[8, 8, 8, 8, 8, 8, 8]; PHUnits=Water
            Water: Thickness=[150, 150, 300, 300, 300, 300, 300]; InitialValues=[0.521, 0.4967, 0.4884, 0.4803, 0.4716, 0.4571, 0.4523]; FilledFromTop=false
            Solute NO3: Thickness=[150, 150, 300, 300, 300, 300, 300]; InitialValues=[1, 1, 1, 1, 1, 1, 1]; InitialValuesUnits=ppm; WaterTableConcentration=0; D0=0; DepthConstant=0; MaxDepthSoluteAccessible=0; RunoffEffectivenessAtMovingSolute=0; MaxEffectiveRunoff=0
            Solute NH4: Thickness=[150, 150, 300, 300, 300, 300, 300]; InitialValues=[0.1, 0.1, 0.1, 0.1, 0.1, 0.1, 0.1]; InitialValuesUnits=ppm; WaterTableConcentration=0; D0=0; DepthConstant=0; MaxDepthSoluteAccessible=0; RunoffEffectivenessAtMovingSolute=0; MaxEffectiveRunoff=0
            Solute Urea: same as FARAwardPhenology.FARAwardPhenology.Simulation.Field.Soil.Urea
            SoilTemperature Temperature
          SurfaceOrganicMatter: InitialResidueName=wheat_stubble; InitialResidueType=wheat; InitialResidueMass=500; InitialStandingFraction=0; InitialCPR=0; InitialCNR=100
          Plant Wheat
          MicroClimate: a_interception=0; b_interception=1; c_interception=0; d_interception=0; SoilHeatFluxFraction=0.4; MinimumHeightDiffForNewLayer=0; NightInterceptionFraction=0.5; ReferenceHeight=2
          Manager SowingFertiliser
            Amount = 300
            CropName = wheat
            script: same as in NPIField2019.WaggaWagga.WaggaWagga2019Base.Field.SowingFertiliser
          Manager Harvesting
          Operations Sowing
            2013-05-21  [wheat].Sow(cultivar:"hartog", population:150, depth:50, rowSpacing:250);
          Report HarvestReport
        Manager LocationInfo
          Country = Australia
          State = Queensland
          Region =
          script: same as in FARAwardPhenology.FARAwardPhenology.Simulation.LocationInfo
    Experiment SGEHEAT_13GEHEAT-2
      Factors
        Factor Cultivar: Specification=[Sowing]
          Operations axe
            2013-07-31  [wheat].Sow(cultivar:"axe", population:150, depth:50, rowSpacing:250);
          Operations wyalkatchem
            2013-07-31  [wheat].Sow(cultivar:"wyalkatchem", population:150, depth:50, rowSpacing:250);
          Operations sunstate
            2013-07-31  [wheat].Sow(cultivar:"sunstate", population:150, depth:50, rowSpacing:250);
          Operations mace
            2013-07-31  [wheat].Sow(cultivar:"mace", population:150, depth:50, rowSpacing:250);
          Operations janz
            2013-07-31  [wheat].Sow(cultivar:"janz", population:150, depth:50, rowSpacing:250);
          Operations crusader
            2013-07-31  [wheat].Sow(cultivar:"crusader", population:150, depth:50, rowSpacing:250);
      Simulation SGEHEAT_13GEHEAT-2
        Clock: Start=2013-07-30; End=2014-01-03
        Summary SummaryFile
        Weather: FileName=%root%/Tests/Validation/Wheat/met/SGEHEAT_13GEHEAT-2.met
        SoilArbitrator
        Zone Field: Area=1; Slope=0; AspectAngle=0; Altitude=50
          Fertiliser
          Soil: same as NPIValidation.SGEHEAT_13GEHEAT-1.SGEHEAT_13GEHEAT-1.Field.Soil
          SurfaceOrganicMatter: InitialResidueName=wheat_stubble; InitialResidueType=wheat; InitialResidueMass=500; InitialStandingFraction=0; InitialCPR=0; InitialCNR=100
          Plant Wheat
          MicroClimate: a_interception=0; b_interception=1; c_interception=0; d_interception=0; SoilHeatFluxFraction=0.4; MinimumHeightDiffForNewLayer=0; NightInterceptionFraction=0.5; ReferenceHeight=2
          Manager SowingFertiliser: same as NPIValidation.SGEHEAT_13GEHEAT-1.SGEHEAT_13GEHEAT-1.Field.SowingFertiliser
          Manager Harvesting
          Operations Sowing
            2013-07-31  [wheat].Sow(cultivar:"hartog", population:150, depth:50, rowSpacing:250);
          Report HarvestReport
        Manager LocationInfo: same as NPIValidation.SGEHEAT_13GEHEAT-1.SGEHEAT_13GEHEAT-1.LocationInfo
    Experiment 14SSOW-1
      Factors
        Factor Cultivar: Specification=[Sowing]
          Operations gregory
            2014-04-11  [wheat].Sow(cultivar:"gregory", population:150, depth:50, rowSpacing:250);
          Operations ellison
            2014-04-11  [wheat].Sow(cultivar:"ellison", population:150, depth:50, rowSpacing:250);
          Operations wedgetail
            2014-04-11  [wheat].Sow(cultivar:"wedgetail", population:150, depth:50, rowSpacing:250);
          Operations scythe
            2014-04-11  [wheat].Sow(cultivar:"scythe", population:150, depth:50, rowSpacing:250);
          Operations axe
            2014-04-11  [wheat].Sow(cultivar:"axe", population:150, depth:50, rowSpacing:250);
          Operations braewood
            2014-04-11  [wheat].Sow(cultivar:"braewood", population:150, depth:50, rowSpacing:250);
          Operations bolac
            2014-04-11  [wheat].Sow(cultivar:"bolac", population:150, depth:50, rowSpacing:250);
          Operations calingiri
            2014-04-11  [wheat].Sow(cultivar:"calingiri", population:150, depth:50, rowSpacing:250);
          Operations catalina
            2014-04-11  [wheat].Sow(cultivar:"catalina", population:150, depth:50, rowSpacing:250);
          Operations derrimut
            2014-04-11  [wheat].Sow(cultivar:"derrimut", population:150, depth:50, rowSpacing:250);
          Operations strzelecki
            2014-04-11  [wheat].Sow(cultivar:"strzelecki", population:150, depth:50, rowSpacing:250);
          Operations sunbri
            2014-04-11  [wheat].Sow(cultivar:"sunbri", population:150, depth:50, rowSpacing:250);
          Operations sunstate
            2014-04-11  [wheat].Sow(cultivar:"sunstate", population:150, depth:50, rowSpacing:250);
          Operations kellalac
            2014-04-11  [wheat].Sow(cultivar:"kellalac", population:150, depth:50, rowSpacing:250);
          Operations janz
            2014-04-11  [wheat].Sow(cultivar:"janz", population:150, depth:50, rowSpacing:250);
          Operations mace
            2014-04-11  [wheat].Sow(cultivar:"mace", population:150, depth:50, rowSpacing:250);
          Operations rosella
            2014-04-11  [wheat].Sow(cultivar:"rosella", population:150, depth:50, rowSpacing:250);
          Operations gauntlet
            2014-04-11  [wheat].Sow(cultivar:"gauntlet", population:150, depth:50, rowSpacing:250);
          Operations forrest
            2014-04-11  [wheat].Sow(cultivar:"forrest", population:150, depth:50, rowSpacing:250);
          Operations lancer
            2014-04-11  [wheat].Sow(cultivar:"lancer", population:150, depth:50, rowSpacing:250);
          Operations scout
            2014-04-11  [wheat].Sow(cultivar:"scout", population:150, depth:50, rowSpacing:250);
          Operations revenue
            2014-04-11  [wheat].Sow(cultivar:"revenue", population:150, depth:50, rowSpacing:250);
          Operations merinda
            2014-04-11  [wheat].Sow(cultivar:"merinda", population:150, depth:50, rowSpacing:250);
          Operations spitfire
            2014-04-11  [wheat].Sow(cultivar:"spitfire", population:150, depth:50, rowSpacing:250);
          Operations suntop
            2014-04-11  [wheat].Sow(cultivar:"suntop", population:150, depth:50, rowSpacing:250);
          Operations whistler
            2014-04-11  [wheat].Sow(cultivar:"whistler", population:150, depth:50, rowSpacing:250);
          Operations young
            2014-04-11  [wheat].Sow(cultivar:"young", population:150, depth:50, rowSpacing:250);
          Operations yitpi
            2014-04-11  [wheat].Sow(cultivar:"yitpi", population:150, depth:50, rowSpacing:250);
          Operations wyalkatchem
            2014-04-11  [wheat].Sow(cultivar:"wyalkatchem", population:150, depth:50, rowSpacing:250);
          Operations hume
            2014-04-11  [wheat].Sow(cultivar:"hume", population:150, depth:50, rowSpacing:250);
          Operations peake
            2014-04-11  [wheat].Sow(cultivar:"peake", population:150, depth:50, rowSpacing:250);
          Operations ouyen
            2014-04-11  [wheat].Sow(cultivar:"ouyen", population:150, depth:50, rowSpacing:250);
          Operations wills
            2014-04-11  [wheat].Sow(cultivar:"wills", population:150, depth:50, rowSpacing:250);
          Operations eaglehawk
            2014-04-11  [wheat].Sow(cultivar:"eaglehawk", population:150, depth:50, rowSpacing:250);
      Simulation 14SSOW-1
        Clock: Start=2014-04-10; End=2015-02-05
        Summary SummaryFile
        Weather: FileName=%root%/Tests/Validation/Wheat/met/14SSOW-1.met
        SoilArbitrator
        Zone Field: Area=1; Slope=0; AspectAngle=0; Altitude=50
          Fertiliser
          Soil: same as NPIValidation.SGEHEAT_13GEHEAT-1.SGEHEAT_13GEHEAT-1.Field.Soil
          SurfaceOrganicMatter: InitialResidueName=wheat_stubble; InitialResidueType=wheat; InitialResidueMass=500; InitialStandingFraction=0; InitialCPR=0; InitialCNR=100
          Plant Wheat
          MicroClimate: a_interception=0; b_interception=1; c_interception=0; d_interception=0; SoilHeatFluxFraction=0.4; MinimumHeightDiffForNewLayer=0; NightInterceptionFraction=0.5; ReferenceHeight=2
          Manager SowingFertiliser: same as NPIValidation.SGEHEAT_13GEHEAT-1.SGEHEAT_13GEHEAT-1.Field.SowingFertiliser
          Manager Harvesting
          Operations Sowing
            2014-04-11  [wheat].Sow(cultivar:"hartog", population:150, depth:50, rowSpacing:250);
          Report HarvestReport
        Manager LocationInfo: same as NPIValidation.SGEHEAT_13GEHEAT-1.SGEHEAT_13GEHEAT-1.LocationInfo
    Experiment 14SSOW-2
      Factors
        Factor Cultivar: Specification=[Sowing]
          Operations scythe
            2014-05-13  [wheat].Sow(cultivar:"scythe", population:150, depth:50, rowSpacing:250);
          Operations axe
            2014-05-13  [wheat].Sow(cultivar:"axe", population:150, depth:50, rowSpacing:250);
          Operations braewood
            2014-05-13  [wheat].Sow(cultivar:"braewood", population:150, depth:50, rowSpacing:250);
          Operations calingiri
            2014-05-13  [wheat].Sow(cultivar:"calingiri", population:150, depth:50, rowSpacing:250);
          Operations bolac
            2014-05-13  [wheat].Sow(cultivar:"bolac", population:150, depth:50, rowSpacing:250);
          Operations derrimut
            2014-05-13  [wheat].Sow(cultivar:"derrimut", population:150, depth:50, rowSpacing:250);
          Operations catalina
            2014-05-13  [wheat].Sow(cultivar:"catalina", population:150, depth:50, rowSpacing:250);
          Operations janz
            2014-05-13  [wheat].Sow(cultivar:"janz", population:150, depth:50, rowSpacing:250);
          Operations kellalac
            2014-05-13  [wheat].Sow(cultivar:"kellalac", population:150, depth:50, rowSpacing:250);
          Operations mace
            2014-05-13  [wheat].Sow(cultivar:"mace", population:150, depth:50, rowSpacing:250);
          Operations gregory
            2014-05-13  [wheat].Sow(cultivar:"gregory", population:150, depth:50, rowSpacing:250);
          Operations wedgetail
            2014-05-13  [wheat].Sow(cultivar:"wedgetail", population:150, depth:50, rowSpacing:250);
          Operations ellison
            2014-05-13  [wheat].Sow(cultivar:"ellison", population:150, depth:50, rowSpacing:250);
          Operations wyalkatchem
            2014-05-13  [wheat].Sow(cultivar:"wyalkatchem", population:150, depth:50, rowSpacing:250);
          Operations yitpi
            2014-05-13  [wheat].Sow(cultivar:"yitpi", population:150, depth:50, rowSpacing:250);
          Operations young
            2014-05-13  [wheat].Sow(cultivar:"young", population:150, depth:50, rowSpacing:250);
          Operations crusader
            2014-05-13  [wheat].Sow(cultivar:"crusader", population:150, depth:50, rowSpacing:250);
          Operations rosella
            2014-05-13  [wheat].Sow(cultivar:"rosella", population:150, depth:50, rowSpacing:250);
          Operations sunbri
            2014-05-13  [wheat].Sow(cultivar:"sunbri", population:150, depth:50, rowSpacing:250);
          Operations strzelecki
            2014-05-13  [wheat].Sow(cultivar:"strzelecki", population:150, depth:50, rowSpacing:250);
          Operations sunstate
            2014-05-13  [wheat].Sow(cultivar:"sunstate", population:150, depth:50, rowSpacing:250);
          Operations eaglehawk
            2014-05-13  [wheat].Sow(cultivar:"eaglehawk", population:150, depth:50, rowSpacing:250);
          Operations forrest
            2014-05-13  [wheat].Sow(cultivar:"forrest", population:150, depth:50, rowSpacing:250);
          Operations gauntlet
            2014-05-13  [wheat].Sow(cultivar:"gauntlet", population:150, depth:50, rowSpacing:250);
          Operations lancer
            2014-05-13  [wheat].Sow(cultivar:"lancer", population:150, depth:50, rowSpacing:250);
          Operations spitfire
            2014-05-13  [wheat].Sow(cultivar:"spitfire", population:150, depth:50, rowSpacing:250);
          Operations scout
            2014-05-13  [wheat].Sow(cultivar:"scout", population:150, depth:50, rowSpacing:250);
          Operations merinda
            2014-05-13  [wheat].Sow(cultivar:"merinda", population:150, depth:50, rowSpacing:250);
          Operations revenue
            2014-05-13  [wheat].Sow(cultivar:"revenue", population:150, depth:50, rowSpacing:250);
          Operations whistler
            2014-05-13  [wheat].Sow(cultivar:"whistler", population:150, depth:50, rowSpacing:250);
          Operations suntop
            2014-05-13  [wheat].Sow(cultivar:"suntop", population:150, depth:50, rowSpacing:250);
          Operations hume
            2014-05-13  [wheat].Sow(cultivar:"hume", population:150, depth:50, rowSpacing:250);
          Operations peake
            2014-05-13  [wheat].Sow(cultivar:"peake", population:150, depth:50, rowSpacing:250);
          Operations wills
            2014-05-13  [wheat].Sow(cultivar:"wills", population:150, depth:50, rowSpacing:250);
          Operations ouyen
            2014-05-13  [wheat].Sow(cultivar:"ouyen", population:150, depth:50, rowSpacing:250);
      Simulation 14SSOW-2
        Clock: Start=2014-05-12; End=2015-03-09
        Summary SummaryFile
        Weather: FileName=%root%/Tests/Validation/Wheat/met/14SSOW-2.met
        SoilArbitrator
        Zone Field: Area=1; Slope=0; AspectAngle=0; Altitude=50
          Fertiliser
          Soil: same as NPIValidation.SGEHEAT_13GEHEAT-1.SGEHEAT_13GEHEAT-1.Field.Soil
          SurfaceOrganicMatter: InitialResidueName=wheat_stubble; InitialResidueType=wheat; InitialResidueMass=500; InitialStandingFraction=0; InitialCPR=0; InitialCNR=100
          Plant Wheat
          MicroClimate: a_interception=0; b_interception=1; c_interception=0; d_interception=0; SoilHeatFluxFraction=0.4; MinimumHeightDiffForNewLayer=0; NightInterceptionFraction=0.5; ReferenceHeight=2
          Manager SowingFertiliser: same as NPIValidation.SGEHEAT_13GEHEAT-1.SGEHEAT_13GEHEAT-1.Field.SowingFertiliser
          Manager Harvesting
          Operations Sowing
            2014-05-13  [wheat].Sow(cultivar:"hartog", population:150, depth:50, rowSpacing:250);
          Report HarvestReport
        Manager LocationInfo: same as NPIValidation.SGEHEAT_13GEHEAT-1.SGEHEAT_13GEHEAT-1.LocationInfo
    Experiment 14SSOW-4
      Factors
        Factor Cultivar: Specification=[Sowing]
          Operations gregory
            2014-07-16  [wheat].Sow(cultivar:"gregory", population:150, depth:50, rowSpacing:250);
          Operations wedgetail
            2014-07-16  [wheat].Sow(cultivar:"wedgetail", population:150, depth:50, rowSpacing:250);
          Operations ellison
            2014-07-16  [wheat].Sow(cultivar:"ellison", population:150, depth:50, rowSpacing:250);
          Operations scythe
            2014-07-16  [wheat].Sow(cultivar:"scythe", population:150, depth:50, rowSpacing:250);
          Operations axe
            2014-07-16  [wheat].Sow(cultivar:"axe", population:150, depth:50, rowSpacing:250);
          Operations braewood
            2014-07-16  [wheat].Sow(cultivar:"braewood", population:150, depth:50, rowSpacing:250);
          Operations calingiri
            2014-07-16  [wheat].Sow(cultivar:"calingiri", population:150, depth:50, rowSpacing:250);
          Operations bolac
            2014-07-16  [wheat].Sow(cultivar:"bolac", population:150, depth:50, rowSpacing:250);
          Operations derrimut
            2014-07-16  [wheat].Sow(cultivar:"derrimut", population:150, depth:50, rowSpacing:250);
          Operations catalina
            2014-07-16  [wheat].Sow(cultivar:"catalina", population:150, depth:50, rowSpacing:250);
          Operations rosella
            2014-07-16  [wheat].Sow(cultivar:"rosella", population:150, depth:50, rowSpacing:250);
          Operations sunbri
            2014-07-16  [wheat].Sow(cultivar:"sunbri", population:150, depth:50, rowSpacing:250);
          Operations strzelecki
            2014-07-16  [wheat].Sow(cultivar:"strzelecki", population:150, depth:50, rowSpacing:250);
          Operations sunstate
            2014-07-16  [wheat].Sow(cultivar:"sunstate", population:150, depth:50, rowSpacing:250);
          Operations janz
            2014-07-16  [wheat].Sow(cultivar:"janz", population:150, depth:50, rowSpacing:250);
          Operations kellalac
            2014-07-16  [wheat].Sow(cultivar:"kellalac", population:150, depth:50, rowSpacing:250);
          Operations mace
            2014-07-16  [wheat].Sow(cultivar:"mace", population:150, depth:50, rowSpacing:250);
          Operations forrest
            2014-07-16  [wheat].Sow(cultivar:"forrest", population:150, depth:50, rowSpacing:250);
          Operations gauntlet
            2014-07-16  [wheat].Sow(cultivar:"gauntlet", population:150, depth:50, rowSpacing:250);
          Operations lancer
            2014-07-16  [wheat].Sow(cultivar:"lancer", population:150, depth:50, rowSpacing:250);
          Operations spitfire
            2014-07-16  [wheat].Sow(cultivar:"spitfire", population:150, depth:50, rowSpacing:250);
          Operations scout
            2014-07-16  [wheat].Sow(cultivar:"scout", population:150, depth:50, rowSpacing:250);
          Operations merinda
            2014-07-16  [wheat].Sow(cultivar:"merinda", population:150, depth:50, rowSpacing:250);
          Operations whistler
            2014-07-16  [wheat].Sow(cultivar:"whistler", population:150, depth:50, rowSpacing:250);
          Operations suntop
            2014-07-16  [wheat].Sow(cultivar:"suntop", population:150, depth:50, rowSpacing:250);
          Operations wyalkatchem
            2014-07-16  [wheat].Sow(cultivar:"wyalkatchem", population:150, depth:50, rowSpacing:250);
          Operations yitpi
            2014-07-16  [wheat].Sow(cultivar:"yitpi", population:150, depth:50, rowSpacing:250);
          Operations young
            2014-07-16  [wheat].Sow(cultivar:"young", population:150, depth:50, rowSpacing:250);
          Operations crusader
            2014-07-16  [wheat].Sow(cultivar:"crusader", population:150, depth:50, rowSpacing:250);
          Operations hume
            2014-07-16  [wheat].Sow(cultivar:"hume", population:150, depth:50, rowSpacing:250);
          Operations peake
            2014-07-16  [wheat].Sow(cultivar:"peake", population:150, depth:50, rowSpacing:250);
          Operations wills
            2014-07-16  [wheat].Sow(cultivar:"wills", population:150, depth:50, rowSpacing:250);
          Operations ouyen
            2014-07-16  [wheat].Sow(cultivar:"ouyen", population:150, depth:50, rowSpacing:250);
          Operations eaglehawk
            2014-07-16  [wheat].Sow(cultivar:"eaglehawk", population:150, depth:50, rowSpacing:250);
      Simulation 14SSOW-4
        Clock: Start=2014-07-15; End=2015-05-12
        Summary SummaryFile
        Weather: FileName=%root%/Tests/Validation/Wheat/met/14SSOW-4.met
        SoilArbitrator
        Zone Field: Area=1; Slope=0; AspectAngle=0; Altitude=50
          Fertiliser
          Soil: same as NPIValidation.SGEHEAT_13GEHEAT-1.SGEHEAT_13GEHEAT-1.Field.Soil
          SurfaceOrganicMatter: InitialResidueName=wheat_stubble; InitialResidueType=wheat; InitialResidueMass=500; InitialStandingFraction=0; InitialCPR=0; InitialCNR=100
          Plant Wheat
          MicroClimate: a_interception=0; b_interception=1; c_interception=0; d_interception=0; SoilHeatFluxFraction=0.4; MinimumHeightDiffForNewLayer=0; NightInterceptionFraction=0.5; ReferenceHeight=2
          Manager SowingFertiliser: same as NPIValidation.SGEHEAT_13GEHEAT-1.SGEHEAT_13GEHEAT-1.Field.SowingFertiliser
          Manager Harvesting
          Operations Sowing
            2014-07-16  [wheat].Sow(cultivar:"hartog", population:150, depth:50, rowSpacing:250);
          Report HarvestReport
        Manager LocationInfo: same as NPIValidation.SGEHEAT_13GEHEAT-1.SGEHEAT_13GEHEAT-1.LocationInfo
    Experiment 14SSOW-5
      Factors
        Factor Cultivar: Specification=[Sowing]
          Operations scythe
            2014-08-12  [wheat].Sow(cultivar:"scythe", population:150, depth:50, rowSpacing:250);
          Operations axe
            2014-08-12  [wheat].Sow(cultivar:"axe", population:150, depth:50, rowSpacing:250);
          Operations braewood
            2014-08-12  [wheat].Sow(cultivar:"braewood", population:150, depth:50, rowSpacing:250);
          Operations calingiri
            2014-08-12  [wheat].Sow(cultivar:"calingiri", population:150, depth:50, rowSpacing:250);
          Operations bolac
            2014-08-12  [wheat].Sow(cultivar:"bolac", population:150, depth:50, rowSpacing:250);
          Operations derrimut
            2014-08-12  [wheat].Sow(cultivar:"derrimut", population:150, depth:50, rowSpacing:250);
          Operations catalina
            2014-08-12  [wheat].Sow(cultivar:"catalina", population:150, depth:50, rowSpacing:250);
          Operations janz
            2014-08-12  [wheat].Sow(cultivar:"janz", population:150, depth:50, rowSpacing:250);
          Operations kellalac
            2014-08-12  [wheat].Sow(cultivar:"kellalac", population:150, depth:50, rowSpacing:250);
          Operations mace
            2014-08-12  [wheat].Sow(cultivar:"mace", population:150, depth:50, rowSpacing:250);
          Operations gregory
            2014-08-12  [wheat].Sow(cultivar:"gregory", population:150, depth:50, rowSpacing:250);
          Operations ellison
            2014-08-12  [wheat].Sow(cultivar:"ellison", population:150, depth:50, rowSpacing:250);
          Operations wyalkatchem
            2014-08-12  [wheat].Sow(cultivar:"wyalkatchem", population:150, depth:50, rowSpacing:250);
          Operations young
            2014-08-12  [wheat].Sow(cultivar:"young", population:150, depth:50, rowSpacing:250);
          Operations yitpi
            2014-08-12  [wheat].Sow(cultivar:"yitpi", population:150, depth:50, rowSpacing:250);
          Operations crusader
            2014-08-12  [wheat].Sow(cultivar:"crusader", population:150, depth:50, rowSpacing:250);
          Operations sunbri
            2014-08-12  [wheat].Sow(cultivar:"sunbri", population:150, depth:50, rowSpacing:250);
          Operations strzelecki
            2014-08-12  [wheat].Sow(cultivar:"strzelecki", population:150, depth:50, rowSpacing:250);
          Operations sunstate
            2014-08-12  [wheat].Sow(cultivar:"sunstate", population:150, depth:50, rowSpacing:250);
          Operations eaglehawk
            2014-08-12  [wheat].Sow(cultivar:"eaglehawk", population:150, depth:50, rowSpacing:250);
          Operations forrest
            2014-08-12  [wheat].Sow(cultivar:"forrest", population:150, depth:50, rowSpacing:250);
          Operations gauntlet
            2014-08-12  [wheat].Sow(cultivar:"gauntlet", population:150, depth:50, rowSpacing:250);
          Operations lancer
            2014-08-12  [wheat].Sow(cultivar:"lancer", population:150, depth:50, rowSpacing:250);
          Operations spitfire
            2014-08-12  [wheat].Sow(cultivar:"spitfire", population:150, depth:50, rowSpacing:250);
          Operations merinda
            2014-08-12  [wheat].Sow(cultivar:"merinda", population:150, depth:50, rowSpacing:250);
          Operations scout
            2014-08-12  [wheat].Sow(cultivar:"scout", population:150, depth:50, rowSpacing:250);
          Operations suntop
            2014-08-12  [wheat].Sow(cultivar:"suntop", population:150, depth:50, rowSpacing:250);
          Operations hume
            2014-08-12  [wheat].Sow(cultivar:"hume", population:150, depth:50, rowSpacing:250);
          Operations peake
            2014-08-12  [wheat].Sow(cultivar:"peake", population:150, depth:50, rowSpacing:250);
          Operations wills
            2014-08-12  [wheat].Sow(cultivar:"wills", population:150, depth:50, rowSpacing:250);
          Operations ouyen
            2014-08-12  [wheat].Sow(cultivar:"ouyen", population:150, depth:50, rowSpacing:250);
      Simulation 14SSOW-5
        Clock: Start=2014-08-11; End=2015-06-08
        Summary SummaryFile
        Weather: FileName=%root%/Tests/Validation/Wheat/met/14SSOW-5.met
        SoilArbitrator
        Zone Field: Area=1; Slope=0; AspectAngle=0; Altitude=50
          Fertiliser
          Soil: same as NPIValidation.SGEHEAT_13GEHEAT-1.SGEHEAT_13GEHEAT-1.Field.Soil
          SurfaceOrganicMatter: InitialResidueName=wheat_stubble; InitialResidueType=wheat; InitialResidueMass=500; InitialStandingFraction=0; InitialCPR=0; InitialCNR=100
          Plant Wheat
          MicroClimate: a_interception=0; b_interception=1; c_interception=0; d_interception=0; SoilHeatFluxFraction=0.4; MinimumHeightDiffForNewLayer=0; NightInterceptionFraction=0.5; ReferenceHeight=2
          Manager SowingFertiliser: same as NPIValidation.SGEHEAT_13GEHEAT-1.SGEHEAT_13GEHEAT-1.Field.SowingFertiliser
          Manager Harvesting
          Operations Sowing
            2014-08-12  [wheat].Sow(cultivar:"hartog", population:150, depth:50, rowSpacing:250);
          Report HarvestReport
        Manager LocationInfo: same as NPIValidation.SGEHEAT_13GEHEAT-1.SGEHEAT_13GEHEAT-1.LocationInfo
    Experiment 12JuneeJames-1-100
      Factors
        Factor Cultivar: Specification=[Sowing]
          Operations gregory
            2012-04-18  [wheat].Sow(cultivar:"gregory", population:150, depth:50, rowSpacing:250);
          Operations eaglehawk
            2012-04-18  [wheat].Sow(cultivar:"eaglehawk", population:150, depth:50, rowSpacing:250);
      Simulation 12JuneeJames-1-100
        Clock: Start=2012-04-17; End=2012-12-17
        Summary SummaryFile
        Weather: FileName=%root%/Tests/Validation/Wheat/met/12JuneeJames-1-100.met
        SoilArbitrator
        Zone Field: Area=1; Slope=0; AspectAngle=0; Altitude=50
          Fertiliser
          Soil: same as NPIValidation.SGEHEAT_13GEHEAT-1.SGEHEAT_13GEHEAT-1.Field.Soil
          SurfaceOrganicMatter: InitialResidueName=wheat_stubble; InitialResidueType=wheat; InitialResidueMass=500; InitialStandingFraction=0; InitialCPR=0; InitialCNR=100
          Plant Wheat
          MicroClimate: a_interception=0; b_interception=1; c_interception=0; d_interception=0; SoilHeatFluxFraction=0.4; MinimumHeightDiffForNewLayer=0; NightInterceptionFraction=0.5; ReferenceHeight=2
          Manager SowingFertiliser: same as NPIValidation.SGEHEAT_13GEHEAT-1.SGEHEAT_13GEHEAT-1.Field.SowingFertiliser
          Manager Harvesting
          Operations Sowing
            2012-04-18  [wheat].Sow(cultivar:"hartog", population:150, depth:50, rowSpacing:250);
          Report HarvestReport
        Manager LocationInfo: same as NPIField2019.WaggaWagga.WaggaWagga2019Base.LocationInfo
    Experiment 12JuneeJames-1-50
      Factors
        Factor Cultivar: Specification=[Sowing]
          Operations eaglehawk
            2012-04-18  [wheat].Sow(cultivar:"eaglehawk", population:150, depth:50, rowSpacing:250);
      Simulation 12JuneeJames-1-50
        Clock: Start=2012-04-17; End=2012-12-17
        Summary SummaryFile
        Weather: FileName=%root%/Tests/Validation/Wheat/met/12JuneeJames-1-50.met
        SoilArbitrator
        Zone Field: same as NPIValidation.12JuneeJames-1-100.12JuneeJames-1-100.Field
        Manager LocationInfo: same as NPIField2019.WaggaWagga.WaggaWagga2019Base.LocationInfo
    Experiment 12JuneeJames-2-100
      Factors
        Factor Cultivar: Specification=[Sowing]
          Operations gregory
            2012-04-26  [wheat].Sow(cultivar:"gregory", population:150, depth:50, rowSpacing:250);
          Operations eaglehawk
            2012-04-26  [wheat].Sow(cultivar:"eaglehawk", population:150, depth:50, rowSpacing:250);
      Simulation 12JuneeJames-2-100
        Clock: Start=2012-04-25; End=2012-12-17
        Summary SummaryFile
        Weather: FileName=%root%/Tests/Validation/Wheat/met/12JuneeJames-2-100.met
        SoilArbitrator
        Zone Field: Area=1; Slope=0; AspectAngle=0; Altitude=50
          Fertiliser
          Soil: same as NPIValidation.SGEHEAT_13GEHEAT-1.SGEHEAT_13GEHEAT-1.Field.Soil
          SurfaceOrganicMatter: InitialResidueName=wheat_stubble; InitialResidueType=wheat; InitialResidueMass=500; InitialStandingFraction=0; InitialCPR=0; InitialCNR=100
          Plant Wheat
          MicroClimate: a_interception=0; b_interception=1; c_interception=0; d_interception=0; SoilHeatFluxFraction=0.4; MinimumHeightDiffForNewLayer=0; NightInterceptionFraction=0.5; ReferenceHeight=2
          Manager SowingFertiliser: same as NPIValidation.SGEHEAT_13GEHEAT-1.SGEHEAT_13GEHEAT-1.Field.SowingFertiliser
          Manager Harvesting
          Operations Sowing
            2012-04-26  [wheat].Sow(cultivar:"hartog", population:150, depth:50, rowSpacing:250);
          Report HarvestReport
        Manager LocationInfo: same as NPIField2019.WaggaWagga.WaggaWagga2019Base.LocationInfo
    Experiment 12JuneeJames-2-50
      Factors
        Factor Cultivar: Specification=[Sowing]
          Operations bolac
            2012-04-26  [wheat].Sow(cultivar:"bolac", population:150, depth:50, rowSpacing:250);
      Simulation 12JuneeJames-2-50
        Clock: Start=2012-04-25; End=2012-12-17
        Summary SummaryFile
        Weather: FileName=%root%/Tests/Validation/Wheat/met/12JuneeJames-2-50.met
        SoilArbitrator
        Zone Field: same as NPIValidation.12JuneeJames-2-100.12JuneeJames-2-100.Field
        Manager LocationInfo: same as NPIField2019.WaggaWagga.WaggaWagga2019Base.LocationInfo
    Experiment 12JuneeJames-3-100
      Factors
        Factor Cultivar: Specification=[Sowing]
          Operations eaglehawk
            2012-05-08  [wheat].Sow(cultivar:"eaglehawk", population:150, depth:50, rowSpacing:250);
          Operations bolac
            2012-05-08  [wheat].Sow(cultivar:"bolac", population:150, depth:50, rowSpacing:250);
          Operations gregory
            2012-05-08  [wheat].Sow(cultivar:"gregory", population:150, depth:50, rowSpacing:250);
      Simulation 12JuneeJames-3-100
        Clock: Start=2012-05-07; End=2012-12-17
        Summary SummaryFile
        Weather: FileName=%root%/Tests/Validation/Wheat/met/12JuneeJames-3-100.met
        SoilArbitrator
        Zone Field: Area=1; Slope=0; AspectAngle=0; Altitude=50
          Fertiliser
          Soil: same as NPIValidation.SGEHEAT_13GEHEAT-1.SGEHEAT_13GEHEAT-1.Field.Soil
          SurfaceOrganicMatter: InitialResidueName=wheat_stubble; InitialResidueType=wheat; InitialResidueMass=500; InitialStandingFraction=0; InitialCPR=0; InitialCNR=100
          Plant Wheat
          MicroClimate: a_interception=0; b_interception=1; c_interception=0; d_interception=0; SoilHeatFluxFraction=0.4; MinimumHeightDiffForNewLayer=0; NightInterceptionFraction=0.5; ReferenceHeight=2
          Manager SowingFertiliser: same as NPIValidation.SGEHEAT_13GEHEAT-1.SGEHEAT_13GEHEAT-1.Field.SowingFertiliser
          Manager Harvesting
          Operations Sowing
            2012-05-08  [wheat].Sow(cultivar:"hartog", population:150, depth:50, rowSpacing:250);
          Report HarvestReport
        Manager LocationInfo: same as NPIField2019.WaggaWagga.WaggaWagga2019Base.LocationInfo
    Experiment 12JuneeJames-4-100
      Factors
        Factor Cultivar: Specification=[Sowing]
          Operations bolac
            2012-05-17  [wheat].Sow(cultivar:"bolac", population:150, depth:50, rowSpacing:250);
          Operations gregory
            2012-05-17  [wheat].Sow(cultivar:"gregory", population:150, depth:50, rowSpacing:250);
      Simulation 12JuneeJames-4-100
        Clock: Start=2012-05-16; End=2012-12-17
        Summary SummaryFile
        Weather: FileName=%root%/Tests/Validation/Wheat/met/12JuneeJames-4-100.met
        SoilArbitrator
        Zone Field: Area=1; Slope=0; AspectAngle=0; Altitude=50
          Fertiliser
          Soil: same as NPIValidation.SGEHEAT_13GEHEAT-1.SGEHEAT_13GEHEAT-1.Field.Soil
          SurfaceOrganicMatter: InitialResidueName=wheat_stubble; InitialResidueType=wheat; InitialResidueMass=500; InitialStandingFraction=0; InitialCPR=0; InitialCNR=100
          Plant Wheat
          MicroClimate: a_interception=0; b_interception=1; c_interception=0; d_interception=0; SoilHeatFluxFraction=0.4; MinimumHeightDiffForNewLayer=0; NightInterceptionFraction=0.5; ReferenceHeight=2
          Manager SowingFertiliser: same as NPIValidation.SGEHEAT_13GEHEAT-1.SGEHEAT_13GEHEAT-1.Field.SowingFertiliser
          Manager Harvesting
          Operations Sowing
            2012-05-17  [wheat].Sow(cultivar:"hartog", population:150, depth:50, rowSpacing:250);
          Report HarvestReport
        Manager LocationInfo: same as NPIField2019.WaggaWagga.WaggaWagga2019Base.LocationInfo
    Experiment BCVT_Ardingly_1992-06-19
      Factors
        Factor Cultivar: Specification=[Sowing]
          Operations janz
            1992-06-19  [wheat].Sow(cultivar:"janz", population:150, depth:50, rowSpacing:250);
      Simulation BCVT_Ardingly_1992-06-19
        Clock: Start=1992-06-18; End=1993-04-15
        Summary SummaryFile
        Weather
          FileName=%root%/Tests/Validation/Wheat/met/BCVT_Ardingly_1992-06-19.met
        SoilArbitrator
        Zone Field: Area=1; Slope=0; AspectAngle=0; Altitude=50
          Fertiliser
          Soil: same as NPIValidation.SGEHEAT_13GEHEAT-1.SGEHEAT_13GEHEAT-1.Field.Soil
          SurfaceOrganicMatter: InitialResidueName=wheat_stubble; InitialResidueType=wheat; InitialResidueMass=500; InitialStandingFraction=0; InitialCPR=0; InitialCNR=100
          Plant Wheat
          MicroClimate: a_interception=0; b_interception=1; c_interception=0; d_interception=0; SoilHeatFluxFraction=0.4; MinimumHeightDiffForNewLayer=0; NightInterceptionFraction=0.5; ReferenceHeight=2
          Manager SowingFertiliser: same as NPIValidation.SGEHEAT_13GEHEAT-1.SGEHEAT_13GEHEAT-1.Field.SowingFertiliser
          Manager Harvesting
          Operations Sowing
            1992-06-19  [wheat].Sow(cultivar:"hartog", population:150, depth:50, rowSpacing:250);
          Report HarvestReport
        Manager LocationInfo
          Country = Australia
          State = Western Australia
          Region = WA Northern Zone
          script: same as in FARAwardPhenology.FARAwardPhenology.Simulation.LocationInfo
    Experiment BCVT_Badgingarra_2005-05-26
      Factors
        Factor Cultivar: Specification=[Sowing]
          Operations wyalkatchem
            2005-05-26  [wheat].Sow(cultivar:"wyalkatchem", population:150, depth:50, rowSpacing:250);
      Simulation BCVT_Badgingarra_2005-05-26
        Clock: Start=2005-05-25; End=2006-03-22
        Summary SummaryFile
        Weather
          FileName=%root%/Tests/Validation/Wheat/met/BCVT_Badgingarra_2005-05-26.met
        SoilArbitrator
        Zone Field: Area=1; Slope=0; AspectAngle=0; Altitude=50
          Fertiliser
          Soil: same as NPIValidation.SGEHEAT_13GEHEAT-1.SGEHEAT_13GEHEAT-1.Field.Soil
          SurfaceOrganicMatter: InitialResidueName=wheat_stubble; InitialResidueType=wheat; InitialResidueMass=500; InitialStandingFraction=0; InitialCPR=0; InitialCNR=100
          Plant Wheat
          MicroClimate: a_interception=0; b_interception=1; c_interception=0; d_interception=0; SoilHeatFluxFraction=0.4; MinimumHeightDiffForNewLayer=0; NightInterceptionFraction=0.5; ReferenceHeight=2
          Manager SowingFertiliser: same as NPIValidation.SGEHEAT_13GEHEAT-1.SGEHEAT_13GEHEAT-1.Field.SowingFertiliser
          Manager Harvesting
          Operations Sowing
            2005-05-26  [wheat].Sow(cultivar:"hartog", population:150, depth:50, rowSpacing:250);
          Report HarvestReport
        Manager LocationInfo: same as NPIField2019.Dale.Dale2019Base.LocationInfo
    Experiment BCVT_Badgingarra_2005-05-28
      Factors
        Factor Cultivar: Specification=[Sowing]
          Operations wyalkatchem
            2005-05-28  [wheat].Sow(cultivar:"wyalkatchem", population:150, depth:50, rowSpacing:250);
      Simulation BCVT_Badgingarra_2005-05-28
        Clock: Start=2005-05-27; End=2006-03-24
        Summary SummaryFile
        Weather
          FileName=%root%/Tests/Validation/Wheat/met/BCVT_Badgingarra_2005-05-28.met
        SoilArbitrator
        Zone Field: Area=1; Slope=0; AspectAngle=0; Altitude=50
          Fertiliser
          Soil: same as NPIValidation.SGEHEAT_13GEHEAT-1.SGEHEAT_13GEHEAT-1.Field.Soil
          SurfaceOrganicMatter: InitialResidueName=wheat_stubble; InitialResidueType=wheat; InitialResidueMass=500; InitialStandingFraction=0; InitialCPR=0; InitialCNR=100
          Plant Wheat
          MicroClimate: a_interception=0; b_interception=1; c_interception=0; d_interception=0; SoilHeatFluxFraction=0.4; MinimumHeightDiffForNewLayer=0; NightInterceptionFraction=0.5; ReferenceHeight=2
          Manager SowingFertiliser: same as NPIValidation.SGEHEAT_13GEHEAT-1.SGEHEAT_13GEHEAT-1.Field.SowingFertiliser
          Manager Harvesting
          Operations Sowing
            2005-05-28  [wheat].Sow(cultivar:"hartog", population:150, depth:50, rowSpacing:250);
          Report HarvestReport
        Manager LocationInfo: same as NPIField2019.Dale.Dale2019Base.LocationInfo
    Experiment BCVT_Badjaling_2003-05-30
      Factors
        Factor Cultivar: Specification=[Sowing]
          Operations calingiri
            2003-05-30  [wheat].Sow(cultivar:"calingiri", population:150, depth:50, rowSpacing:250);
      Simulation BCVT_Badjaling_2003-05-30
        Clock: Start=2003-05-29; End=2004-03-25
        Summary SummaryFile
        Weather
          FileName=%root%/Tests/Validation/Wheat/met/BCVT_Badjaling_2003-05-30.met
        SoilArbitrator
        Zone Field: Area=1; Slope=0; AspectAngle=0; Altitude=50
          Fertiliser
          Soil: same as NPIValidation.SGEHEAT_13GEHEAT-1.SGEHEAT_13GEHEAT-1.Field.Soil
          SurfaceOrganicMatter: InitialResidueName=wheat_stubble; InitialResidueType=wheat; InitialResidueMass=500; InitialStandingFraction=0; InitialCPR=0; InitialCNR=100
          Plant Wheat
          MicroClimate: a_interception=0; b_interception=1; c_interception=0; d_interception=0; SoilHeatFluxFraction=0.4; MinimumHeightDiffForNewLayer=0; NightInterceptionFraction=0.5; ReferenceHeight=2
          Manager SowingFertiliser: same as NPIValidation.SGEHEAT_13GEHEAT-1.SGEHEAT_13GEHEAT-1.Field.SowingFertiliser
          Manager Harvesting
          Operations Sowing
            2003-05-30  [wheat].Sow(cultivar:"hartog", population:150, depth:50, rowSpacing:250);
          Report HarvestReport
        Manager LocationInfo: same as NPIField2019.Dale.Dale2019Base.LocationInfo
    Experiment BCVT_Chapman_1992-06-23
      Factors
        Factor Cultivar: Specification=[Sowing]
          Operations janz
            1992-06-23  [wheat].Sow(cultivar:"janz", population:150, depth:50, rowSpacing:250);
      Simulation BCVT_Chapman_1992-06-23
        Clock: Start=1992-06-22; End=1993-04-19
        Summary SummaryFile
        Weather
          FileName=%root%/Tests/Validation/Wheat/met/BCVT_Chapman_1992-06-23.met
        SoilArbitrator
        Zone Field: Area=1; Slope=0; AspectAngle=0; Altitude=50
          Fertiliser
          Soil: same as NPIValidation.SGEHEAT_13GEHEAT-1.SGEHEAT_13GEHEAT-1.Field.Soil
          SurfaceOrganicMatter: InitialResidueName=wheat_stubble; InitialResidueType=wheat; InitialResidueMass=500; InitialStandingFraction=0; InitialCPR=0; InitialCNR=100
          Plant Wheat
          MicroClimate: a_interception=0; b_interception=1; c_interception=0; d_interception=0; SoilHeatFluxFraction=0.4; MinimumHeightDiffForNewLayer=0; NightInterceptionFraction=0.5; ReferenceHeight=2
          Manager SowingFertiliser: same as NPIValidation.SGEHEAT_13GEHEAT-1.SGEHEAT_13GEHEAT-1.Field.SowingFertiliser
          Manager Harvesting
          Operations Sowing
            1992-06-23  [wheat].Sow(cultivar:"hartog", population:150, depth:50, rowSpacing:250);
          Report HarvestReport
        Manager LocationInfo
          Country = Australia
          State = Western Australia
          Region =
          script: same as in FARAwardPhenology.FARAwardPhenology.Simulation.LocationInfo
    Experiment BCVT_Chapman_1992-06-24
      Factors
        Factor Cultivar: Specification=[Sowing]
          Operations janz
            1992-06-24  [wheat].Sow(cultivar:"janz", population:150, depth:50, rowSpacing:250);
      Simulation BCVT_Chapman_1992-06-24
        Clock: Start=1992-06-23; End=1993-04-20
        Summary SummaryFile
        Weather
          FileName=%root%/Tests/Validation/Wheat/met/BCVT_Chapman_1992-06-24.met
        SoilArbitrator
        Zone Field: Area=1; Slope=0; AspectAngle=0; Altitude=50
          Fertiliser
          Soil: same as NPIValidation.SGEHEAT_13GEHEAT-1.SGEHEAT_13GEHEAT-1.Field.Soil
          SurfaceOrganicMatter: InitialResidueName=wheat_stubble; InitialResidueType=wheat; InitialResidueMass=500; InitialStandingFraction=0; InitialCPR=0; InitialCNR=100
          Plant Wheat
          MicroClimate: a_interception=0; b_interception=1; c_interception=0; d_interception=0; SoilHeatFluxFraction=0.4; MinimumHeightDiffForNewLayer=0; NightInterceptionFraction=0.5; ReferenceHeight=2
          Manager SowingFertiliser: same as NPIValidation.SGEHEAT_13GEHEAT-1.SGEHEAT_13GEHEAT-1.Field.SowingFertiliser
          Manager Harvesting
          Operations Sowing
            1992-06-24  [wheat].Sow(cultivar:"hartog", population:150, depth:50, rowSpacing:250);
          Report HarvestReport
        Manager LocationInfo: same as NPIValidation.BCVT_Chapman_1992-06-23.BCVT_Chapman_1992-06-23.LocationInfo
    Experiment BCVT_Chapman_1994-06-10
      Factors
        Factor Cultivar: Specification=[Sowing]
          Operations janz
            1994-06-10  [wheat].Sow(cultivar:"janz", population:150, depth:50, rowSpacing:250);
      Simulation BCVT_Chapman_1994-06-10
        Clock: Start=1994-06-09; End=1995-04-06
        Summary SummaryFile
        Weather
          FileName=%root%/Tests/Validation/Wheat/met/BCVT_Chapman_1994-06-10.met
        SoilArbitrator
        Zone Field: Area=1; Slope=0; AspectAngle=0; Altitude=50
          Fertiliser
          Soil: same as NPIValidation.SGEHEAT_13GEHEAT-1.SGEHEAT_13GEHEAT-1.Field.Soil
          SurfaceOrganicMatter: InitialResidueName=wheat_stubble; InitialResidueType=wheat; InitialResidueMass=500; InitialStandingFraction=0; InitialCPR=0; InitialCNR=100
          Plant Wheat
          MicroClimate: a_interception=0; b_interception=1; c_interception=0; d_interception=0; SoilHeatFluxFraction=0.4; MinimumHeightDiffForNewLayer=0; NightInterceptionFraction=0.5; ReferenceHeight=2
          Manager SowingFertiliser: same as NPIValidation.SGEHEAT_13GEHEAT-1.SGEHEAT_13GEHEAT-1.Field.SowingFertiliser
          Manager Harvesting
          Operations Sowing
            1994-06-10  [wheat].Sow(cultivar:"hartog", population:150, depth:50, rowSpacing:250);
          Report HarvestReport
        Manager LocationInfo: same as NPIValidation.BCVT_Chapman_1992-06-23.BCVT_Chapman_1992-06-23.LocationInfo
    Experiment BCVT_Gairdner_River_2004-06-09
      Factors
        Factor Cultivar: Specification=[Sowing]
          Operations wyalkatchem
            2004-06-09  [wheat].Sow(cultivar:"wyalkatchem", population:150, depth:50, rowSpacing:250);
      Simulation BCVT_Gairdner_River_2004-06-09
        Clock: Start=2004-06-08; End=2005-04-05
        Summary SummaryFile
        Weather
          FileName=%root%/Tests/Validation/Wheat/met/BCVT_Gairdner_River_2004-06-09.met
        SoilArbitrator
        Zone Field: Area=1; Slope=0; AspectAngle=0; Altitude=50
          Fertiliser
          Soil: same as NPIValidation.SGEHEAT_13GEHEAT-1.SGEHEAT_13GEHEAT-1.Field.Soil
          SurfaceOrganicMatter: InitialResidueName=wheat_stubble; InitialResidueType=wheat; InitialResidueMass=500; InitialStandingFraction=0; InitialCPR=0; InitialCNR=100
          Plant Wheat
          MicroClimate: a_interception=0; b_interception=1; c_interception=0; d_interception=0; SoilHeatFluxFraction=0.4; MinimumHeightDiffForNewLayer=0; NightInterceptionFraction=0.5; ReferenceHeight=2
          Manager SowingFertiliser: same as NPIValidation.SGEHEAT_13GEHEAT-1.SGEHEAT_13GEHEAT-1.Field.SowingFertiliser
          Manager Harvesting
          Operations Sowing
            2004-06-09  [wheat].Sow(cultivar:"hartog", population:150, depth:50, rowSpacing:250);
          Report HarvestReport
        Manager LocationInfo
          Country = Australia
          State = Western Australia
          Region = WA Sandplain
          script: same as in FARAwardPhenology.FARAwardPhenology.Simulation.LocationInfo
    Experiment BCVT_Georgina_1992-06-26
      Factors
        Factor Cultivar: Specification=[Sowing]
          Operations rosella
            1992-06-26  [wheat].Sow(cultivar:"rosella", population:150, depth:50, rowSpacing:250);
      Simulation BCVT_Georgina_1992-06-26
        Clock: Start=1992-06-25; End=1993-04-22
        Summary SummaryFile
        Weather
          FileName=%root%/Tests/Validation/Wheat/met/BCVT_Georgina_1992-06-26.met
        SoilArbitrator
        Zone Field: Area=1; Slope=0; AspectAngle=0; Altitude=50
          Fertiliser
          Soil: same as NPIValidation.SGEHEAT_13GEHEAT-1.SGEHEAT_13GEHEAT-1.Field.Soil
          SurfaceOrganicMatter: InitialResidueName=wheat_stubble; InitialResidueType=wheat; InitialResidueMass=500; InitialStandingFraction=0; InitialCPR=0; InitialCNR=100
          Plant Wheat
          MicroClimate: a_interception=0; b_interception=1; c_interception=0; d_interception=0; SoilHeatFluxFraction=0.4; MinimumHeightDiffForNewLayer=0; NightInterceptionFraction=0.5; ReferenceHeight=2
          Manager SowingFertiliser: same as NPIValidation.SGEHEAT_13GEHEAT-1.SGEHEAT_13GEHEAT-1.Field.SowingFertiliser
          Manager Harvesting
          Operations Sowing
            1992-06-26  [wheat].Sow(cultivar:"hartog", population:150, depth:50, rowSpacing:250);
          Report HarvestReport
        Manager LocationInfo: same as NPIValidation.BCVT_Ardingly_1992-06-19.BCVT_Ardingly_1992-06-19.LocationInfo
    Experiment BCVT_Konnongorring_1997-06-13
      Factors
        Factor Cultivar: Specification=[Sowing]
          Operations calingiri
            1997-06-13  [wheat].Sow(cultivar:"calingiri", population:150, depth:50, rowSpacing:250);
      Simulation BCVT_Konnongorring_1997-06-13
        Clock: Start=1997-06-12; End=1998-04-09
        Summary SummaryFile
        Weather
          FileName=%root%/Tests/Validation/Wheat/met/BCVT_Konnongorring_1997-06-13.met
        SoilArbitrator
        Zone Field: Area=1; Slope=0; AspectAngle=0; Altitude=50
          Fertiliser
          Soil: same as NPIValidation.SGEHEAT_13GEHEAT-1.SGEHEAT_13GEHEAT-1.Field.Soil
          SurfaceOrganicMatter: InitialResidueName=wheat_stubble; InitialResidueType=wheat; InitialResidueMass=500; InitialStandingFraction=0; InitialCPR=0; InitialCNR=100
          Plant Wheat
          MicroClimate: a_interception=0; b_interception=1; c_interception=0; d_interception=0; SoilHeatFluxFraction=0.4; MinimumHeightDiffForNewLayer=0; NightInterceptionFraction=0.5; ReferenceHeight=2
          Manager SowingFertiliser: same as NPIValidation.SGEHEAT_13GEHEAT-1.SGEHEAT_13GEHEAT-1.Field.SowingFertiliser
          Manager Harvesting
          Operations Sowing
            1997-06-13  [wheat].Sow(cultivar:"hartog", population:150, depth:50, rowSpacing:250);
          Report HarvestReport
        Manager LocationInfo: same as NPIField2019.Dale.Dale2019Base.LocationInfo
    Experiment BCVT_Konnongorring_1997-06-27
      Factors
        Factor Cultivar: Specification=[Sowing]
          Operations calingiri
            1997-06-27  [wheat].Sow(cultivar:"calingiri", population:150, depth:50, rowSpacing:250);
      Simulation BCVT_Konnongorring_1997-06-27
        Clock: Start=1997-06-26; End=1998-04-23
        Summary SummaryFile
        Weather
          FileName=%root%/Tests/Validation/Wheat/met/BCVT_Konnongorring_1997-06-27.met
        SoilArbitrator
        Zone Field: Area=1; Slope=0; AspectAngle=0; Altitude=50
          Fertiliser
          Soil: same as NPIValidation.SGEHEAT_13GEHEAT-1.SGEHEAT_13GEHEAT-1.Field.Soil
          SurfaceOrganicMatter: InitialResidueName=wheat_stubble; InitialResidueType=wheat; InitialResidueMass=500; InitialStandingFraction=0; InitialCPR=0; InitialCNR=100
          Plant Wheat
          MicroClimate: a_interception=0; b_interception=1; c_interception=0; d_interception=0; SoilHeatFluxFraction=0.4; MinimumHeightDiffForNewLayer=0; NightInterceptionFraction=0.5; ReferenceHeight=2
          Manager SowingFertiliser: same as NPIValidation.SGEHEAT_13GEHEAT-1.SGEHEAT_13GEHEAT-1.Field.SowingFertiliser
          Manager Harvesting
          Operations Sowing
            1997-06-27  [wheat].Sow(cultivar:"hartog", population:150, depth:50, rowSpacing:250);
          Report HarvestReport
        Manager LocationInfo: same as NPIField2019.Dale.Dale2019Base.LocationInfo
    Experiment BCVT_Kumarl_1999-05-22
      Factors
        Factor Cultivar: Specification=[Sowing]
          Operations janz
            1999-05-22  [wheat].Sow(cultivar:"janz", population:150, depth:50, rowSpacing:250);
      Simulation BCVT_Kumarl_1999-05-22
        Clock: Start=1999-05-21; End=2000-03-17
        Summary SummaryFile
        Weather
          FileName=%root%/Tests/Validation/Wheat/met/BCVT_Kumarl_1999-05-22.met
        SoilArbitrator
        Zone Field: Area=1; Slope=0; AspectAngle=0; Altitude=50
          Fertiliser
          Soil: same as NPIValidation.SGEHEAT_13GEHEAT-1.SGEHEAT_13GEHEAT-1.Field.Soil
          SurfaceOrganicMatter: InitialResidueName=wheat_stubble; InitialResidueType=wheat; InitialResidueMass=500; InitialStandingFraction=0; InitialCPR=0; InitialCNR=100
          Plant Wheat
          MicroClimate: a_interception=0; b_interception=1; c_interception=0; d_interception=0; SoilHeatFluxFraction=0.4; MinimumHeightDiffForNewLayer=0; NightInterceptionFraction=0.5; ReferenceHeight=2
          Manager SowingFertiliser: same as NPIValidation.SGEHEAT_13GEHEAT-1.SGEHEAT_13GEHEAT-1.Field.SowingFertiliser
          Manager Harvesting
          Operations Sowing
            1999-05-22  [wheat].Sow(cultivar:"hartog", population:150, depth:50, rowSpacing:250);
          Report HarvestReport
        Manager LocationInfo: same as NPIValidation.BCVT_Gairdner_River_2004-06-09.BCVT_Gairdner_River_2004-06-09.LocationInfo
    Experiment BCVT_Kunjin_2005-05-26
      Factors: same as NPIValidation.BCVT_Badgingarra_2005-05-26.Factors
      Simulation BCVT_Kunjin_2005-05-26
        Clock: Start=2005-05-25; End=2006-03-22
        Summary SummaryFile
        Weather
          FileName=%root%/Tests/Validation/Wheat/met/BCVT_Kunjin_2005-05-26.met
        SoilArbitrator
        Zone Field: same as NPIValidation.BCVT_Badgingarra_2005-05-26.BCVT_Badgingarra_2005-05-26.Field
        Manager LocationInfo: same as NPIField2019.Dale.Dale2019Base.LocationInfo
    Experiment BCVT_Meckering_2003-06-04
      Factors
        Factor Cultivar: Specification=[Sowing]
          Operations wyalkatchem
            2003-06-04  [wheat].Sow(cultivar:"wyalkatchem", population:150, depth:50, rowSpacing:250);
      Simulation BCVT_Meckering_2003-06-04
        Clock: Start=2003-06-03; End=2004-03-30
        Summary SummaryFile
        Weather
          FileName=%root%/Tests/Validation/Wheat/met/BCVT_Meckering_2003-06-04.met
        SoilArbitrator
        Zone Field: Area=1; Slope=0; AspectAngle=0; Altitude=50
          Fertiliser
          Soil: same as NPIValidation.SGEHEAT_13GEHEAT-1.SGEHEAT_13GEHEAT-1.Field.Soil
          SurfaceOrganicMatter: InitialResidueName=wheat_stubble; InitialResidueType=wheat; InitialResidueMass=500; InitialStandingFraction=0; InitialCPR=0; InitialCNR=100
          Plant Wheat
          MicroClimate: a_interception=0; b_interception=1; c_interception=0; d_interception=0; SoilHeatFluxFraction=0.4; MinimumHeightDiffForNewLayer=0; NightInterceptionFraction=0.5; ReferenceHeight=2
          Manager SowingFertiliser: same as NPIValidation.SGEHEAT_13GEHEAT-1.SGEHEAT_13GEHEAT-1.Field.SowingFertiliser
          Manager Harvesting
          Operations Sowing
            2003-06-04  [wheat].Sow(cultivar:"hartog", population:150, depth:50, rowSpacing:250);
          Report HarvestReport
        Manager LocationInfo: same as NPIField2019.Dale.Dale2019Base.LocationInfo
    Experiment BCVT_Merredin_1995-05-30
      Factors
        Factor Cultivar: Specification=[Sowing]
          Operations janz
            1995-05-30  [wheat].Sow(cultivar:"janz", population:150, depth:50, rowSpacing:250);
      Simulation BCVT_Merredin_1995-05-30
        Clock: Start=1995-05-29; End=1996-03-25
        Summary SummaryFile
        Weather
          FileName=%root%/Tests/Validation/Wheat/met/BCVT_Merredin_1995-05-30.met
        SoilArbitrator
        Zone Field: Area=1; Slope=0; AspectAngle=0; Altitude=50
          Fertiliser
          Soil: same as NPIValidation.SGEHEAT_13GEHEAT-1.SGEHEAT_13GEHEAT-1.Field.Soil
          SurfaceOrganicMatter: InitialResidueName=wheat_stubble; InitialResidueType=wheat; InitialResidueMass=500; InitialStandingFraction=0; InitialCPR=0; InitialCNR=100
          Plant Wheat
          MicroClimate: a_interception=0; b_interception=1; c_interception=0; d_interception=0; SoilHeatFluxFraction=0.4; MinimumHeightDiffForNewLayer=0; NightInterceptionFraction=0.5; ReferenceHeight=2
          Manager SowingFertiliser: same as NPIValidation.SGEHEAT_13GEHEAT-1.SGEHEAT_13GEHEAT-1.Field.SowingFertiliser
          Manager Harvesting
          Operations Sowing
            1995-05-30  [wheat].Sow(cultivar:"hartog", population:150, depth:50, rowSpacing:250);
          Report HarvestReport
        Manager LocationInfo
          Country = Australia
          State = Western Australia
          Region = WA Eastern Zone
          script: same as in FARAwardPhenology.FARAwardPhenology.Simulation.LocationInfo
    Experiment BCVT_Merredin_1996-06-25
      Factors
        Factor Cultivar: Specification=[Sowing]
          Operations janz
            1996-06-25  [wheat].Sow(cultivar:"janz", population:150, depth:50, rowSpacing:250);
      Simulation BCVT_Merredin_1996-06-25
        Clock: Start=1996-06-24; End=1997-04-21
        Summary SummaryFile
        Weather
          FileName=%root%/Tests/Validation/Wheat/met/BCVT_Merredin_1996-06-25.met
        SoilArbitrator
        Zone Field: Area=1; Slope=0; AspectAngle=0; Altitude=50
          Fertiliser
          Soil: same as NPIValidation.SGEHEAT_13GEHEAT-1.SGEHEAT_13GEHEAT-1.Field.Soil
          SurfaceOrganicMatter: InitialResidueName=wheat_stubble; InitialResidueType=wheat; InitialResidueMass=500; InitialStandingFraction=0; InitialCPR=0; InitialCNR=100
          Plant Wheat
          MicroClimate: a_interception=0; b_interception=1; c_interception=0; d_interception=0; SoilHeatFluxFraction=0.4; MinimumHeightDiffForNewLayer=0; NightInterceptionFraction=0.5; ReferenceHeight=2
          Manager SowingFertiliser: same as NPIValidation.SGEHEAT_13GEHEAT-1.SGEHEAT_13GEHEAT-1.Field.SowingFertiliser
          Manager Harvesting
          Operations Sowing
            1996-06-25  [wheat].Sow(cultivar:"hartog", population:150, depth:50, rowSpacing:250);
          Report HarvestReport
        Manager LocationInfo: same as NPIValidation.BCVT_Merredin_1995-05-30.BCVT_Merredin_1995-05-30.LocationInfo
    Experiment BCVT_Merredin_1996-07-02
      Factors
        Factor Cultivar: Specification=[Sowing]
          Operations janz
            1996-07-02  [wheat].Sow(cultivar:"janz", population:150, depth:50, rowSpacing:250);
      Simulation BCVT_Merredin_1996-07-02
        Clock: Start=1996-07-01; End=1997-04-28
        Summary SummaryFile
        Weather
          FileName=%root%/Tests/Validation/Wheat/met/BCVT_Merredin_1996-07-02.met
        SoilArbitrator
        Zone Field: Area=1; Slope=0; AspectAngle=0; Altitude=50
          Fertiliser
          Soil: same as NPIValidation.SGEHEAT_13GEHEAT-1.SGEHEAT_13GEHEAT-1.Field.Soil
          SurfaceOrganicMatter: InitialResidueName=wheat_stubble; InitialResidueType=wheat; InitialResidueMass=500; InitialStandingFraction=0; InitialCPR=0; InitialCNR=100
          Plant Wheat
          MicroClimate: a_interception=0; b_interception=1; c_interception=0; d_interception=0; SoilHeatFluxFraction=0.4; MinimumHeightDiffForNewLayer=0; NightInterceptionFraction=0.5; ReferenceHeight=2
          Manager SowingFertiliser: same as NPIValidation.SGEHEAT_13GEHEAT-1.SGEHEAT_13GEHEAT-1.Field.SowingFertiliser
          Manager Harvesting
          Operations Sowing
            1996-07-02  [wheat].Sow(cultivar:"hartog", population:150, depth:50, rowSpacing:250);
          Report HarvestReport
        Manager LocationInfo: same as NPIValidation.BCVT_Merredin_1995-05-30.BCVT_Merredin_1995-05-30.LocationInfo
    Experiment BCVT_Merredin_1998-06-19
      Factors
        Factor Cultivar: Specification=[Sowing]
          Operations wyalkatchem
            1998-06-19  [wheat].Sow(cultivar:"wyalkatchem", population:150, depth:50, rowSpacing:250);
      Simulation BCVT_Merredin_1998-06-19
        Clock: Start=1998-06-18; End=1999-04-15
        Summary SummaryFile
        Weather
          FileName=%root%/Tests/Validation/Wheat/met/BCVT_Merredin_1998-06-19.met
        SoilArbitrator
        Zone Field: Area=1; Slope=0; AspectAngle=0; Altitude=50
          Fertiliser
          Soil: same as NPIValidation.SGEHEAT_13GEHEAT-1.SGEHEAT_13GEHEAT-1.Field.Soil
          SurfaceOrganicMatter: InitialResidueName=wheat_stubble; InitialResidueType=wheat; InitialResidueMass=500; InitialStandingFraction=0; InitialCPR=0; InitialCNR=100
          Plant Wheat
          MicroClimate: a_interception=0; b_interception=1; c_interception=0; d_interception=0; SoilHeatFluxFraction=0.4; MinimumHeightDiffForNewLayer=0; NightInterceptionFraction=0.5; ReferenceHeight=2
          Manager SowingFertiliser: same as NPIValidation.SGEHEAT_13GEHEAT-1.SGEHEAT_13GEHEAT-1.Field.SowingFertiliser
          Manager Harvesting
          Operations Sowing
            1998-06-19  [wheat].Sow(cultivar:"hartog", population:150, depth:50, rowSpacing:250);
          Report HarvestReport
        Manager LocationInfo: same as NPIValidation.BCVT_Merredin_1995-05-30.BCVT_Merredin_1995-05-30.LocationInfo
    Experiment BCVT_Merredin_2000-06-19
      Factors
        Factor Cultivar: Specification=[Sowing]
          Operations calingiri
            2000-06-19  [wheat].Sow(cultivar:"calingiri", population:150, depth:50, rowSpacing:250);
      Simulation BCVT_Merredin_2000-06-19
        Clock: Start=2000-06-18; End=2001-04-15
        Summary SummaryFile
        Weather
          FileName=%root%/Tests/Validation/Wheat/met/BCVT_Merredin_2000-06-19.met
        SoilArbitrator
        Zone Field: Area=1; Slope=0; AspectAngle=0; Altitude=50
          Fertiliser
          Soil: same as NPIValidation.SGEHEAT_13GEHEAT-1.SGEHEAT_13GEHEAT-1.Field.Soil
          SurfaceOrganicMatter: InitialResidueName=wheat_stubble; InitialResidueType=wheat; InitialResidueMass=500; InitialStandingFraction=0; InitialCPR=0; InitialCNR=100
          Plant Wheat
          MicroClimate: a_interception=0; b_interception=1; c_interception=0; d_interception=0; SoilHeatFluxFraction=0.4; MinimumHeightDiffForNewLayer=0; NightInterceptionFraction=0.5; ReferenceHeight=2
          Manager SowingFertiliser: same as NPIValidation.SGEHEAT_13GEHEAT-1.SGEHEAT_13GEHEAT-1.Field.SowingFertiliser
          Manager Harvesting
          Operations Sowing
            2000-06-19  [wheat].Sow(cultivar:"hartog", population:150, depth:50, rowSpacing:250);
          Report HarvestReport
        Manager LocationInfo: same as NPIValidation.BCVT_Merredin_1995-05-30.BCVT_Merredin_1995-05-30.LocationInfo
    Experiment BCVT_Merredin_2002-06-10
      Factors
        Factor Cultivar: Specification=[Sowing]
          Operations wyalkatchem
            2002-06-10  [wheat].Sow(cultivar:"wyalkatchem", population:150, depth:50, rowSpacing:250);
      Simulation BCVT_Merredin_2002-06-10
        Clock: Start=2002-06-09; End=2003-04-06
        Summary SummaryFile
        Weather
          FileName=%root%/Tests/Validation/Wheat/met/BCVT_Merredin_2002-06-10.met
        SoilArbitrator
        Zone Field: Area=1; Slope=0; AspectAngle=0; Altitude=50
          Fertiliser
          Soil: same as NPIValidation.SGEHEAT_13GEHEAT-1.SGEHEAT_13GEHEAT-1.Field.Soil
          SurfaceOrganicMatter: InitialResidueName=wheat_stubble; InitialResidueType=wheat; InitialResidueMass=500; InitialStandingFraction=0; InitialCPR=0; InitialCNR=100
          Plant Wheat
          MicroClimate: a_interception=0; b_interception=1; c_interception=0; d_interception=0; SoilHeatFluxFraction=0.4; MinimumHeightDiffForNewLayer=0; NightInterceptionFraction=0.5; ReferenceHeight=2
          Manager SowingFertiliser: same as NPIValidation.SGEHEAT_13GEHEAT-1.SGEHEAT_13GEHEAT-1.Field.SowingFertiliser
          Manager Harvesting
          Operations Sowing
            2002-06-10  [wheat].Sow(cultivar:"hartog", population:150, depth:50, rowSpacing:250);
          Report HarvestReport
        Manager LocationInfo: same as NPIValidation.BCVT_Merredin_1995-05-30.BCVT_Merredin_1995-05-30.LocationInfo
    Experiment BCVT_Merredin_2003-06-06
      Factors
        Factor Cultivar: Specification=[Sowing]
          Operations wyalkatchem
            2003-06-06  [wheat].Sow(cultivar:"wyalkatchem", population:150, depth:50, rowSpacing:250);
          Operations hume
            2003-06-06  [wheat].Sow(cultivar:"hume", population:150, depth:50, rowSpacing:250);
      Simulation BCVT_Merredin_2003-06-06
        Clock: Start=2003-06-05; End=2004-04-01
        Summary SummaryFile
        Weather
          FileName=%root%/Tests/Validation/Wheat/met/BCVT_Merredin_2003-06-06.met
        SoilArbitrator
        Zone Field: Area=1; Slope=0; AspectAngle=0; Altitude=50
          Fertiliser
          Soil: same as NPIValidation.SGEHEAT_13GEHEAT-1.SGEHEAT_13GEHEAT-1.Field.Soil
          SurfaceOrganicMatter: InitialResidueName=wheat_stubble; InitialResidueType=wheat; InitialResidueMass=500; InitialStandingFraction=0; InitialCPR=0; InitialCNR=100
          Plant Wheat
          MicroClimate: a_interception=0; b_interception=1; c_interception=0; d_interception=0; SoilHeatFluxFraction=0.4; MinimumHeightDiffForNewLayer=0; NightInterceptionFraction=0.5; ReferenceHeight=2
          Manager SowingFertiliser: same as NPIValidation.SGEHEAT_13GEHEAT-1.SGEHEAT_13GEHEAT-1.Field.SowingFertiliser
          Manager Harvesting
          Operations Sowing
            2003-06-06  [wheat].Sow(cultivar:"hartog", population:150, depth:50, rowSpacing:250);
          Report HarvestReport
        Manager LocationInfo: same as NPIValidation.BCVT_Merredin_1995-05-30.BCVT_Merredin_1995-05-30.LocationInfo
    Experiment BCVT_Mt_Madden_1994-06-13
      Factors
        Factor Cultivar: Specification=[Sowing]
          Operations janz
            1994-06-13  [wheat].Sow(cultivar:"janz", population:150, depth:50, rowSpacing:250);
      Simulation BCVT_Mt_Madden_1994-06-13
        Clock: Start=1994-06-12; End=1995-04-09
        Summary SummaryFile
        Weather
          FileName=%root%/Tests/Validation/Wheat/met/BCVT_Mt._Madden_1994-06-13.met
        SoilArbitrator
        Zone Field: Area=1; Slope=0; AspectAngle=0; Altitude=50
          Fertiliser
          Soil: same as NPIValidation.SGEHEAT_13GEHEAT-1.SGEHEAT_13GEHEAT-1.Field.Soil
          SurfaceOrganicMatter: InitialResidueName=wheat_stubble; InitialResidueType=wheat; InitialResidueMass=500; InitialStandingFraction=0; InitialCPR=0; InitialCNR=100
          Plant Wheat
          MicroClimate: a_interception=0; b_interception=1; c_interception=0; d_interception=0; SoilHeatFluxFraction=0.4; MinimumHeightDiffForNewLayer=0; NightInterceptionFraction=0.5; ReferenceHeight=2
          Manager SowingFertiliser: same as NPIValidation.SGEHEAT_13GEHEAT-1.SGEHEAT_13GEHEAT-1.Field.SowingFertiliser
          Manager Harvesting
          Operations Sowing
            1994-06-13  [wheat].Sow(cultivar:"hartog", population:150, depth:50, rowSpacing:250);
          Report HarvestReport
        Manager LocationInfo: same as NPIField2019.Dale.Dale2019Base.LocationInfo
    Experiment BCVT_Mukinbudin_2000-06-13
      Factors
        Factor Cultivar: Specification=[Sowing]
          Operations yitpi
            2000-06-13  [wheat].Sow(cultivar:"yitpi", population:150, depth:50, rowSpacing:250);
      Simulation BCVT_Mukinbudin_2000-06-13
        Clock: Start=2000-06-12; End=2001-04-09
        Summary SummaryFile
        Weather
          FileName=%root%/Tests/Validation/Wheat/met/BCVT_Mukinbudin_2000-06-13.met
        SoilArbitrator
        Zone Field: Area=1; Slope=0; AspectAngle=0; Altitude=50
          Fertiliser
          Soil: same as NPIValidation.SGEHEAT_13GEHEAT-1.SGEHEAT_13GEHEAT-1.Field.Soil
          SurfaceOrganicMatter: InitialResidueName=wheat_stubble; InitialResidueType=wheat; InitialResidueMass=500; InitialStandingFraction=0; InitialCPR=0; InitialCNR=100
          Plant Wheat
          MicroClimate: a_interception=0; b_interception=1; c_interception=0; d_interception=0; SoilHeatFluxFraction=0.4; MinimumHeightDiffForNewLayer=0; NightInterceptionFraction=0.5; ReferenceHeight=2
          Manager SowingFertiliser: same as NPIValidation.SGEHEAT_13GEHEAT-1.SGEHEAT_13GEHEAT-1.Field.SowingFertiliser
          Manager Harvesting
          Operations Sowing
            2000-06-13  [wheat].Sow(cultivar:"hartog", population:150, depth:50, rowSpacing:250);
          Report HarvestReport
        Manager LocationInfo: same as NPIValidation.BCVT_Merredin_1995-05-30.BCVT_Merredin_1995-05-30.LocationInfo
    Experiment BCVT_Mullewa_1993-06-04
      Factors
        Factor Cultivar: Specification=[Sowing]
          Operations janz
            1993-06-04  [wheat].Sow(cultivar:"janz", population:150, depth:50, rowSpacing:250);
      Simulation BCVT_Mullewa_1993-06-04
        Clock: Start=1993-06-03; End=1994-03-31
        Summary SummaryFile
        Weather
          FileName=%root%/Tests/Validation/Wheat/met/BCVT_Mullewa_1993-06-04.met
        SoilArbitrator
        Zone Field: Area=1; Slope=0; AspectAngle=0; Altitude=50
          Fertiliser
          Soil: same as NPIValidation.SGEHEAT_13GEHEAT-1.SGEHEAT_13GEHEAT-1.Field.Soil
          SurfaceOrganicMatter: InitialResidueName=wheat_stubble; InitialResidueType=wheat; InitialResidueMass=500; InitialStandingFraction=0; InitialCPR=0; InitialCNR=100
          Plant Wheat
          MicroClimate: a_interception=0; b_interception=1; c_interception=0; d_interception=0; SoilHeatFluxFraction=0.4; MinimumHeightDiffForNewLayer=0; NightInterceptionFraction=0.5; ReferenceHeight=2
          Manager SowingFertiliser: same as NPIValidation.SGEHEAT_13GEHEAT-1.SGEHEAT_13GEHEAT-1.Field.SowingFertiliser
          Manager Harvesting
          Operations Sowing
            1993-06-04  [wheat].Sow(cultivar:"hartog", population:150, depth:50, rowSpacing:250);
          Report HarvestReport
        Manager LocationInfo: same as NPIValidation.BCVT_Ardingly_1992-06-19.BCVT_Ardingly_1992-06-19.LocationInfo
    Experiment BCVT_Mullewa_2004-05-28
      Factors
        Factor Cultivar: Specification=[Sowing]
          Operations wyalkatchem
            2004-05-28  [wheat].Sow(cultivar:"wyalkatchem", population:150, depth:50, rowSpacing:250);
      Simulation BCVT_Mullewa_2004-05-28
        Clock: Start=2004-05-27; End=2005-03-24
        Summary SummaryFile
        Weather
          FileName=%root%/Tests/Validation/Wheat/met/BCVT_Mullewa_2004-05-28.met
        SoilArbitrator
        Zone Field: Area=1; Slope=0; AspectAngle=0; Altitude=50
          Fertiliser
          Soil: same as NPIValidation.SGEHEAT_13GEHEAT-1.SGEHEAT_13GEHEAT-1.Field.Soil
          SurfaceOrganicMatter: InitialResidueName=wheat_stubble; InitialResidueType=wheat; InitialResidueMass=500; InitialStandingFraction=0; InitialCPR=0; InitialCNR=100
          Plant Wheat
          MicroClimate: a_interception=0; b_interception=1; c_interception=0; d_interception=0; SoilHeatFluxFraction=0.4; MinimumHeightDiffForNewLayer=0; NightInterceptionFraction=0.5; ReferenceHeight=2
          Manager SowingFertiliser: same as NPIValidation.SGEHEAT_13GEHEAT-1.SGEHEAT_13GEHEAT-1.Field.SowingFertiliser
          Manager Harvesting
          Operations Sowing
            2004-05-28  [wheat].Sow(cultivar:"hartog", population:150, depth:50, rowSpacing:250);
          Report HarvestReport
        Manager LocationInfo: same as NPIValidation.BCVT_Ardingly_1992-06-19.BCVT_Ardingly_1992-06-19.LocationInfo
    Experiment BCVT_Munglinup_1994-06-08
      Factors
        Factor Cultivar: Specification=[Sowing]
          Operations janz
            1994-06-08  [wheat].Sow(cultivar:"janz", population:150, depth:50, rowSpacing:250);
      Simulation BCVT_Munglinup_1994-06-08
        Clock: Start=1994-06-07; End=1995-04-04
        Summary SummaryFile
        Weather
          FileName=%root%/Tests/Validation/Wheat/met/BCVT_Munglinup_1994-06-08.met
        SoilArbitrator
        Zone Field: Area=1; Slope=0; AspectAngle=0; Altitude=50
          Fertiliser
          Soil: same as NPIValidation.SGEHEAT_13GEHEAT-1.SGEHEAT_13GEHEAT-1.Field.Soil
          SurfaceOrganicMatter: InitialResidueName=wheat_stubble; InitialResidueType=wheat; InitialResidueMass=500; InitialStandingFraction=0; InitialCPR=0; InitialCNR=100
          Plant Wheat
          MicroClimate: a_interception=0; b_interception=1; c_interception=0; d_interception=0; SoilHeatFluxFraction=0.4; MinimumHeightDiffForNewLayer=0; NightInterceptionFraction=0.5; ReferenceHeight=2
          Manager SowingFertiliser: same as NPIValidation.SGEHEAT_13GEHEAT-1.SGEHEAT_13GEHEAT-1.Field.SowingFertiliser
          Manager Harvesting
          Operations Sowing
            1994-06-08  [wheat].Sow(cultivar:"hartog", population:150, depth:50, rowSpacing:250);
          Report HarvestReport
        Manager LocationInfo: same as NPIValidation.BCVT_Gairdner_River_2004-06-09.BCVT_Gairdner_River_2004-06-09.LocationInfo
    Experiment BCVT_Scaddan_1999-05-25
      Factors
        Factor Cultivar: Specification=[Sowing]
          Operations janz
            1999-05-25  [wheat].Sow(cultivar:"janz", population:150, depth:50, rowSpacing:250);
      Simulation BCVT_Scaddan_1999-05-25
        Clock: Start=1999-05-24; End=2000-03-20
        Summary SummaryFile
        Weather
          FileName=%root%/Tests/Validation/Wheat/met/BCVT_Scaddan_1999-05-25.met
        SoilArbitrator
        Zone Field: Area=1; Slope=0; AspectAngle=0; Altitude=50
          Fertiliser
          Soil: same as NPIValidation.SGEHEAT_13GEHEAT-1.SGEHEAT_13GEHEAT-1.Field.Soil
          SurfaceOrganicMatter: InitialResidueName=wheat_stubble; InitialResidueType=wheat; InitialResidueMass=500; InitialStandingFraction=0; InitialCPR=0; InitialCNR=100
          Plant Wheat
          MicroClimate: a_interception=0; b_interception=1; c_interception=0; d_interception=0; SoilHeatFluxFraction=0.4; MinimumHeightDiffForNewLayer=0; NightInterceptionFraction=0.5; ReferenceHeight=2
          Manager SowingFertiliser: same as NPIValidation.SGEHEAT_13GEHEAT-1.SGEHEAT_13GEHEAT-1.Field.SowingFertiliser
          Manager Harvesting
          Operations Sowing
            1999-05-25  [wheat].Sow(cultivar:"hartog", population:150, depth:50, rowSpacing:250);
          Report HarvestReport
        Manager LocationInfo: same as NPIValidation.BCVT_Gairdner_River_2004-06-09.BCVT_Gairdner_River_2004-06-09.LocationInfo
    Experiment BCVT_Speddingup_2001-05-30
      Factors
        Factor Cultivar: Specification=[Sowing]
          Operations wyalkatchem
            2001-05-30  [wheat].Sow(cultivar:"wyalkatchem", population:150, depth:50, rowSpacing:250);
      Simulation BCVT_Speddingup_2001-05-30
        Clock: Start=2001-05-29; End=2002-03-26
        Summary SummaryFile
        Weather
          FileName=%root%/Tests/Validation/Wheat/met/BCVT_Speddingup_2001-05-30.met
        SoilArbitrator
        Zone Field: Area=1; Slope=0; AspectAngle=0; Altitude=50
          Fertiliser
          Soil: same as NPIValidation.SGEHEAT_13GEHEAT-1.SGEHEAT_13GEHEAT-1.Field.Soil
          SurfaceOrganicMatter: InitialResidueName=wheat_stubble; InitialResidueType=wheat; InitialResidueMass=500; InitialStandingFraction=0; InitialCPR=0; InitialCNR=100
          Plant Wheat
          MicroClimate: a_interception=0; b_interception=1; c_interception=0; d_interception=0; SoilHeatFluxFraction=0.4; MinimumHeightDiffForNewLayer=0; NightInterceptionFraction=0.5; ReferenceHeight=2
          Manager SowingFertiliser: same as NPIValidation.SGEHEAT_13GEHEAT-1.SGEHEAT_13GEHEAT-1.Field.SowingFertiliser
          Manager Harvesting
          Operations Sowing
            2001-05-30  [wheat].Sow(cultivar:"hartog", population:150, depth:50, rowSpacing:250);
          Report HarvestReport
        Manager LocationInfo: same as NPIValidation.BCVT_Gairdner_River_2004-06-09.BCVT_Gairdner_River_2004-06-09.LocationInfo
    Experiment BCVT_Tammin_1999-06-09
      Factors
        Factor Cultivar: Specification=[Sowing]
          Operations calingiri
            1999-06-09  [wheat].Sow(cultivar:"calingiri", population:150, depth:50, rowSpacing:250);
      Simulation BCVT_Tammin_1999-06-09
        Clock: Start=1999-06-08; End=2000-04-04
        Summary SummaryFile
        Weather
          FileName=%root%/Tests/Validation/Wheat/met/BCVT_Tammin_1999-06-09.met
        SoilArbitrator
        Zone Field: Area=1; Slope=0; AspectAngle=0; Altitude=50
          Fertiliser
          Soil: same as NPIValidation.SGEHEAT_13GEHEAT-1.SGEHEAT_13GEHEAT-1.Field.Soil
          SurfaceOrganicMatter: InitialResidueName=wheat_stubble; InitialResidueType=wheat; InitialResidueMass=500; InitialStandingFraction=0; InitialCPR=0; InitialCNR=100
          Plant Wheat
          MicroClimate: a_interception=0; b_interception=1; c_interception=0; d_interception=0; SoilHeatFluxFraction=0.4; MinimumHeightDiffForNewLayer=0; NightInterceptionFraction=0.5; ReferenceHeight=2
          Manager SowingFertiliser: same as NPIValidation.SGEHEAT_13GEHEAT-1.SGEHEAT_13GEHEAT-1.Field.SowingFertiliser
          Manager Harvesting
          Operations Sowing
            1999-06-09  [wheat].Sow(cultivar:"hartog", population:150, depth:50, rowSpacing:250);
          Report HarvestReport
        Manager LocationInfo: same as NPIField2019.Dale.Dale2019Base.LocationInfo
    Experiment BCVT_Wannamal_1992-06-25
      Factors
        Factor Cultivar: Specification=[Sowing]
          Operations janz
            1992-06-25  [wheat].Sow(cultivar:"janz", population:150, depth:50, rowSpacing:250);
      Simulation BCVT_Wannamal_1992-06-25
        Clock: Start=1992-06-24; End=1993-04-21
        Summary SummaryFile
        Weather
          FileName=%root%/Tests/Validation/Wheat/met/BCVT_Wannamal_1992-06-25.met
        SoilArbitrator
        Zone Field: Area=1; Slope=0; AspectAngle=0; Altitude=50
          Fertiliser
          Soil: same as NPIValidation.SGEHEAT_13GEHEAT-1.SGEHEAT_13GEHEAT-1.Field.Soil
          SurfaceOrganicMatter: InitialResidueName=wheat_stubble; InitialResidueType=wheat; InitialResidueMass=500; InitialStandingFraction=0; InitialCPR=0; InitialCNR=100
          Plant Wheat
          MicroClimate: a_interception=0; b_interception=1; c_interception=0; d_interception=0; SoilHeatFluxFraction=0.4; MinimumHeightDiffForNewLayer=0; NightInterceptionFraction=0.5; ReferenceHeight=2
          Manager SowingFertiliser: same as NPIValidation.SGEHEAT_13GEHEAT-1.SGEHEAT_13GEHEAT-1.Field.SowingFertiliser
          Manager Harvesting
          Operations Sowing
            1992-06-25  [wheat].Sow(cultivar:"hartog", population:150, depth:50, rowSpacing:250);
          Report HarvestReport
        Manager LocationInfo: same as NPIField2019.Dale.Dale2019Base.LocationInfo
    Experiment BCVT_Wongan_Hills_1998-06-09
      Factors
        Factor Cultivar: Specification=[Sowing]
          Operations calingiri
            1998-06-09  [wheat].Sow(cultivar:"calingiri", population:150, depth:50, rowSpacing:250);
      Simulation BCVT_Wongan_Hills_1998-06-09
        Clock: Start=1998-06-08; End=1999-04-05
        Summary SummaryFile
        Weather
          FileName=%root%/Tests/Validation/Wheat/met/BCVT_Wongan_Hills_1998-06-09.met
        SoilArbitrator
        Zone Field: Area=1; Slope=0; AspectAngle=0; Altitude=50
          Fertiliser
          Soil: same as NPIValidation.SGEHEAT_13GEHEAT-1.SGEHEAT_13GEHEAT-1.Field.Soil
          SurfaceOrganicMatter: InitialResidueName=wheat_stubble; InitialResidueType=wheat; InitialResidueMass=500; InitialStandingFraction=0; InitialCPR=0; InitialCNR=100
          Plant Wheat
          MicroClimate: a_interception=0; b_interception=1; c_interception=0; d_interception=0; SoilHeatFluxFraction=0.4; MinimumHeightDiffForNewLayer=0; NightInterceptionFraction=0.5; ReferenceHeight=2
          Manager SowingFertiliser: same as NPIValidation.SGEHEAT_13GEHEAT-1.SGEHEAT_13GEHEAT-1.Field.SowingFertiliser
          Manager Harvesting
          Operations Sowing
            1998-06-09  [wheat].Sow(cultivar:"hartog", population:150, depth:50, rowSpacing:250);
          Report HarvestReport
        Manager LocationInfo: same as NPIField2019.Dale.Dale2019Base.LocationInfo
    Experiment BCVT_Wongan_Hills_2001-06-11
      Factors
        Factor Cultivar: Specification=[Sowing]
          Operations calingiri
            2001-06-11  [wheat].Sow(cultivar:"calingiri", population:150, depth:50, rowSpacing:250);
      Simulation BCVT_Wongan_Hills_2001-06-11
        Clock: Start=2001-06-10; End=2002-04-07
        Summary SummaryFile
        Weather
          FileName=%root%/Tests/Validation/Wheat/met/BCVT_Wongan_Hills_2001-06-11.met
        SoilArbitrator
        Zone Field: Area=1; Slope=0; AspectAngle=0; Altitude=50
          Fertiliser
          Soil: same as NPIValidation.SGEHEAT_13GEHEAT-1.SGEHEAT_13GEHEAT-1.Field.Soil
          SurfaceOrganicMatter: InitialResidueName=wheat_stubble; InitialResidueType=wheat; InitialResidueMass=500; InitialStandingFraction=0; InitialCPR=0; InitialCNR=100
          Plant Wheat
          MicroClimate: a_interception=0; b_interception=1; c_interception=0; d_interception=0; SoilHeatFluxFraction=0.4; MinimumHeightDiffForNewLayer=0; NightInterceptionFraction=0.5; ReferenceHeight=2
          Manager SowingFertiliser: same as NPIValidation.SGEHEAT_13GEHEAT-1.SGEHEAT_13GEHEAT-1.Field.SowingFertiliser
          Manager Harvesting
          Operations Sowing
            2001-06-11  [wheat].Sow(cultivar:"hartog", population:150, depth:50, rowSpacing:250);
          Report HarvestReport
        Manager LocationInfo: same as NPIField2019.Dale.Dale2019Base.LocationInfo
    Experiment BCVT_Wongan_Hills_2002-06-09
      Factors
        Factor Cultivar: Specification=[Sowing]
          Operations wyalkatchem
            2002-06-09  [wheat].Sow(cultivar:"wyalkatchem", population:150, depth:50, rowSpacing:250);
      Simulation BCVT_Wongan_Hills_2002-06-09
        Clock: Start=2002-06-08; End=2003-04-05
        Summary SummaryFile
        Weather
          FileName=%root%/Tests/Validation/Wheat/met/BCVT_Wongan_Hills_2002-06-09.met
        SoilArbitrator
        Zone Field: Area=1; Slope=0; AspectAngle=0; Altitude=50
          Fertiliser
          Soil: same as NPIValidation.SGEHEAT_13GEHEAT-1.SGEHEAT_13GEHEAT-1.Field.Soil
          SurfaceOrganicMatter: InitialResidueName=wheat_stubble; InitialResidueType=wheat; InitialResidueMass=500; InitialStandingFraction=0; InitialCPR=0; InitialCNR=100
          Plant Wheat
          MicroClimate: a_interception=0; b_interception=1; c_interception=0; d_interception=0; SoilHeatFluxFraction=0.4; MinimumHeightDiffForNewLayer=0; NightInterceptionFraction=0.5; ReferenceHeight=2
          Manager SowingFertiliser: same as NPIValidation.SGEHEAT_13GEHEAT-1.SGEHEAT_13GEHEAT-1.Field.SowingFertiliser
          Manager Harvesting
          Operations Sowing
            2002-06-09  [wheat].Sow(cultivar:"hartog", population:150, depth:50, rowSpacing:250);
          Report HarvestReport
        Manager LocationInfo: same as NPIField2019.Dale.Dale2019Base.LocationInfo
    Experiment BTOS_2008GE1
      Factors
        Factor Cultivar: Specification=[Sowing]
          Operations derrimut
            2008-04-24  [wheat].Sow(cultivar:"derrimut", population:150, depth:50, rowSpacing:250);
          Operations axe
            2008-04-24  [wheat].Sow(cultivar:"axe", population:150, depth:50, rowSpacing:250);
          Operations bolac
            2008-04-24  [wheat].Sow(cultivar:"bolac", population:150, depth:50, rowSpacing:250);
          Operations sunstate
            2008-04-24  [wheat].Sow(cultivar:"sunstate", population:150, depth:50, rowSpacing:250);
          Operations wyalkatchem
            2008-04-24  [wheat].Sow(cultivar:"wyalkatchem", population:150, depth:50, rowSpacing:250);
          Operations young
            2008-04-24  [wheat].Sow(cultivar:"young", population:150, depth:50, rowSpacing:250);
      Simulation BTOS_2008GE1
        Clock: Start=2008-04-23; End=2009-02-18
        Summary SummaryFile
        Weather: FileName=%root%/Tests/Validation/Wheat/met/BTOS_2008GE1.met
        SoilArbitrator
        Zone Field: Area=1; Slope=0; AspectAngle=0; Altitude=50
          Fertiliser
          Soil: same as NPIValidation.SGEHEAT_13GEHEAT-1.SGEHEAT_13GEHEAT-1.Field.Soil
          SurfaceOrganicMatter: InitialResidueName=wheat_stubble; InitialResidueType=wheat; InitialResidueMass=500; InitialStandingFraction=0; InitialCPR=0; InitialCNR=100
          Plant Wheat
          MicroClimate: a_interception=0; b_interception=1; c_interception=0; d_interception=0; SoilHeatFluxFraction=0.4; MinimumHeightDiffForNewLayer=0; NightInterceptionFraction=0.5; ReferenceHeight=2
          Manager SowingFertiliser: same as NPIValidation.SGEHEAT_13GEHEAT-1.SGEHEAT_13GEHEAT-1.Field.SowingFertiliser
          Manager Harvesting
          Operations Sowing
            2008-04-24  [wheat].Sow(cultivar:"hartog", population:150, depth:50, rowSpacing:250);
          Report HarvestReport
        Manager LocationInfo: same as NPIValidation.BCVT_Ardingly_1992-06-19.BCVT_Ardingly_1992-06-19.LocationInfo
    Experiment BTOS_2008GE2
      Factors
        Factor Cultivar: Specification=[Sowing]
          Operations scythe
            2008-05-16  [wheat].Sow(cultivar:"scythe", population:150, depth:50, rowSpacing:250);
          Operations calingiri
            2008-05-16  [wheat].Sow(cultivar:"calingiri", population:150, depth:50, rowSpacing:250);
          Operations bolac
            2008-05-16  [wheat].Sow(cultivar:"bolac", population:150, depth:50, rowSpacing:250);
          Operations derrimut
            2008-05-16  [wheat].Sow(cultivar:"derrimut", population:150, depth:50, rowSpacing:250);
          Operations sunstate
            2008-05-16  [wheat].Sow(cultivar:"sunstate", population:150, depth:50, rowSpacing:250);
          Operations wyalkatchem
            2008-05-16  [wheat].Sow(cultivar:"wyalkatchem", population:150, depth:50, rowSpacing:250);
          Operations young
            2008-05-16  [wheat].Sow(cultivar:"young", population:150, depth:50, rowSpacing:250);
      Simulation BTOS_2008GE2
        Clock: Start=2008-05-15; End=2009-03-12
        Summary SummaryFile
        Weather: FileName=%root%/Tests/Validation/Wheat/met/BTOS_2008GE2.met
        SoilArbitrator
        Zone Field: Area=1; Slope=0; AspectAngle=0; Altitude=50
          Fertiliser
          Soil: same as NPIValidation.SGEHEAT_13GEHEAT-1.SGEHEAT_13GEHEAT-1.Field.Soil
          SurfaceOrganicMatter: InitialResidueName=wheat_stubble; InitialResidueType=wheat; InitialResidueMass=500; InitialStandingFraction=0; InitialCPR=0; InitialCNR=100
          Plant Wheat
          MicroClimate: a_interception=0; b_interception=1; c_interception=0; d_interception=0; SoilHeatFluxFraction=0.4; MinimumHeightDiffForNewLayer=0; NightInterceptionFraction=0.5; ReferenceHeight=2
          Manager SowingFertiliser: same as NPIValidation.SGEHEAT_13GEHEAT-1.SGEHEAT_13GEHEAT-1.Field.SowingFertiliser
          Manager Harvesting
          Operations Sowing
            2008-05-16  [wheat].Sow(cultivar:"hartog", population:150, depth:50, rowSpacing:250);
          Report HarvestReport
        Manager LocationInfo: same as NPIValidation.BCVT_Ardingly_1992-06-19.BCVT_Ardingly_1992-06-19.LocationInfo
    Experiment BTOS_2008GE3
      Factors
        Factor Cultivar: Specification=[Sowing]
          Operations braewood
            2008-06-03  [wheat].Sow(cultivar:"braewood", population:150, depth:50, rowSpacing:250);
          Operations calingiri
            2008-06-03  [wheat].Sow(cultivar:"calingiri", population:150, depth:50, rowSpacing:250);
          Operations derrimut
            2008-06-03  [wheat].Sow(cultivar:"derrimut", population:150, depth:50, rowSpacing:250);
          Operations scythe
            2008-06-03  [wheat].Sow(cultivar:"scythe", population:150, depth:50, rowSpacing:250);
          Operations bolac
            2008-06-03  [wheat].Sow(cultivar:"bolac", population:150, depth:50, rowSpacing:250);
          Operations sunstate
            2008-06-03  [wheat].Sow(cultivar:"sunstate", population:150, depth:50, rowSpacing:250);
          Operations wyalkatchem
            2008-06-03  [wheat].Sow(cultivar:"wyalkatchem", population:150, depth:50, rowSpacing:250);
          Operations young
            2008-06-03  [wheat].Sow(cultivar:"young", population:150, depth:50, rowSpacing:250);
      Simulation BTOS_2008GE3
        Clock: Start=2008-06-02; End=2009-03-30
        Summary SummaryFile
        Weather: FileName=%root%/Tests/Validation/Wheat/met/BTOS_2008GE3.met
        SoilArbitrator
        Zone Field: Area=1; Slope=0; AspectAngle=0; Altitude=50
          Fertiliser
          Soil: same as NPIValidation.SGEHEAT_13GEHEAT-1.SGEHEAT_13GEHEAT-1.Field.Soil
          SurfaceOrganicMatter: InitialResidueName=wheat_stubble; InitialResidueType=wheat; InitialResidueMass=500; InitialStandingFraction=0; InitialCPR=0; InitialCNR=100
          Plant Wheat
          MicroClimate: a_interception=0; b_interception=1; c_interception=0; d_interception=0; SoilHeatFluxFraction=0.4; MinimumHeightDiffForNewLayer=0; NightInterceptionFraction=0.5; ReferenceHeight=2
          Manager SowingFertiliser: same as NPIValidation.SGEHEAT_13GEHEAT-1.SGEHEAT_13GEHEAT-1.Field.SowingFertiliser
          Manager Harvesting
          Operations Sowing
            2008-06-03  [wheat].Sow(cultivar:"hartog", population:150, depth:50, rowSpacing:250);
          Report HarvestReport
        Manager LocationInfo: same as NPIValidation.BCVT_Ardingly_1992-06-19.BCVT_Ardingly_1992-06-19.LocationInfo
    Experiment BTOS_2008GE4
      Factors
        Factor Cultivar: Specification=[Sowing]
          Operations braewood
            2008-06-20  [wheat].Sow(cultivar:"braewood", population:150, depth:50, rowSpacing:250);
          Operations bolac
            2008-06-20  [wheat].Sow(cultivar:"bolac", population:150, depth:50, rowSpacing:250);
          Operations calingiri
            2008-06-20  [wheat].Sow(cultivar:"calingiri", population:150, depth:50, rowSpacing:250);
          Operations scythe
            2008-06-20  [wheat].Sow(cultivar:"scythe", population:150, depth:50, rowSpacing:250);
          Operations derrimut
            2008-06-20  [wheat].Sow(cultivar:"derrimut", population:150, depth:50, rowSpacing:250);
          Operations ellison
            2008-06-20  [wheat].Sow(cultivar:"ellison", population:150, depth:50, rowSpacing:250);
          Operations janz
            2008-06-20  [wheat].Sow(cultivar:"janz", population:150, depth:50, rowSpacing:250);
          Operations sunstate
            2008-06-20  [wheat].Sow(cultivar:"sunstate", population:150, depth:50, rowSpacing:250);
          Operations yitpi
            2008-06-20  [wheat].Sow(cultivar:"yitpi", population:150, depth:50, rowSpacing:250);
          Operations wyalkatchem
            2008-06-20  [wheat].Sow(cultivar:"wyalkatchem", population:150, depth:50, rowSpacing:250);
          Operations young
            2008-06-20  [wheat].Sow(cultivar:"young", population:150, depth:50, rowSpacing:250);
      Simulation BTOS_2008GE4
        Clock: Start=2008-06-19; End=2009-04-16
        Summary SummaryFile
        Weather: FileName=%root%/Tests/Validation/Wheat/met/BTOS_2008GE4.met
        SoilArbitrator
        Zone Field: Area=1; Slope=0; AspectAngle=0; Altitude=50
          Fertiliser
          Soil: same as NPIValidation.SGEHEAT_13GEHEAT-1.SGEHEAT_13GEHEAT-1.Field.Soil
          SurfaceOrganicMatter: InitialResidueName=wheat_stubble; InitialResidueType=wheat; InitialResidueMass=500; InitialStandingFraction=0; InitialCPR=0; InitialCNR=100
          Plant Wheat
          MicroClimate: a_interception=0; b_interception=1; c_interception=0; d_interception=0; SoilHeatFluxFraction=0.4; MinimumHeightDiffForNewLayer=0; NightInterceptionFraction=0.5; ReferenceHeight=2
          Manager SowingFertiliser: same as NPIValidation.SGEHEAT_13GEHEAT-1.SGEHEAT_13GEHEAT-1.Field.SowingFertiliser
          Manager Harvesting
          Operations Sowing
            2008-06-20  [wheat].Sow(cultivar:"hartog", population:150, depth:50, rowSpacing:250);
          Report HarvestReport
        Manager LocationInfo: same as NPIValidation.BCVT_Ardingly_1992-06-19.BCVT_Ardingly_1992-06-19.LocationInfo
    Experiment BTOS_2008KA1
      Factors
        Factor Cultivar: Specification=[Sowing]
          Operations axe
            2008-04-24  [wheat].Sow(cultivar:"axe", population:150, depth:50, rowSpacing:250);
          Operations scythe
            2008-04-24  [wheat].Sow(cultivar:"scythe", population:150, depth:50, rowSpacing:250);
      Simulation BTOS_2008KA1
        Clock: Start=2008-04-23; End=2009-02-18
        Summary SummaryFile
        Weather: FileName=%root%/Tests/Validation/Wheat/met/BTOS_2008KA1.met
        SoilArbitrator
        Zone Field: same as NPIValidation.BTOS_2008GE1.BTOS_2008GE1.Field
        Manager LocationInfo: same as NPIField2019.Dale.Dale2019Base.LocationInfo
    Experiment BTOS_2008KA2
      Factors
        Factor Cultivar: Specification=[Sowing]
          Operations scythe
            2008-05-16  [wheat].Sow(cultivar:"scythe", population:150, depth:50, rowSpacing:250);
      Simulation BTOS_2008KA2
        Clock: Start=2008-05-15; End=2009-03-12
        Summary SummaryFile
        Weather: FileName=%root%/Tests/Validation/Wheat/met/BTOS_2008KA2.met
        SoilArbitrator
        Zone Field: same as NPIValidation.BTOS_2008GE2.BTOS_2008GE2.Field
        Manager LocationInfo: same as NPIField2019.Dale.Dale2019Base.LocationInfo
    Experiment BTOS_2008KA3
      Factors
        Factor Cultivar: Specification=[Sowing]
          Operations braewood
            2008-06-03  [wheat].Sow(cultivar:"braewood", population:150, depth:50, rowSpacing:250);
          Operations scythe
            2008-06-03  [wheat].Sow(cultivar:"scythe", population:150, depth:50, rowSpacing:250);
          Operations ellison
            2008-06-03  [wheat].Sow(cultivar:"ellison", population:150, depth:50, rowSpacing:250);
          Operations janz
            2008-06-03  [wheat].Sow(cultivar:"janz", population:150, depth:50, rowSpacing:250);
          Operations yitpi
            2008-06-03  [wheat].Sow(cultivar:"yitpi", population:150, depth:50, rowSpacing:250);
      Simulation BTOS_2008KA3
        Clock: Start=2008-06-02; End=2009-03-30
        Summary SummaryFile
        Weather: FileName=%root%/Tests/Validation/Wheat/met/BTOS_2008KA3.met
        SoilArbitrator
        Zone Field: same as NPIValidation.BTOS_2008GE3.BTOS_2008GE3.Field
        Manager LocationInfo: same as NPIField2019.Dale.Dale2019Base.LocationInfo
    Experiment BTOS_2008KA4
      Factors
        Factor Cultivar: Specification=[Sowing]
          Operations calingiri
            2008-06-20  [wheat].Sow(cultivar:"calingiri", population:150, depth:50, rowSpacing:250);
          Operations bolac
            2008-06-20  [wheat].Sow(cultivar:"bolac", population:150, depth:50, rowSpacing:250);
          Operations braewood
            2008-06-20  [wheat].Sow(cultivar:"braewood", population:150, depth:50, rowSpacing:250);
          Operations scythe
            2008-06-20  [wheat].Sow(cultivar:"scythe", population:150, depth:50, rowSpacing:250);
          Operations axe
            2008-06-20  [wheat].Sow(cultivar:"axe", population:150, depth:50, rowSpacing:250);
          Operations derrimut
            2008-06-20  [wheat].Sow(cultivar:"derrimut", population:150, depth:50, rowSpacing:250);
          Operations ellison
            2008-06-20  [wheat].Sow(cultivar:"ellison", population:150, depth:50, rowSpacing:250);
          Operations janz
            2008-06-20  [wheat].Sow(cultivar:"janz", population:150, depth:50, rowSpacing:250);
          Operations sunstate
            2008-06-20  [wheat].Sow(cultivar:"sunstate", population:150, depth:50, rowSpacing:250);
          Operations wyalkatchem
            2008-06-20  [wheat].Sow(cultivar:"wyalkatchem", population:150, depth:50, rowSpacing:250);
          Operations yitpi
            2008-06-20  [wheat].Sow(cultivar:"yitpi", population:150, depth:50, rowSpacing:250);
          Operations young
            2008-06-20  [wheat].Sow(cultivar:"young", population:150, depth:50, rowSpacing:250);
      Simulation BTOS_2008KA4
        Clock: Start=2008-06-19; End=2009-04-16
        Summary SummaryFile
        Weather: FileName=%root%/Tests/Validation/Wheat/met/BTOS_2008KA4.met
        SoilArbitrator
        Zone Field: same as NPIValidation.BTOS_2008GE4.BTOS_2008GE4.Field
        Manager LocationInfo: same as NPIField2019.Dale.Dale2019Base.LocationInfo
    Experiment BTOS_2008NM2
      Factors: same as NPIValidation.BTOS_2008KA2.Factors
      Simulation BTOS_2008NM2
        Clock: Start=2008-05-15; End=2009-03-12
        Summary SummaryFile
        Weather: FileName=%root%/Tests/Validation/Wheat/met/BTOS_2008NM2.met
        SoilArbitrator
        Zone Field: same as NPIValidation.BTOS_2008GE2.BTOS_2008GE2.Field
        Manager LocationInfo: same as NPIField2019.Dale.Dale2019Base.LocationInfo
    Experiment BTOS_2008NM3
      Factors
        Factor Cultivar: Specification=[Sowing]
          Operations calingiri
            2008-06-03  [wheat].Sow(cultivar:"calingiri", population:150, depth:50, rowSpacing:250);
          Operations bolac
            2008-06-03  [wheat].Sow(cultivar:"bolac", population:150, depth:50, rowSpacing:250);
          Operations braewood
            2008-06-03  [wheat].Sow(cultivar:"braewood", population:150, depth:50, rowSpacing:250);
          Operations derrimut
            2008-06-03  [wheat].Sow(cultivar:"derrimut", population:150, depth:50, rowSpacing:250);
          Operations axe
            2008-06-03  [wheat].Sow(cultivar:"axe", population:150, depth:50, rowSpacing:250);
          Operations scythe
            2008-06-03  [wheat].Sow(cultivar:"scythe", population:150, depth:50, rowSpacing:250);
          Operations ellison
            2008-06-03  [wheat].Sow(cultivar:"ellison", population:150, depth:50, rowSpacing:250);
          Operations janz
            2008-06-03  [wheat].Sow(cultivar:"janz", population:150, depth:50, rowSpacing:250);
          Operations sunstate
            2008-06-03  [wheat].Sow(cultivar:"sunstate", population:150, depth:50, rowSpacing:250);
          Operations yitpi
            2008-06-03  [wheat].Sow(cultivar:"yitpi", population:150, depth:50, rowSpacing:250);
          Operations young
            2008-06-03  [wheat].Sow(cultivar:"young", population:150, depth:50, rowSpacing:250);
          Operations wyalkatchem
            2008-06-03  [wheat].Sow(cultivar:"wyalkatchem", population:150, depth:50, rowSpacing:250);
      Simulation BTOS_2008NM3
        Clock: Start=2008-06-02; End=2009-03-30
        Summary SummaryFile
        Weather: FileName=%root%/Tests/Validation/Wheat/met/BTOS_2008NM3.met
        SoilArbitrator
        Zone Field: same as NPIValidation.BTOS_2008GE3.BTOS_2008GE3.Field
        Manager LocationInfo: same as NPIField2019.Dale.Dale2019Base.LocationInfo
    Experiment BTOS_2008NM4
      Factors
        Factor Cultivar: Specification=[Sowing]
          Operations calingiri
            2008-06-20  [wheat].Sow(cultivar:"calingiri", population:150, depth:50, rowSpacing:250);
          Operations braewood
            2008-06-20  [wheat].Sow(cultivar:"braewood", population:150, depth:50, rowSpacing:250);
          Operations bolac
            2008-06-20  [wheat].Sow(cultivar:"bolac", population:150, depth:50, rowSpacing:250);
          Operations derrimut
            2008-06-20  [wheat].Sow(cultivar:"derrimut", population:150, depth:50, rowSpacing:250);
          Operations axe
            2008-06-20  [wheat].Sow(cultivar:"axe", population:150, depth:50, rowSpacing:250);
          Operations scythe
            2008-06-20  [wheat].Sow(cultivar:"scythe", population:150, depth:50, rowSpacing:250);
          Operations ellison
            2008-06-20  [wheat].Sow(cultivar:"ellison", population:150, depth:50, rowSpacing:250);
          Operations janz
            2008-06-20  [wheat].Sow(cultivar:"janz", population:150, depth:50, rowSpacing:250);
          Operations sunstate
            2008-06-20  [wheat].Sow(cultivar:"sunstate", population:150, depth:50, rowSpacing:250);
          Operations young
            2008-06-20  [wheat].Sow(cultivar:"young", population:150, depth:50, rowSpacing:250);
          Operations yitpi
            2008-06-20  [wheat].Sow(cultivar:"yitpi", population:150, depth:50, rowSpacing:250);
          Operations wyalkatchem
            2008-06-20  [wheat].Sow(cultivar:"wyalkatchem", population:150, depth:50, rowSpacing:250);
      Simulation BTOS_2008NM4
        Clock: Start=2008-06-19; End=2009-04-16
        Summary SummaryFile
        Weather: FileName=%root%/Tests/Validation/Wheat/met/BTOS_2008NM4.met
        SoilArbitrator
        Zone Field: same as NPIValidation.BTOS_2008GE4.BTOS_2008GE4.Field
        Manager LocationInfo: same as NPIField2019.Dale.Dale2019Base.LocationInfo
    Experiment BTOS_2009GE1
      Factors
        Factor Cultivar: Specification=[Sowing]
          Operations bolac
            2009-04-24  [wheat].Sow(cultivar:"bolac", population:150, depth:50, rowSpacing:250);
          Operations derrimut
            2009-04-24  [wheat].Sow(cultivar:"derrimut", population:150, depth:50, rowSpacing:250);
          Operations janz
            2009-04-24  [wheat].Sow(cultivar:"janz", population:150, depth:50, rowSpacing:250);
          Operations sunstate
            2009-04-24  [wheat].Sow(cultivar:"sunstate", population:150, depth:50, rowSpacing:250);
          Operations young
            2009-04-24  [wheat].Sow(cultivar:"young", population:150, depth:50, rowSpacing:250);
      Simulation BTOS_2009GE1
        Clock: Start=2009-04-23; End=2010-02-18
        Summary SummaryFile
        Weather: FileName=%root%/Tests/Validation/Wheat/met/BTOS_2009GE1.met
        SoilArbitrator
        Zone Field: Area=1; Slope=0; AspectAngle=0; Altitude=50
          Fertiliser
          Soil: same as NPIValidation.SGEHEAT_13GEHEAT-1.SGEHEAT_13GEHEAT-1.Field.Soil
          SurfaceOrganicMatter: InitialResidueName=wheat_stubble; InitialResidueType=wheat; InitialResidueMass=500; InitialStandingFraction=0; InitialCPR=0; InitialCNR=100
          Plant Wheat
          MicroClimate: a_interception=0; b_interception=1; c_interception=0; d_interception=0; SoilHeatFluxFraction=0.4; MinimumHeightDiffForNewLayer=0; NightInterceptionFraction=0.5; ReferenceHeight=2
          Manager SowingFertiliser: same as NPIValidation.SGEHEAT_13GEHEAT-1.SGEHEAT_13GEHEAT-1.Field.SowingFertiliser
          Manager Harvesting
          Operations Sowing
            2009-04-24  [wheat].Sow(cultivar:"hartog", population:150, depth:50, rowSpacing:250);
          Report HarvestReport
        Manager LocationInfo: same as NPIValidation.BCVT_Ardingly_1992-06-19.BCVT_Ardingly_1992-06-19.LocationInfo
    Experiment BTOS_2009GE2
      Factors
        Factor Cultivar: Specification=[Sowing]
          Operations axe
            2009-05-15  [wheat].Sow(cultivar:"axe", population:150, depth:50, rowSpacing:250);
          Operations wyalkatchem
            2009-05-15  [wheat].Sow(cultivar:"wyalkatchem", population:150, depth:50, rowSpacing:250);
      Simulation BTOS_2009GE2
        Clock: Start=2009-05-14; End=2010-03-11
        Summary SummaryFile
        Weather: FileName=%root%/Tests/Validation/Wheat/met/BTOS_2009GE2.met
        SoilArbitrator
        Zone Field: Area=1; Slope=0; AspectAngle=0; Altitude=50
          Fertiliser
          Soil: same as NPIValidation.SGEHEAT_13GEHEAT-1.SGEHEAT_13GEHEAT-1.Field.Soil
          SurfaceOrganicMatter: InitialResidueName=wheat_stubble; InitialResidueType=wheat; InitialResidueMass=500; InitialStandingFraction=0; InitialCPR=0; InitialCNR=100
          Plant Wheat
          MicroClimate: a_interception=0; b_interception=1; c_interception=0; d_interception=0; SoilHeatFluxFraction=0.4; MinimumHeightDiffForNewLayer=0; NightInterceptionFraction=0.5; ReferenceHeight=2
          Manager SowingFertiliser: same as NPIValidation.SGEHEAT_13GEHEAT-1.SGEHEAT_13GEHEAT-1.Field.SowingFertiliser
          Manager Harvesting
          Operations Sowing
            2009-05-15  [wheat].Sow(cultivar:"hartog", population:150, depth:50, rowSpacing:250);
          Report HarvestReport
        Manager LocationInfo: same as NPIValidation.BCVT_Ardingly_1992-06-19.BCVT_Ardingly_1992-06-19.LocationInfo
    Experiment BTOS_2009GE3
      Factors
        Factor Cultivar: Specification=[Sowing]
          Operations scythe
            2009-06-03  [wheat].Sow(cultivar:"scythe", population:150, depth:50, rowSpacing:250);
          Operations axe
            2009-06-03  [wheat].Sow(cultivar:"axe", population:150, depth:50, rowSpacing:250);
          Operations braewood
            2009-06-03  [wheat].Sow(cultivar:"braewood", population:150, depth:50, rowSpacing:250);
          Operations bolac
            2009-06-03  [wheat].Sow(cultivar:"bolac", population:150, depth:50, rowSpacing:250);
          Operations calingiri
            2009-06-03  [wheat].Sow(cultivar:"calingiri", population:150, depth:50, rowSpacing:250);
          Operations derrimut
            2009-06-03  [wheat].Sow(cultivar:"derrimut", population:150, depth:50, rowSpacing:250);
          Operations janz
            2009-06-03  [wheat].Sow(cultivar:"janz", population:150, depth:50, rowSpacing:250);
          Operations sunstate
            2009-06-03  [wheat].Sow(cultivar:"sunstate", population:150, depth:50, rowSpacing:250);
          Operations young
            2009-06-03  [wheat].Sow(cultivar:"young", population:150, depth:50, rowSpacing:250);
          Operations wyalkatchem
            2009-06-03  [wheat].Sow(cultivar:"wyalkatchem", population:150, depth:50, rowSpacing:250);
      Simulation BTOS_2009GE3
        Clock: Start=2009-06-02; End=2010-03-30
        Summary SummaryFile
        Weather: FileName=%root%/Tests/Validation/Wheat/met/BTOS_2009GE3.met
        SoilArbitrator
        Zone Field: Area=1; Slope=0; AspectAngle=0; Altitude=50
          Fertiliser
          Soil: same as NPIValidation.SGEHEAT_13GEHEAT-1.SGEHEAT_13GEHEAT-1.Field.Soil
          SurfaceOrganicMatter: InitialResidueName=wheat_stubble; InitialResidueType=wheat; InitialResidueMass=500; InitialStandingFraction=0; InitialCPR=0; InitialCNR=100
          Plant Wheat
          MicroClimate: a_interception=0; b_interception=1; c_interception=0; d_interception=0; SoilHeatFluxFraction=0.4; MinimumHeightDiffForNewLayer=0; NightInterceptionFraction=0.5; ReferenceHeight=2
          Manager SowingFertiliser: same as NPIValidation.SGEHEAT_13GEHEAT-1.SGEHEAT_13GEHEAT-1.Field.SowingFertiliser
          Manager Harvesting
          Operations Sowing
            2009-06-03  [wheat].Sow(cultivar:"hartog", population:150, depth:50, rowSpacing:250);
          Report HarvestReport
        Manager LocationInfo: same as NPIValidation.BCVT_Ardingly_1992-06-19.BCVT_Ardingly_1992-06-19.LocationInfo
    Experiment BTOS_2009GE4
      Factors
        Factor Cultivar: Specification=[Sowing]
          Operations scythe
            2009-06-22  [wheat].Sow(cultivar:"scythe", population:150, depth:50, rowSpacing:250);
          Operations axe
            2009-06-22  [wheat].Sow(cultivar:"axe", population:150, depth:50, rowSpacing:250);
          Operations braewood
            2009-06-22  [wheat].Sow(cultivar:"braewood", population:150, depth:50, rowSpacing:250);
          Operations calingiri
            2009-06-22  [wheat].Sow(cultivar:"calingiri", population:150, depth:50, rowSpacing:250);
          Operations bolac
            2009-06-22  [wheat].Sow(cultivar:"bolac", population:150, depth:50, rowSpacing:250);
          Operations derrimut
            2009-06-22  [wheat].Sow(cultivar:"derrimut", population:150, depth:50, rowSpacing:250);
          Operations ellison
            2009-06-22  [wheat].Sow(cultivar:"ellison", population:150, depth:50, rowSpacing:250);
          Operations janz
            2009-06-22  [wheat].Sow(cultivar:"janz", population:150, depth:50, rowSpacing:250);
          Operations kellalac
            2009-06-22  [wheat].Sow(cultivar:"kellalac", population:150, depth:50, rowSpacing:250);
          Operations sunstate
            2009-06-22  [wheat].Sow(cultivar:"sunstate", population:150, depth:50, rowSpacing:250);
          Operations wyalkatchem
            2009-06-22  [wheat].Sow(cultivar:"wyalkatchem", population:150, depth:50, rowSpacing:250);
          Operations young
            2009-06-22  [wheat].Sow(cultivar:"young", population:150, depth:50, rowSpacing:250);
      Simulation BTOS_2009GE4
        Clock: Start=2009-06-21; End=2010-04-18
        Summary SummaryFile
        Weather: FileName=%root%/Tests/Validation/Wheat/met/BTOS_2009GE4.met
        SoilArbitrator
        Zone Field: Area=1; Slope=0; AspectAngle=0; Altitude=50
          Fertiliser
          Soil: same as NPIValidation.SGEHEAT_13GEHEAT-1.SGEHEAT_13GEHEAT-1.Field.Soil
          SurfaceOrganicMatter: InitialResidueName=wheat_stubble; InitialResidueType=wheat; InitialResidueMass=500; InitialStandingFraction=0; InitialCPR=0; InitialCNR=100
          Plant Wheat
          MicroClimate: a_interception=0; b_interception=1; c_interception=0; d_interception=0; SoilHeatFluxFraction=0.4; MinimumHeightDiffForNewLayer=0; NightInterceptionFraction=0.5; ReferenceHeight=2
          Manager SowingFertiliser: same as NPIValidation.SGEHEAT_13GEHEAT-1.SGEHEAT_13GEHEAT-1.Field.SowingFertiliser
          Manager Harvesting
          Operations Sowing
            2009-06-22  [wheat].Sow(cultivar:"hartog", population:150, depth:50, rowSpacing:250);
          Report HarvestReport
        Manager LocationInfo: same as NPIValidation.BCVT_Ardingly_1992-06-19.BCVT_Ardingly_1992-06-19.LocationInfo
    Experiment BTOS_2009KA3
      Factors
        Factor Cultivar: Specification=[Sowing]
          Operations scythe
            2009-06-03  [wheat].Sow(cultivar:"scythe", population:150, depth:50, rowSpacing:250);
          Operations braewood
            2009-06-03  [wheat].Sow(cultivar:"braewood", population:150, depth:50, rowSpacing:250);
          Operations ellison
            2009-06-03  [wheat].Sow(cultivar:"ellison", population:150, depth:50, rowSpacing:250);
      Simulation BTOS_2009KA3
        Clock: Start=2009-06-02; End=2010-03-30
        Summary SummaryFile
        Weather: FileName=%root%/Tests/Validation/Wheat/met/BTOS_2009KA3.met
        SoilArbitrator
        Zone Field: same as NPIValidation.BTOS_2009GE3.BTOS_2009GE3.Field
        Manager LocationInfo: same as NPIField2019.Dale.Dale2019Base.LocationInfo
    Experiment BYIE_08HIR
      Factors
        Factor Cultivar: Specification=[Sowing]
          Operations scythe
            2008-05-27  [wheat].Sow(cultivar:"scythe", population:150, depth:50, rowSpacing:250);
          Operations braewood
            2008-05-27  [wheat].Sow(cultivar:"braewood", population:150, depth:50, rowSpacing:250);
          Operations ellison
            2008-05-27  [wheat].Sow(cultivar:"ellison", population:150, depth:50, rowSpacing:250);
          Operations yitpi
            2008-05-27  [wheat].Sow(cultivar:"yitpi", population:150, depth:50, rowSpacing:250);
      Simulation BYIE_08HIR
        Clock: Start=2008-05-26; End=2009-03-23
        Summary SummaryFile
        Weather: FileName=%root%/Tests/Validation/Wheat/met/BYIE_08HIR.met
        SoilArbitrator
        Zone Field: Area=1; Slope=0; AspectAngle=0; Altitude=50
          Fertiliser
          Soil: same as NPIValidation.SGEHEAT_13GEHEAT-1.SGEHEAT_13GEHEAT-1.Field.Soil
          SurfaceOrganicMatter: InitialResidueName=wheat_stubble; InitialResidueType=wheat; InitialResidueMass=500; InitialStandingFraction=0; InitialCPR=0; InitialCNR=100
          Plant Wheat
          MicroClimate: a_interception=0; b_interception=1; c_interception=0; d_interception=0; SoilHeatFluxFraction=0.4; MinimumHeightDiffForNewLayer=0; NightInterceptionFraction=0.5; ReferenceHeight=2
          Manager SowingFertiliser: same as NPIValidation.SGEHEAT_13GEHEAT-1.SGEHEAT_13GEHEAT-1.Field.SowingFertiliser
          Manager Harvesting
          Operations Sowing
            2008-05-27  [wheat].Sow(cultivar:"hartog", population:150, depth:50, rowSpacing:250);
          Report HarvestReport
        Manager LocationInfo
          Country = Australia
          State = Victoria
          Region = SA VIC Bordertown-Wimmera
          script: same as in FARAwardPhenology.FARAwardPhenology.Simulation.LocationInfo
    Experiment BYIE_08KA
      Factors
        Factor Cultivar: Specification=[Sowing]
          Operations scythe
            2008-05-30  [wheat].Sow(cultivar:"scythe", population:150, depth:50, rowSpacing:250);
          Operations braewood
            2008-05-30  [wheat].Sow(cultivar:"braewood", population:150, depth:50, rowSpacing:250);
          Operations calingiri
            2008-05-30  [wheat].Sow(cultivar:"calingiri", population:150, depth:50, rowSpacing:250);
          Operations bolac
            2008-05-30  [wheat].Sow(cultivar:"bolac", population:150, depth:50, rowSpacing:250);
          Operations wedgetail
            2008-05-30  [wheat].Sow(cultivar:"wedgetail", population:150, depth:50, rowSpacing:250);
          Operations ellison
            2008-05-30  [wheat].Sow(cultivar:"ellison", population:150, depth:50, rowSpacing:250);
          Operations yitpi
            2008-05-30  [wheat].Sow(cultivar:"yitpi", population:150, depth:50, rowSpacing:250);
      Simulation BYIE_08KA
        Clock: Start=2008-05-29; End=2009-03-26
        Summary SummaryFile
        Weather: FileName=%root%/Tests/Validation/Wheat/met/BYIE_08KA.met
        SoilArbitrator
        Zone Field: Area=1; Slope=0; AspectAngle=0; Altitude=50
          Fertiliser
          Soil: same as NPIValidation.SGEHEAT_13GEHEAT-1.SGEHEAT_13GEHEAT-1.Field.Soil
          SurfaceOrganicMatter: InitialResidueName=wheat_stubble; InitialResidueType=wheat; InitialResidueMass=500; InitialStandingFraction=0; InitialCPR=0; InitialCNR=100
          Plant Wheat
          MicroClimate: a_interception=0; b_interception=1; c_interception=0; d_interception=0; SoilHeatFluxFraction=0.4; MinimumHeightDiffForNewLayer=0; NightInterceptionFraction=0.5; ReferenceHeight=2
          Manager SowingFertiliser: same as NPIValidation.SGEHEAT_13GEHEAT-1.SGEHEAT_13GEHEAT-1.Field.SowingFertiliser
          Manager Harvesting
          Operations Sowing
            2008-05-30  [wheat].Sow(cultivar:"hartog", population:150, depth:50, rowSpacing:250);
          Report HarvestReport
        Manager LocationInfo: same as NPIField2019.Dale.Dale2019Base.LocationInfo
    Experiment BYIE_08NB
      Factors
        Factor Cultivar: Specification=[Sowing]
          Operations ellison
            2008-06-19  [wheat].Sow(cultivar:"ellison", population:150, depth:50, rowSpacing:250);
          Operations wedgetail
            2008-06-19  [wheat].Sow(cultivar:"wedgetail", population:150, depth:50, rowSpacing:250);
          Operations derrimut
            2008-06-19  [wheat].Sow(cultivar:"derrimut", population:150, depth:50, rowSpacing:250);
          Operations axe
            2008-06-19  [wheat].Sow(cultivar:"axe", population:150, depth:50, rowSpacing:250);
          Operations scythe
            2008-06-19  [wheat].Sow(cultivar:"scythe", population:150, depth:50, rowSpacing:250);
          Operations calingiri
            2008-06-19  [wheat].Sow(cultivar:"calingiri", population:150, depth:50, rowSpacing:250);
          Operations braewood
            2008-06-19  [wheat].Sow(cultivar:"braewood", population:150, depth:50, rowSpacing:250);
          Operations bolac
            2008-06-19  [wheat].Sow(cultivar:"bolac", population:150, depth:50, rowSpacing:250);
          Operations sunstate
            2008-06-19  [wheat].Sow(cultivar:"sunstate", population:150, depth:50, rowSpacing:250);
          Operations janz
            2008-06-19  [wheat].Sow(cultivar:"janz", population:150, depth:50, rowSpacing:250);
          Operations young
            2008-06-19  [wheat].Sow(cultivar:"young", population:150, depth:50, rowSpacing:250);
          Operations yitpi
            2008-06-19  [wheat].Sow(cultivar:"yitpi", population:150, depth:50, rowSpacing:250);
          Operations wyalkatchem
            2008-06-19  [wheat].Sow(cultivar:"wyalkatchem", population:150, depth:50, rowSpacing:250);
      Simulation BYIE_08NB
        Clock: Start=2008-06-18; End=2009-04-15
        Summary SummaryFile
        Weather: FileName=%root%/Tests/Validation/Wheat/met/BYIE_08NB.met
        SoilArbitrator
        Zone Field: Area=1; Slope=0; AspectAngle=0; Altitude=50
          Fertiliser
          Soil: same as NPIValidation.SGEHEAT_13GEHEAT-1.SGEHEAT_13GEHEAT-1.Field.Soil
          SurfaceOrganicMatter: InitialResidueName=wheat_stubble; InitialResidueType=wheat; InitialResidueMass=500; InitialStandingFraction=0; InitialCPR=0; InitialCNR=100
          Plant Wheat
          MicroClimate: a_interception=0; b_interception=1; c_interception=0; d_interception=0; SoilHeatFluxFraction=0.4; MinimumHeightDiffForNewLayer=0; NightInterceptionFraction=0.5; ReferenceHeight=2
          Manager SowingFertiliser: same as NPIValidation.SGEHEAT_13GEHEAT-1.SGEHEAT_13GEHEAT-1.Field.SowingFertiliser
          Manager Harvesting
          Operations Sowing
            2008-06-19  [wheat].Sow(cultivar:"hartog", population:150, depth:50, rowSpacing:250);
          Report HarvestReport
        Manager LocationInfo
          Country = Australia
          State = New South Wales
          Region = NSW North East QLD South East
          script: same as in FARAwardPhenology.FARAwardPhenology.Simulation.LocationInfo
    Experiment BYIE_08RS
      Factors
        Factor Cultivar: Specification=[Sowing]
          Operations scythe
            2008-05-29  [wheat].Sow(cultivar:"scythe", population:150, depth:50, rowSpacing:250);
          Operations axe
            2008-05-29  [wheat].Sow(cultivar:"axe", population:150, depth:50, rowSpacing:250);
          Operations bolac
            2008-05-29  [wheat].Sow(cultivar:"bolac", population:150, depth:50, rowSpacing:250);
          Operations braewood
            2008-05-29  [wheat].Sow(cultivar:"braewood", population:150, depth:50, rowSpacing:250);
          Operations calingiri
            2008-05-29  [wheat].Sow(cultivar:"calingiri", population:150, depth:50, rowSpacing:250);
          Operations janz
            2008-05-29  [wheat].Sow(cultivar:"janz", population:150, depth:50, rowSpacing:250);
          Operations derrimut
            2008-05-29  [wheat].Sow(cultivar:"derrimut", population:150, depth:50, rowSpacing:250);
          Operations wedgetail
            2008-05-29  [wheat].Sow(cultivar:"wedgetail", population:150, depth:50, rowSpacing:250);
          Operations ellison
            2008-05-29  [wheat].Sow(cultivar:"ellison", population:150, depth:50, rowSpacing:250);
          Operations young
            2008-05-29  [wheat].Sow(cultivar:"young", population:150, depth:50, rowSpacing:250);
          Operations wyalkatchem
            2008-05-29  [wheat].Sow(cultivar:"wyalkatchem", population:150, depth:50, rowSpacing:250);
          Operations yitpi
            2008-05-29  [wheat].Sow(cultivar:"yitpi", population:150, depth:50, rowSpacing:250);
          Operations sunstate
            2008-05-29  [wheat].Sow(cultivar:"sunstate", population:150, depth:50, rowSpacing:250);
      Simulation BYIE_08RS
        Clock: Start=2008-05-28; End=2009-03-25
        Summary SummaryFile
        Weather: FileName=%root%/Tests/Validation/Wheat/met/BYIE_08RS.met
        SoilArbitrator
        Zone Field: Area=1; Slope=0; AspectAngle=0; Altitude=50
          Fertiliser
          Soil: same as NPIValidation.SGEHEAT_13GEHEAT-1.SGEHEAT_13GEHEAT-1.Field.Soil
          SurfaceOrganicMatter: InitialResidueName=wheat_stubble; InitialResidueType=wheat; InitialResidueMass=500; InitialStandingFraction=0; InitialCPR=0; InitialCNR=100
          Plant Wheat
          MicroClimate: a_interception=0; b_interception=1; c_interception=0; d_interception=0; SoilHeatFluxFraction=0.4; MinimumHeightDiffForNewLayer=0; NightInterceptionFraction=0.5; ReferenceHeight=2
          Manager SowingFertiliser: same as NPIValidation.SGEHEAT_13GEHEAT-1.SGEHEAT_13GEHEAT-1.Field.SowingFertiliser
          Manager Harvesting
          Operations Sowing
            2008-05-29  [wheat].Sow(cultivar:"hartog", population:150, depth:50, rowSpacing:250);
          Report HarvestReport
        Manager LocationInfo
          Country = Australia
          State = South Australia
          Region = SA Midnorth-Lower Yorke, Eyre
          script: same as in FARAwardPhenology.FARAwardPhenology.Simulation.LocationInfo
    Experiment BYIE_08WH
      Factors
        Factor Cultivar: Specification=[Sowing]
          Operations scythe
            2008-06-11  [wheat].Sow(cultivar:"scythe", population:150, depth:50, rowSpacing:250);
          Operations axe
            2008-06-11  [wheat].Sow(cultivar:"axe", population:150, depth:50, rowSpacing:250);
          Operations braewood
            2008-06-11  [wheat].Sow(cultivar:"braewood", population:150, depth:50, rowSpacing:250);
          Operations calingiri
            2008-06-11  [wheat].Sow(cultivar:"calingiri", population:150, depth:50, rowSpacing:250);
          Operations bolac
            2008-06-11  [wheat].Sow(cultivar:"bolac", population:150, depth:50, rowSpacing:250);
          Operations derrimut
            2008-06-11  [wheat].Sow(cultivar:"derrimut", population:150, depth:50, rowSpacing:250);
          Operations wedgetail
            2008-06-11  [wheat].Sow(cultivar:"wedgetail", population:150, depth:50, rowSpacing:250);
          Operations ellison
            2008-06-11  [wheat].Sow(cultivar:"ellison", population:150, depth:50, rowSpacing:250);
          Operations janz
            2008-06-11  [wheat].Sow(cultivar:"janz", population:150, depth:50, rowSpacing:250);
          Operations sunstate
            2008-06-11  [wheat].Sow(cultivar:"sunstate", population:150, depth:50, rowSpacing:250);
          Operations wyalkatchem
            2008-06-11  [wheat].Sow(cultivar:"wyalkatchem", population:150, depth:50, rowSpacing:250);
          Operations young
            2008-06-11  [wheat].Sow(cultivar:"young", population:150, depth:50, rowSpacing:250);
          Operations yitpi
            2008-06-11  [wheat].Sow(cultivar:"yitpi", population:150, depth:50, rowSpacing:250);
      Simulation BYIE_08WH
        Clock: Start=2008-06-10; End=2009-04-07
        Summary SummaryFile
        Weather: FileName=%root%/Tests/Validation/Wheat/met/BYIE_08WH.met
        SoilArbitrator
        Zone Field: Area=1; Slope=0; AspectAngle=0; Altitude=50
          Fertiliser
          Soil: same as NPIValidation.SGEHEAT_13GEHEAT-1.SGEHEAT_13GEHEAT-1.Field.Soil
          SurfaceOrganicMatter: InitialResidueName=wheat_stubble; InitialResidueType=wheat; InitialResidueMass=500; InitialStandingFraction=0; InitialCPR=0; InitialCNR=100
          Plant Wheat
          MicroClimate: a_interception=0; b_interception=1; c_interception=0; d_interception=0; SoilHeatFluxFraction=0.4; MinimumHeightDiffForNewLayer=0; NightInterceptionFraction=0.5; ReferenceHeight=2
          Manager SowingFertiliser: same as NPIValidation.SGEHEAT_13GEHEAT-1.SGEHEAT_13GEHEAT-1.Field.SowingFertiliser
          Manager Harvesting
          Operations Sowing
            2008-06-11  [wheat].Sow(cultivar:"hartog", population:150, depth:50, rowSpacing:250);
          Report HarvestReport
        Manager LocationInfo: same as NPIField2019.Dale.Dale2019Base.LocationInfo
    Experiment BYIE_09ER
      Factors
        Factor Cultivar: Specification=[Sowing]
          Operations axe
            2009-05-30  [wheat].Sow(cultivar:"axe", population:150, depth:50, rowSpacing:250);
          Operations scythe
            2009-05-30  [wheat].Sow(cultivar:"scythe", population:150, depth:50, rowSpacing:250);
          Operations calingiri
            2009-05-30  [wheat].Sow(cultivar:"calingiri", population:150, depth:50, rowSpacing:250);
          Operations bolac
            2009-05-30  [wheat].Sow(cultivar:"bolac", population:150, depth:50, rowSpacing:250);
          Operations braewood
            2009-05-30  [wheat].Sow(cultivar:"braewood", population:150, depth:50, rowSpacing:250);
          Operations ellison
            2009-05-30  [wheat].Sow(cultivar:"ellison", population:150, depth:50, rowSpacing:250);
          Operations derrimut
            2009-05-30  [wheat].Sow(cultivar:"derrimut", population:150, depth:50, rowSpacing:250);
          Operations janz
            2009-05-30  [wheat].Sow(cultivar:"janz", population:150, depth:50, rowSpacing:250);
          Operations sunstate
            2009-05-30  [wheat].Sow(cultivar:"sunstate", population:150, depth:50, rowSpacing:250);
          Operations yitpi
            2009-05-30  [wheat].Sow(cultivar:"yitpi", population:150, depth:50, rowSpacing:250);
          Operations young
            2009-05-30  [wheat].Sow(cultivar:"young", population:150, depth:50, rowSpacing:250);
          Operations wyalkatchem
            2009-05-30  [wheat].Sow(cultivar:"wyalkatchem", population:150, depth:50, rowSpacing:250);
      Simulation BYIE_09ER
        Clock: Start=2009-05-29; End=2010-03-26
        Summary SummaryFile
        Weather: FileName=%root%/Tests/Validation/Wheat/met/BYIE_09ER.met
        SoilArbitrator
        Zone Field: Area=1; Slope=0; AspectAngle=0; Altitude=50
          Fertiliser
          Soil: same as NPIValidation.SGEHEAT_13GEHEAT-1.SGEHEAT_13GEHEAT-1.Field.Soil
          SurfaceOrganicMatter: InitialResidueName=wheat_stubble; InitialResidueType=wheat; InitialResidueMass=500; InitialStandingFraction=0; InitialCPR=0; InitialCNR=100
          Plant Wheat
          MicroClimate: a_interception=0; b_interception=1; c_interception=0; d_interception=0; SoilHeatFluxFraction=0.4; MinimumHeightDiffForNewLayer=0; NightInterceptionFraction=0.5; ReferenceHeight=2
          Manager SowingFertiliser: same as NPIValidation.SGEHEAT_13GEHEAT-1.SGEHEAT_13GEHEAT-1.Field.SowingFertiliser
          Manager Harvesting
          Operations Sowing
            2009-05-30  [wheat].Sow(cultivar:"hartog", population:150, depth:50, rowSpacing:250);
          Report HarvestReport
        Manager LocationInfo: same as NPIValidation.BCVT_Ardingly_1992-06-19.BCVT_Ardingly_1992-06-19.LocationInfo
    Experiment BYIE_09GN
      Factors
        Factor Cultivar: Specification=[Sowing]
          Operations axe
            2009-06-14  [wheat].Sow(cultivar:"axe", population:150, depth:50, rowSpacing:250);
          Operations scythe
            2009-06-14  [wheat].Sow(cultivar:"scythe", population:150, depth:50, rowSpacing:250);
          Operations calingiri
            2009-06-14  [wheat].Sow(cultivar:"calingiri", population:150, depth:50, rowSpacing:250);
          Operations braewood
            2009-06-14  [wheat].Sow(cultivar:"braewood", population:150, depth:50, rowSpacing:250);
          Operations bolac
            2009-06-14  [wheat].Sow(cultivar:"bolac", population:150, depth:50, rowSpacing:250);
          Operations ellison
            2009-06-14  [wheat].Sow(cultivar:"ellison", population:150, depth:50, rowSpacing:250);
          Operations derrimut
            2009-06-14  [wheat].Sow(cultivar:"derrimut", population:150, depth:50, rowSpacing:250);
          Operations janz
            2009-06-14  [wheat].Sow(cultivar:"janz", population:150, depth:50, rowSpacing:250);
          Operations kellalac
            2009-06-14  [wheat].Sow(cultivar:"kellalac", population:150, depth:50, rowSpacing:250);
          Operations sunstate
            2009-06-14  [wheat].Sow(cultivar:"sunstate", population:150, depth:50, rowSpacing:250);
          Operations young
            2009-06-14  [wheat].Sow(cultivar:"young", population:150, depth:50, rowSpacing:250);
          Operations yitpi
            2009-06-14  [wheat].Sow(cultivar:"yitpi", population:150, depth:50, rowSpacing:250);
          Operations wyalkatchem
            2009-06-14  [wheat].Sow(cultivar:"wyalkatchem", population:150, depth:50, rowSpacing:250);
      Simulation BYIE_09GN
        Clock: Start=2009-06-13; End=2010-04-10
        Summary SummaryFile
        Weather: FileName=%root%/Tests/Validation/Wheat/met/BYIE_09GN.met
        SoilArbitrator
        Zone Field: Area=1; Slope=0; AspectAngle=0; Altitude=50
          Fertiliser
          Soil: same as NPIValidation.SGEHEAT_13GEHEAT-1.SGEHEAT_13GEHEAT-1.Field.Soil
          SurfaceOrganicMatter: InitialResidueName=wheat_stubble; InitialResidueType=wheat; InitialResidueMass=500; InitialStandingFraction=0; InitialCPR=0; InitialCNR=100
          Plant Wheat
          MicroClimate: a_interception=0; b_interception=1; c_interception=0; d_interception=0; SoilHeatFluxFraction=0.4; MinimumHeightDiffForNewLayer=0; NightInterceptionFraction=0.5; ReferenceHeight=2
          Manager SowingFertiliser: same as NPIValidation.SGEHEAT_13GEHEAT-1.SGEHEAT_13GEHEAT-1.Field.SowingFertiliser
          Manager Harvesting
          Operations Sowing
            2009-06-14  [wheat].Sow(cultivar:"hartog", population:150, depth:50, rowSpacing:250);
          Report HarvestReport
        Manager LocationInfo
          Country = Australia
          State = Queensland
          Region = NSW North East QLD South East
          script: same as in FARAwardPhenology.FARAwardPhenology.Simulation.LocationInfo
    Experiment BYIE_09HIR
      Factors
        Factor Cultivar: Specification=[Sowing]
          Operations braewood
            2009-05-22  [wheat].Sow(cultivar:"braewood", population:150, depth:50, rowSpacing:250);
      Simulation BYIE_09HIR
        Clock: Start=2009-05-21; End=2010-03-18
        Summary SummaryFile
        Weather: FileName=%root%/Tests/Validation/Wheat/met/BYIE_09HIR.met
        SoilArbitrator
        Zone Field: Area=1; Slope=0; AspectAngle=0; Altitude=50
          Fertiliser
          Soil: same as NPIValidation.SGEHEAT_13GEHEAT-1.SGEHEAT_13GEHEAT-1.Field.Soil
          SurfaceOrganicMatter: InitialResidueName=wheat_stubble; InitialResidueType=wheat; InitialResidueMass=500; InitialStandingFraction=0; InitialCPR=0; InitialCNR=100
          Plant Wheat
          MicroClimate: a_interception=0; b_interception=1; c_interception=0; d_interception=0; SoilHeatFluxFraction=0.4; MinimumHeightDiffForNewLayer=0; NightInterceptionFraction=0.5; ReferenceHeight=2
          Manager SowingFertiliser: same as NPIValidation.SGEHEAT_13GEHEAT-1.SGEHEAT_13GEHEAT-1.Field.SowingFertiliser
          Manager Harvesting
          Operations Sowing
            2009-05-22  [wheat].Sow(cultivar:"hartog", population:150, depth:50, rowSpacing:250);
          Report HarvestReport
        Manager LocationInfo: same as NPIValidation.BYIE_08HIR.BYIE_08HIR.LocationInfo
    Experiment BYIE_09KA
      Factors
        Factor Cultivar: Specification=[Sowing]
          Operations scythe
            2009-06-09  [wheat].Sow(cultivar:"scythe", population:150, depth:50, rowSpacing:250);
          Operations bolac
            2009-06-09  [wheat].Sow(cultivar:"bolac", population:150, depth:50, rowSpacing:250);
          Operations braewood
            2009-06-09  [wheat].Sow(cultivar:"braewood", population:150, depth:50, rowSpacing:250);
          Operations ellison
            2009-06-09  [wheat].Sow(cultivar:"ellison", population:150, depth:50, rowSpacing:250);
          Operations janz
            2009-06-09  [wheat].Sow(cultivar:"janz", population:150, depth:50, rowSpacing:250);
          Operations kellalac
            2009-06-09  [wheat].Sow(cultivar:"kellalac", population:150, depth:50, rowSpacing:250);
          Operations yitpi
            2009-06-09  [wheat].Sow(cultivar:"yitpi", population:150, depth:50, rowSpacing:250);
      Simulation BYIE_09KA
        Clock: Start=2009-06-08; End=2010-04-05
        Summary SummaryFile
        Weather: FileName=%root%/Tests/Validation/Wheat/met/BYIE_09KA.met
        SoilArbitrator
        Zone Field: Area=1; Slope=0; AspectAngle=0; Altitude=50
          Fertiliser
          Soil: same as NPIValidation.SGEHEAT_13GEHEAT-1.SGEHEAT_13GEHEAT-1.Field.Soil
          SurfaceOrganicMatter: InitialResidueName=wheat_stubble; InitialResidueType=wheat; InitialResidueMass=500; InitialStandingFraction=0; InitialCPR=0; InitialCNR=100
          Plant Wheat
          MicroClimate: a_interception=0; b_interception=1; c_interception=0; d_interception=0; SoilHeatFluxFraction=0.4; MinimumHeightDiffForNewLayer=0; NightInterceptionFraction=0.5; ReferenceHeight=2
          Manager SowingFertiliser: same as NPIValidation.SGEHEAT_13GEHEAT-1.SGEHEAT_13GEHEAT-1.Field.SowingFertiliser
          Manager Harvesting
          Operations Sowing
            2009-06-09  [wheat].Sow(cultivar:"hartog", population:150, depth:50, rowSpacing:250);
          Report HarvestReport
        Manager LocationInfo: same as NPIField2019.Dale.Dale2019Base.LocationInfo
    Experiment BYIE_09MDL
      Factors
        Factor Cultivar: Specification=[Sowing]
          Operations axe
            2009-07-03  [wheat].Sow(cultivar:"axe", population:150, depth:50, rowSpacing:250);
          Operations scythe
            2009-07-03  [wheat].Sow(cultivar:"scythe", population:150, depth:50, rowSpacing:250);
          Operations calingiri
            2009-07-03  [wheat].Sow(cultivar:"calingiri", population:150, depth:50, rowSpacing:250);
          Operations braewood
            2009-07-03  [wheat].Sow(cultivar:"braewood", population:150, depth:50, rowSpacing:250);
          Operations bolac
            2009-07-03  [wheat].Sow(cultivar:"bolac", population:150, depth:50, rowSpacing:250);
          Operations ellison
            2009-07-03  [wheat].Sow(cultivar:"ellison", population:150, depth:50, rowSpacing:250);
          Operations wedgetail
            2009-07-03  [wheat].Sow(cultivar:"wedgetail", population:150, depth:50, rowSpacing:250);
          Operations derrimut
            2009-07-03  [wheat].Sow(cultivar:"derrimut", population:150, depth:50, rowSpacing:250);
          Operations janz
            2009-07-03  [wheat].Sow(cultivar:"janz", population:150, depth:50, rowSpacing:250);
          Operations kellalac
            2009-07-03  [wheat].Sow(cultivar:"kellalac", population:150, depth:50, rowSpacing:250);
          Operations sunstate
            2009-07-03  [wheat].Sow(cultivar:"sunstate", population:150, depth:50, rowSpacing:250);
          Operations young
            2009-07-03  [wheat].Sow(cultivar:"young", population:150, depth:50, rowSpacing:250);
          Operations yitpi
            2009-07-03  [wheat].Sow(cultivar:"yitpi", population:150, depth:50, rowSpacing:250);
          Operations wyalkatchem
            2009-07-03  [wheat].Sow(cultivar:"wyalkatchem", population:150, depth:50, rowSpacing:250);
      Simulation BYIE_09MDL
        Clock: Start=2009-07-02; End=2010-04-29
        Summary SummaryFile
        Weather: FileName=%root%/Tests/Validation/Wheat/met/BYIE_09MDL.met
        SoilArbitrator
        Zone Field: Area=1; Slope=0; AspectAngle=0; Altitude=50
          Fertiliser
          Soil: same as NPIValidation.SGEHEAT_13GEHEAT-1.SGEHEAT_13GEHEAT-1.Field.Soil
          SurfaceOrganicMatter: InitialResidueName=wheat_stubble; InitialResidueType=wheat; InitialResidueMass=500; InitialStandingFraction=0; InitialCPR=0; InitialCNR=100
          Plant Wheat
          MicroClimate: a_interception=0; b_interception=1; c_interception=0; d_interception=0; SoilHeatFluxFraction=0.4; MinimumHeightDiffForNewLayer=0; NightInterceptionFraction=0.5; ReferenceHeight=2
          Manager SowingFertiliser: same as NPIValidation.SGEHEAT_13GEHEAT-1.SGEHEAT_13GEHEAT-1.Field.SowingFertiliser
          Manager Harvesting
          Operations Sowing
            2009-07-03  [wheat].Sow(cultivar:"hartog", population:150, depth:50, rowSpacing:250);
          Report HarvestReport
        Manager LocationInfo: same as NPIValidation.BCVT_Merredin_1995-05-30.BCVT_Merredin_1995-05-30.LocationInfo
    Experiment BYIE_09RS
      Factors
        Factor Cultivar: Specification=[Sowing]
          Operations bolac
            2009-05-08  [wheat].Sow(cultivar:"bolac", population:150, depth:50, rowSpacing:250);
          Operations scythe
            2009-05-08  [wheat].Sow(cultivar:"scythe", population:150, depth:50, rowSpacing:250);
          Operations axe
            2009-05-08  [wheat].Sow(cultivar:"axe", population:150, depth:50, rowSpacing:250);
          Operations janz
            2009-05-08  [wheat].Sow(cultivar:"janz", population:150, depth:50, rowSpacing:250);
          Operations young
            2009-05-08  [wheat].Sow(cultivar:"young", population:150, depth:50, rowSpacing:250);
      Simulation BYIE_09RS
        Clock: Start=2009-05-07; End=2010-03-04
        Summary SummaryFile
        Weather: FileName=%root%/Tests/Validation/Wheat/met/BYIE_09RS.met
        SoilArbitrator
        Zone Field: Area=1; Slope=0; AspectAngle=0; Altitude=50
          Fertiliser
          Soil: same as NPIValidation.SGEHEAT_13GEHEAT-1.SGEHEAT_13GEHEAT-1.Field.Soil
          SurfaceOrganicMatter: InitialResidueName=wheat_stubble; InitialResidueType=wheat; InitialResidueMass=500; InitialStandingFraction=0; InitialCPR=0; InitialCNR=100
          Plant Wheat
          MicroClimate: a_interception=0; b_interception=1; c_interception=0; d_interception=0; SoilHeatFluxFraction=0.4; MinimumHeightDiffForNewLayer=0; NightInterceptionFraction=0.5; ReferenceHeight=2
          Manager SowingFertiliser: same as NPIValidation.SGEHEAT_13GEHEAT-1.SGEHEAT_13GEHEAT-1.Field.SowingFertiliser
          Manager Harvesting
          Operations Sowing
            2009-05-08  [wheat].Sow(cultivar:"hartog", population:150, depth:50, rowSpacing:250);
          Report HarvestReport
        Manager LocationInfo: same as NPIValidation.BYIE_08RS.BYIE_08RS.LocationInfo
    Experiment BYIE_09WH
      Factors
        Factor Cultivar: Specification=[Sowing]
          Operations bolac
            2009-06-18  [wheat].Sow(cultivar:"bolac", population:150, depth:50, rowSpacing:250);
          Operations braewood
            2009-06-18  [wheat].Sow(cultivar:"braewood", population:150, depth:50, rowSpacing:250);
          Operations calingiri
            2009-06-18  [wheat].Sow(cultivar:"calingiri", population:150, depth:50, rowSpacing:250);
          Operations scythe
            2009-06-18  [wheat].Sow(cultivar:"scythe", population:150, depth:50, rowSpacing:250);
          Operations axe
            2009-06-18  [wheat].Sow(cultivar:"axe", population:150, depth:50, rowSpacing:250);
          Operations derrimut
            2009-06-18  [wheat].Sow(cultivar:"derrimut", population:150, depth:50, rowSpacing:250);
          Operations wedgetail
            2009-06-18  [wheat].Sow(cultivar:"wedgetail", population:150, depth:50, rowSpacing:250);
          Operations ellison
            2009-06-18  [wheat].Sow(cultivar:"ellison", population:150, depth:50, rowSpacing:250);
          Operations janz
            2009-06-18  [wheat].Sow(cultivar:"janz", population:150, depth:50, rowSpacing:250);
          Operations kellalac
            2009-06-18  [wheat].Sow(cultivar:"kellalac", population:150, depth:50, rowSpacing:250);
          Operations sunstate
            2009-06-18  [wheat].Sow(cultivar:"sunstate", population:150, depth:50, rowSpacing:250);
          Operations wyalkatchem
            2009-06-18  [wheat].Sow(cultivar:"wyalkatchem", population:150, depth:50, rowSpacing:250);
          Operations yitpi
            2009-06-18  [wheat].Sow(cultivar:"yitpi", population:150, depth:50, rowSpacing:250);
          Operations young
            2009-06-18  [wheat].Sow(cultivar:"young", population:150, depth:50, rowSpacing:250);
      Simulation BYIE_09WH
        Clock: Start=2009-06-17; End=2010-04-14
        Summary SummaryFile
        Weather: FileName=%root%/Tests/Validation/Wheat/met/BYIE_09WH.met
        SoilArbitrator
        Zone Field: Area=1; Slope=0; AspectAngle=0; Altitude=50
          Fertiliser
          Soil: same as NPIValidation.SGEHEAT_13GEHEAT-1.SGEHEAT_13GEHEAT-1.Field.Soil
          SurfaceOrganicMatter: InitialResidueName=wheat_stubble; InitialResidueType=wheat; InitialResidueMass=500; InitialStandingFraction=0; InitialCPR=0; InitialCNR=100
          Plant Wheat
          MicroClimate: a_interception=0; b_interception=1; c_interception=0; d_interception=0; SoilHeatFluxFraction=0.4; MinimumHeightDiffForNewLayer=0; NightInterceptionFraction=0.5; ReferenceHeight=2
          Manager SowingFertiliser: same as NPIValidation.SGEHEAT_13GEHEAT-1.SGEHEAT_13GEHEAT-1.Field.SowingFertiliser
          Manager Harvesting
          Operations Sowing
            2009-06-18  [wheat].Sow(cultivar:"hartog", population:150, depth:50, rowSpacing:250);
          Report HarvestReport
        Manager LocationInfo: same as NPIField2019.Dale.Dale2019Base.LocationInfo
    Experiment PTOS_10Kairi-1
      Factors
        Factor Cultivar: Specification=[Sowing]
          Operations janz
            2010-05-14  [wheat].Sow(cultivar:"janz", population:150, depth:50, rowSpacing:250);
          Operations gregory
            2010-05-14  [wheat].Sow(cultivar:"gregory", population:150, depth:50, rowSpacing:250);
          Operations derrimut
            2010-05-14  [wheat].Sow(cultivar:"derrimut", population:150, depth:50, rowSpacing:250);
          Operations calingiri
            2010-05-14  [wheat].Sow(cultivar:"calingiri", population:150, depth:50, rowSpacing:250);
          Operations bolac
            2010-05-14  [wheat].Sow(cultivar:"bolac", population:150, depth:50, rowSpacing:250);
          Operations axe
            2010-05-14  [wheat].Sow(cultivar:"axe", population:150, depth:50, rowSpacing:250);
          Operations wyalkatchem
            2010-05-14  [wheat].Sow(cultivar:"wyalkatchem", population:150, depth:50, rowSpacing:250);
          Operations strzelecki
            2010-05-14  [wheat].Sow(cultivar:"strzelecki", population:150, depth:50, rowSpacing:250);
      Simulation PTOS_10Kairi-1
        Clock: Start=2010-05-13; End=2011-03-10
        Summary SummaryFile
        Weather: FileName=%root%/Tests/Validation/Wheat/met/PTOS_10Kairi-1.met
        SoilArbitrator
        Zone Field: Area=1; Slope=0; AspectAngle=0; Altitude=50
          Fertiliser
          Soil: same as NPIValidation.SGEHEAT_13GEHEAT-1.SGEHEAT_13GEHEAT-1.Field.Soil
          SurfaceOrganicMatter: InitialResidueName=wheat_stubble; InitialResidueType=wheat; InitialResidueMass=500; InitialStandingFraction=0; InitialCPR=0; InitialCNR=100
          Plant Wheat
          MicroClimate: a_interception=0; b_interception=1; c_interception=0; d_interception=0; SoilHeatFluxFraction=0.4; MinimumHeightDiffForNewLayer=0; NightInterceptionFraction=0.5; ReferenceHeight=2
          Manager SowingFertiliser: same as NPIValidation.SGEHEAT_13GEHEAT-1.SGEHEAT_13GEHEAT-1.Field.SowingFertiliser
          Manager Harvesting
          Operations Sowing
            2010-05-14  [wheat].Sow(cultivar:"hartog", population:150, depth:50, rowSpacing:250);
          Report HarvestReport
        Manager LocationInfo
          Country = Australia
          State = Queensland
          Region = QLD Atherton
          script: same as in FARAwardPhenology.FARAwardPhenology.Simulation.LocationInfo
    Experiment PTOS_10Kairi-2
      Factors
        Factor Cultivar: Specification=[Sowing]
          Operations gregory
            2010-05-28  [wheat].Sow(cultivar:"gregory", population:150, depth:50, rowSpacing:250);
          Operations derrimut
            2010-05-28  [wheat].Sow(cultivar:"derrimut", population:150, depth:50, rowSpacing:250);
          Operations calingiri
            2010-05-28  [wheat].Sow(cultivar:"calingiri", population:150, depth:50, rowSpacing:250);
          Operations bolac
            2010-05-28  [wheat].Sow(cultivar:"bolac", population:150, depth:50, rowSpacing:250);
          Operations axe
            2010-05-28  [wheat].Sow(cultivar:"axe", population:150, depth:50, rowSpacing:250);
          Operations wyalkatchem
            2010-05-28  [wheat].Sow(cultivar:"wyalkatchem", population:150, depth:50, rowSpacing:250);
          Operations strzelecki
            2010-05-28  [wheat].Sow(cultivar:"strzelecki", population:150, depth:50, rowSpacing:250);
          Operations janz
            2010-05-28  [wheat].Sow(cultivar:"janz", population:150, depth:50, rowSpacing:250);
      Simulation PTOS_10Kairi-2
        Clock: Start=2010-05-27; End=2011-03-24
        Summary SummaryFile
        Weather: FileName=%root%/Tests/Validation/Wheat/met/PTOS_10Kairi-2.met
        SoilArbitrator
        Zone Field: Area=1; Slope=0; AspectAngle=0; Altitude=50
          Fertiliser
          Soil: same as NPIValidation.SGEHEAT_13GEHEAT-1.SGEHEAT_13GEHEAT-1.Field.Soil
          SurfaceOrganicMatter: InitialResidueName=wheat_stubble; InitialResidueType=wheat; InitialResidueMass=500; InitialStandingFraction=0; InitialCPR=0; InitialCNR=100
          Plant Wheat
          MicroClimate: a_interception=0; b_interception=1; c_interception=0; d_interception=0; SoilHeatFluxFraction=0.4; MinimumHeightDiffForNewLayer=0; NightInterceptionFraction=0.5; ReferenceHeight=2
          Manager SowingFertiliser: same as NPIValidation.SGEHEAT_13GEHEAT-1.SGEHEAT_13GEHEAT-1.Field.SowingFertiliser
          Manager Harvesting
          Operations Sowing
            2010-05-28  [wheat].Sow(cultivar:"hartog", population:150, depth:50, rowSpacing:250);
          Report HarvestReport
        Manager LocationInfo: same as NPIValidation.PTOS_10Kairi-1.PTOS_10Kairi-1.LocationInfo
    Experiment PTOS_10Kairi-3
      Factors
        Factor Cultivar: Specification=[Sowing]
          Operations wyalkatchem
            2010-06-15  [wheat].Sow(cultivar:"wyalkatchem", population:150, depth:50, rowSpacing:250);
          Operations janz
            2010-06-15  [wheat].Sow(cultivar:"janz", population:150, depth:50, rowSpacing:250);
          Operations gregory
            2010-06-15  [wheat].Sow(cultivar:"gregory", population:150, depth:50, rowSpacing:250);
          Operations derrimut
            2010-06-15  [wheat].Sow(cultivar:"derrimut", population:150, depth:50, rowSpacing:250);
          Operations calingiri
            2010-06-15  [wheat].Sow(cultivar:"calingiri", population:150, depth:50, rowSpacing:250);
          Operations bolac
            2010-06-15  [wheat].Sow(cultivar:"bolac", population:150, depth:50, rowSpacing:250);
          Operations axe
            2010-06-15  [wheat].Sow(cultivar:"axe", population:150, depth:50, rowSpacing:250);
      Simulation PTOS_10Kairi-3
        Clock: Start=2010-06-14; End=2011-04-11
        Summary SummaryFile
        Weather: FileName=%root%/Tests/Validation/Wheat/met/PTOS_10Kairi-3.met
        SoilArbitrator
        Zone Field: Area=1; Slope=0; AspectAngle=0; Altitude=50
          Fertiliser
          Soil: same as NPIValidation.SGEHEAT_13GEHEAT-1.SGEHEAT_13GEHEAT-1.Field.Soil
          SurfaceOrganicMatter: InitialResidueName=wheat_stubble; InitialResidueType=wheat; InitialResidueMass=500; InitialStandingFraction=0; InitialCPR=0; InitialCNR=100
          Plant Wheat
          MicroClimate: a_interception=0; b_interception=1; c_interception=0; d_interception=0; SoilHeatFluxFraction=0.4; MinimumHeightDiffForNewLayer=0; NightInterceptionFraction=0.5; ReferenceHeight=2
          Manager SowingFertiliser: same as NPIValidation.SGEHEAT_13GEHEAT-1.SGEHEAT_13GEHEAT-1.Field.SowingFertiliser
          Manager Harvesting
          Operations Sowing
            2010-06-15  [wheat].Sow(cultivar:"hartog", population:150, depth:50, rowSpacing:250);
          Report HarvestReport
        Manager LocationInfo: same as NPIValidation.PTOS_10Kairi-1.PTOS_10Kairi-1.LocationInfo
    Experiment PTOS_10Kairi-4
      Factors
        Factor Cultivar: Specification=[Sowing]
          Operations janz
            2010-06-25  [wheat].Sow(cultivar:"janz", population:150, depth:50, rowSpacing:250);
          Operations gregory
            2010-06-25  [wheat].Sow(cultivar:"gregory", population:150, depth:50, rowSpacing:250);
          Operations derrimut
            2010-06-25  [wheat].Sow(cultivar:"derrimut", population:150, depth:50, rowSpacing:250);
          Operations calingiri
            2010-06-25  [wheat].Sow(cultivar:"calingiri", population:150, depth:50, rowSpacing:250);
          Operations bolac
            2010-06-25  [wheat].Sow(cultivar:"bolac", population:150, depth:50, rowSpacing:250);
          Operations axe
            2010-06-25  [wheat].Sow(cultivar:"axe", population:150, depth:50, rowSpacing:250);
          Operations wyalkatchem
            2010-06-25  [wheat].Sow(cultivar:"wyalkatchem", population:150, depth:50, rowSpacing:250);
      Simulation PTOS_10Kairi-4
        Clock: Start=2010-06-24; End=2011-04-21
        Summary SummaryFile
        Weather: FileName=%root%/Tests/Validation/Wheat/met/PTOS_10Kairi-4.met
        SoilArbitrator
        Zone Field: Area=1; Slope=0; AspectAngle=0; Altitude=50
          Fertiliser
          Soil: same as NPIValidation.SGEHEAT_13GEHEAT-1.SGEHEAT_13GEHEAT-1.Field.Soil
          SurfaceOrganicMatter: InitialResidueName=wheat_stubble; InitialResidueType=wheat; InitialResidueMass=500; InitialStandingFraction=0; InitialCPR=0; InitialCNR=100
          Plant Wheat
          MicroClimate: a_interception=0; b_interception=1; c_interception=0; d_interception=0; SoilHeatFluxFraction=0.4; MinimumHeightDiffForNewLayer=0; NightInterceptionFraction=0.5; ReferenceHeight=2
          Manager SowingFertiliser: same as NPIValidation.SGEHEAT_13GEHEAT-1.SGEHEAT_13GEHEAT-1.Field.SowingFertiliser
          Manager Harvesting
          Operations Sowing
            2010-06-25  [wheat].Sow(cultivar:"hartog", population:150, depth:50, rowSpacing:250);
          Report HarvestReport
        Manager LocationInfo: same as NPIValidation.PTOS_10Kairi-1.PTOS_10Kairi-1.LocationInfo
    Experiment PTOS_10Kairi-5
      Factors
        Factor Cultivar: Specification=[Sowing]
          Operations janz
            2010-07-09  [wheat].Sow(cultivar:"janz", population:150, depth:50, rowSpacing:250);
          Operations gregory
            2010-07-09  [wheat].Sow(cultivar:"gregory", population:150, depth:50, rowSpacing:250);
          Operations derrimut
            2010-07-09  [wheat].Sow(cultivar:"derrimut", population:150, depth:50, rowSpacing:250);
          Operations calingiri
            2010-07-09  [wheat].Sow(cultivar:"calingiri", population:150, depth:50, rowSpacing:250);
          Operations bolac
            2010-07-09  [wheat].Sow(cultivar:"bolac", population:150, depth:50, rowSpacing:250);
          Operations axe
            2010-07-09  [wheat].Sow(cultivar:"axe", population:150, depth:50, rowSpacing:250);
          Operations yitpi
            2010-07-09  [wheat].Sow(cultivar:"yitpi", population:150, depth:50, rowSpacing:250);
          Operations wyalkatchem
            2010-07-09  [wheat].Sow(cultivar:"wyalkatchem", population:150, depth:50, rowSpacing:250);
          Operations strzelecki
            2010-07-09  [wheat].Sow(cultivar:"strzelecki", population:150, depth:50, rowSpacing:250);
      Simulation PTOS_10Kairi-5
        Clock: Start=2010-07-08; End=2011-05-05
        Summary SummaryFile
        Weather: FileName=%root%/Tests/Validation/Wheat/met/PTOS_10Kairi-5.met
        SoilArbitrator
        Zone Field: Area=1; Slope=0; AspectAngle=0; Altitude=50
          Fertiliser
          Soil: same as NPIValidation.SGEHEAT_13GEHEAT-1.SGEHEAT_13GEHEAT-1.Field.Soil
          SurfaceOrganicMatter: InitialResidueName=wheat_stubble; InitialResidueType=wheat; InitialResidueMass=500; InitialStandingFraction=0; InitialCPR=0; InitialCNR=100
          Plant Wheat
          MicroClimate: a_interception=0; b_interception=1; c_interception=0; d_interception=0; SoilHeatFluxFraction=0.4; MinimumHeightDiffForNewLayer=0; NightInterceptionFraction=0.5; ReferenceHeight=2
          Manager SowingFertiliser: same as NPIValidation.SGEHEAT_13GEHEAT-1.SGEHEAT_13GEHEAT-1.Field.SowingFertiliser
          Manager Harvesting
          Operations Sowing
            2010-07-09  [wheat].Sow(cultivar:"hartog", population:150, depth:50, rowSpacing:250);
          Report HarvestReport
        Manager LocationInfo: same as NPIValidation.PTOS_10Kairi-1.PTOS_10Kairi-1.LocationInfo
    Experiment PTOS_10Mackay-1
      Factors
        Factor Cultivar: Specification=[Sowing]
          Operations gregory
            2010-05-07  [wheat].Sow(cultivar:"gregory", population:150, depth:50, rowSpacing:250);
          Operations derrimut
            2010-05-07  [wheat].Sow(cultivar:"derrimut", population:150, depth:50, rowSpacing:250);
          Operations calingiri
            2010-05-07  [wheat].Sow(cultivar:"calingiri", population:150, depth:50, rowSpacing:250);
          Operations bolac
            2010-05-07  [wheat].Sow(cultivar:"bolac", population:150, depth:50, rowSpacing:250);
          Operations axe
            2010-05-07  [wheat].Sow(cultivar:"axe", population:150, depth:50, rowSpacing:250);
          Operations wyalkatchem
            2010-05-07  [wheat].Sow(cultivar:"wyalkatchem", population:150, depth:50, rowSpacing:250);
          Operations strzelecki
            2010-05-07  [wheat].Sow(cultivar:"strzelecki", population:150, depth:50, rowSpacing:250);
          Operations janz
            2010-05-07  [wheat].Sow(cultivar:"janz", population:150, depth:50, rowSpacing:250);
      Simulation PTOS_10Mackay-1
        Clock: Start=2010-05-06; End=2011-03-03
        Summary SummaryFile
        Weather: FileName=%root%/Tests/Validation/Wheat/met/PTOS_10Mackay-1.met
        SoilArbitrator
        Zone Field: Area=1; Slope=0; AspectAngle=0; Altitude=50
          Fertiliser
          Soil: same as NPIValidation.SGEHEAT_13GEHEAT-1.SGEHEAT_13GEHEAT-1.Field.Soil
          SurfaceOrganicMatter: InitialResidueName=wheat_stubble; InitialResidueType=wheat; InitialResidueMass=500; InitialStandingFraction=0; InitialCPR=0; InitialCNR=100
          Plant Wheat
          MicroClimate: a_interception=0; b_interception=1; c_interception=0; d_interception=0; SoilHeatFluxFraction=0.4; MinimumHeightDiffForNewLayer=0; NightInterceptionFraction=0.5; ReferenceHeight=2
          Manager SowingFertiliser: same as NPIValidation.SGEHEAT_13GEHEAT-1.SGEHEAT_13GEHEAT-1.Field.SowingFertiliser
          Manager Harvesting
          Operations Sowing
            2010-05-07  [wheat].Sow(cultivar:"hartog", population:150, depth:50, rowSpacing:250);
          Report HarvestReport
        Manager LocationInfo: same as NPIValidation.SGEHEAT_13GEHEAT-1.SGEHEAT_13GEHEAT-1.LocationInfo
    Experiment PTOS_10Mackay-2
      Factors
        Factor Cultivar: Specification=[Sowing]
          Operations wyalkatchem
            2010-05-21  [wheat].Sow(cultivar:"wyalkatchem", population:150, depth:50, rowSpacing:250);
          Operations strzelecki
            2010-05-21  [wheat].Sow(cultivar:"strzelecki", population:150, depth:50, rowSpacing:250);
          Operations janz
            2010-05-21  [wheat].Sow(cultivar:"janz", population:150, depth:50, rowSpacing:250);
          Operations gregory
            2010-05-21  [wheat].Sow(cultivar:"gregory", population:150, depth:50, rowSpacing:250);
          Operations derrimut
            2010-05-21  [wheat].Sow(cultivar:"derrimut", population:150, depth:50, rowSpacing:250);
          Operations calingiri
            2010-05-21  [wheat].Sow(cultivar:"calingiri", population:150, depth:50, rowSpacing:250);
          Operations bolac
            2010-05-21  [wheat].Sow(cultivar:"bolac", population:150, depth:50, rowSpacing:250);
          Operations axe
            2010-05-21  [wheat].Sow(cultivar:"axe", population:150, depth:50, rowSpacing:250);
      Simulation PTOS_10Mackay-2
        Clock: Start=2010-05-20; End=2011-03-17
        Summary SummaryFile
        Weather: FileName=%root%/Tests/Validation/Wheat/met/PTOS_10Mackay-2.met
        SoilArbitrator
        Zone Field: Area=1; Slope=0; AspectAngle=0; Altitude=50
          Fertiliser
          Soil: same as NPIValidation.SGEHEAT_13GEHEAT-1.SGEHEAT_13GEHEAT-1.Field.Soil
          SurfaceOrganicMatter: InitialResidueName=wheat_stubble; InitialResidueType=wheat; InitialResidueMass=500; InitialStandingFraction=0; InitialCPR=0; InitialCNR=100
          Plant Wheat
          MicroClimate: a_interception=0; b_interception=1; c_interception=0; d_interception=0; SoilHeatFluxFraction=0.4; MinimumHeightDiffForNewLayer=0; NightInterceptionFraction=0.5; ReferenceHeight=2
          Manager SowingFertiliser: same as NPIValidation.SGEHEAT_13GEHEAT-1.SGEHEAT_13GEHEAT-1.Field.SowingFertiliser
          Manager Harvesting
          Operations Sowing
            2010-05-21  [wheat].Sow(cultivar:"hartog", population:150, depth:50, rowSpacing:250);
          Report HarvestReport
        Manager LocationInfo: same as NPIValidation.SGEHEAT_13GEHEAT-1.SGEHEAT_13GEHEAT-1.LocationInfo
    Experiment PTOS_10Mackay-3
      Factors
        Factor Cultivar: Specification=[Sowing]
          Operations janz
            2010-06-04  [wheat].Sow(cultivar:"janz", population:150, depth:50, rowSpacing:250);
          Operations gregory
            2010-06-04  [wheat].Sow(cultivar:"gregory", population:150, depth:50, rowSpacing:250);
          Operations derrimut
            2010-06-04  [wheat].Sow(cultivar:"derrimut", population:150, depth:50, rowSpacing:250);
          Operations calingiri
            2010-06-04  [wheat].Sow(cultivar:"calingiri", population:150, depth:50, rowSpacing:250);
          Operations bolac
            2010-06-04  [wheat].Sow(cultivar:"bolac", population:150, depth:50, rowSpacing:250);
          Operations axe
            2010-06-04  [wheat].Sow(cultivar:"axe", population:150, depth:50, rowSpacing:250);
          Operations wyalkatchem
            2010-06-04  [wheat].Sow(cultivar:"wyalkatchem", population:150, depth:50, rowSpacing:250);
      Simulation PTOS_10Mackay-3
        Clock: Start=2010-06-03; End=2011-03-31
        Summary SummaryFile
        Weather: FileName=%root%/Tests/Validation/Wheat/met/PTOS_10Mackay-3.met
        SoilArbitrator
        Zone Field: Area=1; Slope=0; AspectAngle=0; Altitude=50
          Fertiliser
          Soil: same as NPIValidation.SGEHEAT_13GEHEAT-1.SGEHEAT_13GEHEAT-1.Field.Soil
          SurfaceOrganicMatter: InitialResidueName=wheat_stubble; InitialResidueType=wheat; InitialResidueMass=500; InitialStandingFraction=0; InitialCPR=0; InitialCNR=100
          Plant Wheat
          MicroClimate: a_interception=0; b_interception=1; c_interception=0; d_interception=0; SoilHeatFluxFraction=0.4; MinimumHeightDiffForNewLayer=0; NightInterceptionFraction=0.5; ReferenceHeight=2
          Manager SowingFertiliser: same as NPIValidation.SGEHEAT_13GEHEAT-1.SGEHEAT_13GEHEAT-1.Field.SowingFertiliser
          Manager Harvesting
          Operations Sowing
            2010-06-04  [wheat].Sow(cultivar:"hartog", population:150, depth:50, rowSpacing:250);
          Report HarvestReport
        Manager LocationInfo: same as NPIValidation.SGEHEAT_13GEHEAT-1.SGEHEAT_13GEHEAT-1.LocationInfo
    Experiment PTOS_10Mackay-4
      Factors
        Factor Cultivar: Specification=[Sowing]
          Operations janz
            2010-06-18  [wheat].Sow(cultivar:"janz", population:150, depth:50, rowSpacing:250);
          Operations gregory
            2010-06-18  [wheat].Sow(cultivar:"gregory", population:150, depth:50, rowSpacing:250);
          Operations derrimut
            2010-06-18  [wheat].Sow(cultivar:"derrimut", population:150, depth:50, rowSpacing:250);
          Operations calingiri
            2010-06-18  [wheat].Sow(cultivar:"calingiri", population:150, depth:50, rowSpacing:250);
          Operations bolac
            2010-06-18  [wheat].Sow(cultivar:"bolac", population:150, depth:50, rowSpacing:250);
          Operations axe
            2010-06-18  [wheat].Sow(cultivar:"axe", population:150, depth:50, rowSpacing:250);
          Operations wyalkatchem
            2010-06-18  [wheat].Sow(cultivar:"wyalkatchem", population:150, depth:50, rowSpacing:250);
      Simulation PTOS_10Mackay-4
        Clock: Start=2010-06-17; End=2011-04-14
        Summary SummaryFile
        Weather: FileName=%root%/Tests/Validation/Wheat/met/PTOS_10Mackay-4.met
        SoilArbitrator
        Zone Field: Area=1; Slope=0; AspectAngle=0; Altitude=50
          Fertiliser
          Soil: same as NPIValidation.SGEHEAT_13GEHEAT-1.SGEHEAT_13GEHEAT-1.Field.Soil
          SurfaceOrganicMatter: InitialResidueName=wheat_stubble; InitialResidueType=wheat; InitialResidueMass=500; InitialStandingFraction=0; InitialCPR=0; InitialCNR=100
          Plant Wheat
          MicroClimate: a_interception=0; b_interception=1; c_interception=0; d_interception=0; SoilHeatFluxFraction=0.4; MinimumHeightDiffForNewLayer=0; NightInterceptionFraction=0.5; ReferenceHeight=2
          Manager SowingFertiliser: same as NPIValidation.SGEHEAT_13GEHEAT-1.SGEHEAT_13GEHEAT-1.Field.SowingFertiliser
          Manager Harvesting
          Operations Sowing
            2010-06-18  [wheat].Sow(cultivar:"hartog", population:150, depth:50, rowSpacing:250);
          Report HarvestReport
        Manager LocationInfo: same as NPIValidation.SGEHEAT_13GEHEAT-1.SGEHEAT_13GEHEAT-1.LocationInfo
    Experiment PTOS_10Mackay-5
      Factors
        Factor Cultivar: Specification=[Sowing]
          Operations gregory
            2010-07-09  [wheat].Sow(cultivar:"gregory", population:150, depth:50, rowSpacing:250);
          Operations derrimut
            2010-07-09  [wheat].Sow(cultivar:"derrimut", population:150, depth:50, rowSpacing:250);
          Operations calingiri
            2010-07-09  [wheat].Sow(cultivar:"calingiri", population:150, depth:50, rowSpacing:250);
          Operations bolac
            2010-07-09  [wheat].Sow(cultivar:"bolac", population:150, depth:50, rowSpacing:250);
          Operations axe
            2010-07-09  [wheat].Sow(cultivar:"axe", population:150, depth:50, rowSpacing:250);
          Operations yitpi
            2010-07-09  [wheat].Sow(cultivar:"yitpi", population:150, depth:50, rowSpacing:250);
          Operations wyalkatchem
            2010-07-09  [wheat].Sow(cultivar:"wyalkatchem", population:150, depth:50, rowSpacing:250);
          Operations strzelecki
            2010-07-09  [wheat].Sow(cultivar:"strzelecki", population:150, depth:50, rowSpacing:250);
          Operations janz
            2010-07-09  [wheat].Sow(cultivar:"janz", population:150, depth:50, rowSpacing:250);
      Simulation PTOS_10Mackay-5
        Clock: Start=2010-07-08; End=2011-05-05
        Summary SummaryFile
        Weather: FileName=%root%/Tests/Validation/Wheat/met/PTOS_10Mackay-5.met
        SoilArbitrator
        Zone Field: same as NPIValidation.PTOS_10Kairi-5.PTOS_10Kairi-5.Field
        Manager LocationInfo: same as NPIValidation.SGEHEAT_13GEHEAT-1.SGEHEAT_13GEHEAT-1.LocationInfo
    Experiment HAGT_09Roseworthy-1
      Factors
        Factor Cultivar: Specification=[Sowing]
          Operations axe
            2009-03-30  [wheat].Sow(cultivar:"axe", population:150, depth:50, rowSpacing:250);
          Operations mace
            2009-03-30  [wheat].Sow(cultivar:"mace", population:150, depth:50, rowSpacing:250);
      Simulation HAGT_09Roseworthy-1
        Clock: Start=2009-03-29; End=2009-12-30
        Summary SummaryFile
        Weather: FileName=%root%/Tests/Validation/Wheat/met/HAGT_09Roseworthy-1.met
        SoilArbitrator
        Zone Field: Area=1; Slope=0; AspectAngle=0; Altitude=50
          Fertiliser
          Soil: same as NPIValidation.SGEHEAT_13GEHEAT-1.SGEHEAT_13GEHEAT-1.Field.Soil
          SurfaceOrganicMatter: InitialResidueName=wheat_stubble; InitialResidueType=wheat; InitialResidueMass=500; InitialStandingFraction=0; InitialCPR=0; InitialCNR=100
          Plant Wheat
          MicroClimate: a_interception=0; b_interception=1; c_interception=0; d_interception=0; SoilHeatFluxFraction=0.4; MinimumHeightDiffForNewLayer=0; NightInterceptionFraction=0.5; ReferenceHeight=2
          Manager SowingFertiliser: same as NPIValidation.SGEHEAT_13GEHEAT-1.SGEHEAT_13GEHEAT-1.Field.SowingFertiliser
          Manager Harvesting
          Operations Sowing
            2009-03-30  [wheat].Sow(cultivar:"hartog", population:150, depth:50, rowSpacing:250);
          Report HarvestReport
        Manager LocationInfo: same as NPIValidation.BYIE_08RS.BYIE_08RS.LocationInfo
    Experiment HAGT_09Roseworthy-2
      Factors
        Factor Cultivar: Specification=[Sowing]
          Operations axe
            2009-04-30  [wheat].Sow(cultivar:"axe", population:150, depth:50, rowSpacing:250);
          Operations mace
            2009-04-30  [wheat].Sow(cultivar:"mace", population:150, depth:50, rowSpacing:250);
      Simulation HAGT_09Roseworthy-2
        Clock: Start=2009-04-29; End=2009-12-30
        Summary SummaryFile
        Weather: FileName=%root%/Tests/Validation/Wheat/met/HAGT_09Roseworthy-2.met
        SoilArbitrator
        Zone Field: Area=1; Slope=0; AspectAngle=0; Altitude=50
          Fertiliser
          Soil: same as NPIValidation.SGEHEAT_13GEHEAT-1.SGEHEAT_13GEHEAT-1.Field.Soil
          SurfaceOrganicMatter: InitialResidueName=wheat_stubble; InitialResidueType=wheat; InitialResidueMass=500; InitialStandingFraction=0; InitialCPR=0; InitialCNR=100
          Plant Wheat
          MicroClimate: a_interception=0; b_interception=1; c_interception=0; d_interception=0; SoilHeatFluxFraction=0.4; MinimumHeightDiffForNewLayer=0; NightInterceptionFraction=0.5; ReferenceHeight=2
          Manager SowingFertiliser: same as NPIValidation.SGEHEAT_13GEHEAT-1.SGEHEAT_13GEHEAT-1.Field.SowingFertiliser
          Manager Harvesting
          Operations Sowing
            2009-04-30  [wheat].Sow(cultivar:"hartog", population:150, depth:50, rowSpacing:250);
          Report HarvestReport
        Manager LocationInfo: same as NPIValidation.BYIE_08RS.BYIE_08RS.LocationInfo
    Experiment HAGT_09Roseworthy-3
      Factors
        Factor Cultivar: Specification=[Sowing]
          Operations mace
            2009-05-15  [wheat].Sow(cultivar:"mace", population:150, depth:50, rowSpacing:250);
          Operations axe
            2009-05-15  [wheat].Sow(cultivar:"axe", population:150, depth:50, rowSpacing:250);
      Simulation HAGT_09Roseworthy-3
        Clock: Start=2009-05-14; End=2009-12-30
        Summary SummaryFile
        Weather: FileName=%root%/Tests/Validation/Wheat/met/HAGT_09Roseworthy-3.met
        SoilArbitrator
        Zone Field: same as NPIValidation.BTOS_2009GE2.BTOS_2009GE2.Field
        Manager LocationInfo: same as NPIValidation.BYIE_08RS.BYIE_08RS.LocationInfo
    Experiment HAGT_09Roseworthy-4
      Factors
        Factor Cultivar: Specification=[Sowing]
          Operations mace
            2009-05-29  [wheat].Sow(cultivar:"mace", population:150, depth:50, rowSpacing:250);
          Operations axe
            2009-05-29  [wheat].Sow(cultivar:"axe", population:150, depth:50, rowSpacing:250);
          Operations yitpi
            2009-05-29  [wheat].Sow(cultivar:"yitpi", population:150, depth:50, rowSpacing:250);
      Simulation HAGT_09Roseworthy-4
        Clock: Start=2009-05-28; End=2009-12-30
        Summary SummaryFile
        Weather: FileName=%root%/Tests/Validation/Wheat/met/HAGT_09Roseworthy-4.met
        SoilArbitrator
        Zone Field: Area=1; Slope=0; AspectAngle=0; Altitude=50
          Fertiliser
          Soil: same as NPIValidation.SGEHEAT_13GEHEAT-1.SGEHEAT_13GEHEAT-1.Field.Soil
          SurfaceOrganicMatter: InitialResidueName=wheat_stubble; InitialResidueType=wheat; InitialResidueMass=500; InitialStandingFraction=0; InitialCPR=0; InitialCNR=100
          Plant Wheat
          MicroClimate: a_interception=0; b_interception=1; c_interception=0; d_interception=0; SoilHeatFluxFraction=0.4; MinimumHeightDiffForNewLayer=0; NightInterceptionFraction=0.5; ReferenceHeight=2
          Manager SowingFertiliser: same as NPIValidation.SGEHEAT_13GEHEAT-1.SGEHEAT_13GEHEAT-1.Field.SowingFertiliser
          Manager Harvesting
          Operations Sowing
            2009-05-29  [wheat].Sow(cultivar:"hartog", population:150, depth:50, rowSpacing:250);
          Report HarvestReport
        Manager LocationInfo: same as NPIValidation.BYIE_08RS.BYIE_08RS.LocationInfo
    Experiment HAGT_09Roseworthy-5
      Factors
        Factor Cultivar: Specification=[Sowing]
          Operations axe
            2009-06-15  [wheat].Sow(cultivar:"axe", population:150, depth:50, rowSpacing:250);
          Operations yitpi
            2009-06-15  [wheat].Sow(cultivar:"yitpi", population:150, depth:50, rowSpacing:250);
          Operations mace
            2009-06-15  [wheat].Sow(cultivar:"mace", population:150, depth:50, rowSpacing:250);
      Simulation HAGT_09Roseworthy-5
        Clock: Start=2009-06-14; End=2009-12-30
        Summary SummaryFile
        Weather: FileName=%root%/Tests/Validation/Wheat/met/HAGT_09Roseworthy-5.met
        SoilArbitrator
        Zone Field: Area=1; Slope=0; AspectAngle=0; Altitude=50
          Fertiliser
          Soil: same as NPIValidation.SGEHEAT_13GEHEAT-1.SGEHEAT_13GEHEAT-1.Field.Soil
          SurfaceOrganicMatter: InitialResidueName=wheat_stubble; InitialResidueType=wheat; InitialResidueMass=500; InitialStandingFraction=0; InitialCPR=0; InitialCNR=100
          Plant Wheat
          MicroClimate: a_interception=0; b_interception=1; c_interception=0; d_interception=0; SoilHeatFluxFraction=0.4; MinimumHeightDiffForNewLayer=0; NightInterceptionFraction=0.5; ReferenceHeight=2
          Manager SowingFertiliser: same as NPIValidation.SGEHEAT_13GEHEAT-1.SGEHEAT_13GEHEAT-1.Field.SowingFertiliser
          Manager Harvesting
          Operations Sowing
            2009-06-15  [wheat].Sow(cultivar:"hartog", population:150, depth:50, rowSpacing:250);
          Report HarvestReport
        Manager LocationInfo: same as NPIValidation.BYIE_08RS.BYIE_08RS.LocationInfo
    Experiment 17CuryoMESW-TOS1
      Factors
        Factor Cultivar: Specification=[Sowing]
          Operations bennett
            2017-03-15  [wheat].Sow(cultivar:"bennett", population:150, depth:50, rowSpacing:250);
          Operations kittyhawk
            2017-03-15  [wheat].Sow(cultivar:"kittyhawk", population:150, depth:50, rowSpacing:250);
          Operations longsword
            2017-03-15  [wheat].Sow(cultivar:"longsword", population:150, depth:50, rowSpacing:250);
          Operations scepter
            2017-03-15  [wheat].Sow(cultivar:"scepter", population:150, depth:50, rowSpacing:250);
          Operations trojan
            2017-03-15  [wheat].Sow(cultivar:"trojan", population:150, depth:50, rowSpacing:250);
      Simulation 17CuryoMESW-TOS1
        Clock: Start=2017-03-14; End=2018-01-09
        Summary SummaryFile
        Weather: FileName=%root%/Tests/Validation/Wheat/met/17CuryoMESW-TOS1.met
        SoilArbitrator
        Zone Field: Area=1; Slope=0; AspectAngle=0; Altitude=50
          Fertiliser
          Soil: same as NPIValidation.SGEHEAT_13GEHEAT-1.SGEHEAT_13GEHEAT-1.Field.Soil
          SurfaceOrganicMatter: InitialResidueName=wheat_stubble; InitialResidueType=wheat; InitialResidueMass=500; InitialStandingFraction=0; InitialCPR=0; InitialCNR=100
          Plant Wheat
          MicroClimate: a_interception=0; b_interception=1; c_interception=0; d_interception=0; SoilHeatFluxFraction=0.4; MinimumHeightDiffForNewLayer=0; NightInterceptionFraction=0.5; ReferenceHeight=2
          Manager SowingFertiliser: same as NPIValidation.SGEHEAT_13GEHEAT-1.SGEHEAT_13GEHEAT-1.Field.SowingFertiliser
          Manager Harvesting
          Operations Sowing
            2017-03-15  [wheat].Sow(cultivar:"hartog", population:150, depth:50, rowSpacing:250);
          Report HarvestReport
        Manager LocationInfo
          Country = Australia
          State = Victoria
          Region = SA VIC Mallee
          script: same as in FARAwardPhenology.FARAwardPhenology.Simulation.LocationInfo
    Experiment 17CuryoMESW-TOS2
      Factors
        Factor Cultivar: Specification=[Sowing]
          Operations bennett
            2017-03-29  [wheat].Sow(cultivar:"bennett", population:150, depth:50, rowSpacing:250);
          Operations kittyhawk
            2017-03-29  [wheat].Sow(cultivar:"kittyhawk", population:150, depth:50, rowSpacing:250);
          Operations longsword
            2017-03-29  [wheat].Sow(cultivar:"longsword", population:150, depth:50, rowSpacing:250);
          Operations scepter
            2017-03-29  [wheat].Sow(cultivar:"scepter", population:150, depth:50, rowSpacing:250);
          Operations trojan
            2017-03-29  [wheat].Sow(cultivar:"trojan", population:150, depth:50, rowSpacing:250);
      Simulation 17CuryoMESW-TOS2
        Clock: Start=2017-03-28; End=2018-01-23
        Summary SummaryFile
        Weather: FileName=%root%/Tests/Validation/Wheat/met/17CuryoMESW-TOS2.met
        SoilArbitrator
        Zone Field: Area=1; Slope=0; AspectAngle=0; Altitude=50
          Fertiliser
          Soil: same as NPIValidation.SGEHEAT_13GEHEAT-1.SGEHEAT_13GEHEAT-1.Field.Soil
          SurfaceOrganicMatter: InitialResidueName=wheat_stubble; InitialResidueType=wheat; InitialResidueMass=500; InitialStandingFraction=0; InitialCPR=0; InitialCNR=100
          Plant Wheat
          MicroClimate: a_interception=0; b_interception=1; c_interception=0; d_interception=0; SoilHeatFluxFraction=0.4; MinimumHeightDiffForNewLayer=0; NightInterceptionFraction=0.5; ReferenceHeight=2
          Manager SowingFertiliser: same as NPIValidation.SGEHEAT_13GEHEAT-1.SGEHEAT_13GEHEAT-1.Field.SowingFertiliser
          Manager Harvesting
          Operations Sowing
            2017-03-29  [wheat].Sow(cultivar:"hartog", population:150, depth:50, rowSpacing:250);
          Report HarvestReport
        Manager LocationInfo: same as NPIValidation.17CuryoMESW-TOS1.17CuryoMESW-TOS1.LocationInfo
    Experiment 17CuryoMESW-TOS3
      Factors
        Factor Cultivar: Specification=[Sowing]
          Operations bennett
            2017-04-18  [wheat].Sow(cultivar:"bennett", population:150, depth:50, rowSpacing:250);
          Operations kittyhawk
            2017-04-18  [wheat].Sow(cultivar:"kittyhawk", population:150, depth:50, rowSpacing:250);
          Operations longsword
            2017-04-18  [wheat].Sow(cultivar:"longsword", population:150, depth:50, rowSpacing:250);
          Operations scepter
            2017-04-18  [wheat].Sow(cultivar:"scepter", population:150, depth:50, rowSpacing:250);
          Operations trojan
            2017-04-18  [wheat].Sow(cultivar:"trojan", population:150, depth:50, rowSpacing:250);
      Simulation 17CuryoMESW-TOS3
        Clock: Start=2017-04-17; End=2018-02-12
        Summary SummaryFile
        Weather: FileName=%root%/Tests/Validation/Wheat/met/17CuryoMESW-TOS3.met
        SoilArbitrator
        Zone Field: Area=1; Slope=0; AspectAngle=0; Altitude=50
          Fertiliser
          Soil: same as NPIValidation.SGEHEAT_13GEHEAT-1.SGEHEAT_13GEHEAT-1.Field.Soil
          SurfaceOrganicMatter: InitialResidueName=wheat_stubble; InitialResidueType=wheat; InitialResidueMass=500; InitialStandingFraction=0; InitialCPR=0; InitialCNR=100
          Plant Wheat
          MicroClimate: a_interception=0; b_interception=1; c_interception=0; d_interception=0; SoilHeatFluxFraction=0.4; MinimumHeightDiffForNewLayer=0; NightInterceptionFraction=0.5; ReferenceHeight=2
          Manager SowingFertiliser: same as NPIValidation.SGEHEAT_13GEHEAT-1.SGEHEAT_13GEHEAT-1.Field.SowingFertiliser
          Manager Harvesting
          Operations Sowing
            2017-04-18  [wheat].Sow(cultivar:"hartog", population:150, depth:50, rowSpacing:250);
          Report HarvestReport
        Manager LocationInfo: same as NPIValidation.17CuryoMESW-TOS1.17CuryoMESW-TOS1.LocationInfo
    Experiment 17CuryoMESW-TOS4
      Factors
        Factor Cultivar: Specification=[Sowing]
          Operations bennett
            2017-05-04  [wheat].Sow(cultivar:"bennett", population:150, depth:50, rowSpacing:250);
          Operations kittyhawk
            2017-05-04  [wheat].Sow(cultivar:"kittyhawk", population:150, depth:50, rowSpacing:250);
          Operations longsword
            2017-05-04  [wheat].Sow(cultivar:"longsword", population:150, depth:50, rowSpacing:250);
          Operations scepter
            2017-05-04  [wheat].Sow(cultivar:"scepter", population:150, depth:50, rowSpacing:250);
          Operations trojan
            2017-05-04  [wheat].Sow(cultivar:"trojan", population:150, depth:50, rowSpacing:250);
      Simulation 17CuryoMESW-TOS4
        Clock: Start=2017-05-03; End=2018-02-28
        Summary SummaryFile
        Weather: FileName=%root%/Tests/Validation/Wheat/met/17CuryoMESW-TOS4.met
        SoilArbitrator
        Zone Field: Area=1; Slope=0; AspectAngle=0; Altitude=50
          Fertiliser
          Soil: same as NPIValidation.SGEHEAT_13GEHEAT-1.SGEHEAT_13GEHEAT-1.Field.Soil
          SurfaceOrganicMatter: InitialResidueName=wheat_stubble; InitialResidueType=wheat; InitialResidueMass=500; InitialStandingFraction=0; InitialCPR=0; InitialCNR=100
          Plant Wheat
          MicroClimate: a_interception=0; b_interception=1; c_interception=0; d_interception=0; SoilHeatFluxFraction=0.4; MinimumHeightDiffForNewLayer=0; NightInterceptionFraction=0.5; ReferenceHeight=2
          Manager SowingFertiliser: same as NPIValidation.SGEHEAT_13GEHEAT-1.SGEHEAT_13GEHEAT-1.Field.SowingFertiliser
          Manager Harvesting
          Operations Sowing
            2017-05-04  [wheat].Sow(cultivar:"hartog", population:150, depth:50, rowSpacing:250);
          Report HarvestReport
        Manager LocationInfo: same as NPIValidation.17CuryoMESW-TOS1.17CuryoMESW-TOS1.LocationInfo
    Experiment 17HartMESW-TOS1
      Factors
        Factor Cultivar: Specification=[Sowing]
          Operations bennett
            2017-03-14  [wheat].Sow(cultivar:"bennett", population:150, depth:50, rowSpacing:250);
          Operations kittyhawk
            2017-03-14  [wheat].Sow(cultivar:"kittyhawk", population:150, depth:50, rowSpacing:250);
          Operations longsword
            2017-03-14  [wheat].Sow(cultivar:"longsword", population:150, depth:50, rowSpacing:250);
          Operations scepter
            2017-03-14  [wheat].Sow(cultivar:"scepter", population:150, depth:50, rowSpacing:250);
          Operations trojan
            2017-03-14  [wheat].Sow(cultivar:"trojan", population:150, depth:50, rowSpacing:250);
      Simulation 17HartMESW-TOS1
        Clock: Start=2017-03-13; End=2018-01-08
        Summary SummaryFile
        Weather: FileName=%root%/Tests/Validation/Wheat/met/17HartMESW-TOS1.met
        SoilArbitrator
        Zone Field: Area=1; Slope=0; AspectAngle=0; Altitude=50
          Fertiliser
          Soil: same as NPIValidation.SGEHEAT_13GEHEAT-1.SGEHEAT_13GEHEAT-1.Field.Soil
          SurfaceOrganicMatter: InitialResidueName=wheat_stubble; InitialResidueType=wheat; InitialResidueMass=500; InitialStandingFraction=0; InitialCPR=0; InitialCNR=100
          Plant Wheat
          MicroClimate: a_interception=0; b_interception=1; c_interception=0; d_interception=0; SoilHeatFluxFraction=0.4; MinimumHeightDiffForNewLayer=0; NightInterceptionFraction=0.5; ReferenceHeight=2
          Manager SowingFertiliser: same as NPIValidation.SGEHEAT_13GEHEAT-1.SGEHEAT_13GEHEAT-1.Field.SowingFertiliser
          Manager Harvesting
          Operations Sowing
            2017-03-14  [wheat].Sow(cultivar:"hartog", population:150, depth:50, rowSpacing:250);
          Report HarvestReport
        Manager LocationInfo: same as NPIValidation.BYIE_08RS.BYIE_08RS.LocationInfo
    Experiment 17HartMESW-TOS2
      Factors
        Factor Cultivar: Specification=[Sowing]
          Operations bennett
            2017-03-31  [wheat].Sow(cultivar:"bennett", population:150, depth:50, rowSpacing:250);
          Operations kittyhawk
            2017-03-31  [wheat].Sow(cultivar:"kittyhawk", population:150, depth:50, rowSpacing:250);
          Operations longsword
            2017-03-31  [wheat].Sow(cultivar:"longsword", population:150, depth:50, rowSpacing:250);
          Operations scepter
            2017-03-31  [wheat].Sow(cultivar:"scepter", population:150, depth:50, rowSpacing:250);
          Operations trojan
            2017-03-31  [wheat].Sow(cultivar:"trojan", population:150, depth:50, rowSpacing:250);
      Simulation 17HartMESW-TOS2
        Clock: Start=2017-03-30; End=2018-01-25
        Summary SummaryFile
        Weather: FileName=%root%/Tests/Validation/Wheat/met/17HartMESW-TOS2.met
        SoilArbitrator
        Zone Field: Area=1; Slope=0; AspectAngle=0; Altitude=50
          Fertiliser
          Soil: same as NPIValidation.SGEHEAT_13GEHEAT-1.SGEHEAT_13GEHEAT-1.Field.Soil
          SurfaceOrganicMatter: InitialResidueName=wheat_stubble; InitialResidueType=wheat; InitialResidueMass=500; InitialStandingFraction=0; InitialCPR=0; InitialCNR=100
          Plant Wheat
          MicroClimate: a_interception=0; b_interception=1; c_interception=0; d_interception=0; SoilHeatFluxFraction=0.4; MinimumHeightDiffForNewLayer=0; NightInterceptionFraction=0.5; ReferenceHeight=2
          Manager SowingFertiliser: same as NPIValidation.SGEHEAT_13GEHEAT-1.SGEHEAT_13GEHEAT-1.Field.SowingFertiliser
          Manager Harvesting
          Operations Sowing
            2017-03-31  [wheat].Sow(cultivar:"hartog", population:150, depth:50, rowSpacing:250);
          Report HarvestReport
        Manager LocationInfo: same as NPIValidation.BYIE_08RS.BYIE_08RS.LocationInfo
    Experiment 17HartMESW-TOS3
      Factors: same as NPIValidation.17CuryoMESW-TOS3.Factors
      Simulation 17HartMESW-TOS3
        Clock: Start=2017-04-17; End=2018-02-12
        Summary SummaryFile
        Weather: FileName=%root%/Tests/Validation/Wheat/met/17HartMESW-TOS3.met
        SoilArbitrator
        Zone Field: same as NPIValidation.17CuryoMESW-TOS3.17CuryoMESW-TOS3.Field
        Manager LocationInfo: same as NPIValidation.BYIE_08RS.BYIE_08RS.LocationInfo
    Experiment 17HartMESW-TOS4
      Factors
        Factor Cultivar: Specification=[Sowing]
          Operations bennett
            2017-05-03  [wheat].Sow(cultivar:"bennett", population:150, depth:50, rowSpacing:250);
          Operations kittyhawk
            2017-05-03  [wheat].Sow(cultivar:"kittyhawk", population:150, depth:50, rowSpacing:250);
          Operations longsword
            2017-05-03  [wheat].Sow(cultivar:"longsword", population:150, depth:50, rowSpacing:250);
          Operations scepter
            2017-05-03  [wheat].Sow(cultivar:"scepter", population:150, depth:50, rowSpacing:250);
          Operations trojan
            2017-05-03  [wheat].Sow(cultivar:"trojan", population:150, depth:50, rowSpacing:250);
      Simulation 17HartMESW-TOS4
        Clock: Start=2017-05-02; End=2018-02-27
        Summary SummaryFile
        Weather: FileName=%root%/Tests/Validation/Wheat/met/17HartMESW-TOS4.met
        SoilArbitrator
        Zone Field: Area=1; Slope=0; AspectAngle=0; Altitude=50
          Fertiliser
          Soil: same as NPIValidation.SGEHEAT_13GEHEAT-1.SGEHEAT_13GEHEAT-1.Field.Soil
          SurfaceOrganicMatter: InitialResidueName=wheat_stubble; InitialResidueType=wheat; InitialResidueMass=500; InitialStandingFraction=0; InitialCPR=0; InitialCNR=100
          Plant Wheat
          MicroClimate: a_interception=0; b_interception=1; c_interception=0; d_interception=0; SoilHeatFluxFraction=0.4; MinimumHeightDiffForNewLayer=0; NightInterceptionFraction=0.5; ReferenceHeight=2
          Manager SowingFertiliser: same as NPIValidation.SGEHEAT_13GEHEAT-1.SGEHEAT_13GEHEAT-1.Field.SowingFertiliser
          Manager Harvesting
          Operations Sowing
            2017-05-03  [wheat].Sow(cultivar:"hartog", population:150, depth:50, rowSpacing:250);
          Report HarvestReport
        Manager LocationInfo: same as NPIValidation.BYIE_08RS.BYIE_08RS.LocationInfo
    Experiment 17LoxtonMESW-TOS1
      Factors
        Factor Cultivar: Specification=[Sowing]
          Operations bennett
            2017-03-17  [wheat].Sow(cultivar:"bennett", population:150, depth:50, rowSpacing:250);
          Operations kittyhawk
            2017-03-17  [wheat].Sow(cultivar:"kittyhawk", population:150, depth:50, rowSpacing:250);
          Operations longsword
            2017-03-17  [wheat].Sow(cultivar:"longsword", population:150, depth:50, rowSpacing:250);
          Operations scepter
            2017-03-17  [wheat].Sow(cultivar:"scepter", population:150, depth:50, rowSpacing:250);
          Operations trojan
            2017-03-17  [wheat].Sow(cultivar:"trojan", population:150, depth:50, rowSpacing:250);
      Simulation 17LoxtonMESW-TOS1
        Clock: Start=2017-03-16; End=2018-01-11
        Summary SummaryFile
        Weather: FileName=%root%/Tests/Validation/Wheat/met/17LoxtonMESW-TOS1.met
        SoilArbitrator
        Zone Field: Area=1; Slope=0; AspectAngle=0; Altitude=50
          Fertiliser
          Soil: same as NPIValidation.SGEHEAT_13GEHEAT-1.SGEHEAT_13GEHEAT-1.Field.Soil
          SurfaceOrganicMatter: InitialResidueName=wheat_stubble; InitialResidueType=wheat; InitialResidueMass=500; InitialStandingFraction=0; InitialCPR=0; InitialCNR=100
          Plant Wheat
          MicroClimate: a_interception=0; b_interception=1; c_interception=0; d_interception=0; SoilHeatFluxFraction=0.4; MinimumHeightDiffForNewLayer=0; NightInterceptionFraction=0.5; ReferenceHeight=2
          Manager SowingFertiliser: same as NPIValidation.SGEHEAT_13GEHEAT-1.SGEHEAT_13GEHEAT-1.Field.SowingFertiliser
          Manager Harvesting
          Operations Sowing
            2017-03-17  [wheat].Sow(cultivar:"hartog", population:150, depth:50, rowSpacing:250);
          Report HarvestReport
        Manager LocationInfo: same as NPIField2019.Callington.Callington2019Base.LocationInfo
    Experiment 17LoxtonMESW-TOS2
      Factors
        Factor Cultivar: Specification=[Sowing]
          Operations bennett
            2017-04-03  [wheat].Sow(cultivar:"bennett", population:150, depth:50, rowSpacing:250);
          Operations kittyhawk
            2017-04-03  [wheat].Sow(cultivar:"kittyhawk", population:150, depth:50, rowSpacing:250);
          Operations longsword
            2017-04-03  [wheat].Sow(cultivar:"longsword", population:150, depth:50, rowSpacing:250);
          Operations scepter
            2017-04-03  [wheat].Sow(cultivar:"scepter", population:150, depth:50, rowSpacing:250);
          Operations trojan
            2017-04-03  [wheat].Sow(cultivar:"trojan", population:150, depth:50, rowSpacing:250);
      Simulation 17LoxtonMESW-TOS2
        Clock: Start=2017-04-02; End=2018-01-28
        Summary SummaryFile
        Weather: FileName=%root%/Tests/Validation/Wheat/met/17LoxtonMESW-TOS2.met
        SoilArbitrator
        Zone Field: Area=1; Slope=0; AspectAngle=0; Altitude=50
          Fertiliser
          Soil: same as NPIValidation.SGEHEAT_13GEHEAT-1.SGEHEAT_13GEHEAT-1.Field.Soil
          SurfaceOrganicMatter: InitialResidueName=wheat_stubble; InitialResidueType=wheat; InitialResidueMass=500; InitialStandingFraction=0; InitialCPR=0; InitialCNR=100
          Plant Wheat
          MicroClimate: a_interception=0; b_interception=1; c_interception=0; d_interception=0; SoilHeatFluxFraction=0.4; MinimumHeightDiffForNewLayer=0; NightInterceptionFraction=0.5; ReferenceHeight=2
          Manager SowingFertiliser: same as NPIValidation.SGEHEAT_13GEHEAT-1.SGEHEAT_13GEHEAT-1.Field.SowingFertiliser
          Manager Harvesting
          Operations Sowing
            2017-04-03  [wheat].Sow(cultivar:"hartog", population:150, depth:50, rowSpacing:250);
          Report HarvestReport
        Manager LocationInfo: same as NPIField2019.Callington.Callington2019Base.LocationInfo
    Experiment 17LoxtonMESW-TOS3
      Factors: same as NPIValidation.17CuryoMESW-TOS3.Factors
      Simulation 17LoxtonMESW-TOS3
        Clock: Start=2017-04-17; End=2018-02-12
        Summary SummaryFile
        Weather: FileName=%root%/Tests/Validation/Wheat/met/17LoxtonMESW-TOS3.met
        SoilArbitrator
        Zone Field: same as NPIValidation.17CuryoMESW-TOS3.17CuryoMESW-TOS3.Field
        Manager LocationInfo: same as NPIField2019.Callington.Callington2019Base.LocationInfo
    Experiment 17LoxtonMESW-TOS4
      Factors: same as NPIValidation.17CuryoMESW-TOS4.Factors
      Simulation 17LoxtonMESW-TOS4
        Clock: Start=2017-05-03; End=2018-02-28
        Summary SummaryFile
        Weather: FileName=%root%/Tests/Validation/Wheat/met/17LoxtonMESW-TOS4.met
        SoilArbitrator
        Zone Field: same as NPIValidation.17CuryoMESW-TOS4.17CuryoMESW-TOS4.Field
        Manager LocationInfo: same as NPIField2019.Callington.Callington2019Base.LocationInfo
    Experiment 17MilduraMESW-TOS1
      Factors
        Factor Cultivar: Specification=[Sowing]
          Operations bennett
            2017-03-16  [wheat].Sow(cultivar:"bennett", population:150, depth:50, rowSpacing:250);
          Operations kittyhawk
            2017-03-16  [wheat].Sow(cultivar:"kittyhawk", population:150, depth:50, rowSpacing:250);
          Operations longsword
            2017-03-16  [wheat].Sow(cultivar:"longsword", population:150, depth:50, rowSpacing:250);
          Operations scepter
            2017-03-16  [wheat].Sow(cultivar:"scepter", population:150, depth:50, rowSpacing:250);
          Operations trojan
            2017-03-16  [wheat].Sow(cultivar:"trojan", population:150, depth:50, rowSpacing:250);
      Simulation 17MilduraMESW-TOS1
        Clock: Start=2017-03-15; End=2018-01-10
        Summary SummaryFile
        Weather: FileName=%root%/Tests/Validation/Wheat/met/17MilduraMESW-TOS1.met
        SoilArbitrator
        Zone Field: Area=1; Slope=0; AspectAngle=0; Altitude=50
          Fertiliser
          Soil: same as NPIValidation.SGEHEAT_13GEHEAT-1.SGEHEAT_13GEHEAT-1.Field.Soil
          SurfaceOrganicMatter: InitialResidueName=wheat_stubble; InitialResidueType=wheat; InitialResidueMass=500; InitialStandingFraction=0; InitialCPR=0; InitialCNR=100
          Plant Wheat
          MicroClimate: a_interception=0; b_interception=1; c_interception=0; d_interception=0; SoilHeatFluxFraction=0.4; MinimumHeightDiffForNewLayer=0; NightInterceptionFraction=0.5; ReferenceHeight=2
          Manager SowingFertiliser: same as NPIValidation.SGEHEAT_13GEHEAT-1.SGEHEAT_13GEHEAT-1.Field.SowingFertiliser
          Manager Harvesting
          Operations Sowing
            2017-03-16  [wheat].Sow(cultivar:"hartog", population:150, depth:50, rowSpacing:250);
          Report HarvestReport
        Manager LocationInfo: same as NPIField2019.YanYean.YanYean2019Base.LocationInfo
    Experiment 17MilduraMESW-TOS2
      Factors
        Factor Cultivar: Specification=[Sowing]
          Operations bennett
            2017-03-30  [wheat].Sow(cultivar:"bennett", population:150, depth:50, rowSpacing:250);
          Operations kittyhawk
            2017-03-30  [wheat].Sow(cultivar:"kittyhawk", population:150, depth:50, rowSpacing:250);
          Operations longsword
            2017-03-30  [wheat].Sow(cultivar:"longsword", population:150, depth:50, rowSpacing:250);
          Operations scepter
            2017-03-30  [wheat].Sow(cultivar:"scepter", population:150, depth:50, rowSpacing:250);
          Operations trojan
            2017-03-30  [wheat].Sow(cultivar:"trojan", population:150, depth:50, rowSpacing:250);
      Simulation 17MilduraMESW-TOS2
        Clock: Start=2017-03-29; End=2018-01-24
        Summary SummaryFile
        Weather: FileName=%root%/Tests/Validation/Wheat/met/17MilduraMESW-TOS2.met
        SoilArbitrator
        Zone Field: Area=1; Slope=0; AspectAngle=0; Altitude=50
          Fertiliser
          Soil: same as NPIValidation.SGEHEAT_13GEHEAT-1.SGEHEAT_13GEHEAT-1.Field.Soil
          SurfaceOrganicMatter: InitialResidueName=wheat_stubble; InitialResidueType=wheat; InitialResidueMass=500; InitialStandingFraction=0; InitialCPR=0; InitialCNR=100
          Plant Wheat
          MicroClimate: a_interception=0; b_interception=1; c_interception=0; d_interception=0; SoilHeatFluxFraction=0.4; MinimumHeightDiffForNewLayer=0; NightInterceptionFraction=0.5; ReferenceHeight=2
          Manager SowingFertiliser: same as NPIValidation.SGEHEAT_13GEHEAT-1.SGEHEAT_13GEHEAT-1.Field.SowingFertiliser
          Manager Harvesting
          Operations Sowing
            2017-03-30  [wheat].Sow(cultivar:"hartog", population:150, depth:50, rowSpacing:250);
          Report HarvestReport
        Manager LocationInfo: same as NPIField2019.YanYean.YanYean2019Base.LocationInfo
    Experiment 17MilduraMESW-TOS3
      Factors
        Factor Cultivar: Specification=[Sowing]
          Operations bennett
            2017-04-13  [wheat].Sow(cultivar:"bennett", population:150, depth:50, rowSpacing:250);
          Operations kittyhawk
            2017-04-13  [wheat].Sow(cultivar:"kittyhawk", population:150, depth:50, rowSpacing:250);
          Operations longsword
            2017-04-13  [wheat].Sow(cultivar:"longsword", population:150, depth:50, rowSpacing:250);
          Operations scepter
            2017-04-13  [wheat].Sow(cultivar:"scepter", population:150, depth:50, rowSpacing:250);
          Operations trojan
            2017-04-13  [wheat].Sow(cultivar:"trojan", population:150, depth:50, rowSpacing:250);
      Simulation 17MilduraMESW-TOS3
        Clock: Start=2017-04-12; End=2018-02-07
        Summary SummaryFile
        Weather: FileName=%root%/Tests/Validation/Wheat/met/17MilduraMESW-TOS3.met
        SoilArbitrator
        Zone Field: Area=1; Slope=0; AspectAngle=0; Altitude=50
          Fertiliser
          Soil: same as NPIValidation.SGEHEAT_13GEHEAT-1.SGEHEAT_13GEHEAT-1.Field.Soil
          SurfaceOrganicMatter: InitialResidueName=wheat_stubble; InitialResidueType=wheat; InitialResidueMass=500; InitialStandingFraction=0; InitialCPR=0; InitialCNR=100
          Plant Wheat
          MicroClimate: a_interception=0; b_interception=1; c_interception=0; d_interception=0; SoilHeatFluxFraction=0.4; MinimumHeightDiffForNewLayer=0; NightInterceptionFraction=0.5; ReferenceHeight=2
          Manager SowingFertiliser: same as NPIValidation.SGEHEAT_13GEHEAT-1.SGEHEAT_13GEHEAT-1.Field.SowingFertiliser
          Manager Harvesting
          Operations Sowing
            2017-04-13  [wheat].Sow(cultivar:"hartog", population:150, depth:50, rowSpacing:250);
          Report HarvestReport
        Manager LocationInfo: same as NPIField2019.YanYean.YanYean2019Base.LocationInfo
    Experiment 17MilduraMESW-TOS4
      Factors
        Factor Cultivar: Specification=[Sowing]
          Operations bennett
            2017-04-28  [wheat].Sow(cultivar:"bennett", population:150, depth:50, rowSpacing:250);
          Operations kittyhawk
            2017-04-28  [wheat].Sow(cultivar:"kittyhawk", population:150, depth:50, rowSpacing:250);
          Operations longsword
            2017-04-28  [wheat].Sow(cultivar:"longsword", population:150, depth:50, rowSpacing:250);
          Operations scepter
            2017-04-28  [wheat].Sow(cultivar:"scepter", population:150, depth:50, rowSpacing:250);
          Operations trojan
            2017-04-28  [wheat].Sow(cultivar:"trojan", population:150, depth:50, rowSpacing:250);
      Simulation 17MilduraMESW-TOS4
        Clock: Start=2017-04-27; End=2018-02-22
        Summary SummaryFile
        Weather: FileName=%root%/Tests/Validation/Wheat/met/17MilduraMESW-TOS4.met
        SoilArbitrator
        Zone Field: Area=1; Slope=0; AspectAngle=0; Altitude=50
          Fertiliser
          Soil: same as NPIValidation.SGEHEAT_13GEHEAT-1.SGEHEAT_13GEHEAT-1.Field.Soil
          SurfaceOrganicMatter: InitialResidueName=wheat_stubble; InitialResidueType=wheat; InitialResidueMass=500; InitialStandingFraction=0; InitialCPR=0; InitialCNR=100
          Plant Wheat
          MicroClimate: a_interception=0; b_interception=1; c_interception=0; d_interception=0; SoilHeatFluxFraction=0.4; MinimumHeightDiffForNewLayer=0; NightInterceptionFraction=0.5; ReferenceHeight=2
          Manager SowingFertiliser: same as NPIValidation.SGEHEAT_13GEHEAT-1.SGEHEAT_13GEHEAT-1.Field.SowingFertiliser
          Manager Harvesting
          Operations Sowing
            2017-04-28  [wheat].Sow(cultivar:"hartog", population:150, depth:50, rowSpacing:250);
          Report HarvestReport
        Manager LocationInfo: same as NPIField2019.YanYean.YanYean2019Base.LocationInfo
    Experiment 17MinnipaMESW-TOS1
      Factors
        Factor Cultivar: Specification=[Sowing]
          Operations bennett
            2017-03-21  [wheat].Sow(cultivar:"bennett", population:150, depth:50, rowSpacing:250);
          Operations kittyhawk
            2017-03-21  [wheat].Sow(cultivar:"kittyhawk", population:150, depth:50, rowSpacing:250);
          Operations longsword
            2017-03-21  [wheat].Sow(cultivar:"longsword", population:150, depth:50, rowSpacing:250);
          Operations scepter
            2017-03-21  [wheat].Sow(cultivar:"scepter", population:150, depth:50, rowSpacing:250);
      Simulation 17MinnipaMESW-TOS1
        Clock: Start=2017-03-20; End=2018-01-15
        Summary SummaryFile
        Weather: FileName=%root%/Tests/Validation/Wheat/met/17MinnipaMESW-TOS1.met
        SoilArbitrator
        Zone Field: Area=1; Slope=0; AspectAngle=0; Altitude=50
          Fertiliser
          Soil: same as NPIValidation.SGEHEAT_13GEHEAT-1.SGEHEAT_13GEHEAT-1.Field.Soil
          SurfaceOrganicMatter: InitialResidueName=wheat_stubble; InitialResidueType=wheat; InitialResidueMass=500; InitialStandingFraction=0; InitialCPR=0; InitialCNR=100
          Plant Wheat
          MicroClimate: a_interception=0; b_interception=1; c_interception=0; d_interception=0; SoilHeatFluxFraction=0.4; MinimumHeightDiffForNewLayer=0; NightInterceptionFraction=0.5; ReferenceHeight=2
          Manager SowingFertiliser: same as NPIValidation.SGEHEAT_13GEHEAT-1.SGEHEAT_13GEHEAT-1.Field.SowingFertiliser
          Manager Harvesting
          Operations Sowing
            2017-03-21  [wheat].Sow(cultivar:"hartog", population:150, depth:50, rowSpacing:250);
          Report HarvestReport
        Manager LocationInfo: same as NPIField2019.Callington.Callington2019Base.LocationInfo
    Experiment 17MinnipaMESW-TOS2
      Factors
        Factor Cultivar: Specification=[Sowing]
          Operations bennett
            2017-04-03  [wheat].Sow(cultivar:"bennett", population:150, depth:50, rowSpacing:250);
          Operations kittyhawk
            2017-04-03  [wheat].Sow(cultivar:"kittyhawk", population:150, depth:50, rowSpacing:250);
          Operations longsword
            2017-04-03  [wheat].Sow(cultivar:"longsword", population:150, depth:50, rowSpacing:250);
          Operations scepter
            2017-04-03  [wheat].Sow(cultivar:"scepter", population:150, depth:50, rowSpacing:250);
      Simulation 17MinnipaMESW-TOS2
        Clock: Start=2017-04-02; End=2018-01-28
        Summary SummaryFile
        Weather: FileName=%root%/Tests/Validation/Wheat/met/17MinnipaMESW-TOS2.met
        SoilArbitrator
        Zone Field: same as NPIValidation.17LoxtonMESW-TOS2.17LoxtonMESW-TOS2.Field
        Manager LocationInfo: same as NPIField2019.Callington.Callington2019Base.LocationInfo
    Experiment 17MinnipaMESW-TOS3
      Factors
        Factor Cultivar: Specification=[Sowing]
          Operations bennett
            2017-04-18  [wheat].Sow(cultivar:"bennett", population:150, depth:50, rowSpacing:250);
          Operations kittyhawk
            2017-04-18  [wheat].Sow(cultivar:"kittyhawk", population:150, depth:50, rowSpacing:250);
          Operations longsword
            2017-04-18  [wheat].Sow(cultivar:"longsword", population:150, depth:50, rowSpacing:250);
          Operations scepter
            2017-04-18  [wheat].Sow(cultivar:"scepter", population:150, depth:50, rowSpacing:250);
      Simulation 17MinnipaMESW-TOS3
        Clock: Start=2017-04-17; End=2018-02-12
        Summary SummaryFile
        Weather: FileName=%root%/Tests/Validation/Wheat/met/17MinnipaMESW-TOS3.met
        SoilArbitrator
        Zone Field: same as NPIValidation.17CuryoMESW-TOS3.17CuryoMESW-TOS3.Field
        Manager LocationInfo: same as NPIField2019.Callington.Callington2019Base.LocationInfo
    Experiment 17MinnipaMESW-TOS4
      Factors
        Factor Cultivar: Specification=[Sowing]
          Operations bennett
            2017-05-05  [wheat].Sow(cultivar:"bennett", population:150, depth:50, rowSpacing:250);
          Operations kittyhawk
            2017-05-05  [wheat].Sow(cultivar:"kittyhawk", population:150, depth:50, rowSpacing:250);
          Operations longsword
            2017-05-05  [wheat].Sow(cultivar:"longsword", population:150, depth:50, rowSpacing:250);
          Operations scepter
            2017-05-05  [wheat].Sow(cultivar:"scepter", population:150, depth:50, rowSpacing:250);
      Simulation 17MinnipaMESW-TOS4
        Clock: Start=2017-05-04; End=2018-03-01
        Summary SummaryFile
        Weather: FileName=%root%/Tests/Validation/Wheat/met/17MinnipaMESW-TOS4.met
        SoilArbitrator
        Zone Field: Area=1; Slope=0; AspectAngle=0; Altitude=50
          Fertiliser
          Soil: same as NPIValidation.SGEHEAT_13GEHEAT-1.SGEHEAT_13GEHEAT-1.Field.Soil
          SurfaceOrganicMatter: InitialResidueName=wheat_stubble; InitialResidueType=wheat; InitialResidueMass=500; InitialStandingFraction=0; InitialCPR=0; InitialCNR=100
          Plant Wheat
          MicroClimate: a_interception=0; b_interception=1; c_interception=0; d_interception=0; SoilHeatFluxFraction=0.4; MinimumHeightDiffForNewLayer=0; NightInterceptionFraction=0.5; ReferenceHeight=2
          Manager SowingFertiliser: same as NPIValidation.SGEHEAT_13GEHEAT-1.SGEHEAT_13GEHEAT-1.Field.SowingFertiliser
          Manager Harvesting
          Operations Sowing
            2017-05-05  [wheat].Sow(cultivar:"hartog", population:150, depth:50, rowSpacing:250);
          Report HarvestReport
        Manager LocationInfo: same as NPIField2019.Callington.Callington2019Base.LocationInfo
    Experiment 18HartMESW-TOS1
      Factors
        Factor Cultivar: Specification=[Sowing]
          Operations bennett
            2018-03-20  [wheat].Sow(cultivar:"bennett", population:150, depth:50, rowSpacing:250);
          Operations kittyhawk
            2018-03-20  [wheat].Sow(cultivar:"kittyhawk", population:150, depth:50, rowSpacing:250);
          Operations longsword
            2018-03-20  [wheat].Sow(cultivar:"longsword", population:150, depth:50, rowSpacing:250);
          Operations scepter
            2018-03-20  [wheat].Sow(cultivar:"scepter", population:150, depth:50, rowSpacing:250);
          Operations trojan
            2018-03-20  [wheat].Sow(cultivar:"trojan", population:150, depth:50, rowSpacing:250);
      Simulation 18HartMESW-TOS1
        Clock: Start=2018-03-19; End=2019-01-14
        Summary SummaryFile
        Weather: FileName=%root%/Tests/Validation/Wheat/met/18HartMESW-TOS1.met
        SoilArbitrator
        Zone Field: Area=1; Slope=0; AspectAngle=0; Altitude=50
          Fertiliser
          Soil: same as NPIValidation.SGEHEAT_13GEHEAT-1.SGEHEAT_13GEHEAT-1.Field.Soil
          SurfaceOrganicMatter: InitialResidueName=wheat_stubble; InitialResidueType=wheat; InitialResidueMass=500; InitialStandingFraction=0; InitialCPR=0; InitialCNR=100
          Plant Wheat
          MicroClimate: a_interception=0; b_interception=1; c_interception=0; d_interception=0; SoilHeatFluxFraction=0.4; MinimumHeightDiffForNewLayer=0; NightInterceptionFraction=0.5; ReferenceHeight=2
          Manager SowingFertiliser: same as NPIValidation.SGEHEAT_13GEHEAT-1.SGEHEAT_13GEHEAT-1.Field.SowingFertiliser
          Manager Harvesting
          Operations Sowing
            2018-03-20  [wheat].Sow(cultivar:"hartog", population:150, depth:50, rowSpacing:250);
          Report HarvestReport
        Manager LocationInfo: same as NPIValidation.BYIE_08RS.BYIE_08RS.LocationInfo
    Experiment 18HartMESW-TOS2
      Factors
        Factor Cultivar: Specification=[Sowing]
          Operations bennett
            2018-04-03  [wheat].Sow(cultivar:"bennett", population:150, depth:50, rowSpacing:250);
          Operations kittyhawk
            2018-04-03  [wheat].Sow(cultivar:"kittyhawk", population:150, depth:50, rowSpacing:250);
          Operations longsword
            2018-04-03  [wheat].Sow(cultivar:"longsword", population:150, depth:50, rowSpacing:250);
          Operations scepter
            2018-04-03  [wheat].Sow(cultivar:"scepter", population:150, depth:50, rowSpacing:250);
          Operations trojan
            2018-04-03  [wheat].Sow(cultivar:"trojan", population:150, depth:50, rowSpacing:250);
      Simulation 18HartMESW-TOS2
        Clock: Start=2018-04-02; End=2019-01-28
        Summary SummaryFile
        Weather: FileName=%root%/Tests/Validation/Wheat/met/18HartMESW-TOS2.met
        SoilArbitrator
        Zone Field: Area=1; Slope=0; AspectAngle=0; Altitude=50
          Fertiliser
          Soil: same as NPIValidation.SGEHEAT_13GEHEAT-1.SGEHEAT_13GEHEAT-1.Field.Soil
          SurfaceOrganicMatter: InitialResidueName=wheat_stubble; InitialResidueType=wheat; InitialResidueMass=500; InitialStandingFraction=0; InitialCPR=0; InitialCNR=100
          Plant Wheat
          MicroClimate: a_interception=0; b_interception=1; c_interception=0; d_interception=0; SoilHeatFluxFraction=0.4; MinimumHeightDiffForNewLayer=0; NightInterceptionFraction=0.5; ReferenceHeight=2
          Manager SowingFertiliser: same as NPIValidation.SGEHEAT_13GEHEAT-1.SGEHEAT_13GEHEAT-1.Field.SowingFertiliser
          Manager Harvesting
          Operations Sowing
            2018-04-03  [wheat].Sow(cultivar:"hartog", population:150, depth:50, rowSpacing:250);
          Report HarvestReport
        Manager LocationInfo: same as NPIValidation.BYIE_08RS.BYIE_08RS.LocationInfo
    Experiment 18HartMESW-TOS3
      Factors
        Factor Cultivar: Specification=[Sowing]
          Operations bennett
            2018-04-17  [wheat].Sow(cultivar:"bennett", population:150, depth:50, rowSpacing:250);
          Operations kittyhawk
            2018-04-17  [wheat].Sow(cultivar:"kittyhawk", population:150, depth:50, rowSpacing:250);
          Operations longsword
            2018-04-17  [wheat].Sow(cultivar:"longsword", population:150, depth:50, rowSpacing:250);
          Operations scepter
            2018-04-17  [wheat].Sow(cultivar:"scepter", population:150, depth:50, rowSpacing:250);
          Operations trojan
            2018-04-17  [wheat].Sow(cultivar:"trojan", population:150, depth:50, rowSpacing:250);
      Simulation 18HartMESW-TOS3
        Clock: Start=2018-04-16; End=2019-02-11
        Summary SummaryFile
        Weather: FileName=%root%/Tests/Validation/Wheat/met/18HartMESW-TOS3.met
        SoilArbitrator
        Zone Field: Area=1; Slope=0; AspectAngle=0; Altitude=50
          Fertiliser
          Soil: same as NPIValidation.SGEHEAT_13GEHEAT-1.SGEHEAT_13GEHEAT-1.Field.Soil
          SurfaceOrganicMatter: InitialResidueName=wheat_stubble; InitialResidueType=wheat; InitialResidueMass=500; InitialStandingFraction=0; InitialCPR=0; InitialCNR=100
          Plant Wheat
          MicroClimate: a_interception=0; b_interception=1; c_interception=0; d_interception=0; SoilHeatFluxFraction=0.4; MinimumHeightDiffForNewLayer=0; NightInterceptionFraction=0.5; ReferenceHeight=2
          Manager SowingFertiliser: same as NPIValidation.SGEHEAT_13GEHEAT-1.SGEHEAT_13GEHEAT-1.Field.SowingFertiliser
          Manager Harvesting
          Operations Sowing
            2018-04-17  [wheat].Sow(cultivar:"hartog", population:150, depth:50, rowSpacing:250);
          Report HarvestReport
        Manager LocationInfo: same as NPIValidation.BYIE_08RS.BYIE_08RS.LocationInfo
    Experiment 18HartMESW-TOS4
      Factors
        Factor Cultivar: Specification=[Sowing]
          Operations bennett
            2018-05-01  [wheat].Sow(cultivar:"bennett", population:150, depth:50, rowSpacing:250);
          Operations kittyhawk
            2018-05-01  [wheat].Sow(cultivar:"kittyhawk", population:150, depth:50, rowSpacing:250);
          Operations longsword
            2018-05-01  [wheat].Sow(cultivar:"longsword", population:150, depth:50, rowSpacing:250);
          Operations scepter
            2018-05-01  [wheat].Sow(cultivar:"scepter", population:150, depth:50, rowSpacing:250);
          Operations trojan
            2018-05-01  [wheat].Sow(cultivar:"trojan", population:150, depth:50, rowSpacing:250);
      Simulation 18HartMESW-TOS4
        Clock: Start=2018-04-30; End=2019-02-25
        Summary SummaryFile
        Weather: FileName=%root%/Tests/Validation/Wheat/met/18HartMESW-TOS4.met
        SoilArbitrator
        Zone Field: Area=1; Slope=0; AspectAngle=0; Altitude=50
          Fertiliser
          Soil: same as NPIValidation.SGEHEAT_13GEHEAT-1.SGEHEAT_13GEHEAT-1.Field.Soil
          SurfaceOrganicMatter: InitialResidueName=wheat_stubble; InitialResidueType=wheat; InitialResidueMass=500; InitialStandingFraction=0; InitialCPR=0; InitialCNR=100
          Plant Wheat
          MicroClimate: a_interception=0; b_interception=1; c_interception=0; d_interception=0; SoilHeatFluxFraction=0.4; MinimumHeightDiffForNewLayer=0; NightInterceptionFraction=0.5; ReferenceHeight=2
          Manager SowingFertiliser: same as NPIValidation.SGEHEAT_13GEHEAT-1.SGEHEAT_13GEHEAT-1.Field.SowingFertiliser
          Manager Harvesting
          Operations Sowing
            2018-05-01  [wheat].Sow(cultivar:"hartog", population:150, depth:50, rowSpacing:250);
          Report HarvestReport
        Manager LocationInfo: same as NPIValidation.BYIE_08RS.BYIE_08RS.LocationInfo
    Experiment 18LoxtonMESW-TOS1
      Factors
        Factor Cultivar: Specification=[Sowing]
          Operations bennett
            2018-03-19  [wheat].Sow(cultivar:"bennett", population:150, depth:50, rowSpacing:250);
          Operations kittyhawk
            2018-03-19  [wheat].Sow(cultivar:"kittyhawk", population:150, depth:50, rowSpacing:250);
          Operations longsword
            2018-03-19  [wheat].Sow(cultivar:"longsword", population:150, depth:50, rowSpacing:250);
          Operations scepter
            2018-03-19  [wheat].Sow(cultivar:"scepter", population:150, depth:50, rowSpacing:250);
          Operations trojan
            2018-03-19  [wheat].Sow(cultivar:"trojan", population:150, depth:50, rowSpacing:250);
      Simulation 18LoxtonMESW-TOS1
        Clock: Start=2018-03-18; End=2019-01-13
        Summary SummaryFile
        Weather: FileName=%root%/Tests/Validation/Wheat/met/18LoxtonMESW-TOS1.met
        SoilArbitrator
        Zone Field: Area=1; Slope=0; AspectAngle=0; Altitude=50
          Fertiliser
          Soil: same as NPIValidation.SGEHEAT_13GEHEAT-1.SGEHEAT_13GEHEAT-1.Field.Soil
          SurfaceOrganicMatter: InitialResidueName=wheat_stubble; InitialResidueType=wheat; InitialResidueMass=500; InitialStandingFraction=0; InitialCPR=0; InitialCNR=100
          Plant Wheat
          MicroClimate: a_interception=0; b_interception=1; c_interception=0; d_interception=0; SoilHeatFluxFraction=0.4; MinimumHeightDiffForNewLayer=0; NightInterceptionFraction=0.5; ReferenceHeight=2
          Manager SowingFertiliser: same as NPIValidation.SGEHEAT_13GEHEAT-1.SGEHEAT_13GEHEAT-1.Field.SowingFertiliser
          Manager Harvesting
          Operations Sowing
            2018-03-19  [wheat].Sow(cultivar:"hartog", population:150, depth:50, rowSpacing:250);
          Report HarvestReport
        Manager LocationInfo: same as NPIField2019.Callington.Callington2019Base.LocationInfo
    Experiment 18LoxtonMESW-TOS2
      Factors
        Factor Cultivar: Specification=[Sowing]
          Operations bennett
            2018-04-04  [wheat].Sow(cultivar:"bennett", population:150, depth:50, rowSpacing:250);
          Operations kittyhawk
            2018-04-04  [wheat].Sow(cultivar:"kittyhawk", population:150, depth:50, rowSpacing:250);
          Operations longsword
            2018-04-04  [wheat].Sow(cultivar:"longsword", population:150, depth:50, rowSpacing:250);
          Operations scepter
            2018-04-04  [wheat].Sow(cultivar:"scepter", population:150, depth:50, rowSpacing:250);
          Operations trojan
            2018-04-04  [wheat].Sow(cultivar:"trojan", population:150, depth:50, rowSpacing:250);
      Simulation 18LoxtonMESW-TOS2
        Clock: Start=2018-04-03; End=2019-01-29
        Summary SummaryFile
        Weather: FileName=%root%/Tests/Validation/Wheat/met/18LoxtonMESW-TOS2.met
        SoilArbitrator
        Zone Field: Area=1; Slope=0; AspectAngle=0; Altitude=50
          Fertiliser
          Soil: same as NPIValidation.SGEHEAT_13GEHEAT-1.SGEHEAT_13GEHEAT-1.Field.Soil
          SurfaceOrganicMatter: InitialResidueName=wheat_stubble; InitialResidueType=wheat; InitialResidueMass=500; InitialStandingFraction=0; InitialCPR=0; InitialCNR=100
          Plant Wheat
          MicroClimate: a_interception=0; b_interception=1; c_interception=0; d_interception=0; SoilHeatFluxFraction=0.4; MinimumHeightDiffForNewLayer=0; NightInterceptionFraction=0.5; ReferenceHeight=2
          Manager SowingFertiliser: same as NPIValidation.SGEHEAT_13GEHEAT-1.SGEHEAT_13GEHEAT-1.Field.SowingFertiliser
          Manager Harvesting
          Operations Sowing
            2018-04-04  [wheat].Sow(cultivar:"hartog", population:150, depth:50, rowSpacing:250);
          Report HarvestReport
        Manager LocationInfo: same as NPIField2019.Callington.Callington2019Base.LocationInfo
    Experiment 18LoxtonMESW-TOS3
      Factors
        Factor Cultivar: Specification=[Sowing]
          Operations bennett
            2018-04-18  [wheat].Sow(cultivar:"bennett", population:150, depth:50, rowSpacing:250);
          Operations kittyhawk
            2018-04-18  [wheat].Sow(cultivar:"kittyhawk", population:150, depth:50, rowSpacing:250);
          Operations longsword
            2018-04-18  [wheat].Sow(cultivar:"longsword", population:150, depth:50, rowSpacing:250);
          Operations scepter
            2018-04-18  [wheat].Sow(cultivar:"scepter", population:150, depth:50, rowSpacing:250);
          Operations trojan
            2018-04-18  [wheat].Sow(cultivar:"trojan", population:150, depth:50, rowSpacing:250);
      Simulation 18LoxtonMESW-TOS3
        Clock: Start=2018-04-17; End=2019-02-12
        Summary SummaryFile
        Weather: FileName=%root%/Tests/Validation/Wheat/met/18LoxtonMESW-TOS3.met
        SoilArbitrator
        Zone Field: Area=1; Slope=0; AspectAngle=0; Altitude=50
          Fertiliser
          Soil: same as NPIValidation.SGEHEAT_13GEHEAT-1.SGEHEAT_13GEHEAT-1.Field.Soil
          SurfaceOrganicMatter: InitialResidueName=wheat_stubble; InitialResidueType=wheat; InitialResidueMass=500; InitialStandingFraction=0; InitialCPR=0; InitialCNR=100
          Plant Wheat
          MicroClimate: a_interception=0; b_interception=1; c_interception=0; d_interception=0; SoilHeatFluxFraction=0.4; MinimumHeightDiffForNewLayer=0; NightInterceptionFraction=0.5; ReferenceHeight=2
          Manager SowingFertiliser: same as NPIValidation.SGEHEAT_13GEHEAT-1.SGEHEAT_13GEHEAT-1.Field.SowingFertiliser
          Manager Harvesting
          Operations Sowing
            2018-04-18  [wheat].Sow(cultivar:"hartog", population:150, depth:50, rowSpacing:250);
          Report HarvestReport
        Manager LocationInfo: same as NPIField2019.Callington.Callington2019Base.LocationInfo
    Experiment 18LoxtonMESW-TOS4
      Factors
        Factor Cultivar: Specification=[Sowing]
          Operations bennett
            2018-05-03  [wheat].Sow(cultivar:"bennett", population:150, depth:50, rowSpacing:250);
          Operations kittyhawk
            2018-05-03  [wheat].Sow(cultivar:"kittyhawk", population:150, depth:50, rowSpacing:250);
          Operations longsword
            2018-05-03  [wheat].Sow(cultivar:"longsword", population:150, depth:50, rowSpacing:250);
          Operations scepter
            2018-05-03  [wheat].Sow(cultivar:"scepter", population:150, depth:50, rowSpacing:250);
          Operations trojan
            2018-05-03  [wheat].Sow(cultivar:"trojan", population:150, depth:50, rowSpacing:250);
      Simulation 18LoxtonMESW-TOS4
        Clock: Start=2018-05-02; End=2019-02-27
        Summary SummaryFile
        Weather: FileName=%root%/Tests/Validation/Wheat/met/18LoxtonMESW-TOS4.met
        SoilArbitrator
        Zone Field: Area=1; Slope=0; AspectAngle=0; Altitude=50
          Fertiliser
          Soil: same as NPIValidation.SGEHEAT_13GEHEAT-1.SGEHEAT_13GEHEAT-1.Field.Soil
          SurfaceOrganicMatter: InitialResidueName=wheat_stubble; InitialResidueType=wheat; InitialResidueMass=500; InitialStandingFraction=0; InitialCPR=0; InitialCNR=100
          Plant Wheat
          MicroClimate: a_interception=0; b_interception=1; c_interception=0; d_interception=0; SoilHeatFluxFraction=0.4; MinimumHeightDiffForNewLayer=0; NightInterceptionFraction=0.5; ReferenceHeight=2
          Manager SowingFertiliser: same as NPIValidation.SGEHEAT_13GEHEAT-1.SGEHEAT_13GEHEAT-1.Field.SowingFertiliser
          Manager Harvesting
          Operations Sowing
            2018-05-03  [wheat].Sow(cultivar:"hartog", population:150, depth:50, rowSpacing:250);
          Report HarvestReport
        Manager LocationInfo: same as NPIField2019.Callington.Callington2019Base.LocationInfo
    Experiment 18MilduraMESW-TOS1
      Factors: same as NPIValidation.18LoxtonMESW-TOS1.Factors
      Simulation 18MilduraMESW-TOS1
        Clock: Start=2018-03-18; End=2019-01-13
        Summary SummaryFile
        Weather: FileName=%root%/Tests/Validation/Wheat/met/18MilduraMESW-TOS1.met
        SoilArbitrator
        Zone Field: same as NPIValidation.18LoxtonMESW-TOS1.18LoxtonMESW-TOS1.Field
        Manager LocationInfo: same as NPIValidation.17CuryoMESW-TOS1.17CuryoMESW-TOS1.LocationInfo
    Experiment 18MilduraMESW-TOS2
      Factors: same as NPIValidation.18HartMESW-TOS2.Factors
      Simulation 18MilduraMESW-TOS2
        Clock: Start=2018-04-02; End=2019-01-28
        Summary SummaryFile
        Weather: FileName=%root%/Tests/Validation/Wheat/met/18MilduraMESW-TOS2.met
        SoilArbitrator
        Zone Field: same as NPIValidation.18HartMESW-TOS2.18HartMESW-TOS2.Field
        Manager LocationInfo: same as NPIValidation.17CuryoMESW-TOS1.17CuryoMESW-TOS1.LocationInfo
    Experiment 18MilduraMESW-TOS3
      Factors: same as NPIValidation.18HartMESW-TOS3.Factors
      Simulation 18MilduraMESW-TOS3
        Clock: Start=2018-04-16; End=2019-02-11
        Summary SummaryFile
        Weather: FileName=%root%/Tests/Validation/Wheat/met/18MilduraMESW-TOS3.met
        SoilArbitrator
        Zone Field: same as NPIValidation.18HartMESW-TOS3.18HartMESW-TOS3.Field
        Manager LocationInfo: same as NPIValidation.17CuryoMESW-TOS1.17CuryoMESW-TOS1.LocationInfo
    Experiment 18MilduraMESW-TOS4
      Factors: same as NPIValidation.18HartMESW-TOS4.Factors
      Simulation 18MilduraMESW-TOS4
        Clock: Start=2018-04-30; End=2019-02-25
        Summary SummaryFile
        Weather: FileName=%root%/Tests/Validation/Wheat/met/18MilduraMESW-TOS4.met
        SoilArbitrator
        Zone Field: same as NPIValidation.18HartMESW-TOS4.18HartMESW-TOS4.Field
        Manager LocationInfo: same as NPIValidation.17CuryoMESW-TOS1.17CuryoMESW-TOS1.LocationInfo
    Experiment Inverleigh2013-TOS1
      Factors
        Factor Cultivar: Specification=[Sowing]
          Operations bolac
            2013-03-26  [wheat].Sow(cultivar:"bolac", population:150, depth:50, rowSpacing:250);
      Simulation Inverleigh2013-TOS1
        Clock: Start=2013-03-25; End=2014-01-20
        Summary SummaryFile
        Weather: FileName=%root%/Tests/Validation/Wheat/met/Inverleigh2013-TOS1.met
        SoilArbitrator
        Zone Field: Area=1; Slope=0; AspectAngle=0; Altitude=50
          Fertiliser
          Soil: same as NPIValidation.SGEHEAT_13GEHEAT-1.SGEHEAT_13GEHEAT-1.Field.Soil
          SurfaceOrganicMatter: InitialResidueName=wheat_stubble; InitialResidueType=wheat; InitialResidueMass=500; InitialStandingFraction=0; InitialCPR=0; InitialCNR=100
          Plant Wheat
          MicroClimate: a_interception=0; b_interception=1; c_interception=0; d_interception=0; SoilHeatFluxFraction=0.4; MinimumHeightDiffForNewLayer=0; NightInterceptionFraction=0.5; ReferenceHeight=2
          Manager SowingFertiliser: same as NPIValidation.SGEHEAT_13GEHEAT-1.SGEHEAT_13GEHEAT-1.Field.SowingFertiliser
          Manager Harvesting
          Operations Sowing
            2013-03-26  [wheat].Sow(cultivar:"hartog", population:150, depth:50, rowSpacing:250);
          Report HarvestReport
        Manager LocationInfo: same as NPIField2019.YanYean.YanYean2019Base.LocationInfo
    Experiment Inverleigh2013-TOS2
      Factors
        Factor Cultivar: Specification=[Sowing]
          Operations bolac
            2013-04-08  [wheat].Sow(cultivar:"bolac", population:150, depth:50, rowSpacing:250);
      Simulation Inverleigh2013-TOS2
        Clock: Start=2013-04-07; End=2014-02-02
        Summary SummaryFile
        Weather: FileName=%root%/Tests/Validation/Wheat/met/Inverleigh2013-TOS2.met
        SoilArbitrator
        Zone Field: Area=1; Slope=0; AspectAngle=0; Altitude=50
          Fertiliser
          Soil: same as NPIValidation.SGEHEAT_13GEHEAT-1.SGEHEAT_13GEHEAT-1.Field.Soil
          SurfaceOrganicMatter: InitialResidueName=wheat_stubble; InitialResidueType=wheat; InitialResidueMass=500; InitialStandingFraction=0; InitialCPR=0; InitialCNR=100
          Plant Wheat
          MicroClimate: a_interception=0; b_interception=1; c_interception=0; d_interception=0; SoilHeatFluxFraction=0.4; MinimumHeightDiffForNewLayer=0; NightInterceptionFraction=0.5; ReferenceHeight=2
          Manager SowingFertiliser: same as NPIValidation.SGEHEAT_13GEHEAT-1.SGEHEAT_13GEHEAT-1.Field.SowingFertiliser
          Manager Harvesting
          Operations Sowing
            2013-04-08  [wheat].Sow(cultivar:"hartog", population:150, depth:50, rowSpacing:250);
          Report HarvestReport
        Manager LocationInfo: same as NPIField2019.YanYean.YanYean2019Base.LocationInfo
    Experiment Temora2015-TOS1
      Factors
        Factor Cultivar: Specification=[Sowing]
          Operations bolac
            2015-04-17  [wheat].Sow(cultivar:"bolac", population:150, depth:50, rowSpacing:250);
          Operations condo
            2015-04-17  [wheat].Sow(cultivar:"condo", population:150, depth:50, rowSpacing:250);
          Operations eaglehawk
            2015-04-17  [wheat].Sow(cultivar:"eaglehawk", population:150, depth:50, rowSpacing:250);
          Operations gregory
            2015-04-17  [wheat].Sow(cultivar:"gregory", population:150, depth:50, rowSpacing:250);
          Operations janz
            2015-04-17  [wheat].Sow(cultivar:"janz", population:150, depth:50, rowSpacing:250);
          Operations longsword
            2015-04-17  [wheat].Sow(cultivar:"longsword", population:150, depth:50, rowSpacing:250);
          Operations wedgetail
            2015-04-17  [wheat].Sow(cultivar:"wedgetail", population:150, depth:50, rowSpacing:250);
      Simulation Temora2015-TOS1
        Clock: Start=2015-04-16; End=2016-02-11
        Summary SummaryFile
        Weather: FileName=%root%/Tests/Validation/Wheat/met/Temora2015-TOS1.met
        SoilArbitrator
        Zone Field: Area=1; Slope=0; AspectAngle=0; Altitude=50
          Fertiliser
          Soil: same as NPIValidation.SGEHEAT_13GEHEAT-1.SGEHEAT_13GEHEAT-1.Field.Soil
          SurfaceOrganicMatter: InitialResidueName=wheat_stubble; InitialResidueType=wheat; InitialResidueMass=500; InitialStandingFraction=0; InitialCPR=0; InitialCNR=100
          Plant Wheat
          MicroClimate: a_interception=0; b_interception=1; c_interception=0; d_interception=0; SoilHeatFluxFraction=0.4; MinimumHeightDiffForNewLayer=0; NightInterceptionFraction=0.5; ReferenceHeight=2
          Manager SowingFertiliser: same as NPIValidation.SGEHEAT_13GEHEAT-1.SGEHEAT_13GEHEAT-1.Field.SowingFertiliser
          Manager Harvesting
          Operations Sowing
            2015-04-17  [wheat].Sow(cultivar:"hartog", population:150, depth:50, rowSpacing:250);
          Report HarvestReport
        Manager LocationInfo: same as NPIField2019.WaggaWagga.WaggaWagga2019Base.LocationInfo
    Experiment Temora2015-TOS2
      Factors
        Factor Cultivar: Specification=[Sowing]
          Operations bolac
            2015-04-27  [wheat].Sow(cultivar:"bolac", population:150, depth:50, rowSpacing:250);
          Operations condo
            2015-04-27  [wheat].Sow(cultivar:"condo", population:150, depth:50, rowSpacing:250);
          Operations eaglehawk
            2015-04-27  [wheat].Sow(cultivar:"eaglehawk", population:150, depth:50, rowSpacing:250);
          Operations gregory
            2015-04-27  [wheat].Sow(cultivar:"gregory", population:150, depth:50, rowSpacing:250);
          Operations janz
            2015-04-27  [wheat].Sow(cultivar:"janz", population:150, depth:50, rowSpacing:250);
          Operations longsword
            2015-04-27  [wheat].Sow(cultivar:"longsword", population:150, depth:50, rowSpacing:250);
          Operations wedgetail
            2015-04-27  [wheat].Sow(cultivar:"wedgetail", population:150, depth:50, rowSpacing:250);
      Simulation Temora2015-TOS2
        Clock: Start=2015-04-26; End=2016-02-21
        Summary SummaryFile
        Weather: FileName=%root%/Tests/Validation/Wheat/met/Temora2015-TOS2.met
        SoilArbitrator
        Zone Field: Area=1; Slope=0; AspectAngle=0; Altitude=50
          Fertiliser
          Soil: same as NPIValidation.SGEHEAT_13GEHEAT-1.SGEHEAT_13GEHEAT-1.Field.Soil
          SurfaceOrganicMatter: InitialResidueName=wheat_stubble; InitialResidueType=wheat; InitialResidueMass=500; InitialStandingFraction=0; InitialCPR=0; InitialCNR=100
          Plant Wheat
          MicroClimate: a_interception=0; b_interception=1; c_interception=0; d_interception=0; SoilHeatFluxFraction=0.4; MinimumHeightDiffForNewLayer=0; NightInterceptionFraction=0.5; ReferenceHeight=2
          Manager SowingFertiliser: same as NPIValidation.SGEHEAT_13GEHEAT-1.SGEHEAT_13GEHEAT-1.Field.SowingFertiliser
          Manager Harvesting
          Operations Sowing
            2015-04-27  [wheat].Sow(cultivar:"hartog", population:150, depth:50, rowSpacing:250);
          Report HarvestReport
        Manager LocationInfo: same as NPIField2019.WaggaWagga.WaggaWagga2019Base.LocationInfo
    Experiment Temora2015-TOS3
      Factors
        Factor Cultivar: Specification=[Sowing]
          Operations bolac
            2015-05-07  [wheat].Sow(cultivar:"bolac", population:150, depth:50, rowSpacing:250);
          Operations condo
            2015-05-07  [wheat].Sow(cultivar:"condo", population:150, depth:50, rowSpacing:250);
          Operations eaglehawk
            2015-05-07  [wheat].Sow(cultivar:"eaglehawk", population:150, depth:50, rowSpacing:250);
          Operations gregory
            2015-05-07  [wheat].Sow(cultivar:"gregory", population:150, depth:50, rowSpacing:250);
          Operations janz
            2015-05-07  [wheat].Sow(cultivar:"janz", population:150, depth:50, rowSpacing:250);
          Operations longsword
            2015-05-07  [wheat].Sow(cultivar:"longsword", population:150, depth:50, rowSpacing:250);
          Operations wedgetail
            2015-05-07  [wheat].Sow(cultivar:"wedgetail", population:150, depth:50, rowSpacing:250);
      Simulation Temora2015-TOS3
        Clock: Start=2015-05-06; End=2016-03-02
        Summary SummaryFile
        Weather: FileName=%root%/Tests/Validation/Wheat/met/Temora2015-TOS3.met
        SoilArbitrator
        Zone Field: Area=1; Slope=0; AspectAngle=0; Altitude=50
          Fertiliser
          Soil: same as NPIValidation.SGEHEAT_13GEHEAT-1.SGEHEAT_13GEHEAT-1.Field.Soil
          SurfaceOrganicMatter: InitialResidueName=wheat_stubble; InitialResidueType=wheat; InitialResidueMass=500; InitialStandingFraction=0; InitialCPR=0; InitialCNR=100
          Plant Wheat
          MicroClimate: a_interception=0; b_interception=1; c_interception=0; d_interception=0; SoilHeatFluxFraction=0.4; MinimumHeightDiffForNewLayer=0; NightInterceptionFraction=0.5; ReferenceHeight=2
          Manager SowingFertiliser: same as NPIValidation.SGEHEAT_13GEHEAT-1.SGEHEAT_13GEHEAT-1.Field.SowingFertiliser
          Manager Harvesting
          Operations Sowing
            2015-05-07  [wheat].Sow(cultivar:"hartog", population:150, depth:50, rowSpacing:250);
          Report HarvestReport
        Manager LocationInfo: same as NPIField2019.WaggaWagga.WaggaWagga2019Base.LocationInfo
    Experiment Temora2015-TOS4
      Factors
        Factor Cultivar: Specification=[Sowing]
          Operations bolac
            2015-05-15  [wheat].Sow(cultivar:"bolac", population:150, depth:50, rowSpacing:250);
          Operations condo
            2015-05-15  [wheat].Sow(cultivar:"condo", population:150, depth:50, rowSpacing:250);
          Operations eaglehawk
            2015-05-15  [wheat].Sow(cultivar:"eaglehawk", population:150, depth:50, rowSpacing:250);
          Operations gregory
            2015-05-15  [wheat].Sow(cultivar:"gregory", population:150, depth:50, rowSpacing:250);
          Operations janz
            2015-05-15  [wheat].Sow(cultivar:"janz", population:150, depth:50, rowSpacing:250);
          Operations longsword
            2015-05-15  [wheat].Sow(cultivar:"longsword", population:150, depth:50, rowSpacing:250);
          Operations wedgetail
            2015-05-15  [wheat].Sow(cultivar:"wedgetail", population:150, depth:50, rowSpacing:250);
      Simulation Temora2015-TOS4
        Clock: Start=2015-05-14; End=2016-03-10
        Summary SummaryFile
        Weather: FileName=%root%/Tests/Validation/Wheat/met/Temora2015-TOS4.met
        SoilArbitrator
        Zone Field: Area=1; Slope=0; AspectAngle=0; Altitude=50
          Fertiliser
          Soil: same as NPIValidation.SGEHEAT_13GEHEAT-1.SGEHEAT_13GEHEAT-1.Field.Soil
          SurfaceOrganicMatter: InitialResidueName=wheat_stubble; InitialResidueType=wheat; InitialResidueMass=500; InitialStandingFraction=0; InitialCPR=0; InitialCNR=100
          Plant Wheat
          MicroClimate: a_interception=0; b_interception=1; c_interception=0; d_interception=0; SoilHeatFluxFraction=0.4; MinimumHeightDiffForNewLayer=0; NightInterceptionFraction=0.5; ReferenceHeight=2
          Manager SowingFertiliser: same as NPIValidation.SGEHEAT_13GEHEAT-1.SGEHEAT_13GEHEAT-1.Field.SowingFertiliser
          Manager Harvesting
          Operations Sowing
            2015-05-15  [wheat].Sow(cultivar:"hartog", population:150, depth:50, rowSpacing:250);
          Report HarvestReport
        Manager LocationInfo: same as NPIField2019.WaggaWagga.WaggaWagga2019Base.LocationInfo
    Experiment Brookstead2015-TOS1
      Factors
        Factor Cultivar: Specification=[Sowing]
          Operations eaglehawk
            2015-05-10  [wheat].Sow(cultivar:"eaglehawk", population:150, depth:50, rowSpacing:250);
          Operations gregory
            2015-05-10  [wheat].Sow(cultivar:"gregory", population:150, depth:50, rowSpacing:250);
          Operations wedgetail
            2015-05-10  [wheat].Sow(cultivar:"wedgetail", population:150, depth:50, rowSpacing:250);
      Simulation Brookstead2015-TOS1
        Clock: Start=2015-05-09; End=2016-03-05
        Summary SummaryFile
        Weather: FileName=%root%/Tests/Validation/Wheat/met/Brookstead2015-TOS1.met
        SoilArbitrator
        Zone Field: Area=1; Slope=0; AspectAngle=0; Altitude=50
          Fertiliser
          Soil: same as NPIValidation.SGEHEAT_13GEHEAT-1.SGEHEAT_13GEHEAT-1.Field.Soil
          SurfaceOrganicMatter: InitialResidueName=wheat_stubble; InitialResidueType=wheat; InitialResidueMass=500; InitialStandingFraction=0; InitialCPR=0; InitialCNR=100
          Plant Wheat
          MicroClimate: a_interception=0; b_interception=1; c_interception=0; d_interception=0; SoilHeatFluxFraction=0.4; MinimumHeightDiffForNewLayer=0; NightInterceptionFraction=0.5; ReferenceHeight=2
          Manager SowingFertiliser: same as NPIValidation.SGEHEAT_13GEHEAT-1.SGEHEAT_13GEHEAT-1.Field.SowingFertiliser
          Manager Harvesting
          Operations Sowing
            2015-05-10  [wheat].Sow(cultivar:"hartog", population:150, depth:50, rowSpacing:250);
          Report HarvestReport
        Manager LocationInfo: same as NPIValidation.BYIE_09GN.BYIE_09GN.LocationInfo
    Experiment Brookstead2015-TOS2
      Factors
        Factor Cultivar: Specification=[Sowing]
          Operations eaglehawk
            2015-05-25  [wheat].Sow(cultivar:"eaglehawk", population:150, depth:50, rowSpacing:250);
          Operations gregory
            2015-05-25  [wheat].Sow(cultivar:"gregory", population:150, depth:50, rowSpacing:250);
          Operations wedgetail
            2015-05-25  [wheat].Sow(cultivar:"wedgetail", population:150, depth:50, rowSpacing:250);
      Simulation Brookstead2015-TOS2
        Clock: Start=2015-05-24; End=2016-03-20
        Summary SummaryFile
        Weather: FileName=%root%/Tests/Validation/Wheat/met/Brookstead2015-TOS2.met
        SoilArbitrator
        Zone Field: Area=1; Slope=0; AspectAngle=0; Altitude=50
          Fertiliser
          Soil: same as NPIValidation.SGEHEAT_13GEHEAT-1.SGEHEAT_13GEHEAT-1.Field.Soil
          SurfaceOrganicMatter: InitialResidueName=wheat_stubble; InitialResidueType=wheat; InitialResidueMass=500; InitialStandingFraction=0; InitialCPR=0; InitialCNR=100
          Plant Wheat
          MicroClimate: a_interception=0; b_interception=1; c_interception=0; d_interception=0; SoilHeatFluxFraction=0.4; MinimumHeightDiffForNewLayer=0; NightInterceptionFraction=0.5; ReferenceHeight=2
          Manager SowingFertiliser: same as NPIValidation.SGEHEAT_13GEHEAT-1.SGEHEAT_13GEHEAT-1.Field.SowingFertiliser
          Manager Harvesting
          Operations Sowing
            2015-05-25  [wheat].Sow(cultivar:"hartog", population:150, depth:50, rowSpacing:250);
          Report HarvestReport
        Manager LocationInfo: same as NPIValidation.BYIE_09GN.BYIE_09GN.LocationInfo
    Experiment Brookstead2015-TOS3
      Factors
        Factor Cultivar: Specification=[Sowing]
          Operations eaglehawk
            2015-06-10  [wheat].Sow(cultivar:"eaglehawk", population:150, depth:50, rowSpacing:250);
          Operations gregory
            2015-06-10  [wheat].Sow(cultivar:"gregory", population:150, depth:50, rowSpacing:250);
          Operations wedgetail
            2015-06-10  [wheat].Sow(cultivar:"wedgetail", population:150, depth:50, rowSpacing:250);
      Simulation Brookstead2015-TOS3
        Clock: Start=2015-06-09; End=2016-04-05
        Summary SummaryFile
        Weather: FileName=%root%/Tests/Validation/Wheat/met/Brookstead2015-TOS3.met
        SoilArbitrator
        Zone Field: Area=1; Slope=0; AspectAngle=0; Altitude=50
          Fertiliser
          Soil: same as NPIValidation.SGEHEAT_13GEHEAT-1.SGEHEAT_13GEHEAT-1.Field.Soil
          SurfaceOrganicMatter: InitialResidueName=wheat_stubble; InitialResidueType=wheat; InitialResidueMass=500; InitialStandingFraction=0; InitialCPR=0; InitialCNR=100
          Plant Wheat
          MicroClimate: a_interception=0; b_interception=1; c_interception=0; d_interception=0; SoilHeatFluxFraction=0.4; MinimumHeightDiffForNewLayer=0; NightInterceptionFraction=0.5; ReferenceHeight=2
          Manager SowingFertiliser: same as NPIValidation.SGEHEAT_13GEHEAT-1.SGEHEAT_13GEHEAT-1.Field.SowingFertiliser
          Manager Harvesting
          Operations Sowing
            2015-06-10  [wheat].Sow(cultivar:"hartog", population:150, depth:50, rowSpacing:250);
          Report HarvestReport
        Manager LocationInfo: same as NPIValidation.BYIE_09GN.BYIE_09GN.LocationInfo
    Experiment Emerald2015-TOS1
      Factors
        Factor Cultivar: Specification=[Sowing]
          Operations eaglehawk
            2015-04-20  [wheat].Sow(cultivar:"eaglehawk", population:150, depth:50, rowSpacing:250);
          Operations gregory
            2015-04-20  [wheat].Sow(cultivar:"gregory", population:150, depth:50, rowSpacing:250);
          Operations wedgetail
            2015-04-20  [wheat].Sow(cultivar:"wedgetail", population:150, depth:50, rowSpacing:250);
      Simulation Emerald2015-TOS1
        Clock: Start=2015-04-19; End=2016-02-14
        Summary SummaryFile
        Weather: FileName=%root%/Tests/Validation/Wheat/met/Emerald2015-TOS1.met
        SoilArbitrator
        Zone Field: Area=1; Slope=0; AspectAngle=0; Altitude=50
          Fertiliser
          Soil: same as NPIValidation.SGEHEAT_13GEHEAT-1.SGEHEAT_13GEHEAT-1.Field.Soil
          SurfaceOrganicMatter: InitialResidueName=wheat_stubble; InitialResidueType=wheat; InitialResidueMass=500; InitialStandingFraction=0; InitialCPR=0; InitialCNR=100
          Plant Wheat
          MicroClimate: a_interception=0; b_interception=1; c_interception=0; d_interception=0; SoilHeatFluxFraction=0.4; MinimumHeightDiffForNewLayer=0; NightInterceptionFraction=0.5; ReferenceHeight=2
          Manager SowingFertiliser: same as NPIValidation.SGEHEAT_13GEHEAT-1.SGEHEAT_13GEHEAT-1.Field.SowingFertiliser
          Manager Harvesting
          Operations Sowing
            2015-04-20  [wheat].Sow(cultivar:"hartog", population:150, depth:50, rowSpacing:250);
          Report HarvestReport
        Manager LocationInfo
          Country = Australia
          State = Queensland
          Region = QLD Central Zone
          script: same as in FARAwardPhenology.FARAwardPhenology.Simulation.LocationInfo
    Experiment Emerald2015-TOS2
      Factors
        Factor Cultivar: Specification=[Sowing]
          Operations eaglehawk
            2015-05-01  [wheat].Sow(cultivar:"eaglehawk", population:150, depth:50, rowSpacing:250);
          Operations gregory
            2015-05-01  [wheat].Sow(cultivar:"gregory", population:150, depth:50, rowSpacing:250);
          Operations wedgetail
            2015-05-01  [wheat].Sow(cultivar:"wedgetail", population:150, depth:50, rowSpacing:250);
      Simulation Emerald2015-TOS2
        Clock: Start=2015-04-30; End=2016-02-25
        Summary SummaryFile
        Weather: FileName=%root%/Tests/Validation/Wheat/met/Emerald2015-TOS2.met
        SoilArbitrator
        Zone Field: Area=1; Slope=0; AspectAngle=0; Altitude=50
          Fertiliser
          Soil: same as NPIValidation.SGEHEAT_13GEHEAT-1.SGEHEAT_13GEHEAT-1.Field.Soil
          SurfaceOrganicMatter: InitialResidueName=wheat_stubble; InitialResidueType=wheat; InitialResidueMass=500; InitialStandingFraction=0; InitialCPR=0; InitialCNR=100
          Plant Wheat
          MicroClimate: a_interception=0; b_interception=1; c_interception=0; d_interception=0; SoilHeatFluxFraction=0.4; MinimumHeightDiffForNewLayer=0; NightInterceptionFraction=0.5; ReferenceHeight=2
          Manager SowingFertiliser: same as NPIValidation.SGEHEAT_13GEHEAT-1.SGEHEAT_13GEHEAT-1.Field.SowingFertiliser
          Manager Harvesting
          Operations Sowing
            2015-05-01  [wheat].Sow(cultivar:"hartog", population:150, depth:50, rowSpacing:250);
          Report HarvestReport
        Manager LocationInfo: same as NPIValidation.Emerald2015-TOS1.Emerald2015-TOS1.LocationInfo
    Experiment Emerald2015-TOS3
      Factors
        Factor Cultivar: Specification=[Sowing]
          Operations eaglehawk
            2015-05-11  [wheat].Sow(cultivar:"eaglehawk", population:150, depth:50, rowSpacing:250);
          Operations gregory
            2015-05-11  [wheat].Sow(cultivar:"gregory", population:150, depth:50, rowSpacing:250);
          Operations wedgetail
            2015-05-11  [wheat].Sow(cultivar:"wedgetail", population:150, depth:50, rowSpacing:250);
      Simulation Emerald2015-TOS3
        Clock: Start=2015-05-10; End=2016-03-06
        Summary SummaryFile
        Weather: FileName=%root%/Tests/Validation/Wheat/met/Emerald2015-TOS3.met
        SoilArbitrator
        Zone Field: Area=1; Slope=0; AspectAngle=0; Altitude=50
          Fertiliser
          Soil: same as NPIValidation.SGEHEAT_13GEHEAT-1.SGEHEAT_13GEHEAT-1.Field.Soil
          SurfaceOrganicMatter: InitialResidueName=wheat_stubble; InitialResidueType=wheat; InitialResidueMass=500; InitialStandingFraction=0; InitialCPR=0; InitialCNR=100
          Plant Wheat
          MicroClimate: a_interception=0; b_interception=1; c_interception=0; d_interception=0; SoilHeatFluxFraction=0.4; MinimumHeightDiffForNewLayer=0; NightInterceptionFraction=0.5; ReferenceHeight=2
          Manager SowingFertiliser: same as NPIValidation.SGEHEAT_13GEHEAT-1.SGEHEAT_13GEHEAT-1.Field.SowingFertiliser
          Manager Harvesting
          Operations Sowing
            2015-05-11  [wheat].Sow(cultivar:"hartog", population:150, depth:50, rowSpacing:250);
          Report HarvestReport
        Manager LocationInfo: same as NPIValidation.Emerald2015-TOS1.Emerald2015-TOS1.LocationInfo
    Experiment Minnipa2015-TOS1
      Factors
        Factor Cultivar: Specification=[Sowing]
          Operations eaglehawk
            2015-04-13  [wheat].Sow(cultivar:"eaglehawk", population:150, depth:50, rowSpacing:250);
          Operations longsword
            2015-04-13  [wheat].Sow(cultivar:"longsword", population:150, depth:50, rowSpacing:250);
          Operations trojan
            2015-04-13  [wheat].Sow(cultivar:"trojan", population:150, depth:50, rowSpacing:250);
          Operations wedgetail
            2015-04-13  [wheat].Sow(cultivar:"wedgetail", population:150, depth:50, rowSpacing:250);
      Simulation Minnipa2015-TOS1
        Clock: Start=2015-04-12; End=2015-12-30
        Summary SummaryFile
        Weather: FileName=%root%/Tests/Validation/Wheat/met/Minnipa2015-TOS1.met
        SoilArbitrator
        Zone Field: Area=1; Slope=0; AspectAngle=0; Altitude=50
          Fertiliser
          Soil: same as NPIValidation.SGEHEAT_13GEHEAT-1.SGEHEAT_13GEHEAT-1.Field.Soil
          SurfaceOrganicMatter: InitialResidueName=wheat_stubble; InitialResidueType=wheat; InitialResidueMass=500; InitialStandingFraction=0; InitialCPR=0; InitialCNR=100
          Plant Wheat
          MicroClimate: a_interception=0; b_interception=1; c_interception=0; d_interception=0; SoilHeatFluxFraction=0.4; MinimumHeightDiffForNewLayer=0; NightInterceptionFraction=0.5; ReferenceHeight=2
          Manager SowingFertiliser: same as NPIValidation.SGEHEAT_13GEHEAT-1.SGEHEAT_13GEHEAT-1.Field.SowingFertiliser
          Manager Harvesting
          Operations Sowing
            2015-04-13  [wheat].Sow(cultivar:"hartog", population:150, depth:50, rowSpacing:250);
          Report HarvestReport
        Manager LocationInfo: same as NPIField2019.Callington.Callington2019Base.LocationInfo
    Experiment Minnipa2015-TOS2
      Factors
        Factor Cultivar: Specification=[Sowing]
          Operations eaglehawk
            2015-04-29  [wheat].Sow(cultivar:"eaglehawk", population:150, depth:50, rowSpacing:250);
          Operations longsword
            2015-04-29  [wheat].Sow(cultivar:"longsword", population:150, depth:50, rowSpacing:250);
          Operations trojan
            2015-04-29  [wheat].Sow(cultivar:"trojan", population:150, depth:50, rowSpacing:250);
          Operations wedgetail
            2015-04-29  [wheat].Sow(cultivar:"wedgetail", population:150, depth:50, rowSpacing:250);
      Simulation Minnipa2015-TOS2
        Clock: Start=2015-04-28; End=2015-12-30
        Summary SummaryFile
        Weather: FileName=%root%/Tests/Validation/Wheat/met/Minnipa2015-TOS2.met
        SoilArbitrator
        Zone Field: Area=1; Slope=0; AspectAngle=0; Altitude=50
          Fertiliser
          Soil: same as NPIValidation.SGEHEAT_13GEHEAT-1.SGEHEAT_13GEHEAT-1.Field.Soil
          SurfaceOrganicMatter: InitialResidueName=wheat_stubble; InitialResidueType=wheat; InitialResidueMass=500; InitialStandingFraction=0; InitialCPR=0; InitialCNR=100
          Plant Wheat
          MicroClimate: a_interception=0; b_interception=1; c_interception=0; d_interception=0; SoilHeatFluxFraction=0.4; MinimumHeightDiffForNewLayer=0; NightInterceptionFraction=0.5; ReferenceHeight=2
          Manager SowingFertiliser: same as NPIValidation.SGEHEAT_13GEHEAT-1.SGEHEAT_13GEHEAT-1.Field.SowingFertiliser
          Manager Harvesting
          Operations Sowing
            2015-04-29  [wheat].Sow(cultivar:"hartog", population:150, depth:50, rowSpacing:250);
          Report HarvestReport
        Manager LocationInfo: same as NPIField2019.Callington.Callington2019Base.LocationInfo
    Experiment Minnipa2015-TOS3
      Factors
        Factor Cultivar: Specification=[Sowing]
          Operations eaglehawk
            2015-05-15  [wheat].Sow(cultivar:"eaglehawk", population:150, depth:50, rowSpacing:250);
          Operations longsword
            2015-05-15  [wheat].Sow(cultivar:"longsword", population:150, depth:50, rowSpacing:250);
          Operations trojan
            2015-05-15  [wheat].Sow(cultivar:"trojan", population:150, depth:50, rowSpacing:250);
          Operations wedgetail
            2015-05-15  [wheat].Sow(cultivar:"wedgetail", population:150, depth:50, rowSpacing:250);
      Simulation Minnipa2015-TOS3
        Clock: Start=2015-05-14; End=2015-12-30
        Summary SummaryFile
        Weather: FileName=%root%/Tests/Validation/Wheat/met/Minnipa2015-TOS3.met
        SoilArbitrator
        Zone Field: same as NPIValidation.Temora2015-TOS4.Temora2015-TOS4.Field
        Manager LocationInfo: same as NPIField2019.Callington.Callington2019Base.LocationInfo
    Experiment Temora2016-TOS4
      Factors
        Factor Cultivar: Specification=[Sowing]
          Operations eaglehawk
            2016-05-16  [wheat].Sow(cultivar:"eaglehawk", population:150, depth:50, rowSpacing:250);
          Operations wedgetail
            2016-05-16  [wheat].Sow(cultivar:"wedgetail", population:150, depth:50, rowSpacing:250);
      Simulation Temora2016-TOS4
        Clock: Start=2016-05-15; End=2017-03-12
        Summary SummaryFile
        Weather: FileName=%root%/Tests/Validation/Wheat/met/Temora2016-TOS4.met
        SoilArbitrator
        Zone Field: Area=1; Slope=0; AspectAngle=0; Altitude=50
          Fertiliser
          Soil: same as NPIValidation.SGEHEAT_13GEHEAT-1.SGEHEAT_13GEHEAT-1.Field.Soil
          SurfaceOrganicMatter: InitialResidueName=wheat_stubble; InitialResidueType=wheat; InitialResidueMass=500; InitialStandingFraction=0; InitialCPR=0; InitialCNR=100
          Plant Wheat
          MicroClimate: a_interception=0; b_interception=1; c_interception=0; d_interception=0; SoilHeatFluxFraction=0.4; MinimumHeightDiffForNewLayer=0; NightInterceptionFraction=0.5; ReferenceHeight=2
          Manager SowingFertiliser: same as NPIValidation.SGEHEAT_13GEHEAT-1.SGEHEAT_13GEHEAT-1.Field.SowingFertiliser
          Manager Harvesting
          Operations Sowing
            2016-05-16  [wheat].Sow(cultivar:"hartog", population:150, depth:50, rowSpacing:250);
          Report HarvestReport
        Manager LocationInfo: same as NPIField2019.WaggaWagga.WaggaWagga2019Base.LocationInfo
    Experiment Hart2015-TOS1
      Factors
        Factor Cultivar: Specification=[Sowing]
          Operations trojan
            2015-04-10  [wheat].Sow(cultivar:"trojan", population:150, depth:50, rowSpacing:250);
          Operations wedgetail
            2015-04-10  [wheat].Sow(cultivar:"wedgetail", population:150, depth:50, rowSpacing:250);
      Simulation Hart2015-TOS1
        Clock: Start=2015-04-09; End=2016-02-04
        Summary SummaryFile
        Weather: FileName=%root%/Tests/Validation/Wheat/met/Hart2015-TOS1.met
        SoilArbitrator
        Zone Field: Area=1; Slope=0; AspectAngle=0; Altitude=50
          Fertiliser
          Soil: same as NPIValidation.SGEHEAT_13GEHEAT-1.SGEHEAT_13GEHEAT-1.Field.Soil
          SurfaceOrganicMatter: InitialResidueName=wheat_stubble; InitialResidueType=wheat; InitialResidueMass=500; InitialStandingFraction=0; InitialCPR=0; InitialCNR=100
          Plant Wheat
          MicroClimate: a_interception=0; b_interception=1; c_interception=0; d_interception=0; SoilHeatFluxFraction=0.4; MinimumHeightDiffForNewLayer=0; NightInterceptionFraction=0.5; ReferenceHeight=2
          Manager SowingFertiliser: same as NPIValidation.SGEHEAT_13GEHEAT-1.SGEHEAT_13GEHEAT-1.Field.SowingFertiliser
          Manager Harvesting
          Operations Sowing
            2015-04-10  [wheat].Sow(cultivar:"hartog", population:150, depth:50, rowSpacing:250);
          Report HarvestReport
        Manager LocationInfo: same as NPIValidation.BYIE_08RS.BYIE_08RS.LocationInfo
    Experiment Hart2015-TOS2
      Factors
        Factor Cultivar: Specification=[Sowing]
          Operations trojan
            2015-04-30  [wheat].Sow(cultivar:"trojan", population:150, depth:50, rowSpacing:250);
          Operations wedgetail
            2015-04-30  [wheat].Sow(cultivar:"wedgetail", population:150, depth:50, rowSpacing:250);
      Simulation Hart2015-TOS2
        Clock: Start=2015-04-29; End=2016-02-24
        Summary SummaryFile
        Weather: FileName=%root%/Tests/Validation/Wheat/met/Hart2015-TOS2.met
        SoilArbitrator
        Zone Field: Area=1; Slope=0; AspectAngle=0; Altitude=50
          Fertiliser
          Soil: same as NPIValidation.SGEHEAT_13GEHEAT-1.SGEHEAT_13GEHEAT-1.Field.Soil
          SurfaceOrganicMatter: InitialResidueName=wheat_stubble; InitialResidueType=wheat; InitialResidueMass=500; InitialStandingFraction=0; InitialCPR=0; InitialCNR=100
          Plant Wheat
          MicroClimate: a_interception=0; b_interception=1; c_interception=0; d_interception=0; SoilHeatFluxFraction=0.4; MinimumHeightDiffForNewLayer=0; NightInterceptionFraction=0.5; ReferenceHeight=2
          Manager SowingFertiliser: same as NPIValidation.SGEHEAT_13GEHEAT-1.SGEHEAT_13GEHEAT-1.Field.SowingFertiliser
          Manager Harvesting
          Operations Sowing
            2015-04-30  [wheat].Sow(cultivar:"hartog", population:150, depth:50, rowSpacing:250);
          Report HarvestReport
        Manager LocationInfo: same as NPIValidation.BYIE_08RS.BYIE_08RS.LocationInfo
    Experiment Hart2015-TOS3
      Factors
        Factor Cultivar: Specification=[Sowing]
          Operations trojan
            2015-05-15  [wheat].Sow(cultivar:"trojan", population:150, depth:50, rowSpacing:250);
          Operations wedgetail
            2015-05-15  [wheat].Sow(cultivar:"wedgetail", population:150, depth:50, rowSpacing:250);
      Simulation Hart2015-TOS3
        Clock: Start=2015-05-14; End=2016-03-10
        Summary SummaryFile
        Weather: FileName=%root%/Tests/Validation/Wheat/met/Hart2015-TOS3.met
        SoilArbitrator
        Zone Field: same as NPIValidation.Temora2015-TOS4.Temora2015-TOS4.Field
        Manager LocationInfo: same as NPIValidation.BYIE_08RS.BYIE_08RS.LocationInfo
    Experiment Inverleigh2013-TOS3
      Factors
        Factor Cultivar: Specification=[Sowing]
          Operations wedgetail
            2013-04-24  [wheat].Sow(cultivar:"wedgetail", population:150, depth:50, rowSpacing:250);
      Simulation Inverleigh2013-TOS3
        Clock: Start=2013-04-23; End=2014-02-18
        Summary SummaryFile
        Weather: FileName=%root%/Tests/Validation/Wheat/met/Inverleigh2013-TOS3.met
        SoilArbitrator
        Zone Field: Area=1; Slope=0; AspectAngle=0; Altitude=50
          Fertiliser
          Soil: same as NPIValidation.SGEHEAT_13GEHEAT-1.SGEHEAT_13GEHEAT-1.Field.Soil
          SurfaceOrganicMatter: InitialResidueName=wheat_stubble; InitialResidueType=wheat; InitialResidueMass=500; InitialStandingFraction=0; InitialCPR=0; InitialCNR=100
          Plant Wheat
          MicroClimate: a_interception=0; b_interception=1; c_interception=0; d_interception=0; SoilHeatFluxFraction=0.4; MinimumHeightDiffForNewLayer=0; NightInterceptionFraction=0.5; ReferenceHeight=2
          Manager SowingFertiliser: same as NPIValidation.SGEHEAT_13GEHEAT-1.SGEHEAT_13GEHEAT-1.Field.SowingFertiliser
          Manager Harvesting
          Operations Sowing
            2013-04-24  [wheat].Sow(cultivar:"hartog", population:150, depth:50, rowSpacing:250);
          Report HarvestReport
        Manager LocationInfo: same as NPIField2019.YanYean.YanYean2019Base.LocationInfo
    Experiment Inverleigh2013-TOS4
      Factors
        Factor Cultivar: Specification=[Sowing]
          Operations wedgetail
            2013-05-10  [wheat].Sow(cultivar:"wedgetail", population:150, depth:50, rowSpacing:250);
      Simulation Inverleigh2013-TOS4
        Clock: Start=2013-05-09; End=2014-03-06
        Summary SummaryFile
        Weather: FileName=%root%/Tests/Validation/Wheat/met/Inverleigh2013-TOS4.met
        SoilArbitrator
        Zone Field: Area=1; Slope=0; AspectAngle=0; Altitude=50
          Fertiliser
          Soil: same as NPIValidation.SGEHEAT_13GEHEAT-1.SGEHEAT_13GEHEAT-1.Field.Soil
          SurfaceOrganicMatter: InitialResidueName=wheat_stubble; InitialResidueType=wheat; InitialResidueMass=500; InitialStandingFraction=0; InitialCPR=0; InitialCNR=100
          Plant Wheat
          MicroClimate: a_interception=0; b_interception=1; c_interception=0; d_interception=0; SoilHeatFluxFraction=0.4; MinimumHeightDiffForNewLayer=0; NightInterceptionFraction=0.5; ReferenceHeight=2
          Manager SowingFertiliser: same as NPIValidation.SGEHEAT_13GEHEAT-1.SGEHEAT_13GEHEAT-1.Field.SowingFertiliser
          Manager Harvesting
          Operations Sowing
            2013-05-10  [wheat].Sow(cultivar:"hartog", population:150, depth:50, rowSpacing:250);
          Report HarvestReport
        Manager LocationInfo: same as NPIField2019.YanYean.YanYean2019Base.LocationInfo
  Folder CPTPhenology
    Memo
      A range of soon to be released cultivars have their phenology assesed each year at Plant and Food Research in Lincoln, New Zealand.  Each cultivar is planted on 4 sowing dates representing Autumn, Winter, Early Spring and Late Spring sowings. (approx April, June, Aug, Nov).  Each cultivar is observed for 3 years but a number of standards are included each year or for more than 3 years bacause of the value of the data they provided.
    Experiment CPTCultOtane
      Factors
        Factor Sow
          Specification=[Clock].StartDate = 2000-03-03,2000-05-15,2001-04-09,2001-06-15,2001-08-09,2002-05-15,2002-09-09,2003-05-21,2003-09-02,2004-05-28,2004-09-06,2005-04-04,2005-05-27,2005-09-05,2005-12-05,2006-05-10,2006-12-14,2007-04-24,2007-06-28,2007-09-13,2007-11-29,2008-04-11,2008-06-06,2008-09-11,2008-12-05,2009-03-20,2009-06-05,2009-08-24,2009-12-07,2010-03-30,2010-07-06,2010-10-04,2010-11-30,2011-03-30,2011-05-11,2011-09-09,2011-12-09,2012-04-05,2012-06-28,2012-09-25
      Simulation LincolnCPTOtane
        Clock: Start=1991-06-08; End=2013-07-01
        Summary summaryfile
        Weather: FileName=%root%/Tests/Validation/Wheat/met/lincoln.met
        Zone paddock: Area=1; Slope=0; AspectAngle=0; Altitude=50
          Irrigation
          Soil: SoilType=LincolnSoil; LocalName=Lincoln; Site=Lincoln; NearestTown=Unknown; Region=NZ; NaturalVegetation=Unknown; Latitude=0; Longitude=0
            Physical
              Thickness  BD   AirDry  LL15  DUL   SAT
              100        1.3  0.05    0.08  0.31  0.44
              200        1.3  0.05    0.07  0.3   0.44
              200        1.3  0.05    0.07  0.28  0.44
              200        1.3  0.05    0.09  0.31  0.44
              200        1.3  0.05    0.11  0.3   0.44
              200        1.3  0.05    0.16  0.28  0.44
              200        1.3  0.05    0.15  0.3   0.44
              200        1.3  0.05    0.12  0.34  0.44
              SoilCrop WheatSoil: LL=[0.08, 0.07, 0.07, 0.09, 0.11, 0.16, 0.15, 0.12]; KL=[0.06, 0.06, 0.06, 0.04, 0.03, 0.02, 0.02, 0.02]; XF=[1, 1, 1, 1, 0.6, 0.4, 0.4, 0.4]
            WaterBalance SoilWater: SummerDate=1-Nov; SummerU=7; SummerCona=3; WinterDate=1-Apr; WinterU=7; WinterCona=3; DiffusConst=40; DiffusSlope=16; Salb=0.2; CN2Bare=75; CNRed=20; CNCov=0.8; DischargeWidth=0; CatchmentArea=0; PSIDul=-100
              Thickness  SWCON  KLAT
              100        0.6    0
              200        0.6    0
              200        0.6    0
              200        0.6    0
              200        0.6    0
              200        0.6    0
              200        0.6    0
              200        0.6    0
            Organic: FOMCNRatio=0; CarbonUnits=Total
              Thickness  Carbon  SoilCNRatio  FBiom  FInert  FOM
              100        0.35    0            0.04   0.31    0
              200        0.27    0            0.03   0.31    0
              200        0.24    0            0.02   0.31    0
              200        0.16    0            0.01   0.31    0
              200        0.16    0            0.01   0.31    0
              200        0.3     0            0.01   0.25    0
              200        0.1     0            0.01   0.2     0
              200        0.1     0            0.01   0.2     0
            Chemical: Thickness=[100, 200, 200, 200, 200, 200, 200, 200]; PH=[8.5, 8.5, 8.6, 8.6, 8.6, 8.6, 8.6, 8.6]; PHUnits=Water
            Water: Thickness=[100, 200, 200, 200, 200, 200, 200, 200]; InitialValues=[0.27, 0.3, 0.28, 0.25, 0.24, 0.27, 0.27, 0.21]; FilledFromTop=false
            Nutrient
            Solute NO3: Thickness=[100, 200, 200, 200, 200, 200, 200, 200]; InitialValues=[24.9, 16, 9.8, 9.8, 2.1, 2.1, 2.1, 2.1]; InitialValuesUnits=ppm; WaterTableConcentration=0; D0=0; DepthConstant=0; MaxDepthSoluteAccessible=0; RunoffEffectivenessAtMovingSolute=0; MaxEffectiveRunoff=0
            Solute NH4: Thickness=[100, 200, 200, 200, 200, 200, 200, 200]; InitialValues=[1.3, 1, 1, 0.8, 0.8, 0.5, 0.5, 0.5]; InitialValuesUnits=ppm; WaterTableConcentration=0; D0=0; DepthConstant=0; MaxDepthSoluteAccessible=0; RunoffEffectivenessAtMovingSolute=0; MaxEffectiveRunoff=0
            Solute Urea: Thickness=[100, 200, 200, 200, 200, 200, 200, 200]; InitialValues=[0, 0, 0, 0, 0, 0, 0, 0]; InitialValuesUnits=kg/ha; WaterTableConcentration=0; D0=0; DepthConstant=0; MaxDepthSoluteAccessible=0; RunoffEffectivenessAtMovingSolute=0; MaxEffectiveRunoff=0
            SoilTemperature Temperature
          SurfaceOrganicMatter Surface Organic Matter: InitialResidueName=wheat_stubble; InitialResidueType=wheat; InitialResidueMass=1000; InitialStandingFraction=0; InitialCPR=0; InitialCNR=80
          Fertiliser
          MicroClimate: a_interception=0; b_interception=1; c_interception=0; d_interception=0; SoilHeatFluxFraction=0.4; MinimumHeightDiffForNewLayer=0; NightInterceptionFraction=0.5; ReferenceHeight=2
          Plant Wheat
          Report HarvestReport
          Manager SowAndHarvest
            Cultivar = Otane
```csharp
using APSIM.Core;
using Newtonsoft.Json;
using System.Xml.Serialization;
using APSIM.Shared.Utilities;
using Models.PMF;
using Models.Core;
using System;
using Models.PMF.Phen;
using Models.Soils;
        
namespace Models
{
    [Serializable] 
    [System.Xml.Serialization.XmlInclude(typeof(Model))]
    public class Script : Model, IStructureDependency
    {
        [Link] private Plant Wheat;
        [Link] private Clock Clock;
        [Link] private Simulation sim;
        [Link] private Summary Summary;
        [Link(Type = LinkType.Path, Path = "[Wheat].Phenology")]
        private Phenology phenology;
        public IStructure Structure { private get; set; }
        
        [Description("Cultivar")]
        public string Cultivar { get; set; }
        
        [JsonIgnore] public bool Sown { get; set; }
        [JsonIgnore] public bool Harvested { get; set; }
        [JsonIgnore] public bool EndSet { get; set; }
        

        

        [EventSubscribe("StartOfSimulation")]
        private void OnSimulationCommencing(object sender, EventArgs e)
        {
            Sown = false;
            Harvested = false;
            EndSet = false;
        }
        
        [EventSubscribe("DoManagement")]
        private void OnDoManagement(object sender, EventArgs e)
        {
            if (Sown == false)
            {
                Wheat.Sow(population: 200, cultivar: Cultivar, depth: 15, rowSpacing: 150, budNumber: 1);
                Sown = true;
            }
            
            if (phenology.CurrentPhase.Name == "ReadyForHarvesting")
            {
                Wheat.Harvest();
                Wheat.EndCrop();
                Harvested = true;
                Summary.WriteMessage(this, "Flowering reached so setting end date to stop simulation", MessageType.Diagnostic);
            }
            
            if ((Harvested == true) && (EndSet == false))
            {
                Structure.Set("Clock.EndDate", Clock.Today.AddDays(1), relativeTo: sim);
                EndSet = true;
            }
        }
    }
}
```
        SoilArbitrator Soil Arbitrator
        Manager LocationInfo
          Country = New Zealand
          State = Canterbury Region
          Region =
          script: same as in FARAwardPhenology.FARAwardPhenology.Simulation.LocationInfo
    Experiment CPTCultAmarok
      Factors
        Factor Sow
          Specification=[Clock].StartDate = 2001-04-09,2001-06-15,2002-03-07,2002-05-15,2003-03-14,2003-05-21,2004-03-23,2004-05-28,2005-04-04,2005-05-27,2005-12-05,2006-03-13,2006-05-10,2007-04-24,2007-06-28,2008-04-11,2008-06-06,2009-03-20,2009-06-05,2009-08-24,2010-03-30,2010-07-06,2011-03-30,2011-05-11,2012-04-05,2012-06-28
      Simulation LincolnCPTAmarok
        Clock: Start=1991-06-08; End=2013-07-01
        Summary summaryfile
        Weather: FileName=%root%/Tests/Validation/Wheat/met/lincoln.met
        Zone paddock: Area=1; Slope=0; AspectAngle=0; Altitude=50
          Irrigation
          Soil: same as CPTPhenology.CPTCultOtane.LincolnCPTOtane.paddock.Soil
          SurfaceOrganicMatter Surface Organic Matter: InitialResidueName=wheat_stubble; InitialResidueType=wheat; InitialResidueMass=1000; InitialStandingFraction=0; InitialCPR=0; InitialCNR=80
          Fertiliser
          MicroClimate: a_interception=0; b_interception=1; c_interception=0; d_interception=0; SoilHeatFluxFraction=0.4; MinimumHeightDiffForNewLayer=0; NightInterceptionFraction=0.5; ReferenceHeight=2
          Plant Wheat
          Report HarvestReport
          Manager SowAndHarvest
            Cultivar = Amarok
            script: same as in CPTPhenology.CPTCultOtane.LincolnCPTOtane.paddock.SowAndHarvest
        SoilArbitrator Soil Arbitrator
        Manager LocationInfo: same as CPTPhenology.CPTCultOtane.LincolnCPTOtane.LocationInfo
    Experiment CPTCultClaire
      Factors
        Factor Sow
          Specification=[Clock].StartDate = 2000-03-03,2000-05-15,2001-04-09,2001-06-15,2001-08-09,2002-03-07,2002-05-15,2002-09-09,2003-03-14,2003-05-21,2003-09-02,2004-03-23,2004-05-28,2004-09-06,2005-04-04,2005-05-27,2005-09-05,2005-12-05,2006-03-13,2006-05-10,2006-12-14,2007-04-24,2007-06-28,2007-09-13,2007-11-29,2008-04-11,2008-06-06,2008-09-11,2008-12-05,2009-03-20,2009-06-05,2009-08-24,2009-12-07,2010-03-30,2010-07-06,2010-10-04,2010-11-30,2011-03-30,2011-05-11,2011-09-09,2011-12-09,2012-04-05,2012-06-28
      Simulation LincolnCPTClaire
        Clock: Start=1991-06-08; End=2013-07-01
        Summary summaryfile
        Weather: FileName=%root%/Tests/Validation/Wheat/met/lincoln.met
        Zone paddock: Area=1; Slope=0; AspectAngle=0; Altitude=50
          Irrigation
          Soil: same as CPTPhenology.CPTCultOtane.LincolnCPTOtane.paddock.Soil
          SurfaceOrganicMatter Surface Organic Matter: InitialResidueName=wheat_stubble; InitialResidueType=wheat; InitialResidueMass=1000; InitialStandingFraction=0; InitialCPR=0; InitialCNR=80
          Fertiliser
          MicroClimate: a_interception=0; b_interception=1; c_interception=0; d_interception=0; SoilHeatFluxFraction=0.4; MinimumHeightDiffForNewLayer=0; NightInterceptionFraction=0.5; ReferenceHeight=2
          Plant Wheat
          Report HarvestReport
          Manager SowAndHarvest
            Cultivar = Claire
            script: same as in CPTPhenology.CPTCultOtane.LincolnCPTOtane.paddock.SowAndHarvest
        SoilArbitrator Soil Arbitrator
        Manager LocationInfo: same as CPTPhenology.CPTCultOtane.LincolnCPTOtane.LocationInfo
    Experiment CPTCultWakanui
      Factors
        Factor Sow
          Specification=[Clock].StartDate = 2005-04-04,2005-05-27,2006-03-13,2006-05-10,2008-04-11,2008-06-06
      Simulation LincolnCPTWakanui
        Clock: Start=1991-06-08; End=2013-07-01
        Summary summaryfile
        Weather: FileName=%root%/Tests/Validation/Wheat/met/lincoln.met
        Zone paddock: Area=1; Slope=0; AspectAngle=0; Altitude=50
          Irrigation
          Soil: same as CPTPhenology.CPTCultOtane.LincolnCPTOtane.paddock.Soil
          SurfaceOrganicMatter Surface Organic Matter: InitialResidueName=wheat_stubble; InitialResidueType=wheat; InitialResidueMass=1000; InitialStandingFraction=0; InitialCPR=0; InitialCNR=80
          Fertiliser
          MicroClimate: a_interception=0; b_interception=1; c_interception=0; d_interception=0; SoilHeatFluxFraction=0.4; MinimumHeightDiffForNewLayer=0; NightInterceptionFraction=0.5; ReferenceHeight=2
          Plant Wheat
          Report HarvestReport
          Manager SowAndHarvest
            Cultivar = Wakanui
            script: same as in CPTPhenology.CPTCultOtane.LincolnCPTOtane.paddock.SowAndHarvest
        SoilArbitrator Soil Arbitrator
        Manager LocationInfo: same as CPTPhenology.CPTCultOtane.LincolnCPTOtane.LocationInfo
    Experiment CPTCultBattenSpring
      Factors
        Factor Sow
          Specification=[Clock].StartDate = 2009-03-20,2009-06-05,2009-08-24,2010-03-30,2010-07-06,2010-10-04,2010-11-30,2011-03-30,2011-05-11,2011-09-09,2012-04-05,2012-06-28,2012-09-25
      Simulation LincolnCPTBattenSpring
        Clock: Start=1991-06-08; End=2013-07-01
        Summary summaryfile
        Weather: FileName=%root%/Tests/Validation/Wheat/met/lincoln.met
        Zone paddock: Area=1; Slope=0; AspectAngle=0; Altitude=50
          Irrigation
          Soil: same as CPTPhenology.CPTCultOtane.LincolnCPTOtane.paddock.Soil
          SurfaceOrganicMatter Surface Organic Matter: InitialResidueName=wheat_stubble; InitialResidueType=wheat; InitialResidueMass=1000; InitialStandingFraction=0; InitialCPR=0; InitialCNR=80
          Fertiliser
          MicroClimate: a_interception=0; b_interception=1; c_interception=0; d_interception=0; SoilHeatFluxFraction=0.4; MinimumHeightDiffForNewLayer=0; NightInterceptionFraction=0.5; ReferenceHeight=2
          Plant Wheat
          Report HarvestReport
          Manager SowAndHarvest
            Cultivar = BattenSpring
            script: same as in CPTPhenology.CPTCultOtane.LincolnCPTOtane.paddock.SowAndHarvest
        SoilArbitrator Soil Arbitrator
        Manager LocationInfo: same as CPTPhenology.CPTCultOtane.LincolnCPTOtane.LocationInfo
    Experiment CPTCultBattenWinter
      Factors
        Factor Sow
          Specification=[Clock].StartDate = 2009-03-20,2009-06-05,2009-08-24,2010-03-30,2010-07-06,2010-11-30,2011-03-30,2011-05-11,2011-09-09,2012-04-05,2012-06-28,2012-09-25
      Simulation LincolnCPTBattenWinter
        Clock: Start=1991-06-08; End=2013-07-01
        Summary summaryfile
        Weather: FileName=%root%/Tests/Validation/Wheat/met/lincoln.met
        Zone paddock: Area=1; Slope=0; AspectAngle=0; Altitude=50
          Irrigation
          Soil: same as CPTPhenology.CPTCultOtane.LincolnCPTOtane.paddock.Soil
          SurfaceOrganicMatter Surface Organic Matter: InitialResidueName=wheat_stubble; InitialResidueType=wheat; InitialResidueMass=1000; InitialStandingFraction=0; InitialCPR=0; InitialCNR=80
          Fertiliser
          MicroClimate: a_interception=0; b_interception=1; c_interception=0; d_interception=0; SoilHeatFluxFraction=0.4; MinimumHeightDiffForNewLayer=0; NightInterceptionFraction=0.5; ReferenceHeight=2
          Plant Wheat
          Report HarvestReport
          Manager SowAndHarvest
            Cultivar = BattenWinter
            script: same as in CPTPhenology.CPTCultOtane.LincolnCPTOtane.paddock.SowAndHarvest
        SoilArbitrator Soil Arbitrator
        Manager LocationInfo: same as CPTPhenology.CPTCultOtane.LincolnCPTOtane.LocationInfo
    Experiment CPTCultYitpi
      Factors
        Permutation
          Factor Sow
            Specification=[Clock].StartDate = 2009-03-20,2009-06-05,2009-08-24,2010-03-30,2010-07-06,2010-10-04,2010-11-30,2011-03-30,2011-05-11,2011-09-09,2012-04-05,2012-06-28,2012-09-25
          Factor Cv: Specification=[SowAndHarvest].Script.Cultivar = Yitpi
      Simulation LincolnCPTYitpi
        Clock: Start=1991-06-08; End=2013-07-01
        Summary summaryfile
        Weather: FileName=%root%/Tests/Validation/Wheat/met/lincoln.met
        Zone paddock: Area=1; Slope=0; AspectAngle=0; Altitude=50
          Irrigation
          Soil: same as CPTPhenology.CPTCultOtane.LincolnCPTOtane.paddock.Soil
          SurfaceOrganicMatter Surface Organic Matter: InitialResidueName=wheat_stubble; InitialResidueType=wheat; InitialResidueMass=1000; InitialStandingFraction=0; InitialCPR=0; InitialCNR=80
          Fertiliser
          MicroClimate: a_interception=0; b_interception=1; c_interception=0; d_interception=0; SoilHeatFluxFraction=0.4; MinimumHeightDiffForNewLayer=0; NightInterceptionFraction=0.5; ReferenceHeight=2
          Plant Wheat
          Report HarvestReport
          Manager SowAndHarvest
            Cultivar = Yitpi
            script: same as in CPTPhenology.CPTCultOtane.LincolnCPTOtane.paddock.SowAndHarvest
        SoilArbitrator Soil Arbitrator
        Manager LocationInfo: same as CPTPhenology.CPTCultOtane.LincolnCPTOtane.LocationInfo
    Experiment CPTCultSunco
      Factors
        Factor Sow
          Specification=[Clock].StartDate = 2009-03-20,2009-06-05,2009-08-24,2010-03-30,2010-07-06,2010-10-04,2010-11-30,2011-03-30,2011-05-11,2011-09-09,2012-04-05,2012-06-28,2012-09-25
      Simulation LincolnCPTSunco
        Clock: Start=1991-06-08; End=2013-07-01
        Summary summaryfile
        Weather: FileName=%root%/Tests/Validation/Wheat/met/lincoln.met
        Zone paddock: Area=1; Slope=0; AspectAngle=0; Altitude=50
          Irrigation
          Soil: same as CPTPhenology.CPTCultOtane.LincolnCPTOtane.paddock.Soil
          SurfaceOrganicMatter Surface Organic Matter: InitialResidueName=wheat_stubble; InitialResidueType=wheat; InitialResidueMass=1000; InitialStandingFraction=0; InitialCPR=0; InitialCNR=80
          Fertiliser
          MicroClimate: a_interception=0; b_interception=1; c_interception=0; d_interception=0; SoilHeatFluxFraction=0.4; MinimumHeightDiffForNewLayer=0; NightInterceptionFraction=0.5; ReferenceHeight=2
          Plant Wheat
          Report HarvestReport
          Manager SowAndHarvest
            Cultivar = Sunco
            script: same as in CPTPhenology.CPTCultOtane.LincolnCPTOtane.paddock.SowAndHarvest
        SoilArbitrator Soil Arbitrator
        Manager LocationInfo: same as CPTPhenology.CPTCultOtane.LincolnCPTOtane.LocationInfo
    Experiment CPTCultMcCubbin
      Factors
        Factor Sow
          Specification=[Clock].StartDate = 2009-03-20,2009-06-05,2009-08-24,2010-03-30,2010-07-06,2010-10-04,2010-11-30,2011-03-30,2011-05-11,2011-09-09,2012-04-05,2012-06-28,2012-09-25
      Simulation LincolnCPTMcCubbin
        Clock: Start=1991-06-08; End=2013-07-01
        Summary summaryfile
        Weather: FileName=%root%/Tests/Validation/Wheat/met/lincoln.met
        Zone paddock: Area=1; Slope=0; AspectAngle=0; Altitude=50
          Irrigation
          Soil: same as CPTPhenology.CPTCultOtane.LincolnCPTOtane.paddock.Soil
          SurfaceOrganicMatter Surface Organic Matter: InitialResidueName=wheat_stubble; InitialResidueType=wheat; InitialResidueMass=1000; InitialStandingFraction=0; InitialCPR=0; InitialCNR=80
          Fertiliser
          MicroClimate: a_interception=0; b_interception=1; c_interception=0; d_interception=0; SoilHeatFluxFraction=0.4; MinimumHeightDiffForNewLayer=0; NightInterceptionFraction=0.5; ReferenceHeight=2
          Plant Wheat
          Report HarvestReport
          Manager SowAndHarvest
            Cultivar = McCubbin
            script: same as in CPTPhenology.CPTCultOtane.LincolnCPTOtane.paddock.SowAndHarvest
        SoilArbitrator Soil Arbitrator
        Manager LocationInfo: same as CPTPhenology.CPTCultOtane.LincolnCPTOtane.LocationInfo
    Experiment CPTCultMacKellar
      Factors
        Factor Sow
          Specification=[Clock].StartDate = 2009-03-20,2009-06-05,2009-08-24,2010-03-30,2010-07-06,2010-10-04,2010-11-30,2011-03-30,2011-05-11,2011-09-09,2012-04-05,2012-06-28,2012-09-25
      Simulation LincolnCPTMacKellar
        Clock: Start=1991-06-08; End=2013-07-01
        Summary summaryfile
        Weather: FileName=%root%/Tests/Validation/Wheat/met/lincoln.met
        Zone paddock: Area=1; Slope=0; AspectAngle=0; Altitude=50
          Irrigation
          Soil: same as CPTPhenology.CPTCultOtane.LincolnCPTOtane.paddock.Soil
          SurfaceOrganicMatter Surface Organic Matter: InitialResidueName=wheat_stubble; InitialResidueType=wheat; InitialResidueMass=1000; InitialStandingFraction=0; InitialCPR=0; InitialCNR=80
          Fertiliser
          MicroClimate: a_interception=0; b_interception=1; c_interception=0; d_interception=0; SoilHeatFluxFraction=0.4; MinimumHeightDiffForNewLayer=0; NightInterceptionFraction=0.5; ReferenceHeight=2
          Plant Wheat
          Report HarvestReport
          Manager SowAndHarvest
            Cultivar = MacKellar
            script: same as in CPTPhenology.CPTCultOtane.LincolnCPTOtane.paddock.SowAndHarvest
        SoilArbitrator Soil Arbitrator
        Manager LocationInfo: same as CPTPhenology.CPTCultOtane.LincolnCPTOtane.LocationInfo
    Experiment CPTCultJanz
      Factors
        Permutation
          Factor Sow
            Specification=[Clock].StartDate = 2009-03-20,2009-06-05,2009-08-24,2010-03-30,2010-07-06,2010-10-04,2010-11-30,2011-03-30,2011-05-11,2011-09-09,2012-04-05,2012-06-28,2012-09-25
          Factor Cv: Specification=[SowAndHarvest].Script.Cultivar = Janz
      Simulation LincolnCPTJanz
        Clock: Start=1991-06-08; End=2013-07-01
        Summary summaryfile
        Weather: FileName=%root%/Tests/Validation/Wheat/met/lincoln.met
        Zone paddock: Area=1; Slope=0; AspectAngle=0; Altitude=50
          Irrigation
          Soil: same as CPTPhenology.CPTCultOtane.LincolnCPTOtane.paddock.Soil
          SurfaceOrganicMatter Surface Organic Matter: InitialResidueName=wheat_stubble; InitialResidueType=wheat; InitialResidueMass=1000; InitialStandingFraction=0; InitialCPR=0; InitialCNR=80
          Fertiliser
          MicroClimate: a_interception=0; b_interception=1; c_interception=0; d_interception=0; SoilHeatFluxFraction=0.4; MinimumHeightDiffForNewLayer=0; NightInterceptionFraction=0.5; ReferenceHeight=2
          Plant Wheat
          Report HarvestReport
          Manager SowAndHarvest
            Cultivar = Janz
            script: same as in CPTPhenology.CPTCultOtane.LincolnCPTOtane.paddock.SowAndHarvest
        SoilArbitrator Soil Arbitrator
        Manager LocationInfo: same as CPTPhenology.CPTCultOtane.LincolnCPTOtane.LocationInfo
    Experiment CPTCultLang
      Factors
        Factor Sow
          Specification=[Clock].StartDate = 2009-03-20,2009-06-05,2009-08-24,2010-03-30,2010-07-06,2010-10-04,2010-11-30,2011-03-30,2011-05-11,2011-09-09,2012-04-05,2012-06-28,2012-09-25
      Simulation LincolnCPTLang
        Clock: Start=1991-06-08; End=2013-07-01
        Summary summaryfile
        Weather: FileName=%root%/Tests/Validation/Wheat/met/lincoln.met
        Zone paddock: Area=1; Slope=0; AspectAngle=0; Altitude=50
          Irrigation
          Soil: same as CPTPhenology.CPTCultOtane.LincolnCPTOtane.paddock.Soil
          SurfaceOrganicMatter Surface Organic Matter: InitialResidueName=wheat_stubble; InitialResidueType=wheat; InitialResidueMass=1000; InitialStandingFraction=0; InitialCPR=0; InitialCNR=80
          Fertiliser
          MicroClimate: a_interception=0; b_interception=1; c_interception=0; d_interception=0; SoilHeatFluxFraction=0.4; MinimumHeightDiffForNewLayer=0; NightInterceptionFraction=0.5; ReferenceHeight=2
          Plant Wheat
          Report HarvestReport
          Manager SowAndHarvest
            Cultivar = Lang
            script: same as in CPTPhenology.CPTCultOtane.LincolnCPTOtane.paddock.SowAndHarvest
        SoilArbitrator Soil Arbitrator
        Manager LocationInfo: same as CPTPhenology.CPTCultOtane.LincolnCPTOtane.LocationInfo
    Experiment CPTCultH45
      Factors
        Factor Sow
          Specification=[Clock].StartDate = 2009-03-20,2009-06-05,2009-08-24,2010-03-30,2010-07-06,2010-10-04,2010-11-30,2011-03-30,2011-05-11,2011-09-09,2012-04-05,2012-06-28,2012-09-25
      Simulation LincolnCPTH45
        Clock: Start=1991-06-08; End=2013-07-01
        Summary summaryfile
        Weather: FileName=%root%/Tests/Validation/Wheat/met/lincoln.met
        Zone paddock: Area=1; Slope=0; AspectAngle=0; Altitude=50
          Irrigation
          Soil: same as CPTPhenology.CPTCultOtane.LincolnCPTOtane.paddock.Soil
          SurfaceOrganicMatter Surface Organic Matter: InitialResidueName=wheat_stubble; InitialResidueType=wheat; InitialResidueMass=1000; InitialStandingFraction=0; InitialCPR=0; InitialCNR=80
          Fertiliser
          MicroClimate: a_interception=0; b_interception=1; c_interception=0; d_interception=0; SoilHeatFluxFraction=0.4; MinimumHeightDiffForNewLayer=0; NightInterceptionFraction=0.5; ReferenceHeight=2
          Plant Wheat
          Report HarvestReport
          Manager SowAndHarvest
            Cultivar = H45
            script: same as in CPTPhenology.CPTCultOtane.LincolnCPTOtane.paddock.SowAndHarvest
        SoilArbitrator Soil Arbitrator
        Manager LocationInfo: same as CPTPhenology.CPTCultOtane.LincolnCPTOtane.LocationInfo
  Folder ControlledEnvironment
    Experiment LaTrobeCE
      Factors
        Permutation
          Factor Treat
            CompositeFactor LN
              Specifications:
                [Weather]
                [SowingRule].Script.SowDate=2-Nov
                [SowingRule].Script.Treat=LN
                [Clock].StartDate=2018-11-02
                [Clock].EndDate=2019-04-22
              Weather LN: FileName=%root%/Tests/Validation/Wheat/met/LN.met
            CompositeFactor LV
              Specifications:
                [Weather]
                [SowingRule].Script.SowDate=2-Nov
                [SowingRule].Script.Treat=LV
                [Clock].StartDate=2018-11-02
                [Clock].EndDate=2019-03-24
              Weather LV: FileName=%root%/Tests/Validation/Wheat/met/LV.met
            CompositeFactor SN
              Specifications:
                [Weather]
                [SowingRule].Script.SowDate=6-Jul
                [SowingRule].Script.Treat=SN
                [Clock].StartDate=2018-07-06
                [Clock].EndDate=2019-04-22
              Weather SN: FileName=%root%/Tests/Validation/Wheat/met/SN.met
            CompositeFactor SV
              Specifications:
                [Weather]
                [SowingRule].Script.SowDate=4-Aug
                [SowingRule].Script.Treat=SV
                [Clock].StartDate=2018-08-04
                [Clock].EndDate=2019-04-7
              Weather SV: FileName=%root%/Tests/Validation/Wheat/met/SV.met
          Factor CV
            Specification=[SowingRule].Script.CultivarName = Adv08_0008, Bennett, Axe, Beaufort, Bolac, Braewood, Calingiri, Catalina, Condo, Crusader, CSIROW002, CSIROW003, CSIROW005, CSIROW007, CSIROW011, CSIROW018, CSIROW021, CSIROW023, CSIROW027, CSIROW029, CSIROW073, CSIROW077, CSIROW087, CSIROW102, CSIROW105, Cutlass, Derrimut, Eaglehawk, Ellison, Emu_Rock, Forrest, Gauntlet, Gregory, Grenade, H45, Hume, Janz, Kellalac, Kittyhawk, Lancer, Longsword, Mace, Magenta, Manning, Merinda, Mitch, Nighthawk, Ouyen, Peake, Revenue, Rosella, Scepter, Scout, Scythe, Spitfire, Strzelecki, Sunbee, Sunbri, Sunlamb, Sunstate, Suntop, Trojan, Illabo, Wedgetail, Whistler, Wills, Wyalkatchem, Yitpi, Young
          Factor Durat: Specification=[SowingRule].Script.TransitionWeek = 9
      Simulation CEBase
        Clock: Start=2000-01-01; End=2000-12-31
        Weather: FileName=%root%/Tests/Validation/Wheat/met/.met
        Summary SummaryFile
        SoilArbitrator
        Zone Field: Area=1; Slope=0; AspectAngle=0; Altitude=50
          Fertiliser
          Soil: ASCOrder=Vertosol; ASCSubOrder=Black; SoilType=Clay; Site=Norwin; NearestTown=Norwin; Region=Darling Downs and Granite Belt; State=Queensland; Country=Australia; NaturalVegetation=Qld. Bluegrass, possible Qld. Blue gum; ApsoilNumber=900; Latitude=-27.5818; Longitude=151.3202; LocationAccuracy=+/- 20m
            DataSource=CSIRO Sustainable Ecosystems, Toowoomba; Characteriesd as part of the GRDC funded project"Doing it better, doing it smarter, managing soil water in Australian agriculture' 2011
            Comments=OC, CLL for all crops estimated-based on Bongeen Mywybilla Soil No1
            Physical: same as NPIValidation.SGEHEAT_13GEHEAT-1.SGEHEAT_13GEHEAT-1.Field.Soil.Physical
            WaterBalance SoilWater: same as NPIValidation.SGEHEAT_13GEHEAT-1.SGEHEAT_13GEHEAT-1.Field.Soil.SoilWater
            Organic: FOMCNRatio=40; CarbonUnits=Total
              Thickness  Carbon  SoilCNRatio  FBiom  FInert  FOM
              150        1.2     12           0.04   0.4     347.129
              150        0.96    12           0.02   0.6     270.344
              300        0.6     12           0.02   0.8     163.972
              300        0.3     12           0.02   1       99.4541
              300        0.18    12           0.01   1       60.322
              300        0.12    12           0.01   1       36.5871
              300        0.12    12           0.01   1       22.1912
            Chemical: Thickness=[150, 150, 300, 300, 300, 300, 300]; PH=[8, 8, 8, 8, 8, 8, 8]; PHUnits=Water
            Water: Thickness=[150, 150, 300, 300, 300, 300, 300]; InitialValues=[0.521, 0.4967, 0.4884, 0.4803, 0.4716, 0.4571, 0.4523]; FilledFromTop=false
            Nutrient
            Solute NO3: same as NPIValidation.SGEHEAT_13GEHEAT-1.SGEHEAT_13GEHEAT-1.Field.Soil.NO3
            Solute NH4: same as NPIValidation.SGEHEAT_13GEHEAT-1.SGEHEAT_13GEHEAT-1.Field.Soil.NH4
            Solute Urea: same as FARAwardPhenology.FARAwardPhenology.Simulation.Field.Soil.Urea
            SoilTemperature Temperature
          SurfaceOrganicMatter: InitialResidueName=wheat_stubble; InitialResidueType=wheat; InitialResidueMass=500; InitialStandingFraction=0; InitialCPR=0; InitialCNR=100
          Plant Wheat
          MicroClimate: a_interception=0; b_interception=1; c_interception=0; d_interception=0; SoilHeatFluxFraction=0.4; MinimumHeightDiffForNewLayer=0; NightInterceptionFraction=0.5; ReferenceHeight=2
          Manager SowingFertiliser
            Amount = 160
            CropName = wheat
            script: same as in NPIField2019.WaggaWagga.WaggaWagga2019Base.Field.SowingFertiliser
          Manager Harvesting
          Manager SowingRule
            SowDate =
            Treat =
            CultivarName =
            SowingDepth = 25
            RowSpacing = 750
            Population = 6
            TransitionWeek = 0
            FilePath = %root%\Tests\Validation\Wheat\inputs\LaTrobeEmergenceDates.csv
```csharp
using Newtonsoft.Json;
using System.Globalization;
using System.Data;
using System.Xml.Serialization;
using Models;
using System.Text;
using System.Collections.Generic;
using Models.Interfaces;
using System;
using Models.Core;
using Models.PMF;
using Models.Soils;
using Models.Utilities;
using APSIM.Shared.Utilities;

namespace Models
{
    [Serializable]
    public class Script : Model
    {
        [Link] Clock Clock;
        [Link] Fertiliser Fertiliser;
        [Link] Summary Summary;
        [Link] Soil Soil;
        [Link] Plant Wheat;
        [Link] Simulation Simulation;
        Accumulator accumulatedRain;
        
        [Description("Sowing date (d-mmm)")]
        public string SowDate { get; set; }
        [Description("Treatment Name")]
        public string Treat { get; set; }
        [Display(Type = DisplayType.CultivarName)]
        [Description("Cultivar to be sown")]
        public string CultivarName { get; set; }
        [Description("Sowing depth (mm)")]
        public double SowingDepth { get; set; }
        [Description("Row spacing (mm)")]
        public double RowSpacing { get; set; }
        [Description("Plant population (/m2)")]
        public double Population { get; set; }
        [Description("Treatment duration (Weeks)")]
        public double TransitionWeek { get; set; }
        [Description("Emergence Date File Path")]
        public string FilePath {get; set;}

        private DateTime EmergenceDate {get; set;}
        private string EmergenceString {get; set;}

        [JsonIgnore] private DataTable EmergDates{ get; set; }

        [EventSubscribe("StartOfSimulation")]
        private void OnStartOfSimulation(object sender, EventArgs e)
        {
            
            string fullFileName = PathUtilities.GetAbsolutePath(FilePath, Simulation.FileName);
            
            ApsimTextFile textFile = new ApsimTextFile();
            textFile.Open(fullFileName);
            EmergDates = textFile.ToTable();
            textFile.Close();
        }

        [EventSubscribe("DoManagement")]
        private void OnDoManagement(object sender, EventArgs e)
        {
            if (DateUtilities.WithinDates(SowDate, Clock.Today, SowDate))
            {
                foreach (DataRow row in EmergDates.Rows)
                {
                    string Env = Convert.ToString(row["Environment"]);
                    if (Env == Treat)
                    {
                        EmergenceDate = Convert.ToDateTime(row[CultivarName]);
                        EmergenceString = EmergenceDate.ToString("dd-MMM", CultureInfo.InvariantCulture);
                    }
                }

                Wheat.Sow(population: Population, cultivar: CultivarName, depth: SowingDepth, rowSpacing: RowSpacing);    
                Wheat.Phenology.SetPhaseCompletionDate(EmergenceString,"Emerging");
            }
        
        }
        
    }
}
```
          Report DailyReport
          Report HarvestReport
        Manager LocationInfo
          Country =
          State =
          Region =
          script: same as in FARAwardPhenology.FARAwardPhenology.Simulation.LocationInfo
    Experiment PalmerstonNorthCE
      Factors
        Permutation
          Factor Treat
            CompositeFactor 5oC8h
              Specifications:
                [Experiment].Script.TreatTemp = 5.0
                [Experiment].Script.TreatPp = 8.0
            CompositeFactor 5oC16h
              Specifications:
                [Experiment].Script.TreatTemp = 5.0
                [Experiment].Script.TreatPp = 16.0
            CompositeFactor 8oC8h
              Specifications:
                [Experiment].Script.TreatTemp = 8.0
                [Experiment].Script.TreatPp = 8.0
            CompositeFactor 8oC16h
              Specifications:
                [Experiment].Script.TreatTemp = 8.0
                [Experiment].Script.TreatPp = 16.0
            CompositeFactor 11oC8h
              Specifications:
                [Experiment].Script.TreatTemp = 16.0
                [Experiment].Script.TreatPp = 8.0
            CompositeFactor 11oC16h
              Specifications:
                [Experiment].Script.TreatTemp = 16.0
                [Experiment].Script.TreatPp = 16.0
            CompositeFactor 25oC8h
              Specifications:
                [Experiment].Script.TreatTemp = 23.6
                [Experiment].Script.TreatPp = 8.0
            CompositeFactor 1oC0h
              Specifications:
                [Experiment].Script.TreatTemp = 1.0
                [Experiment].Script.TreatPp = 16
          Factor Cv
            CompositeFactor Winter: Specifications=[Experiment].Script.CultivarName=BattenWinter
            CompositeFactor Spring: Specifications=[Experiment].Script.CultivarName=BattenSpring
          Factor Durat
            Specification=[Experiment].Script.TransitionWeek = 0,1,2,3,4,5,6,7,8,9,10,11,12
      Simulation PNGrowthRooms
        Clock: Start=2000-01-01; End=2000-12-31
        Summary SummaryFile
        SoilArbitrator
        ControlledEnvironment: MaxT=23.6; MinT=23.6; Rain=0; Radn=17.64; PanEvap=5; VP=2; Wind=3; CO2=350; AirPressure=1010; DiffuseFraction=0; Latitude=-27; Longitude=0; DayLength=16; SunRise=0; TempLag=0
        Zone Field: Area=1; Slope=0; AspectAngle=0; Altitude=50
          Fertiliser
          Soil: same as ControlledEnvironment.LaTrobeCE.CEBase.Field.Soil
          SurfaceOrganicMatter: InitialResidueName=wheat_stubble; InitialResidueType=wheat; InitialResidueMass=500; InitialStandingFraction=0; InitialCPR=0; InitialCNR=100
          Plant Wheat
          MicroClimate: a_interception=0; b_interception=1; c_interception=0; d_interception=0; SoilHeatFluxFraction=0.4; MinimumHeightDiffForNewLayer=0; NightInterceptionFraction=0.5; ReferenceHeight=2
          Manager Experiment
            CultivarName =
            SowingDepth = 100
            TransitionWeek = 0
            TreatTemp = 0
            TreatPp = 0
```csharp
using Models.PMF.Phen;
using APSIM.Shared.Utilities;
using Models.Utilities;
using Models.Soils;
using Models.PMF;
using Models.Core;
using System;
using Models.Climate;
using System.Globalization;

namespace Models
{
    [Serializable]
    public class Script : Model
    {
        [Link] private Clock clock;
        [Link] private Summary summary;
        [Link] private Plant wheat;
        [Link] private ControlledEnvironment ci;
        [Link]
        private Phenology phenology;

        [Display(Type = DisplayType.CultivarName)]
        [Description("Cultivar to be sown")]
        public string CultivarName { get; set; }
        [Description("Sowing depth (mm)")]
        public double SowingDepth { get; set; }
        [Description("Treatment duration (Weeks)")]
        public double TransitionWeek { get; set; }
        [Description("Treatment temperature (oC)")]
        public double TreatTemp { get; set; }
        [Description("Treatment photoperiod (h)")]
        public double TreatPp { get; set; }
        private double DAS {get; set;}
        private bool FirstDay = true;
        private double Weeks {get; set;}
        private bool Transitioned = false;
        private bool Emerged = false;

        [EventSubscribe("PreparingNewWeatherData")]
        private void OnPreparingNewWeatherData(object sender, EventArgs e)
        {
            if (FirstDay)
            {
                wheat.Sow(population: 100, cultivar: CultivarName, depth: SowingDepth, rowSpacing: 150);    
                FirstDay = false;
                summary.WriteMessage(this,"Wheat crop sown", MessageType.Diagnostic);
            }

            if((phenology.AccumulatedTT >= 90)&&(Emerged==false))
            {
                wheat.Phenology.SetPhaseCompletionDate(clock.Today.ToString("dd-MMM", CultureInfo.InvariantCulture),"Emerging");
                Emerged =true;
            }

            DAS += 1;
            Weeks = DAS/7.0;
            if (Weeks <= TransitionWeek)
            {
                ci.MaxT = TreatTemp;
                ci.MinT = TreatTemp;
                ci.DayLength = TreatPp;
                ci.Radn = TreatPp * 3600 * 0.000153 * 2; //Hours * s/h * MJ/m2/s * Coeff_PAR->Total 
            }
            else
            {
                if (Transitioned = false)
                {
                    Transitioned = true;
                    summary.WriteMessage(this,"Plants moved to post treatment chamber", MessageType.Diagnostic);
                }
                ci.MaxT=23.6;
                ci.MinT=23.6;
                ci.DayLength = 16;
                ci.Radn = 16 * 3600 * 0.000153 * 2; //Hours * s/h * MJ/m2/s * Coeff_PAR->Total 
            }
        }
    }
}
```
          Manager HarvestAtFlowering
```csharp
using Models.PMF.Phen;
using APSIM.Shared.Utilities;
using Models.Utilities;
using Models.Soils;
using Models.PMF;
using Models.Core;
using System;
using Models.Soils.Nutrients;

namespace Models
{
    [Serializable]
    public class Script : Model
    {
        [Link] private Plant Wheat;
        [Link] private Clock clock;
        [Link(Type = LinkType.Path, Path = "[Wheat].Phenology")]
        private Phenology phenology;

        [EventSubscribe("DoManagement")]
        private void OnDoManagement(object sender, EventArgs e)
        {
            if (phenology.CurrentPhase.Name=="GrainFilling")
            {
               Wheat.Harvest();
               Wheat.EndCrop();    
               clock.EndDate = clock.Today.Date;
            }
        
        }
        
    }
}
```
          Report DailyReport
          Report HarvestReport
          Report FLNReport: EventNames=[Wheat].Harvesting
            VariableNames:
              [Wheat].Leaf.FinalLeafNumber
              [Experiment].Script.TransitionWeek
              [Experiment].Script.TreatTemp
              [Experiment].Script.TreatPp
              [Experiment].Script.CultivarName
        Manager LocationInfo: same as ControlledEnvironment.LaTrobeCE.CEBase.LocationInfo
    Experiment LincolnCE
      Factors
        Permutation
          Factor Treat
            CompositeFactor LV
              Specifications:
                [Experimental].Script.TreatPp = 15
                [Experimental].Script.Vern = Full
                [Experimental].Script.EmergeDate = 8-Apr
            CompositeFactor LN
              Specifications:
                [Experimental].Script.TreatPp = 15
                [Experimental].Script.Vern = Nil
                [Experimental].Script.EmergeDate = 8-Jan
            CompositeFactor SV
              Specifications:
                [Experimental].Script.TreatPp = 8
                [Experimental].Script.Vern = Full
                [Experimental].Script.EmergeDate = 8-Apr
            CompositeFactor SN
              Specifications:
                [Experimental].Script.TreatPp = 8
                [Experimental].Script.Vern = Nil
                [Experimental].Script.EmergeDate = 7-Jan
          Factor Cv
            Specification=[Experimental].Script.CultivarName = Amarok,BattenWinter,BattenSpring,Otane,Saracen,CRWT153
          Factor Durat: Specification=[Experimental].Script.TransitionWeek = 12
      Simulation LincolnUniBiotron
        Clock: Start=2000-01-01; End=2000-12-31
        Summary SummaryFile
        SoilArbitrator
        ControlledEnvironment: MaxT=23.6; MinT=23.6; Rain=0; Radn=15; PanEvap=5; VP=2; Wind=3; CO2=350; AirPressure=1010; DiffuseFraction=0; Latitude=-27; Longitude=0; DayLength=16; SunRise=0; TempLag=0
        Zone Field: Area=1; Slope=0; AspectAngle=0; Altitude=50
          Fertiliser
          Soil: same as ControlledEnvironment.LaTrobeCE.CEBase.Field.Soil
          SurfaceOrganicMatter: InitialResidueName=wheat_stubble; InitialResidueType=wheat; InitialResidueMass=500; InitialStandingFraction=0; InitialCPR=0; InitialCNR=100
          Plant Wheat
          MicroClimate: a_interception=0; b_interception=1; c_interception=0; d_interception=0; SoilHeatFluxFraction=0.4; MinimumHeightDiffForNewLayer=0; NightInterceptionFraction=0.5; ReferenceHeight=2
          Manager Experimental
            CultivarName =
            SowingDepth = 20
            Vern =
            TreatPp = 0
            TransitionWeek = 0
            EmergeDate =
```csharp
using Models.Climate;
using System;
using Models.Core;
using Models.PMF;
using Models.Soils;
using Models.Utilities;
using APSIM.Shared.Utilities;

namespace Models
{
    [Serializable]
    public class Script : Model
    {
        [Link] Clock clock;
        [Link] Plant wheat;
        [Link] ControlledEnvironment ci;

        [Display(Type = DisplayType.CultivarName)]
        [Description("Cultivar to be sown")]
        public string CultivarName { get; set; }
        [Description("Sowing depth (mm)")]
        public double SowingDepth { get; set; }
        [Description("Vernalisation")]
        public string Vern { get; set; }
        [Description("Treatment photoperiod (h)")]
        public double TreatPp { get; set; }
        [Description("Treatment duration (Weeks)")]
        public double TransitionWeek { get; set; }
        private double DAS {get; set;}
        private bool FirstDay = true;
        [Description("Emergence Date (d-MMM)")]
        public string EmergeDate {get; set;}

        [EventSubscribe("PreparingNewWeatherData")]
        private void OnPreparingNewWeatherData(object sender, EventArgs e)
        {
            if (FirstDay)
            {
                wheat.Sow(population: 100, cultivar: CultivarName, depth: SowingDepth, rowSpacing: 150);    
                wheat.Phenology.SetPhaseCompletionDate(EmergeDate,"Emerging");
                FirstDay = false;
            }
            DAS += 1;
            if ((DAS <= 100)&&(Vern=="Full"))
            {
                ci.MaxT = 1.0;
                ci.MinT = 1.0;
                ci.DayLength = 0;
            }
            else
            {
                ci.MaxT=23.6;
                ci.MinT=23.6;
                ci.DayLength = TreatPp;
                ci.Radn = ((TreatPp - 2) * 3600 * 0.000153 * 2) + (2 * 3600 * 0.000153); //Full light(Hours * s/h * MJ/m2/s * Coeff_PAR->Total) + 2 hour at half light (Hours * s/h * MJ/m2/s) 
            }
        }
    }
}
```
          Manager HarvestAtFlowering: same as ControlledEnvironment.PalmerstonNorthCE.PNGrowthRooms.Field.HarvestAtFlowering
          Report DailyReport
          Report HarvestReport
        Manager LocationInfo: same as ControlledEnvironment.LaTrobeCE.CEBase.LocationInfo
  Folder AddingValueToNVT
    Memo
      The "Adding Value to the National Variety Trials" project aimed to use measurement and modelling to explain GeneXEnvironmentXManagement interactions for Australian Wheat cultivars.  A description of this national trial can be found in [Lawes201638].  Here we include some of the data from south-eastern Queensland.
    Experiment Goondiwindi2011
      Factors
        Permutation
          Factor Cv: Specification=[Sowing].Script.CultivarName = Janz, Lang, Gregory
          Factor TOS: Specification=[Sowing].Script.SowDate = 19-May, 9-Jun, 28-Jun
      Simulation Goondiwindi2011Base
        Clock: Start=2011-04-01; End=2011-12-30
        Summary summaryfile
        Weather: FileName=%root%/Tests/Validation/Wheat/met/Goondiwindi2011.met
        SoilArbitrator Soil Arbitrator
        Zone Field: Area=1; Slope=0; AspectAngle=0; Altitude=50
          Irrigation
          Fertiliser
          Soil APS6Field: SoilType=APS6Soil; LocalName=APS6Site; Site=APS6Site; NearestTown=Unknown; Region=Lawes; NaturalVegetation=Unknown; Latitude=0; Longitude=0
            Physical
              Thickness  BD    AirDry  LL15  DUL   SAT
              150        1.38  0.1     0.2   0.38  0.43
              150        1.34  0.1     0.2   0.38  0.43
              300        1.35  0.1     0.22  0.4   0.43
              300        1.5   0.1     0.18  0.4   0.43
              300        1.49  0.1     0.14  0.39  0.42
              300        1.46  0.1     0.2   0.38  0.4
              300        1.46  0.1     0.2   0.38  0.4
              SoilCrop WheatSoil: LL=[0.2, 0.2, 0.22, 0.18, 0.14, 0.25, 0.28]; KL=[0.06, 0.06, 0.06, 0.06, 0.06, 0.06, 0.06]; XF=[1, 1, 1, 1, 1, 1, 1]
            WaterBalance SoilWater: SummerDate=1-Nov; SummerU=6; SummerCona=3.5; WinterDate=1-Apr; WinterU=6; WinterCona=3.5; DiffusConst=88; DiffusSlope=35.4; Salb=0.13; CN2Bare=60; CNRed=20; CNCov=0.8; DischargeWidth=0; CatchmentArea=0; PSIDul=-100
              Thickness  SWCON  KLAT
              150        0.3    0
              150        0.3    0
              300        0.3    0
              300        0.3    0
              300        0.3    0
              300        0.3    0
              300        0.3    0
            Organic: FOMCNRatio=60; CarbonUnits=Total
              Thickness  Carbon  SoilCNRatio  FBiom  FInert  FOM
              150        2.2     14.5         0.03   0.45    694.258
              150        1.6     14.5         0.02   0.6     540.689
              300        1.15    14.5         0.01   0.78    327.944
              300        1       14.5         0.01   0.9     198.908
              300        0.8     14.5         0.01   0.99    120.644
              300        0.45    14.5         0.01   0.99    73.1743
              300        0.45    14.5         0.01   0.99    44.3824
            Chemical: Thickness=[150, 150, 300, 300, 300, 300, 300]; PH=[7.5, 8, 8, 8, 8, 8, 8]; PHUnits=Water
            Water: Thickness=[150, 150, 300, 300, 300, 300, 300]; InitialValues=[0.326, 0.326, 0.346, 0.333, 0.315, 0.326, 0.326]; FilledFromTop=false
            Nutrient
            Solute NO3: Thickness=[150, 150, 300, 300, 300, 300, 300]; InitialValues=[1.3, 0.6, 0.25, 0.2, 0.1, 0.1, 0.1]; InitialValuesUnits=ppm; WaterTableConcentration=0; D0=0; DepthConstant=0; MaxDepthSoluteAccessible=0; RunoffEffectivenessAtMovingSolute=0; MaxEffectiveRunoff=0
            Solute NH4: Thickness=[150, 150, 300, 300, 300, 300, 300]; InitialValues=[1.3, 1, 1, 0.8, 0.8, 0.5, 0.5]; InitialValuesUnits=ppm; WaterTableConcentration=0; D0=0; DepthConstant=0; MaxDepthSoluteAccessible=0; RunoffEffectivenessAtMovingSolute=0; MaxEffectiveRunoff=0
            Solute Urea: same as FARAwardPhenology.FARAwardPhenology.Simulation.Field.Soil.Urea
            SoilTemperature Temperature
          SurfaceOrganicMatter: InitialResidueName=wheat_stubble; InitialResidueType=wheat; InitialResidueMass=500; InitialStandingFraction=0; InitialCPR=0; InitialCNR=100
          Plant Wheat
          MicroClimate: a_interception=0; b_interception=1; c_interception=0; d_interception=0; SoilHeatFluxFraction=0.4; MinimumHeightDiffForNewLayer=0; NightInterceptionFraction=0.5; ReferenceHeight=2
          Report DailyReport
          Report HarvestReport
          Manager Sowing
            SowDate =
            CultivarName = Hartog
            SowingDepth = 40
            RowSpacing = 250
            Population = 100
```csharp
using Models.Soils.Nutrients;
using System;
using Models.Core;
using Models.PMF;
using Models.Soils;
using Models.Soils.Nutrients;
using Models.Utilities;
using APSIM.Shared.Utilities;

namespace Models
{
    [Serializable]
    public class Script : Model
    {
        [Link] Clock Clock;
        [Link] Fertiliser Fertiliser;
        [Link] Summary Summary;
        [Link] Plant Wheat;
        [Link] Soil Soil;
        Accumulator accumulatedRain;
        
        [Description("Sowing date (d-mmm)")]
        public string SowDate { get; set; }
        [Description("Cultivar to be sown")]
        public string CultivarName { get; set; }
        [Description("Sowing depth (mm)")]
        public double SowingDepth { get; set; }
        [Description("Row spacing (mm)")]
        public double RowSpacing { get; set; }
        [Description("Plant population (/m2)")]
        public double Population { get; set; }
        
        


        [EventSubscribe("DoManagement")]
        private void OnDoManagement(object sender, EventArgs e)
        {
        
            
            if (DateUtilities.WithinDates(SowDate, Clock.Today, SowDate))
            {
                Wheat.Sow(population: Population, cultivar: CultivarName, depth: SowingDepth, rowSpacing: RowSpacing);    
                if(SowDate == "19-May")
                {
                    Wheat.Phenology.SetPhaseCompletionDate("28-May","Emerging");
                }
                if(SowDate == "9-June")
                {
                    Wheat.Phenology.SetPhaseCompletionDate("15-Jun","Emerging");
                }
                if(SowDate == "28-Jun")
                {
                    Wheat.Phenology.SetPhaseCompletionDate("4-Jul","Emerging");
                }
                if(SowDate == "12-Aug")
                {
                    Wheat.Phenology.SetPhaseCompletionDate("22-Aug","Emerging");
                }
            }
        
        }
        
    }
}
```
          Manager Harvesting
          Manager AutoIrrigate
            AutoIrrigationOn = True
            StartStageName = Emergence
            EndStageName = EndGrainFill
            FASWThreshold = 0.9
            FASWDepth = 1000
```csharp
using APSIM.Numerics;
using Models.PMF.Phen;
using APSIM.Shared.Utilities;
using System.Xml.Serialization;
using Models;
using Models.PMF;
using Models.Soils;
using System.Text;
using System.Collections.Generic;
using Models.Core;
using System;
using Models.Soils.Nutrients;
using Models.Interfaces;

namespace Models
{
    [Serializable] 
    public class Script : Model
    {
        [Link] private Plant Chickpea;
        [Link] private Zone zone;
        [Link] private Irrigation irrigation;
        [Link] private Soil soil;
        [Link]
        private Phenology phenology;
        [Link]
        private IPhysical soilPhysical;
        [Link]
        private ISoilWater waterBalance;
        public double FASW { get; set; }
        public double WaterDeficit  { get; set; }
    
        
        [Description("Auto irrigation on?")]
        public bool AutoIrrigationOn { get; set; }
        
        [Description("Irrigation window start stage")]
        public string StartStageName { get; set; }
        [Description("Irrigation window end stage")]
        public string EndStageName { get; set; }

        [Description("Threshold fraction available water (0-1)")]
        public double FASWThreshold { get; set; }

        [Description("Soil depth (mm) to which fraction available water is calculated")]
        public double FASWDepth { get; set; }

        [EventSubscribe("DoManagement")]
        private void OnDoManagement(object sender, EventArgs e)
        {
            CalculateFASW();
            if (AutoIrrigationOn && phenology.Between(StartStageName, EndStageName))
            {
                if (FASW < FASWThreshold)
                {
                    double amount = 10;
                    irrigation.Apply(WaterDeficit, depth: 0);
                }
            }
        }
        
        private void CalculateFASW()
        {
            double[] LL15 = MathUtilities.Multiply(soilPhysical.LL15, soilPhysical.Thickness);
            double[] DUL = MathUtilities.Multiply(soilPhysical.DUL, soilPhysical.Thickness);
        
            int nlayr = GetLayerIndex();
            double cumdep = MathUtilities.Sum(soilPhysical.Thickness, 0, nlayr, 0.0);

            double excess_fr = MathUtilities.Divide((cumdep - FASWDepth), soilPhysical.Thickness[nlayr], 0.0);

            // note that results may be strange if swdep < ll15
            double avail_sw = (MathUtilities.Sum(waterBalance.SWmm, 0, nlayr, 0.0)
                              - excess_fr * waterBalance.SWmm[nlayr])
                              - (MathUtilities.Sum(LL15, 0, nlayr, 0.0)
                              - excess_fr * LL15[nlayr]);


            double pot_avail_sw = (MathUtilities.Sum(DUL, 0, nlayr, 0.0)
                                  - excess_fr * DUL[nlayr])
                                  - (MathUtilities.Sum(LL15, 0, nlayr, 0.0)
                                  - excess_fr * LL15[nlayr]);

            FASW = MathUtilities.Divide(avail_sw, pot_avail_sw, 0.0);
            WaterDeficit = MathUtilities.Constrain(pot_avail_sw - avail_sw, 0.0, 100000);
        }

        private int GetLayerIndex()
        {
            double[] cumThickness = soilPhysical.ThicknessCumulative;
            for (int i = 1; i < cumThickness.Length; i++)
            {
                if (FASWDepth < cumThickness[i])
                    return i - 1;
            }
            
            return cumThickness.Length - 1;
        }

    }
}
```
          Operations ApplyFertiliser
            1994-04-29  [Fertiliser].Apply(amount: 200, type: "NO3N");
            Memo
              Add sufficient N to remove limitation
        Manager LocationInfo: same as NPIValidation.BYIE_08NB.BYIE_08NB.LocationInfo
    Experiment Nagwee2012
      Memo
        INSERT TEXT HERE
      Factors
        Permutation
          Factor Cv: Specification=[Sowing].Script.CultivarName = Janz, Lang, Gregory
          Factor TOS: Specification=[Sowing].Script.SowDate = 17-May, 31-May, 23-Jun
      Simulation Nangwee2012Base
        Clock: Start=2012-04-01; End=2012-12-30
        Summary summaryfile
        Weather: FileName=%root%/Tests/Validation/Wheat/met/Nangwee2012.met
        SoilArbitrator Soil Arbitrator
        Zone Field: Area=1; Slope=0; AspectAngle=0; Altitude=50
          Irrigation
          Fertiliser
          Soil APS6Field: same as AddingValueToNVT.Goondiwindi2011.Goondiwindi2011Base.Field.APS6Field
          SurfaceOrganicMatter: InitialResidueName=wheat_stubble; InitialResidueType=wheat; InitialResidueMass=500; InitialStandingFraction=0; InitialCPR=0; InitialCNR=100
          Plant Wheat
          MicroClimate: a_interception=0; b_interception=1; c_interception=0; d_interception=0; SoilHeatFluxFraction=0.4; MinimumHeightDiffForNewLayer=0; NightInterceptionFraction=0.5; ReferenceHeight=2
          Report DailyReport
          Report HarvestReport
          Manager Sowing
            SowDate =
            CultivarName = Hartog
            SowingDepth = 40
            RowSpacing = 250
            Population = 100
```csharp
using Models.Soils.Nutrients;
using System;
using Models.Core;
using Models.PMF;
using Models.Soils;
using Models.Soils.Nutrients;
using Models.Utilities;
using APSIM.Shared.Utilities;

namespace Models
{
    [Serializable]
    public class Script : Model
    {
        [Link] Clock Clock;
        [Link] Fertiliser Fertiliser;
        [Link] Summary Summary;
        [Link] Plant Wheat;
        [Link] Soil Soil;
        Accumulator accumulatedRain;
        
        [Description("Sowing date (d-mmm)")]
        public string SowDate { get; set; }
        [Description("Cultivar to be sown")]
        public string CultivarName { get; set; }
        [Description("Sowing depth (mm)")]
        public double SowingDepth { get; set; }
        [Description("Row spacing (mm)")]
        public double RowSpacing { get; set; }
        [Description("Plant population (/m2)")]
        public double Population { get; set; }
        
        


        [EventSubscribe("DoManagement")]
        private void OnDoManagement(object sender, EventArgs e)
        {
        
            
            if (DateUtilities.WithinDates(SowDate, Clock.Today, SowDate))
            {
                Wheat.Sow(population: Population, cultivar: CultivarName, depth: SowingDepth, rowSpacing: RowSpacing);    
                if(SowDate == "17-May")
                {
                    Wheat.Phenology.SetPhaseCompletionDate("30-May","Emerging");
                }
                if(SowDate == "31-May")
                {
                    Wheat.Phenology.SetPhaseCompletionDate("10-Jun","Emerging");
                }
                if(SowDate == "23-Jun")
                {
                    Wheat.Phenology.SetPhaseCompletionDate("5-Jul","Emerging");
                }
            }
        
        }
        
    }
}
```
          Manager Harvesting
          Manager AutoIrrigate: same as AddingValueToNVT.Goondiwindi2011.Goondiwindi2011Base.Field.AutoIrrigate
          Operations ApplyFertiliser: same as AddingValueToNVT.Goondiwindi2011.Goondiwindi2011Base.Field.ApplyFertiliser
        Manager LocationInfo: same as NPIValidation.BYIE_09GN.BYIE_09GN.LocationInfo
    Experiment Bungunya2012
      Memo
        INSERT TEXT HERE
      Factors
        Permutation
          Factor Cv: Specification=[Sowing].Script.CultivarName = Janz, Lang, Gregory
          Factor TOS: Specification=[Sowing].Script.SowDate = 10-May, 22-May, 23-Jun
      Simulation Bungunya2012Base
        Clock: Start=2012-04-01; End=2012-12-30
        Summary summaryfile
        Weather: FileName=%root%/Tests/Validation/Wheat/met/Bungunya2012.met
        SoilArbitrator Soil Arbitrator
        Zone Field: Area=1; Slope=0; AspectAngle=0; Altitude=50
          Irrigation
          Fertiliser
          Soil APS6Field: same as AddingValueToNVT.Goondiwindi2011.Goondiwindi2011Base.Field.APS6Field
          SurfaceOrganicMatter: InitialResidueName=wheat_stubble; InitialResidueType=wheat; InitialResidueMass=500; InitialStandingFraction=0; InitialCPR=0; InitialCNR=100
          Plant Wheat
          MicroClimate: a_interception=0; b_interception=1; c_interception=0; d_interception=0; SoilHeatFluxFraction=0.4; MinimumHeightDiffForNewLayer=0; NightInterceptionFraction=0.5; ReferenceHeight=2
          Report DailyReport
          Report HarvestReport
          Manager Sowing
            SowDate =
            CultivarName = Hartog
            SowingDepth = 40
            RowSpacing = 250
            Population = 100
```csharp
using Models.Soils.Nutrients;
using System;
using Models.Core;
using Models.PMF;
using Models.Soils;
using Models.Soils.Nutrients;
using Models.Utilities;
using APSIM.Shared.Utilities;

namespace Models
{
    [Serializable]
    public class Script : Model
    {
        [Link] Clock Clock;
        [Link] Fertiliser Fertiliser;
        [Link] Summary Summary;
        [Link] Plant Wheat;
        [Link] Soil Soil;
        Accumulator accumulatedRain;
        
        [Description("Sowing date (d-mmm)")]
        public string SowDate { get; set; }
        [Description("Cultivar to be sown")]
        public string CultivarName { get; set; }
        [Description("Sowing depth (mm)")]
        public double SowingDepth { get; set; }
        [Description("Row spacing (mm)")]
        public double RowSpacing { get; set; }
        [Description("Plant population (/m2)")]
        public double Population { get; set; }
        
        


        [EventSubscribe("DoManagement")]
        private void OnDoManagement(object sender, EventArgs e)
        {
        
            
            if (DateUtilities.WithinDates(SowDate, Clock.Today, SowDate))
            {
                Wheat.Sow(population: Population, cultivar: CultivarName, depth: SowingDepth, rowSpacing: RowSpacing);    
                if(SowDate == "10-May")
                {
                    Wheat.Phenology.SetPhaseCompletionDate("21-May","Emerging");
                }
                if(SowDate == "22-May")
                {
                    Wheat.Phenology.SetPhaseCompletionDate("3-Jun","Emerging");
                }
                if(SowDate == "23-Jun")
                {
                    Wheat.Phenology.SetPhaseCompletionDate("6-Jul","Emerging");
                }
            }
        
        }
        
    }
}
```
          Manager Harvesting
          Manager AutoIrrigate: same as AddingValueToNVT.Goondiwindi2011.Goondiwindi2011Base.Field.AutoIrrigate
          Operations ApplyFertiliser: same as AddingValueToNVT.Goondiwindi2011.Goondiwindi2011Base.Field.ApplyFertiliser
        Manager LocationInfo: same as NPIValidation.BYIE_09GN.BYIE_09GN.LocationInfo
  Folder Phenology1996
    Memo
      This dataset includes observed heading date for six cultivars (Batavia, Cunningham, Hartog, Janz, Sunbri, Suneca) for a range of locations and planting dates in the northern grain-growing region of Australia.
    Experiment Goondiwindi1996
      Factors
        Permutation
          Factor Cv
            Specification=[Sowing].Script.CultivarName = Batavia, Cunningham, Hartog, Janz, Sunbri, Suneca
          Factor TOS: Specification=[Sowing].Script.SowDate = 16-Apr, 24-May, 30-Jun
      Simulation Goondiwindi1996Base
        Clock: Start=1996-04-01; End=1996-12-31
        Summary summaryfile
        Weather: FileName=%root%/Tests/Validation/Wheat/met/Goondiwindi1996.met
        SoilArbitrator Soil Arbitrator
        Zone Field: Area=1; Slope=0; AspectAngle=0; Altitude=50
          Irrigation
          Fertiliser
          Soil APS6Field: same as AddingValueToNVT.Goondiwindi2011.Goondiwindi2011Base.Field.APS6Field
          SurfaceOrganicMatter: InitialResidueName=wheat_stubble; InitialResidueType=wheat; InitialResidueMass=500; InitialStandingFraction=0; InitialCPR=0; InitialCNR=100
          Plant Wheat
          MicroClimate: a_interception=0; b_interception=1; c_interception=0; d_interception=0; SoilHeatFluxFraction=0.4; MinimumHeightDiffForNewLayer=0; NightInterceptionFraction=0.5; ReferenceHeight=2
          Report DailyReport
          Report HarvestReport
          Manager Sowing
            SowDate = 25-May
            CultivarName = Hartog
            SowingDepth = 40
            RowSpacing = 250
            Population = 100
```csharp
using Models.Soils.Nutrients;
using System;
using Models.Core;
using Models.PMF;
using Models.Soils;
using Models.Soils.Nutrients;
using Models.Utilities;
using APSIM.Shared.Utilities;

namespace Models
{
    [Serializable]
    public class Script : Model
    {
        [Link] Clock Clock;
        [Link] Fertiliser Fertiliser;
        [Link] Summary Summary;
        [Link] Plant Wheat;
        [Link] Soil Soil;
        Accumulator accumulatedRain;
        
        [Description("Sowing date (d-mmm)")]
        public string SowDate { get; set; }
        [Description("Cultivar to be sown")]
        public string CultivarName { get; set; }
        [Description("Sowing depth (mm)")]
        public double SowingDepth { get; set; }
        [Description("Row spacing (mm)")]
        public double RowSpacing { get; set; }
        [Description("Plant population (/m2)")]
        public double Population { get; set; }
        
        


        [EventSubscribe("DoManagement")]
        private void OnDoManagement(object sender, EventArgs e)
        {
        
            
            if (DateUtilities.WithinDates(SowDate, Clock.Today, SowDate))
            {
                Wheat.Sow(population: Population, cultivar: CultivarName, depth: SowingDepth, rowSpacing: RowSpacing);    
            }
        
        }
        
    }
}
```
          Manager Harvesting
          Manager AutoIrrigate: same as AddingValueToNVT.Goondiwindi2011.Goondiwindi2011Base.Field.AutoIrrigate
          Operations ApplyFertiliser: same as AddingValueToNVT.Goondiwindi2011.Goondiwindi2011Base.Field.ApplyFertiliser
        Manager LocationInfo: same as NPIValidation.BYIE_09GN.BYIE_09GN.LocationInfo
    Experiment Miles1996
      Factors
        Permutation
          Factor Cv
            Specification=[Sowing].Script.CultivarName = Batavia, Cunningham, Hartog, Janz, Sunbri, Suneca
          Factor TOS
            Specification=[Sowing].Script.SowDate = 18-Apr, 11-May, 1-Jun, 21-Jun, 16-Jul
      Simulation Miles1996Base
        Clock: Start=1996-04-01; End=1996-12-04
        Summary summaryfile
        Weather: FileName=%root%/Tests/Validation/Wheat/met/miles96.met
        SoilArbitrator Soil Arbitrator
        Zone Field: same as Phenology1996.Goondiwindi1996.Goondiwindi1996Base.Field
        Manager LocationInfo: same as NPIValidation.BYIE_09GN.BYIE_09GN.LocationInfo
    Experiment Emerald1996
      Factors
        Permutation
          Factor Cv
            Specification=[Sowing].Script.CultivarName = Batavia, Cunningham, Hartog, Janz, Sunbri, Suneca
          Factor TOS: Specification=[Sowing].Script.SowDate = 11-Apr, 6-May, 21-May, 16-Jun
      Simulation Emerald1996Base
        Clock: Start=1996-04-01; End=1996-12-04
        Summary summaryfile
        Weather: FileName=%root%/Tests/Validation/Wheat/met/emer96.met
        SoilArbitrator Soil Arbitrator
        Zone Field: same as Phenology1996.Goondiwindi1996.Goondiwindi1996Base.Field
        Manager LocationInfo: same as NPIValidation.Emerald2015-TOS1.Emerald2015-TOS1.LocationInfo
    Experiment Biloela1996
      Factors
        Permutation
          Factor Cv
            Specification=[Sowing].Script.CultivarName = Batavia, Cunningham, Hartog, Janz, Sunbri, Suneca
          Factor TOS
            Specification=[Sowing].Script.SowDate = 11-Apr, 29-Apr, 15-May, 13-Jun, 16-Jul
      Simulation Biloela1996Base
        Clock: Start=1996-04-01; End=1996-12-04
        Summary summaryfile
        Weather: FileName=%root%/Tests/Validation/Wheat/met/Biloela1996.met
        SoilArbitrator Soil Arbitrator
        Zone Field: same as Phenology1996.Goondiwindi1996.Goondiwindi1996Base.Field
        Manager LocationInfo: same as NPIValidation.Emerald2015-TOS1.Emerald2015-TOS1.LocationInfo
    Experiment Moree1996
      Factors
        Permutation
          Factor Cv
            Specification=[Sowing].Script.CultivarName = Batavia, Cunningham, Hartog, Janz, Sunbri, Suneca
          Factor TOS: Specification=[Sowing].Script.SowDate = 7-May, 16-May, 18-Jul
      Simulation Moree1996Base
        Clock: Start=1996-04-01; End=1996-12-31
        Summary summaryfile
        Weather: FileName=%root%/Tests/Validation/Wheat/met/moree96.met
        SoilArbitrator Soil Arbitrator
        Zone Field: same as Phenology1996.Goondiwindi1996.Goondiwindi1996Base.Field
        Manager LocationInfo: same as NPIValidation.BYIE_08NB.BYIE_08NB.LocationInfo
  Folder Southern Australia
    Experiment Walpeup2011
      Memo
        INSERT TEXT HERE
      Factors
        Permutation
          Factor Cv: Specification=[Sowing].Script.CultivarName = Janz, Yitpi, Gregory, Axe
          Factor TOS: Specification=[Sowing].Script.SowDate = 29-Apr, 31-May, 1-Jul
      Simulation Walpeup2011Base
        Clock: Start=2011-04-01; End=2011-12-30
        Summary summaryfile
        Weather: FileName=%root%/Tests/Validation/Wheat/met/Walpeup2011.met
        SoilArbitrator Soil Arbitrator
        Zone Field: Area=1; Slope=0; AspectAngle=0; Altitude=50
          Irrigation
          Fertiliser
          Soil APS6Field: same as AddingValueToNVT.Goondiwindi2011.Goondiwindi2011Base.Field.APS6Field
          SurfaceOrganicMatter: InitialResidueName=wheat_stubble; InitialResidueType=wheat; InitialResidueMass=500; InitialStandingFraction=0; InitialCPR=0; InitialCNR=100
          Plant Wheat
          MicroClimate: a_interception=0; b_interception=1; c_interception=0; d_interception=0; SoilHeatFluxFraction=0.4; MinimumHeightDiffForNewLayer=0; NightInterceptionFraction=0.5; ReferenceHeight=2
          Report
            VariableNames:
              [Clock].Today
              [Wheat].Phenology.CurrentStageName
              [Wheat].AboveGround.Wt
              [Wheat].AboveGround.N
              [Wheat].Grain.Wt
              [Wheat].Grain.Protein
              [Wheat].Grain.Size
              [Wheat].Grain.Number
              [Wheat].Grain.Live.Wt
              [Wheat].Grain.Live.N
              [Wheat].Leaf.LAI
              [Wheat].Leaf.Live.Wt
              [Wheat].Leaf.Live.N
              [Wheat].Spike.Wt
              [Wheat].Spike.N
              [Wheat].Stem.Live.Wt
              [Wheat].Stem.Live.N
              [Wheat].Root.Depth
              [Wheat].Root.WaterUptake
              [Wheat].Leaf.Fw
              [Wheat].Leaf.Fn
              [Wheat].Total.Wt
              [Wheat].Phenology.Zadok.Stage as ZadokStage
              [Wheat].Leaf.Tips
              [Wheat].Leaf.Ligules
            EventNames:
              [Clock].DoReport
          Report DailyReport
          Report HarvestReport
          Manager Sowing
            SowDate =
            CultivarName = Hartog
            SowingDepth = 40
            RowSpacing = 250
            Population = 100
```csharp
using Models.Soils.Nutrients;
using System;
using Models.Core;
using Models.PMF;
using Models.Soils;
using Models.Soils.Nutrients;
using Models.Utilities;
using APSIM.Shared.Utilities;

namespace Models
{
    [Serializable]
    public class Script : Model
    {
        [Link] Clock Clock;
        [Link] Fertiliser Fertiliser;
        [Link] Summary Summary;
        [Link] Plant Wheat;
        [Link] Soil Soil;
        Accumulator accumulatedRain;
        
        [Description("Sowing date (d-mmm)")]
        public string SowDate { get; set; }
        [Description("Cultivar to be sown")]
        public string CultivarName { get; set; }
        [Description("Sowing depth (mm)")]
        public double SowingDepth { get; set; }
        [Description("Row spacing (mm)")]
        public double RowSpacing { get; set; }
        [Description("Plant population (/m2)")]
        public double Population { get; set; }
        
        


        [EventSubscribe("DoManagement")]
        private void OnDoManagement(object sender, EventArgs e)
        {
        
            
            if (DateUtilities.WithinDates(SowDate, Clock.Today, SowDate))
            {
                Wheat.Sow(population: Population, cultivar: CultivarName, depth: SowingDepth, rowSpacing: RowSpacing);    
                if(SowDate == "29-Apr")
                {
                    Wheat.Phenology.SetPhaseCompletionDate("7-May","Emerging");
                }
                if(SowDate == "31-May")
                {
                    Wheat.Phenology.SetPhaseCompletionDate("14-Jun","Emerging");
                }
                if(SowDate == "1-Jul")
                {
                    Wheat.Phenology.SetPhaseCompletionDate("16-Jul","Emerging");
                }
            }
        
        }
        
    }
}
```
          Manager Harvesting
          Manager AutoIrrigate: same as AddingValueToNVT.Goondiwindi2011.Goondiwindi2011Base.Field.AutoIrrigate
          Operations ApplyFertiliser: same as AddingValueToNVT.Goondiwindi2011.Goondiwindi2011Base.Field.ApplyFertiliser
        Manager LocationInfo: same as NPIValidation.17CuryoMESW-TOS1.17CuryoMESW-TOS1.LocationInfo
    Experiment Walpeup2012
      Memo
        INSERT TEXT HERE
      Factors
        Permutation
          Factor Cv: Specification=[Sowing].Script.CultivarName = Janz, Yitpi, Gregory, Axe
          Factor TOS: Specification=[Sowing].Script.SowDate = 22-Jun, 18-Jul
      Simulation Walpeup2012Base
        Clock: Start=2012-04-01; End=2012-12-30
        Summary summaryfile
        Weather: FileName=%root%/Tests/Validation/Wheat/met/Walpeup2012.met
        SoilArbitrator Soil Arbitrator
        Zone Field: Area=1; Slope=0; AspectAngle=0; Altitude=50
          Irrigation
          Fertiliser
          Soil APS6Field: same as AddingValueToNVT.Goondiwindi2011.Goondiwindi2011Base.Field.APS6Field
          SurfaceOrganicMatter: InitialResidueName=wheat_stubble; InitialResidueType=wheat; InitialResidueMass=500; InitialStandingFraction=0; InitialCPR=0; InitialCNR=100
          Plant Wheat
          MicroClimate: a_interception=0; b_interception=1; c_interception=0; d_interception=0; SoilHeatFluxFraction=0.4; MinimumHeightDiffForNewLayer=0; NightInterceptionFraction=0.5; ReferenceHeight=2
          Report: same as Southern Australia.Walpeup2011.Walpeup2011Base.Field.Report
          Report DailyReport
          Report HarvestReport
          Manager Sowing
            SowDate =
            CultivarName = Hartog
            SowingDepth = 40
            RowSpacing = 250
            Population = 100
```csharp
using Models.Soils.Nutrients;
using System;
using Models.Core;
using Models.PMF;
using Models.Soils;
using Models.Soils.Nutrients;
using Models.Utilities;
using APSIM.Shared.Utilities;

namespace Models
{
    [Serializable]
    public class Script : Model
    {
        [Link] Clock Clock;
        [Link] Fertiliser Fertiliser;
        [Link] Summary Summary;
        [Link] Plant Wheat;
        [Link] Soil Soil;
        Accumulator accumulatedRain;
        
        [Description("Sowing date (d-mmm)")]
        public string SowDate { get; set; }
        [Description("Cultivar to be sown")]
        public string CultivarName { get; set; }
        [Description("Sowing depth (mm)")]
        public double SowingDepth { get; set; }
        [Description("Row spacing (mm)")]
        public double RowSpacing { get; set; }
        [Description("Plant population (/m2)")]
        public double Population { get; set; }
        
        


        [EventSubscribe("DoManagement")]
        private void OnDoManagement(object sender, EventArgs e)
        {
        
            
            if (DateUtilities.WithinDates(SowDate, Clock.Today, SowDate))
            {
                Wheat.Sow(population: Population, cultivar: CultivarName, depth: SowingDepth, rowSpacing: RowSpacing);    
                if(SowDate == "22-Jun")
                {
                    Wheat.Phenology.SetPhaseCompletionDate("5-Jul","Emerging");
                }
                if(SowDate == "18-Jul")
                {
                    Wheat.Phenology.SetPhaseCompletionDate("3-Aug","Emerging");
                }
            }
        
        }
        
    }
}
```
          Manager Harvesting
          Manager AutoIrrigate: same as AddingValueToNVT.Goondiwindi2011.Goondiwindi2011Base.Field.AutoIrrigate
          Operations ApplyFertiliser: same as AddingValueToNVT.Goondiwindi2011.Goondiwindi2011Base.Field.ApplyFertiliser
        Manager LocationInfo: same as NPIValidation.17CuryoMESW-TOS1.17CuryoMESW-TOS1.LocationInfo
    Experiment Minnipa2012
      Memo
        INSERT TEXT HERE
      Factors
        Permutation
          Factor Cv: Specification=[Sowing].Script.CultivarName = Janz, Axe, Gregory
          Factor TOS: Specification=[Sowing].Script.SowDate = 25-May, 8-Jun, 25-Jun
      Simulation Minnipa2012Base
        Clock: Start=2012-04-01; End=2012-12-30
        Summary summaryfile
        Weather: FileName=%root%/Tests/Validation/Wheat/met/Minnipa2012.met
        SoilArbitrator Soil Arbitrator
        Zone Field: Area=1; Slope=0; AspectAngle=0; Altitude=50
          Irrigation
          Fertiliser
          Soil APS6Field: same as AddingValueToNVT.Goondiwindi2011.Goondiwindi2011Base.Field.APS6Field
          SurfaceOrganicMatter: InitialResidueName=wheat_stubble; InitialResidueType=wheat; InitialResidueMass=500; InitialStandingFraction=0; InitialCPR=0; InitialCNR=100
          Plant Wheat
          MicroClimate: a_interception=0; b_interception=1; c_interception=0; d_interception=0; SoilHeatFluxFraction=0.4; MinimumHeightDiffForNewLayer=0; NightInterceptionFraction=0.5; ReferenceHeight=2
          Report DailyReport
          Report HarvestReport
          Manager Sowing
            SowDate =
            CultivarName = Hartog
            SowingDepth = 40
            RowSpacing = 250
            Population = 100
```csharp
using Models.Soils.Nutrients;
using System;
using Models.Core;
using Models.PMF;
using Models.Soils;
using Models.Soils.Nutrients;
using Models.Utilities;
using APSIM.Shared.Utilities;

namespace Models
{
    [Serializable]
    public class Script : Model
    {
        [Link] Clock Clock;
        [Link] Fertiliser Fertiliser;
        [Link] Summary Summary;
        [Link] Plant Wheat;
        [Link] Soil Soil;
        Accumulator accumulatedRain;
        
        [Description("Sowing date (d-mmm)")]
        public string SowDate { get; set; }
        [Description("Cultivar to be sown")]
        public string CultivarName { get; set; }
        [Description("Sowing depth (mm)")]
        public double SowingDepth { get; set; }
        [Description("Row spacing (mm)")]
        public double RowSpacing { get; set; }
        [Description("Plant population (/m2)")]
        public double Population { get; set; }
        
        


        [EventSubscribe("DoManagement")]
        private void OnDoManagement(object sender, EventArgs e)
        {
        
            
            if (DateUtilities.WithinDates(SowDate, Clock.Today, SowDate))
            {
                Wheat.Sow(population: Population, cultivar: CultivarName, depth: SowingDepth, rowSpacing: RowSpacing);    
                if(SowDate == "25-May")
                {
                    Wheat.Phenology.SetPhaseCompletionDate("5-Jun","Emerging");
                }
                if(SowDate == "8-Jun")
                {
                    Wheat.Phenology.SetPhaseCompletionDate("21-Jun","Emerging");
                }
                if(SowDate == "25-Jun")
                {
                    Wheat.Phenology.SetPhaseCompletionDate("10-Jul","Emerging");
                }
            }
        
        }
        
    }
}
```
          Manager Harvesting
          Manager AutoIrrigate: same as AddingValueToNVT.Goondiwindi2011.Goondiwindi2011Base.Field.AutoIrrigate
          Operations ApplyFertiliser: same as AddingValueToNVT.Goondiwindi2011.Goondiwindi2011Base.Field.ApplyFertiliser
        Manager LocationInfo: same as NPIField2019.Callington.Callington2019Base.LocationInfo
    Experiment Temora2012
      Memo
        INSERT TEXT HERE
      Factors
        Permutation
          Factor Cv: Specification=[Sowing].Script.CultivarName = Janz, Axe, Gregory
          Factor TOS: Specification=[Sowing].Script.SowDate = 5-May, 23-May, 25-Jun
      Simulation Temora2012Base
        Clock: Start=2012-04-01; End=2012-12-30
        Summary summaryfile
        Weather: FileName=%root%/Tests/Validation/Wheat/met/Temora2012.met
        SoilArbitrator Soil Arbitrator
        Zone Field: Area=1; Slope=0; AspectAngle=0; Altitude=50
          Irrigation
          Fertiliser
          Soil APS6Field: same as AddingValueToNVT.Goondiwindi2011.Goondiwindi2011Base.Field.APS6Field
          SurfaceOrganicMatter: InitialResidueName=wheat_stubble; InitialResidueType=wheat; InitialResidueMass=500; InitialStandingFraction=0; InitialCPR=0; InitialCNR=100
          Plant Wheat
          MicroClimate: a_interception=0; b_interception=1; c_interception=0; d_interception=0; SoilHeatFluxFraction=0.4; MinimumHeightDiffForNewLayer=0; NightInterceptionFraction=0.5; ReferenceHeight=2
          Report DailyReport
          Report HarvestReport
          Manager Sowing
            SowDate = 25-May
            CultivarName = Hartog
            SowingDepth = 40
            RowSpacing = 250
            Population = 100
```csharp
using Models.Soils.Nutrients;
using System;
using Models.Core;
using Models.PMF;
using Models.Soils;
using Models.Soils.Nutrients;
using Models.Utilities;
using APSIM.Shared.Utilities;

namespace Models
{
    [Serializable]
    public class Script : Model
    {
        [Link] Clock Clock;
        [Link] Fertiliser Fertiliser;
        [Link] Summary Summary;
        [Link] Plant Wheat;
        [Link] Soil Soil;
        Accumulator accumulatedRain;
        
        [Description("Sowing date (d-mmm)")]
        public string SowDate { get; set; }
        [Description("Cultivar to be sown")]
        public string CultivarName { get; set; }
        [Description("Sowing depth (mm)")]
        public double SowingDepth { get; set; }
        [Description("Row spacing (mm)")]
        public double RowSpacing { get; set; }
        [Description("Plant population (/m2)")]
        public double Population { get; set; }
        
        


        [EventSubscribe("DoManagement")]
        private void OnDoManagement(object sender, EventArgs e)
        {
        
            
            if (DateUtilities.WithinDates(SowDate, Clock.Today, SowDate))
            {
                Wheat.Sow(population: Population, cultivar: CultivarName, depth: SowingDepth, rowSpacing: RowSpacing);    
                if(SowDate == "5-May")
                {
                    Wheat.Phenology.SetPhaseCompletionDate("13-May","Emerging");
                }
                if(SowDate == "23-May")
                {
                    Wheat.Phenology.SetPhaseCompletionDate("3-Jun","Emerging");
                }
                if(SowDate == "25-Jun")
                {
                    Wheat.Phenology.SetPhaseCompletionDate("10-Jul","Emerging");
                }
            }
        
        }
        
    }
}
```
          Manager Harvesting
          Manager AutoIrrigate: same as AddingValueToNVT.Goondiwindi2011.Goondiwindi2011Base.Field.AutoIrrigate
          Operations ApplyFertiliser: same as AddingValueToNVT.Goondiwindi2011.Goondiwindi2011Base.Field.ApplyFertiliser
        Manager LocationInfo: same as NPIField2019.WaggaWagga.WaggaWagga2019Base.LocationInfo
    Experiment Birchip2011
      Factors
        Permutation
          Factor TOS: Specification=[SowingRule].Script.TOS = 1, 2
          Factor Cv
            Specification=[SowingRule].Script.Cultivar = Axe, Bolac, Derrimut, Eaglehawk, Gregory, Lincoln, Mace, Scout
      Simulation Birchip2011Base
        Clock: Start=2011-05-05; End=2012-01-15
        Summary summaryfile
        Weather: FileName=%root%/Tests/Validation/Wheat/met/Birchip2011.met
        SoilArbitrator Soil Arbitrator
        Zone Field: Area=1; Slope=0; AspectAngle=0; Altitude=50
          Irrigation
          Fertiliser
          Manager SowingRule
            TOS = 1
            Cultivar = Hartog
```csharp
using Models.Soils;
using System;
using Models.Core;
using Models.PMF;
namespace Models
{
           
    [Serializable] 
    [System.Xml.Serialization.XmlInclude(typeof(Model))]
    public class Script : Model
    {
    
        [Link] Plant Wheat;
        [Link] Clock Clock;
            
        [Description("Time of Sowing")]
        public int TOS { get; set; }

        [Description("Cultivar")]
        public String Cultivar { get; set; }
        
        [EventSubscribe("DoManagement")]
        private void OnDoManagement(object sender, EventArgs e)
        {
            if ((Clock.Today.DayOfYear == 133) && (TOS == 1)) 
            {
                Wheat.Sow(population: 100, cultivar: Cultivar, depth: 30, rowSpacing: 250);
                Wheat.Phenology.SetPhaseCompletionDate("28-May","Emerging");
            }
            if ((Clock.Today.DayOfYear == 179) && (TOS == 2))
            {
                Wheat.Sow(population: 100, cultivar: Cultivar, depth: 30, rowSpacing: 250);
                Wheat.Phenology.SetPhaseCompletionDate("15-Jul","Emerging");
            }

        }


    }
}
```
          Operations
            2011-05-13  [Fertiliser].Apply(amount: 55, type: "UreaN");
            2011-05-13  [Irrigation].Apply(amount:11);
            2011-06-30  [Fertiliser].Apply(amount: 43, type: "UreaN");
            2011-08-08  [Fertiliser].Apply(amount: 90, type: "UreaN");
          SurfaceOrganicMatter: InitialResidueName=wheat_stubble; InitialResidueType=wheat; InitialResidueMass=500; InitialStandingFraction=0; InitialCPR=0; InitialCNR=100
          Plant Wheat
          MicroClimate: a_interception=0; b_interception=1; c_interception=0; d_interception=0; SoilHeatFluxFraction=0.4; MinimumHeightDiffForNewLayer=0; NightInterceptionFraction=0.5; ReferenceHeight=2
          Report DailyReport
          Soil: SoilType=Clay Loam; Site=Jil Jil; NearestTown=Jil Jil; Region=Mallee; State=Victoria; Country=Australia; ApsoilNumber=728; Latitude=-35.8822; Longitude=142.9923; LocationAccuracy=+/- 1000m; Comments=Medium SSC; GPS at paddock scale only; BCG systems trial
            DataSource=Based on Soil Characterisation undertaken by Birchip Cropping Group during 2005
            Physical
              Thickness  BD     AirDry  LL15  DUL   SAT
              100        1.33   0.085   0.17  0.36  0.43
              150        1.36   0.168   0.21  0.37  0.44
              150        1.39   0.2     0.2   0.4   0.45
              150        1.415  0.2     0.2   0.41  0.45
              150        1.437  0.2     0.2   0.41  0.45
              300        1.428  0.2     0.2   0.44  0.46
              300        1.41   0.2     0.2   0.46  0.467
              SoilCrop wheatSoil: LL=[0.17, 0.21, 0.25, 0.26, 0.28, 0.34, 0.46]; KL=[0.06, 0.06, 0.04, 0.04, 0.04, 0.04, 0.02]; XF=[1, 1, 0.28, 0.22, 0.17, 0.16, 0]
              SoilCrop barleySoil: LL=[0.17, 0.21, 0.25, 0.26, 0.26, 0.44, 0.46]; KL=[0.07, 0.07, 0.07, 0.07, 0.05, 0.05, 0.03]; XF=[1, 0.5, 0.3, 0.2, 0.2, 0, 0]
            WaterBalance SoilWater: SummerDate=1-Nov; SummerU=6; SummerCona=3.5; WinterDate=1-Apr; WinterU=2; WinterCona=2; DiffusConst=40; DiffusSlope=16; Salb=0.13; CN2Bare=73; CNRed=20; CNCov=0.8; PSIDul=-100; Thickness=[100, 150, 150, 150, 150, 300, 300]; SWCON=[0.4, 0.4, 0.3, 0.3, 0.3, 0.3, 0.3]
            Organic: FOMCNRatio=40; CarbonUnits=Total
              Thickness  Carbon  SoilCNRatio  FBiom  FInert  FOM
              100        1.3     12           0.05   0.3     333.304
              150        1       12           0.02   0.5     235.78
              150        0.3     12           0.02   0.5     166.792
              150        0.2     12           0.02   0.8     117.989
              150        0.05    12           0.01   0.6     83.4659
              300        0.01    12           0.01   0.7     41.768
              300        0.01    12           0.01   0.8     20.9015
            Chemical: Thickness=[100, 150, 150, 150, 150, 300, 300]; PH=[8.6, 9.4, 9.6, 9.7, 9.7, 9.7, 9.3]; PHUnits=Water
            Water: Thickness=[100, 150, 150, 150, 150, 300, 300]; InitialValues=[0.36, 0.37, 0.4, 0.41, 0.41, 0.44, 0.46]; FilledFromTop=true
            Nutrient
            Solute NO3: Thickness=[100, 150, 150, 150, 150, 300, 300]; InitialValues=[1, 1, 1, 1, 1, 1, 1]; InitialValuesUnits=ppm; WaterTableConcentration=0; D0=0; DepthConstant=0; MaxDepthSoluteAccessible=0; RunoffEffectivenessAtMovingSolute=0; MaxEffectiveRunoff=0
            Solute NH4: Thickness=[100, 150, 150, 150, 150, 300, 300]; InitialValues=[0, 0, 0, 0, 0, 0, 0]; InitialValuesUnits=ppm; WaterTableConcentration=0; D0=0; DepthConstant=0; MaxDepthSoluteAccessible=0; RunoffEffectivenessAtMovingSolute=0; MaxEffectiveRunoff=0
            Solute Urea: Thickness=[100, 150, 150, 150, 150, 300, 300]; InitialValues=[0, 0, 0, 0, 0, 0, 0]; InitialValuesUnits=kg/ha; WaterTableConcentration=0; D0=0; DepthConstant=0; MaxDepthSoluteAccessible=0; RunoffEffectivenessAtMovingSolute=0; MaxEffectiveRunoff=0
            SoilTemperature Temperature
          Report HarvestReport
          Operations HarvestingRule
            2012-01-15  [Wheat].Harvest()
        Manager LocationInfo: same as NPIValidation.17CuryoMESW-TOS1.17CuryoMESW-TOS1.LocationInfo
    Experiment Tarlee2011
      Factors: same as Southern Australia.Birchip2011.Factors
      Simulation Tarlee2011Base
        Clock: Start=2011-05-05; End=2011-12-28
        Summary summaryfile
        Weather: FileName=%root%/Tests/Validation/Wheat/met/Tarlee2011.met
        SoilArbitrator Soil Arbitrator
        Zone Field: Area=1; Slope=0; AspectAngle=0; Altitude=50
          Irrigation
          Fertiliser
          Manager SowingRule
            TOS = 1
            Cultivar = Hartog
```csharp
using Models.Soils;
using System;
using Models.Core;
using Models.PMF;
namespace Models
{
           
    [Serializable] 
    [System.Xml.Serialization.XmlInclude(typeof(Model))]
    public class Script : Model
    {
    
        [Link] Plant Wheat;
        [Link] Clock Clock;
            
        [Description("Time of Sowing")]
        public int TOS { get; set; }

        [Description("Cultivar")]
        public String Cultivar { get; set; }
        
        [EventSubscribe("DoManagement")]
        private void OnDoManagement(object sender, EventArgs e)
        {
            if ((Clock.Today.DayOfYear == 140) && (TOS == 1)) 
            {
                Wheat.Sow(population: 100, cultivar: Cultivar, depth: 30, rowSpacing: 250);
                 Wheat.Phenology.SetPhaseCompletionDate("3-Jun","Emerging");
            }
            if ((Clock.Today.DayOfYear == 196) && (TOS == 2))
            {
                Wheat.Sow(population: 100, cultivar: Cultivar, depth: 30, rowSpacing: 250);
                 Wheat.Phenology.SetPhaseCompletionDate("2-Aug","Emerging");
            }
        }


    }
}
```
          Operations: same as Southern Australia.Birchip2011.Birchip2011Base.Field.Operations
          SurfaceOrganicMatter: InitialResidueName=wheat_stubble; InitialResidueType=wheat; InitialResidueMass=500; InitialStandingFraction=0; InitialCPR=0; InitialCNR=100
          Plant Wheat
          MicroClimate: a_interception=0; b_interception=1; c_interception=0; d_interception=0; SoilHeatFluxFraction=0.4; MinimumHeightDiffForNewLayer=0; NightInterceptionFraction=0.5; ReferenceHeight=2
          Report DailyReport
          Soil: SoilType=Sandy Loam; Site=Tarlee; NearestTown=Tarlee; Region=Mid North; State=South Australia; Country=Australia; ApsoilNumber=610; Latitude=-34.276; Longitude=138.759; LocationAccuracy=+/- 20m
            DataSource=Characterisation 2008 by University of Adelaide, CSIRO Sustainable Ecosystems and Allan Mayfield Consulting, Clare, SA
            Comments=LB Code:TAR; Strongly duplex low-moderate clay soil. Surface CEC low, moderate below. Texture change at about 7cm. Little chemical impediment to root growth, but high ESP below about 60cm may result in slaking or dispersion and high bulk density. DM Descr
            Physical
              Thickness  ParticleSizeSand  ParticleSizeSilt  ParticleSizeClay  Rocks  BD    AirDry  LL15   DUL    SAT
              100        5                 65                30                0      1.54  0.055   0.11   0.223  0.389
              200        5                 65                30                0      1.41  0.167   0.209  0.388  0.438
              300        5                 65                30                0      1.53  0.22    0.22   0.342  0.393
              300        5                 65                30                0      1.57  0.22    0.22   0.293  0.378
              350        5                 65                30                0      1.6   0.22    0.22   0.264  0.366
              Rocks, ParticleSizeSand, ParticleSizeSilt, ParticleSizeClay source: Calculated
              SoilCrop wheatSoil: LL=[0.11, 0.209, 0.24, 0.225, 0.222]; KL=[0.06, 0.06, 0.06, 0.04, 0.04]; XF=[1, 1, 1, 1, 1]
            WaterBalance SoilWater: SummerDate=1-Nov; SummerU=6; SummerCona=3.5; WinterDate=1-Apr; WinterU=2; WinterCona=2; DiffusConst=88; DiffusSlope=35; Salb=0.13; CN2Bare=73; CNRed=20; CNCov=0.8; PSIDul=-100; Thickness=[100, 200, 300, 300, 350]; SWCON=[0.5, 0.5, 0.5, 0.5, 0.5]
            Organic: FOMCNRatio=40; CarbonUnits=Total
              Thickness  Carbon  SoilCNRatio  FBiom  FInert  FOM
              100        1.16    12           0.04   0.4     469.511
              200        0.75    12           0.02   0.5     290.526
              300        0.36    12           0.02   0.7     141.414
              300        0.12    12           0.02   1       68.8336
              350        0.12    12           0.01   1       29.7162
            Chemical: Thickness=[100, 200, 300, 300, 350]; PH=[7, 7.9, 8.9, 9.2, 9.2]; PHUnits=Water
            Water: Thickness=[100, 200, 300, 300, 350]; InitialValues=[0.223, 0.388, 0.342, 0.293, 0.264]; FilledFromTop=true
            Nutrient
            Solute NO3: Thickness=[100, 200, 300, 300, 350]; InitialValues=[0, 1, 1, 1, 1]; InitialValuesUnits=ppm; WaterTableConcentration=0; D0=0; DepthConstant=0; MaxDepthSoluteAccessible=0; RunoffEffectivenessAtMovingSolute=0; MaxEffectiveRunoff=0
            Solute NH4: Thickness=[100, 200, 300, 300, 350]; InitialValues=[0, 0.2, 0.2, 0.2, 0.2]; InitialValuesUnits=ppm; WaterTableConcentration=0; D0=0; DepthConstant=0; MaxDepthSoluteAccessible=0; RunoffEffectivenessAtMovingSolute=0; MaxEffectiveRunoff=0
            Solute Urea: Thickness=[100, 200, 300, 300, 350]; InitialValues=[0, 0, 0, 0, 0]; InitialValuesUnits=kg/ha; WaterTableConcentration=0; D0=0; DepthConstant=0; MaxDepthSoluteAccessible=0; RunoffEffectivenessAtMovingSolute=0; MaxEffectiveRunoff=0
            SoilTemperature Temperature
          Report HarvestReport
          Operations HarvestingRule
            2011-12-28  [Wheat].Harvest()
        Manager LocationInfo: same as NPIValidation.BYIE_08RS.BYIE_08RS.LocationInfo
    Experiment Tamworth1992
      Memo
        This dataset includes observed flowering date for five cultivars (Batavia, Hartog, Sunbri, Sunco, Suneca) for a range planting dates at Tamworth.
      Factors
        Permutation
          Factor Cv
            Specification=[Sowing].Script.CultivarName = Batavia, Hartog, Sunbri, Sunco, Suneca
          Factor TOS
            Specification=[Sowing].Script.SowDate = 19-Apr, 26-Apr, 3-May, 10-May, 17-May, 24-May, 31-May, 7-Jun, 14-Jun, 21-Jun, 28-Jun, 5-Jul, 12-Jul, 19-Jul, 26-Jul
      Simulation Tamworth1992Base
        Clock: Start=1992-04-01; End=1992-12-31
        Summary summaryfile
        Weather: FileName=%root%/Tests/Validation/Wheat/met/Tamworth1992.met
        SoilArbitrator Soil Arbitrator
        Zone Field: same as Phenology1996.Goondiwindi1996.Goondiwindi1996Base.Field
        Manager LocationInfo: same as NPIValidation.BYIE_08NB.BYIE_08NB.LocationInfo
    Folder Griffith
      Memo
        This dataset from [Stapper1990] includes observed phenological data for range of cultivars, three of which have been used here (Yecora, Egret, Hartog).  Planting dates from 1983 and 1984 provide a range of climatic conditions.
      Experiment Griffith1983
        Factors
          Permutation
            Factor Cv: Specification=[Sowing].Script.CultivarName = Yecora, Egret
            Factor TOS
              Specification=[Sowing].Script.SowDate = 15-Apr, 12-May, 17-Jun, 11-Aug, 23-Sep
        Simulation Griffith1983Base
          Clock: Start=1983-04-01; End=1984-01-31
          Summary summaryfile
          Weather: FileName=%root%/Tests/Validation/Wheat/met/Griffith1983.met
          SoilArbitrator Soil Arbitrator
          Zone Field: same as Phenology1996.Goondiwindi1996.Goondiwindi1996Base.Field
          Manager LocationInfo
            Country = Australia
            State = New South Wales
            Region = NSW Central Zone
            script: same as in FARAwardPhenology.FARAwardPhenology.Simulation.LocationInfo
      Experiment Griffith1984
        Factors
          Permutation
            Factor Cv: Specification=[Sowing].Script.CultivarName = Hartog, Yecora, Egret
            Factor TOS: Specification=[Sowing].Script.SowDate = 18-May, 3-Jul
        Simulation Griffith1984Base
          Clock: Start=1984-04-01; End=1984-12-31
          Summary summaryfile
          Weather: FileName=%root%/Tests/Validation/Wheat/met/Griffith1983.met
          SoilArbitrator Soil Arbitrator
          Zone Field: same as Phenology1996.Goondiwindi1996.Goondiwindi1996Base.Field
          Manager LocationInfo: same as Southern Australia.Griffith.Griffith1983.Griffith1983Base.LocationInfo
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